! OpenDSS script generated from multiconductor network
Clear

New Circuit.mc_network basekv=33.0 pu=1.000000 angle=0.00 frequency=60.0 phases=3 Mvasc3=1.08895e+06 Mvasc1=362982
~ bus1=-8888882190593.1.2.3

! Line codes
New LineCode.336_ACSR_3PH_33KV_3 nphases=3 units=km Rmatrix=[ 0.000829 | 0 0.000829 | 0 0 0.000829 ] Xmatrix=[ 0.001856 | 0 0.001856 | 0 0 0.001856 ] Cmatrix=[ 0 | 0 0 | 0 0 0 ]
New LineCode.1/0_ACSR_3PH_33KV_3 nphases=3 units=km Rmatrix=[ 0.086388 | 0 0.086388 | 0 0 0.086388 ] Xmatrix=[ 0.068782 | 0 0.068782 | 0 0 0.068782 ] Cmatrix=[ 0 | 0 0 | 0 0 0 ]
New LineCode.1500_JCN_3PH_33KV_3 nphases=3 units=km Rmatrix=[ 0.019634 | 0 0.019634 | 0 0 0.019634 ] Xmatrix=[ 0.035624 | 0 0.035624 | 0 0 0.035624 ] Cmatrix=[ 0 | 0 0 | 0 0 0 ]
New LineCode.1500_CLP_3PH_33KV_3 nphases=3 units=km Rmatrix=[ 0.0408 | 0 0.0408 | 0 0 0.0408 ] Xmatrix=[ 0.074029 | 0 0.074029 | 0 0 0.074029 ] Cmatrix=[ 0 | 0 0 | 0 0 0 ]
New LineCode.653_ACSR_3PH_33KV_3 nphases=3 units=km Rmatrix=[ 0.000439 | 0 0.000439 | 0 0 0.000439 ] Xmatrix=[ 0.001704 | 0 0.001704 | 0 0 0.001704 ] Cmatrix=[ 0 | 0 0 | 0 0 0 ]
New LineCode.2_CU_3PH_33KV_3 nphases=3 units=km Rmatrix=[ 0.010043 | 0 0.010043 | 0 0 0.010043 ] Xmatrix=[ 0.008168 | 0 0.008168 | 0 0 0.008168 ] Cmatrix=[ 0 | 0 0 | 0 0 0 ]
New LineCode.2_ACSR_3PH_33KV_3 nphases=3 units=km Rmatrix=[ 0.005384 | 0 0.005384 | 0 0 0.005384 ] Xmatrix=[ 0.002895 | 0 0.002895 | 0 0 0.002895 ] Cmatrix=[ 0 | 0 0 | 0 0 0 ]
New LineCode.4/0_CLP_3PH_33KV_3 nphases=3 units=km Rmatrix=[ 0.01204 | 0 0.01204 | 0 0 0.01204 ] Xmatrix=[ 0.005989 | 0 0.005989 | 0 0 0.005989 ] Cmatrix=[ 0 | 0 0 | 0 0 0 ]
New LineCode.336_ATW_3PH_33KV_3 nphases=3 units=km Rmatrix=[ 1e-05 | 0 1e-05 | 0 0 1e-05 ] Xmatrix=[ 1e-05 | 0 1e-05 | 0 0 1e-05 ] Cmatrix=[ 0 | 0 0 | 0 0 0 ]
New LineCode.1000_CLP_3PH_33KV_3 nphases=3 units=km Rmatrix=[ 1e-05 | 0 1e-05 | 0 0 1e-05 ] Xmatrix=[ 1e-05 | 0 1e-05 | 0 0 1e-05 ] Cmatrix=[ 0 | 0 0 | 0 0 0 ]
New LineCode.350_CLP_3PH_33KV_3 nphases=3 units=km Rmatrix=[ 1e-05 | 0 1e-05 | 0 0 1e-05 ] Xmatrix=[ 1e-05 | 0 1e-05 | 0 0 1e-05 ] Cmatrix=[ 0 | 0 0 | 0 0 0 ]
New LineCode.954_ACSR_3PH_33KV_3 nphases=3 units=km Rmatrix=[ 1e-05 | 0 1e-05 | 0 0 1e-05 ] Xmatrix=[ 1e-05 | 0 1e-05 | 0 0 1e-05 ] Cmatrix=[ 0 | 0 0 | 0 0 0 ]
New LineCode.2_AL_3PH_33KV_3 nphases=3 units=km Rmatrix=[ 1e-05 | 0 1e-05 | 0 0 1e-05 ] Xmatrix=[ 1e-05 | 0 1e-05 | 0 0 1e-05 ] Cmatrix=[ 0 | 0 0 | 0 0 0 ]
New LineCode.4/0_JCN_3PH_33KV_3 nphases=3 units=km Rmatrix=[ 0.172184 | 0 0.172184 | 0 0 0.172184 ] Xmatrix=[ 0.085656 | 0 0.085656 | 0 0 0.085656 ] Cmatrix=[ 0 | 0 0 | 0 0 0 ]
New LineCode.1/0_CLP_3PH_33KV_3 nphases=3 units=km Rmatrix=[ 0.038227 | 0 0.038227 | 0 0 0.038227 ] Xmatrix=[ 0.01165 | 0 0.01165 | 0 0 0.01165 ] Cmatrix=[ 0 | 0 0 | 0 0 0 ]

! Lines
New Line.4887193E$ND223220614 phases=3 Bus1=223220614.1.2.3 Bus2=223220624.1.2.3 LineCode=336_ACSR_3PH_33KV_3 Length=0.040926 units=km
New Line.RCSG700$157590295 phases=3 Bus1=157589875.1.2.3 Bus2=157590300.1.2.3 LineCode=1/0_ACSR_3PH_33KV_3 Length=0.009645 units=km
New Line.061E$GS0475-1 phases=3 Bus1=241554270.1.2.3 Bus2=241554315.1.2.3 LineCode=1500_JCN_3PH_33KV_3 Length=0.070425 units=km
New Line.ND71143347$ND206797561 phases=3 Bus1=71143347.1.2.3 Bus2=206797561.1.2.3 LineCode=336_ACSR_3PH_33KV_3 Length=0.008716 units=km
New Line.ND206797561$947E phases=3 Bus1=206797561.1.2.3 Bus2=71143325.1.2.3 LineCode=336_ACSR_3PH_33KV_3 Length=0.060561 units=km
New Line.4500015EPH$2329651EPH phases=3 Bus1=60976755.1.2.3 Bus2=60976785.1.2.3 LineCode=1500_CLP_3PH_33KV_3 Length=0.339009 units=km
New Line.2329545E$GS6036-1 phases=3 Bus1=60976523.1.2.3 Bus2=208907546.1.2.3 LineCode=1500_CLP_3PH_33KV_3 Length=0.641025 units=km
New Line.RCS0401$2329651EPH phases=3 Bus1=60976784.1.2.3 Bus2=60977473.1.2.3 LineCode=653_ACSR_3PH_33KV_3 Length=0.254065 units=km
New Line.823E$RCS0411 phases=3 Bus1=71143359.1.2.3 Bus2=60977695.1.2.3 LineCode=2_CU_3PH_33KV_3 Length=0.595968 units=km
New Line.RCS0401$ND165921810 phases=3 Bus1=60977472.1.2.3 Bus2=165921810.1.2.3 LineCode=653_ACSR_3PH_33KV_3 Length=0.004064 units=km
New Line.RCS0411$ND60977800 phases=3 Bus1=60977696.1.2.3 Bus2=60977800.1.2.3 LineCode=2_CU_3PH_33KV_3 Length=0.063737 units=km
New Line.ND165921810$ND60977818 phases=3 Bus1=165921810.1.2.3 Bus2=60977818.1.2.3 LineCode=653_ACSR_3PH_33KV_3 Length=0.482504 units=km
New Line.ND60977800$RCS0412 phases=3 Bus1=60977800.1.2.3 Bus2=60645322.1.2.3 LineCode=2_CU_3PH_33KV_3 Length=0.016789 units=km
New Line.ND60977818$1821789E phases=3 Bus1=60977818.1.2.3 Bus2=60976492.1.2.3 LineCode=653_ACSR_3PH_33KV_3 Length=0.017024 units=km
New Line.ND60977818$2329545E phases=3 Bus1=60977818.1.2.3 Bus2=60976522.1.2.3 LineCode=2_ACSR_3PH_33KV_3 Length=0.0024 units=km
New Line.ND60977800$ND60977979 phases=3 Bus1=60977800.1.2.3 Bus2=60977979.1.2.3 LineCode=2_ACSR_3PH_33KV_3 Length=0.822267 units=km
New Line.ND60977979$ND60977190 phases=3 Bus1=60977979.1.2.3 Bus2=60977126.1.2.3 LineCode=2_ACSR_3PH_33KV_3 Length=0.012979 units=km
New Line.157590295$WDT684 phases=3 Bus1=157590300.1.2.3 Bus2=-777777157590300.1.2.3 LineCode=1/0_ACSR_3PH_33KV_3 Length=0.0165 units=km
New Line.230750977$WDT1130QFC phases=3 Bus1=230750979.1.2.3 Bus2=-777777230750979.1.2.3 LineCode=336_ACSR_3PH_33KV_3 Length=0.045698 units=km
New Line.ND11560329$1821789E phases=3 Bus1=60976493.1.2.3 Bus2=-77777760976493.1.2.3 LineCode=4/0_CLP_3PH_33KV_3 Length=0.03718 units=km
New Line.4805608E$5316461 phases=3 Bus1=160827729.1.2.3 Bus2=-777777160827729.1.2.3 LineCode=336_ACSR_3PH_33KV_3 Length=0.030603 units=km
New Line.ND223220614$RCS0545 phases=3 Bus1=223220614.1.2.3 Bus2=223220669.1.2.3 LineCode=336_ATW_3PH_33KV_3 Length=0.076424 units=km
New Line.RCS0545$230750977 phases=3 Bus1=223220670.1.2.3 Bus2=230750979.1.2.3 LineCode=336_ATW_3PH_33KV_3 Length=0.053785 units=km
New Line.RCS0429-1$587E phases=3 Bus1=102405945.1.2.3 Bus2=102429105.1.2.3 LineCode=1000_CLP_3PH_33KV_3 Length=0.38516 units=km
New Line.823E$947E phases=3 Bus1=71143326.1.2.3 Bus2=71143360.1.2.3 LineCode=350_CLP_3PH_33KV_3 Length=0.060561 units=km
New Line.ND60978000$587E phases=3 Bus1=102429104.1.2.3 Bus2=60978000.1.2.3 LineCode=954_ACSR_3PH_33KV_3 Length=0.194787 units=km
New Line.ND60978000$ND71143347 phases=3 Bus1=60978000.1.2.3 Bus2=71143347.1.2.3 LineCode=954_ACSR_3PH_33KV_3 Length=0.13031 units=km
New Line.ND71143347$4500015EPH phases=3 Bus1=71143347.1.2.3 Bus2=60976754.1.2.3 LineCode=954_ACSR_3PH_33KV_3 Length=0.101763 units=km
New Line.GS0404-2$ND10705692 phases=3 Bus1=60976575.1.2.3 Bus2=-77777760976575.1.2.3 LineCode=1500_CLP_3PH_33KV_3 Length=0.095158 units=km
New Line.177306340$WDT440 phases=3 Bus1=177306342.1.2.3 Bus2=-777777177306342.1.2.3 LineCode=336_ACSR_3PH_33KV_3 Length=0.082982 units=km
New Line.CHINOCYN$ND168768653 phases=3 Bus1=168768653.1.2.3 Bus2=-777777168768653.1.2.3 LineCode=2_ACSR_3PH_33KV_3 Length=0.015736 units=km
New Line.ND60977985$ND60977986 phases=3 Bus1=60977985.1.2.3 Bus2=-77777760977985.1.2.3 LineCode=1/0_ACSR_3PH_33KV_3 Length=0.089875 units=km
New Line.ND60977985$ND11927109 phases=3 Bus1=60977985.1.2.3 Bus2=-77777760977985.1.2.3 LineCode=1/0_ACSR_3PH_33KV_3 Length=0.09613 units=km
New Line.WDT1275$242274485 phases=3 Bus1=242274483.1.2.3 Bus2=-777777242274483.1.2.3 LineCode=954_ACSR_3PH_33KV_3 Length=0.041592 units=km
New Line.6723E$PS0711 phases=3 Bus1=69159866.1.2.3 Bus2=236493037.1.2.3 LineCode=954_ACSR_3PH_33KV_3 Length=0.687047 units=km
New Line.PS0711$ND69159935 phases=3 Bus1=236493038.1.2.3 Bus2=69159935.1.2.3 LineCode=954_ACSR_3PH_33KV_3 Length=0.297559 units=km
New Line.ND210255870$V5650036 phases=3 Bus1=210255870.1.2.3 Bus2=210255856.1.2.3 LineCode=1000_CLP_3PH_33KV_3 Length=0.002408 units=km
New Line.PH838S$ND60977262 phases=3 Bus1=60977216.1.2.3 Bus2=168768310.1.2.3 LineCode=2_AL_3PH_33KV_3 Length=0.009302 units=km
New Line.PH838$ND168768301 phases=3 Bus1=168768287.1.2.3 Bus2=168768342.1.2.3 LineCode=2_AL_3PH_33KV_3 Length=0.012648 units=km
New Line.ND210255793$P5652098 phases=3 Bus1=210255793.1.2.3 Bus2=210255777.1.2.3 LineCode=1000_CLP_3PH_33KV_3 Length=0.002734 units=km
New Line.ND223220614$ND253422385 phases=3 Bus1=253422385.1.2.3 Bus2=223220614.1.2.3 LineCode=336_ATW_3PH_33KV_3 Length=0.158301 units=km
New Line.ND69159935$2201769E_ISO1 phases=3 Bus1=69159935.1.2.3 Bus2=158479606.1.2.3 LineCode=954_ACSR_3PH_33KV_3 Length=0.287078 units=km
New Line.ND69159935$ND211677286 phases=3 Bus1=69159935.1.2.3 Bus2=211677286.1.2.3 LineCode=954_ACSR_3PH_33KV_3 Length=0.038777 units=km
New Line.ND211677286$RCS0676 phases=3 Bus1=211677286.1.2.3 Bus2=211677185.1.2.3 LineCode=954_ACSR_3PH_33KV_3 Length=0.041288 units=km
New Line.2201769E_ISO1$ND176681588 phases=3 Bus1=158479607.1.2.3 Bus2=176681588.1.2.3 LineCode=954_ACSR_3PH_33KV_3 Length=0.361544 units=km
New Line.ND176681588$RCS1119 phases=3 Bus1=176681588.1.2.3 Bus2=211677234.1.2.3 LineCode=954_ACSR_3PH_33KV_3 Length=2.63489 units=km
New Line.RCS0676$ND60978010 phases=3 Bus1=211677184.1.2.3 Bus2=60978010.1.2.3 LineCode=954_ACSR_3PH_33KV_3 Length=0.001804 units=km
New Line.ND242274467$ND60978010 phases=3 Bus1=60978010.1.2.3 Bus2=242274467.1.2.3 LineCode=954_ACSR_3PH_33KV_3 Length=0.019315 units=km
New Line.RCS1119$ND211677269 phases=3 Bus1=211677233.1.2.3 Bus2=211677269.1.2.3 LineCode=954_ACSR_3PH_33KV_3 Length=0.014304 units=km
New Line.2328940E$ND242274467 phases=3 Bus1=242274467.1.2.3 Bus2=242274409.1.2.3 LineCode=954_ACSR_3PH_33KV_3 Length=0.03002 units=km
New Line.ND242274467$RCSG001 phases=3 Bus1=242274467.1.2.3 Bus2=242274434.1.2.3 LineCode=954_ACSR_3PH_33KV_3 Length=0.006786 units=km
New Line.ND211677269$874E phases=3 Bus1=211677269.1.2.3 Bus2=106444788.1.2.3 LineCode=954_ACSR_3PH_33KV_3 Length=2.57905 units=km
New Line.RCSG001$242274485 phases=3 Bus1=242274433.1.2.3 Bus2=242274483.1.2.3 LineCode=954_ACSR_3PH_33KV_3 Length=0.004989 units=km
New Line.ND60978085$525S phases=3 Bus1=197240827.1.2.3 Bus2=60978085.1.2.3 LineCode=336_ATW_3PH_33KV_3 Length=4.59051 units=km
New Line.ND60978085$BF01178 phases=3 Bus1=60978085.1.2.3 Bus2=211060652.1.2.3 LineCode=336_ATW_3PH_33KV_3 Length=0.009791 units=km
New Line.ND60978085$2329323E phases=3 Bus1=60978085.1.2.3 Bus2=223000417.1.2.3 LineCode=336_ATW_3PH_33KV_3 Length=0.576538 units=km
New Line.2329323E$PS6376 phases=3 Bus1=223000417.1.2.3 Bus2=265619743.1.2.3 LineCode=336_ATW_3PH_33KV_3 Length=0.115353 units=km
New Line.BF01178$4507503E phases=3 Bus1=211060653.1.2.3 Bus2=60976713.1.2.3 LineCode=336_ATW_3PH_33KV_3 Length=0.02814 units=km
New Line.ND176681588$ND176681710 phases=3 Bus1=176681588.1.2.3 Bus2=176681644.1.2.3 LineCode=336_ACSR_3PH_33KV_3 Length=0.120496 units=km
New Line.ND176681708$177306340 phases=3 Bus1=176681662.1.2.3 Bus2=177306342.1.2.3 LineCode=336_ACSR_3PH_33KV_3 Length=0.068429 units=km
New Line.GS6036-3$RCS6037-3 phases=3 Bus1=208907564.1.2.3 Bus2=205239487.1.2.3 LineCode=1500_CLP_3PH_33KV_3 Length=0.227712 units=km
New Line.525S$247S phases=3 Bus1=197240801.1.2.3 Bus2=197240828.1.2.3 LineCode=4/0_JCN_3PH_33KV_3 Length=0.531451 units=km
New Line.ND210255889$GS6036-4 phases=3 Bus1=208907573.1.2.3 Bus2=210255889.1.2.3 LineCode=1500_CLP_3PH_33KV_3 Length=2.12336 units=km
New Line.ND210255870$ND210255889 phases=3 Bus1=210255889.1.2.3 Bus2=210255870.1.2.3 LineCode=1500_CLP_3PH_33KV_3 Length=0.048311 units=km
New Line.RCS0404-1$ND210255870 phases=3 Bus1=210255870.1.2.3 Bus2=60976567.1.2.3 LineCode=1500_CLP_3PH_33KV_3 Length=0.005792 units=km
New Line.RCS0404-3$ND210255903 phases=3 Bus1=60976583.1.2.3 Bus2=210255903.1.2.3 LineCode=1500_CLP_3PH_33KV_3 Length=0.023896 units=km
New Line.ND210255903$ND184101040 phases=3 Bus1=210255903.1.2.3 Bus2=184101040.1.2.3 LineCode=1500_CLP_3PH_33KV_3 Length=1.31654 units=km
New Line.1556315E$ND184101040 phases=3 Bus1=184101040.1.2.3 Bus2=60977048.1.2.3 LineCode=1/0_CLP_3PH_33KV_3 Length=0.054123 units=km
New Line.ND210255793$874E phases=3 Bus1=102405899.1.2.3 Bus2=210255793.1.2.3 LineCode=1500_CLP_3PH_33KV_3 Length=0.845803 units=km
New Line.RCS0429-3$ND210255793 phases=3 Bus1=210255793.1.2.3 Bus2=102405961.1.2.3 LineCode=1500_CLP_3PH_33KV_3 Length=0.014821 units=km
New Line.ND236827272$ND253422385 phases=3 Bus1=236827272.1.2.3 Bus2=253422385.1.2.3 LineCode=336_ACSR_3PH_33KV_3 Length=0.334702 units=km
New Line.ND157589898$RCSG700 phases=3 Bus1=157589898.1.2.3 Bus2=157589876.1.2.3 LineCode=1/0_ACSR_3PH_33KV_3 Length=0.025524 units=km
New Line.ND60977839$ND60978010 phases=3 Bus1=60978010.1.2.3 Bus2=60977839.1.2.3 LineCode=653_ACSR_3PH_33KV_3 Length=1.0342 units=km
New Line.ND60977839$RCS0675 phases=3 Bus1=60977839.1.2.3 Bus2=211677132.1.2.3 LineCode=336_ACSR_3PH_33KV_3 Length=0.050826 units=km
New Line.ND60977839$4323787E phases=3 Bus1=60977839.1.2.3 Bus2=60976478.1.2.3 LineCode=336_ACSR_3PH_33KV_3 Length=0.033948 units=km
New Line.4323787E$ND60976439 phases=3 Bus1=60976478.1.2.3 Bus2=60976359.1.2.3 LineCode=336_ACSR_3PH_33KV_3 Length=0.130718 units=km
New Line.RCS0675$ND211677300 phases=3 Bus1=211677131.1.2.3 Bus2=211677300.1.2.3 LineCode=336_ACSR_3PH_33KV_3 Length=0.003293 units=km
New Line.ND60977188$ND60978268 phases=3 Bus1=60977108.1.2.3 Bus2=60978268.1.2.3 LineCode=2_ACSR_3PH_33KV_3 Length=0.012794 units=km
New Line.ND60978268$247S phases=3 Bus1=60978268.1.2.3 Bus2=197240800.1.2.3 LineCode=2_ACSR_3PH_33KV_3 Length=0.14049 units=km
New Line.PS6376$ND168768253 phases=3 Bus1=265619744.1.2.3 Bus2=168768253.1.2.3 LineCode=2_ACSR_3PH_33KV_3 Length=0.070467 units=km
New Line.ND168768653$ND168768253 phases=3 Bus1=168768253.1.2.3 Bus2=168768653.1.2.3 LineCode=2_ACSR_3PH_33KV_3 Length=0.097753 units=km
New Line.ND168768253$PH838S phases=3 Bus1=168768253.1.2.3 Bus2=60977215.1.2.3 LineCode=2_ACSR_3PH_33KV_3 Length=0.082017 units=km
New Line.PH838$ND168768653 phases=3 Bus1=168768653.1.2.3 Bus2=168768270.1.2.3 LineCode=2_ACSR_3PH_33KV_3 Length=0.097753 units=km
New Line.1556315E$ND60977985 phases=3 Bus1=60977047.1.2.3 Bus2=60977985.1.2.3 LineCode=1/0_ACSR_3PH_33KV_3 Length=0.109997 units=km
New Line.ND211677300$ND236827272 phases=3 Bus1=211677300.1.2.3 Bus2=236827272.1.2.3 LineCode=336_ACSR_3PH_33KV_3 Length=1.1032 units=km
New Line.ND236827272$ND157589898 phases=3 Bus1=236827272.1.2.3 Bus2=157589898.1.2.3 LineCode=336_ACSR_3PH_33KV_3 Length=0.069454 units=km
New Line.ND60976441$4805608E phases=3 Bus1=60976377.1.2.3 Bus2=160827729.1.2.3 LineCode=336_ACSR_3PH_33KV_3 Length=0.008319 units=km
New Line.ND157589898$061E phases=3 Bus1=157589898.1.2.3 Bus2=241554264.1.2.3 LineCode=336_ACSR_3PH_33KV_3 Length=0.004447 units=km
New Line.6723E$18094 phases=3 Bus1=-8888882190593.1.2.3 Bus2=69159867.1.2.3 LineCode=1500_JCN_3PH_33KV_3 Length=0.219598 units=km

! Switches
New Line.60976403$PDRAR0552-D phases=3 Bus1=60976377.1.2.3 Bus2=60976353.1.2.3 switch=y r1=0.001 x1=0.001 r0=0.001 x0=0.001 Length=0.001 units=km
New Line.RCS0429-2$102405959 phases=3 Bus1=102405938.1.2.3 Bus2=102405932.1.2.3 switch=y r1=0.001 x1=0.001 r0=0.001 x0=0.001 Length=0.001 units=km
New Line.102405943$RCS0429-2 phases=3 Bus1=102405932.1.2.3 Bus2=102405931.1.2.3 switch=y r1=0.001 x1=0.001 r0=0.001 x0=0.001 Length=0.001 units=km
New Line.241554313$241554321 phases=3 Bus1=241554301.1.2.3 Bus2=241554302.1.2.3 switch=y r1=0.001 x1=0.001 r0=0.001 x0=0.001 Length=0.001 units=km
New Line.241554321$241554329 phases=3 Bus1=241554302.1.2.3 Bus2=241554308.1.2.3 switch=y r1=0.001 x1=0.001 r0=0.001 x0=0.001 Length=0.001 units=km
New Line.60977152$D phases=3 Bus1=60977126.1.2.3 Bus2=60977102.1.2.3 switch=y r1=0.001 x1=0.001 r0=0.001 x0=0.001 Length=0.001 units=km
New Line.60977152$C phases=3 Bus1=60977126.1.2.3 Bus2=60977127.1.2.3 switch=y r1=0.001 x1=0.001 r0=0.001 x0=0.001 Length=0.001 units=km
New Line.4823062E:RCSG700 phases=3 Bus1=157589876.1.2.3 Bus2=157589875.1.2.3 switch=y r1=0.001 x1=0.001 r0=0.001 x0=0.001 Length=0.001 units=km
New Line.5316461E:PDRAR0552-D phases=3 Bus1=60976353.1.2.3 Bus2=60976354.1.2.3 switch=y r1=0.001 x1=0.001 r0=0.001 x0=0.001 Length=0.001 units=km
New Line.4887194E:RCS0545 phases=3 Bus1=223220669.1.2.3 Bus2=223220670.1.2.3 switch=y r1=0.001 x1=0.001 r0=0.001 x0=0.001 Length=0.001 units=km
New Line.5586057:RCS0429-1 phases=3 Bus1=102405931.1.2.3 Bus2=102405945.1.2.3 switch=y r1=0.001 x1=0.001 r0=0.001 x0=0.001 Length=0.001 units=km
New Line.5722965:GS0475-1 phases=3 Bus1=241554315.1.2.3 Bus2=241554301.1.2.3 switch=y r1=0.001 x1=0.001 r0=0.001 x0=0.001 Length=0.001 units=km
New Line.4816881E:RCS0401 phases=3 Bus1=60977473.1.2.3 Bus2=60977472.1.2.3 switch=y r1=0.001 x1=0.001 r0=0.001 x0=0.001 Length=0.001 units=km
New Line.4183548E:RCS0411 phases=3 Bus1=60977695.1.2.3 Bus2=60977696.1.2.3 switch=y r1=0.001 x1=0.001 r0=0.001 x0=0.001 Length=0.001 units=km
New Line.5650043:GS6036-1 phases=3 Bus1=208907546.1.2.3 Bus2=208907525.1.2.3 switch=y r1=0.001 x1=0.001 r0=0.001 x0=0.001 Length=0.001 units=km
New Line.4823061E:061E phases=3 Bus1=241554264.1.2.3 Bus2=241554270.1.2.3 switch=y r1=0.001 x1=0.001 r0=0.001 x0=0.001 Length=0.001 units=km
New Line.4500587E:587E phases=3 Bus1=102429105.1.2.3 Bus2=102429104.1.2.3 switch=y r1=0.001 x1=0.001 r0=0.001 x0=0.001 Length=0.001 units=km
New Line.4500015E:4500015EPH phases=3 Bus1=60976754.1.2.3 Bus2=60976755.1.2.3 switch=y r1=0.001 x1=0.001 r0=0.001 x0=0.001 Length=0.001 units=km
New Line.2204947E:947E phases=3 Bus1=71143325.1.2.3 Bus2=71143326.1.2.3 switch=y r1=0.001 x1=0.001 r0=0.001 x0=0.001 Length=0.001 units=km
New Line.2329651E:2329651EPH phases=3 Bus1=60976785.1.2.3 Bus2=60976784.1.2.3 switch=y r1=0.001 x1=0.001 r0=0.001 x0=0.001 Length=0.001 units=km
New Line.4493823E:823E phases=3 Bus1=71143360.1.2.3 Bus2=71143359.1.2.3 switch=y r1=0.001 x1=0.001 r0=0.001 x0=0.001 Length=0.001 units=km
New Line.1821789E:1821789E phases=3 Bus1=60976492.1.2.3 Bus2=60976493.1.2.3 switch=y r1=0.001 x1=0.001 r0=0.001 x0=0.001 Length=0.001 units=km
New Line.2329545E:2329545E phases=3 Bus1=60976522.1.2.3 Bus2=60976523.1.2.3 switch=y r1=0.001 x1=0.001 r0=0.001 x0=0.001 Length=0.001 units=km
New Line.293588A3E4F7EE34E0637F61810A7CE3 phases=3 Bus1=242274409.1.2.3 Bus2=-777777242274409.1.2.3 switch=y r1=0.001 x1=0.001 r0=0.001 x0=0.001 Length=0.001 units=km
New Line.CAB_4805608E:4805608E phases=3 Bus1=160827729.1.2.3 Bus2=160827712.1.2.3 switch=y r1=0.001 x1=0.001 r0=0.001 x0=0.001 Length=0.001 units=km
New Line.293588A3E550EE34E0637F61810A7CE3 phases=3 Bus1=223220624.1.2.3 Bus2=-777777223220624.1.2.3 switch=y r1=0.001 x1=0.001 r0=0.001 x0=0.001 Length=0.001 units=km
New Line.5002622:RCS6037-3 phases=3 Bus1=205239487.1.2.3 Bus2=-777777205239487.1.2.3 switch=y r1=0.001 x1=0.001 r0=0.001 x0=0.001 Length=0.001 units=km enabled=false
New Line.4805608E:160827710 phases=3 Bus1=160827712.1.2.3 Bus2=160827713.1.2.3 switch=y r1=0.001 x1=0.001 r0=0.001 x0=0.001 Length=0.001 units=km
New Line.TRAM$GREENER_GS0475-2$GS0475-2 phases=3 Bus1=241554323.1.2.3 Bus2=-777777241554323.1.2.3 switch=y r1=0.001 x1=0.001 r0=0.001 x0=0.001 Length=0.001 units=km
New Line.TRAM$GREENER_GS0475-3$GS0475-3 phases=3 Bus1=241554331.1.2.3 Bus2=-777777241554331.1.2.3 switch=y r1=0.001 x1=0.001 r0=0.001 x0=0.001 Length=0.001 units=km
New Line.TRAM$TOWNHALL_RCS0412$RCS0412 phases=3 Bus1=60645321.1.2.3 Bus2=-77777760645321.1.2.3 switch=y r1=0.001 x1=0.001 r0=0.001 x0=0.001 Length=0.001 units=km
New Line.5316461E:RAR0552 phases=3 Bus1=60976341.1.2.3 Bus2=60976342.1.2.3 switch=y r1=0.001 x1=0.001 r0=0.001 x0=0.001 Length=0.001 units=km
New Line.5586057:RCS0429-2 phases=3 Bus1=102405932.1.2.3 Bus2=102405953.1.2.3 switch=y r1=0.001 x1=0.001 r0=0.001 x0=0.001 Length=0.001 units=km enabled=false
New Line.RAR0552$PDRAR0552-D phases=3 Bus1=60976342.1.2.3 Bus2=60976354.1.2.3 switch=y r1=0.001 x1=0.001 r0=0.001 x0=0.001 Length=0.001 units=km
New Line.5722965:GS0475-2 phases=3 Bus1=241554302.1.2.3 Bus2=241554323.1.2.3 switch=y r1=0.001 x1=0.001 r0=0.001 x0=0.001 Length=0.001 units=km enabled=false
New Line.5722965:GS0475-3 phases=3 Bus1=241554308.1.2.3 Bus2=241554331.1.2.3 switch=y r1=0.001 x1=0.001 r0=0.001 x0=0.001 Length=0.001 units=km enabled=false
New Line.4183549E:RCS0412 phases=3 Bus1=60645322.1.2.3 Bus2=60645321.1.2.3 switch=y r1=0.001 x1=0.001 r0=0.001 x0=0.001 Length=0.001 units=km enabled=false
New Line.PDRAR0552-B$RAR0552 phases=3 Bus1=60976348.1.2.3 Bus2=60976341.1.2.3 switch=y r1=0.001 x1=0.001 r0=0.001 x0=0.001 Length=0.001 units=km
New Line.2201769E:2201769E_ISO1 phases=3 Bus1=158479606.1.2.3 Bus2=158479607.1.2.3 switch=y r1=0.001 x1=0.001 r0=0.001 x0=0.001 Length=0.001 units=km
New Line.4323787E:60976458 phases=3 Bus1=60976460.1.2.3 Bus2=60976461.1.2.3 switch=y r1=0.001 x1=0.001 r0=0.001 x0=0.001 Length=0.001 units=km
New Line.2329323E:223000396 phases=3 Bus1=223000398.1.2.3 Bus2=223000399.1.2.3 switch=y r1=0.001 x1=0.001 r0=0.001 x0=0.001 Length=0.001 units=km
New Line.4507503E:60976695 phases=3 Bus1=60976697.1.2.3 Bus2=60976698.1.2.3 switch=y r1=0.001 x1=0.001 r0=0.001 x0=0.001 Length=0.001 units=km
New Line.176681684$PDRAR0058-B phases=3 Bus1=176681644.1.2.3 Bus2=176681632.1.2.3 switch=y r1=0.001 x1=0.001 r0=0.001 x0=0.001 Length=0.001 units=km
New Line.176681684$PDRAR0058-C phases=3 Bus1=176681644.1.2.3 Bus2=176681645.1.2.3 switch=y r1=0.001 x1=0.001 r0=0.001 x0=0.001 Length=0.001 units=km
New Line.PDRAR0058-B$RAR0058 phases=3 Bus1=176681633.1.2.3 Bus2=176681626.1.2.3 switch=y r1=0.001 x1=0.001 r0=0.001 x0=0.001 Length=0.001 units=km
New Line.176681688$PDRAR0058-C phases=3 Bus1=176681663.1.2.3 Bus2=176681662.1.2.3 switch=y r1=0.001 x1=0.001 r0=0.001 x0=0.001 Length=0.001 units=km
New Line.176681688$PDRAR0058-D phases=3 Bus1=176681662.1.2.3 Bus2=176681638.1.2.3 switch=y r1=0.001 x1=0.001 r0=0.001 x0=0.001 Length=0.001 units=km
New Line.60976399$PDRAR0552-B phases=3 Bus1=60976359.1.2.3 Bus2=60976347.1.2.3 switch=y r1=0.001 x1=0.001 r0=0.001 x0=0.001 Length=0.001 units=km
New Line.60976399$PDRAR0552-C phases=3 Bus1=60976359.1.2.3 Bus2=60976360.1.2.3 switch=y r1=0.001 x1=0.001 r0=0.001 x0=0.001 Length=0.001 units=km
New Line.208907543$GS6036-2 phases=3 Bus1=208907525.1.2.3 Bus2=208907526.1.2.3 switch=y r1=0.001 x1=0.001 r0=0.001 x0=0.001 Length=0.001 units=km
New Line.RAR0557$D phases=3 Bus1=60977103.1.2.3 Bus2=60977091.1.2.3 switch=y r1=0.001 x1=0.001 r0=0.001 x0=0.001 Length=0.001 units=km
New Line.60977148$C phases=3 Bus1=60977109.1.2.3 Bus2=60977108.1.2.3 switch=y r1=0.001 x1=0.001 r0=0.001 x0=0.001 Length=0.001 units=km
New Line.GS6036-2$208907561 phases=3 Bus1=208907526.1.2.3 Bus2=208907532.1.2.3 switch=y r1=0.001 x1=0.001 r0=0.001 x0=0.001 Length=0.001 units=km
New Line.60977148$B phases=3 Bus1=60977108.1.2.3 Bus2=60977096.1.2.3 switch=y r1=0.001 x1=0.001 r0=0.001 x0=0.001 Length=0.001 units=km
New Line.208907561$208907570 phases=3 Bus1=208907532.1.2.3 Bus2=208907538.1.2.3 switch=y r1=0.001 x1=0.001 r0=0.001 x0=0.001 Length=0.001 units=km
New Line.B$RAR0557 phases=3 Bus1=60977090.1.2.3 Bus2=60977097.1.2.3 switch=y r1=0.001 x1=0.001 r0=0.001 x0=0.001 Length=0.001 units=km
New Line.60976565$60976573 phases=3 Bus1=60976553.1.2.3 Bus2=60976554.1.2.3 switch=y r1=0.001 x1=0.001 r0=0.001 x0=0.001 Length=0.001 units=km
New Line.60976573$60976581 phases=3 Bus1=60976554.1.2.3 Bus2=60976560.1.2.3 switch=y r1=0.001 x1=0.001 r0=0.001 x0=0.001 Length=0.001 units=km
New Line.168768317$P5419607 phases=3 Bus1=168768310.1.2.3 Bus2=168768311.1.2.3 switch=y r1=0.001 x1=0.001 r0=0.001 x0=0.001 Length=0.001 units=km
New Line.168768349$P5419742 phases=3 Bus1=168768342.1.2.3 Bus2=168768343.1.2.3 switch=y r1=0.001 x1=0.001 r0=0.001 x0=0.001 Length=0.001 units=km
New Line.RAR0058$PDRAR0058-D phases=3 Bus1=176681627.1.2.3 Bus2=176681639.1.2.3 switch=y r1=0.001 x1=0.001 r0=0.001 x0=0.001 Length=0.001 units=km
New Line.60976403$PDRAR0552-C phases=3 Bus1=60976378.1.2.3 Bus2=60976377.1.2.3 switch=y r1=0.001 x1=0.001 r0=0.001 x0=0.001 Length=0.001 units=km
New Line.4615785E:PS0711 phases=3 Bus1=236493037.1.2.3 Bus2=236493038.1.2.3 switch=y r1=0.001 x1=0.001 r0=0.001 x0=0.001 Length=0.001 units=km
New Line.4825835E:RCS0676 phases=3 Bus1=211677185.1.2.3 Bus2=211677184.1.2.3 switch=y r1=0.001 x1=0.001 r0=0.001 x0=0.001 Length=0.001 units=km
New Line.4854660E:RCS1119 phases=3 Bus1=211677234.1.2.3 Bus2=211677233.1.2.3 switch=y r1=0.001 x1=0.001 r0=0.001 x0=0.001 Length=0.001 units=km
New Line.4798058E:PDRAR0058-B phases=3 Bus1=176681632.1.2.3 Bus2=176681633.1.2.3 switch=y r1=0.001 x1=0.001 r0=0.001 x0=0.001 Length=0.001 units=km
New Line.4798058E:PDRAR0058-C phases=3 Bus1=176681645.1.2.3 Bus2=176681663.1.2.3 switch=y r1=0.001 x1=0.001 r0=0.001 x0=0.001 Length=0.001 units=km enabled=false
New Line.2329797E:RCS0675 phases=3 Bus1=211677132.1.2.3 Bus2=211677131.1.2.3 switch=y r1=0.001 x1=0.001 r0=0.001 x0=0.001 Length=0.001 units=km
New Line.2328941E:RCSG001 phases=3 Bus1=242274434.1.2.3 Bus2=242274433.1.2.3 switch=y r1=0.001 x1=0.001 r0=0.001 x0=0.001 Length=0.001 units=km
New Line.4854652E:RAR0557_D phases=3 Bus1=60977102.1.2.3 Bus2=60977103.1.2.3 switch=y r1=0.001 x1=0.001 r0=0.001 x0=0.001 Length=0.001 units=km
New Line.4854652E:RAR0557_C phases=3 Bus1=60977127.1.2.3 Bus2=60977109.1.2.3 switch=y r1=0.001 x1=0.001 r0=0.001 x0=0.001 Length=0.001 units=km enabled=false
New Line.5650043:GS6036-3 phases=3 Bus1=208907532.1.2.3 Bus2=208907564.1.2.3 switch=y r1=0.001 x1=0.001 r0=0.001 x0=0.001 Length=0.001 units=km
New Line.4854652E:RAR0557_B phases=3 Bus1=60977096.1.2.3 Bus2=60977097.1.2.3 switch=y r1=0.001 x1=0.001 r0=0.001 x0=0.001 Length=0.001 units=km
New Line.5650043:GS6036-4 phases=3 Bus1=208907538.1.2.3 Bus2=208907573.1.2.3 switch=y r1=0.001 x1=0.001 r0=0.001 x0=0.001 Length=0.001 units=km
New Line.5650036:RCS0404-1 phases=3 Bus1=60976567.1.2.3 Bus2=60976553.1.2.3 switch=y r1=0.001 x1=0.001 r0=0.001 x0=0.001 Length=0.001 units=km
New Line.4507502E:PS6376 phases=3 Bus1=265619743.1.2.3 Bus2=265619744.1.2.3 switch=y r1=0.001 x1=0.001 r0=0.001 x0=0.001 Length=0.001 units=km
New Line.5650036:RCS0404-2 phases=3 Bus1=60976554.1.2.3 Bus2=60976575.1.2.3 switch=y r1=0.001 x1=0.001 r0=0.001 x0=0.001 Length=0.001 units=km
New Line.5650036:RCS0404-3 phases=3 Bus1=60976560.1.2.3 Bus2=60976583.1.2.3 switch=y r1=0.001 x1=0.001 r0=0.001 x0=0.001 Length=0.001 units=km
New Line.4798058E:PDRAR0058-D phases=3 Bus1=176681638.1.2.3 Bus2=176681639.1.2.3 switch=y r1=0.001 x1=0.001 r0=0.001 x0=0.001 Length=0.001 units=km
New Line.5316461E:PDRAR0552-B phases=3 Bus1=60976347.1.2.3 Bus2=60976348.1.2.3 switch=y r1=0.001 x1=0.001 r0=0.001 x0=0.001 Length=0.001 units=km
New Line.5316461E:PDRAR0552-C phases=3 Bus1=60976360.1.2.3 Bus2=60976378.1.2.3 switch=y r1=0.001 x1=0.001 r0=0.001 x0=0.001 Length=0.001 units=km enabled=false
New Line.5586057:RCS0429-3 phases=3 Bus1=102405961.1.2.3 Bus2=102405938.1.2.3 switch=y r1=0.001 x1=0.001 r0=0.001 x0=0.001 Length=0.001 units=km
New Line.4507504E:BF01178 phases=3 Bus1=211060652.1.2.3 Bus2=211060653.1.2.3 switch=y r1=0.001 x1=0.001 r0=0.001 x0=0.001 Length=0.001 units=km
New Line.4386723E:PH6723E phases=3 Bus1=69159867.1.2.3 Bus2=69159866.1.2.3 switch=y r1=0.001 x1=0.001 r0=0.001 x0=0.001 Length=0.001 units=km
New Line.4500874E:874E phases=3 Bus1=106444788.1.2.3 Bus2=102405899.1.2.3 switch=y r1=0.001 x1=0.001 r0=0.001 x0=0.001 Length=0.001 units=km
New Line.335247S:247S phases=3 Bus1=197240800.1.2.3 Bus2=197240801.1.2.3 switch=y r1=0.001 x1=0.001 r0=0.001 x0=0.001 Length=0.001 units=km
New Line.33525S:525S phases=3 Bus1=197240828.1.2.3 Bus2=197240827.1.2.3 switch=y r1=0.001 x1=0.001 r0=0.001 x0=0.001 Length=0.001 units=km
New Line.335838S:PH838S phases=3 Bus1=60977215.1.2.3 Bus2=60977216.1.2.3 switch=y r1=0.001 x1=0.001 r0=0.001 x0=0.001 Length=0.001 units=km
New Line.335838S:PH838 phases=3 Bus1=168768270.1.2.3 Bus2=168768287.1.2.3 switch=y r1=0.001 x1=0.001 r0=0.001 x0=0.001 Length=0.001 units=km
New Line.1556315E:1556315E phases=3 Bus1=60977048.1.2.3 Bus2=60977047.1.2.3 switch=y r1=0.001 x1=0.001 r0=0.001 x0=0.001 Length=0.001 units=km
New Line.CAB_4323787E:4323787E phases=3 Bus1=60976478.1.2.3 Bus2=60976460.1.2.3 switch=y r1=0.001 x1=0.001 r0=0.001 x0=0.001 Length=0.001 units=km
New Line.CAB_4507503E:4507503E phases=3 Bus1=60976713.1.2.3 Bus2=60976697.1.2.3 switch=y r1=0.001 x1=0.001 r0=0.001 x0=0.001 Length=0.001 units=km
New Line.CAB_2329323E:2329323E phases=3 Bus1=223000417.1.2.3 Bus2=223000398.1.2.3 switch=y r1=0.001 x1=0.001 r0=0.001 x0=0.001 Length=0.001 units=km
New Line.5650043:GS6036-2 phases=3 Bus1=208907526.1.2.3 Bus2=208907555.1.2.3 switch=y r1=0.001 x1=0.001 r0=0.001 x0=0.001 Length=0.001 units=km enabled=false
New Line.4798058E:RAR0058 phases=3 Bus1=176681626.1.2.3 Bus2=176681627.1.2.3 switch=y r1=0.001 x1=0.001 r0=0.001 x0=0.001 Length=0.001 units=km
New Line.4854652E:RAR0557 phases=3 Bus1=60977091.1.2.3 Bus2=60977090.1.2.3 switch=y r1=0.001 x1=0.001 r0=0.001 x0=0.001 Length=0.001 units=km

! Loads
New Load.4323787E_0 Bus1=-99999960976461.1.2 phases=1 kV=0.069282 kW=0 kvar=0 model=1
New Load.4323787E_1 Bus1=-99999960976461.2.3 phases=1 kV=0.069282 kW=0 kvar=0 model=1
New Load.4323787E_2 Bus1=-99999960976461.3.1 phases=1 kV=0.069282 kW=0 kvar=0 model=1
New Load.4805608E_0 Bus1=-999999160827713.2.0 phases=1 kV=0.069282 kW=0 kvar=0 model=1
New Load.4805608E_1 Bus1=-999999160827713.3.0 phases=1 kV=0.069282 kW=0 kvar=0 model=1
New Load.5419607_0 Bus1=-999999168768311.1.0 phases=1 kV=0.159926 kW=0 kvar=0 model=1
New Load.5419607_1 Bus1=-999999168768311.2.0 phases=1 kV=0.159926 kW=0 kvar=0 model=1
New Load.5419607_2 Bus1=-999999168768311.3.0 phases=1 kV=0.159926 kW=0 kvar=0 model=1
New Load.4507503E_0 Bus1=-99999960976698.3.0 phases=1 kV=0.138564 kW=0 kvar=0 model=1
New Load.4507503E_1 Bus1=-99999960976698.1.0 phases=1 kV=0.138564 kW=0 kvar=0 model=1
New Load.2329323E_0 Bus1=-999999223000399.1.0 phases=1 kV=0.159926 kW=0 kvar=0 model=1
New Load.2329323E_1 Bus1=-999999223000399.2.0 phases=1 kV=0.159926 kW=0 kvar=0 model=1
New Load.2329323E_2 Bus1=-999999223000399.3.0 phases=1 kV=0.159926 kW=0 kvar=0 model=1
New Load.5652098_0 Bus1=-999999210255777.1.0 phases=1 kV=0.069282 kW=0 kvar=0 model=1
New Load.5652098_1 Bus1=-999999210255777.2.0 phases=1 kV=0.069282 kW=0 kvar=0 model=1
New Load.5650036_0 Bus1=-999999210255856.3.0 phases=1 kV=0.069282 kW=0 kvar=0 model=1
New Load.5650036_1 Bus1=-999999210255856.1.0 phases=1 kV=0.069282 kW=0 kvar=0 model=1
New Load.5419742_0 Bus1=-999999168768343.1.0 phases=1 kV=0.159926 kW=0 kvar=0 model=1
New Load.5419742_1 Bus1=-999999168768343.2.0 phases=1 kV=0.159926 kW=0 kvar=0 model=1
New Load.5419742_2 Bus1=-999999168768343.3.0 phases=1 kV=0.159926 kW=0 kvar=0 model=1

! Transformers
New Transformer.293588B0DF0AEE34E0637F61810A7CE3_0_0 phases=1 windings=2 xhl=0.5 %R=0.353554 %imag=1e-06 %noloadloss=0
~ wdg=1 bus=210255777.1.0 kV=19.0526 kVA=0.25 conn=wye
~ wdg=2 bus=-999999210255777.1.0 kV=0.069282 kVA=0.25 conn=wye
New Transformer.293588B0DF0AEE34E0637F61810A7CE3_0_1 phases=1 windings=2 xhl=0.5 %R=0.353554 %imag=1e-06 %noloadloss=0
~ wdg=1 bus=210255777.2.0 kV=19.0526 kVA=0.25 conn=wye
~ wdg=2 bus=-999999210255777.2.0 kV=0.069282 kVA=0.25 conn=wye
New Transformer.293588A986A8EE34E0637F61810A7CE3_1_0 phases=1 windings=2 xhl=0.5 %R=0.353554 %imag=1e-06 %noloadloss=0
~ wdg=1 bus=160827713.2.0 kV=19.0526 kVA=12.5 conn=wye
~ wdg=2 bus=-999999160827713.2.0 kV=0.069282 kVA=12.5 conn=wye
New Transformer.293588A986A8EE34E0637F61810A7CE3_1_1 phases=1 windings=2 xhl=0.5 %R=0.353554 %imag=1e-06 %noloadloss=0
~ wdg=1 bus=160827713.3.0 kV=19.0526 kVA=12.5 conn=wye
~ wdg=2 bus=-999999160827713.3.0 kV=0.069282 kVA=12.5 conn=wye
New Transformer.293588A7E7E7EE34E0637F61810A7CE3_2_0 phases=1 windings=2 xhl=0.5 %R=0.353554 %imag=1e-06 %noloadloss=0
~ wdg=1 bus=223000399.1.2 kV=33 kVA=50 conn=delta
~ wdg=2 bus=-999999223000399.1.0 kV=0.159926 kVA=50 conn=wye
New Transformer.293588A7E7E7EE34E0637F61810A7CE3_2_1 phases=1 windings=2 xhl=0.5 %R=0.353554 %imag=1e-06 %noloadloss=0
~ wdg=1 bus=223000399.2.3 kV=33 kVA=50 conn=delta
~ wdg=2 bus=-999999223000399.2.0 kV=0.159926 kVA=50 conn=wye
New Transformer.293588A7E7E7EE34E0637F61810A7CE3_2_2 phases=1 windings=2 xhl=0.5 %R=0.353554 %imag=1e-06 %noloadloss=0
~ wdg=1 bus=223000399.3.1 kV=33 kVA=50 conn=delta
~ wdg=2 bus=-999999223000399.3.0 kV=0.159926 kVA=50 conn=wye
New Transformer.293588B0DF14EE34E0637F61810A7CE3_3_0 phases=1 windings=2 xhl=0.5 %R=0.353554 %imag=1e-06 %noloadloss=0
~ wdg=1 bus=210255856.3.0 kV=19.0526 kVA=0.25 conn=wye
~ wdg=2 bus=-999999210255856.3.0 kV=0.069282 kVA=0.25 conn=wye
New Transformer.293588B0DF14EE34E0637F61810A7CE3_3_1 phases=1 windings=2 xhl=0.5 %R=0.353554 %imag=1e-06 %noloadloss=0
~ wdg=1 bus=210255856.1.0 kV=19.0526 kVA=0.25 conn=wye
~ wdg=2 bus=-999999210255856.1.0 kV=0.069282 kVA=0.25 conn=wye
New Transformer.293588A94EC4EE34E0637F61810A7CE3_4_0 phases=1 windings=2 xhl=0.5 %R=0.353554 %imag=1e-06 %noloadloss=0
~ wdg=1 bus=60976698.3.0 kV=19.0526 kVA=12.5 conn=wye
~ wdg=2 bus=-99999960976698.3.0 kV=0.138564 kVA=12.5 conn=wye
New Transformer.293588A94EC4EE34E0637F61810A7CE3_4_1 phases=1 windings=2 xhl=0.5 %R=0.353554 %imag=1e-06 %noloadloss=0
~ wdg=1 bus=60976698.1.0 kV=19.0526 kVA=12.5 conn=wye
~ wdg=2 bus=-99999960976698.1.0 kV=0.138564 kVA=12.5 conn=wye
New Transformer.293588B4498FEE34E0637F61810A7CE3_5_0 phases=1 windings=2 xhl=0.5 %R=0.353554 %imag=1e-06 %noloadloss=0
~ wdg=1 bus=168768311.1.2 kV=33 kVA=833.333 conn=delta
~ wdg=2 bus=-999999168768311.1.0 kV=0.159926 kVA=833.333 conn=wye
New Transformer.293588B4498FEE34E0637F61810A7CE3_5_1 phases=1 windings=2 xhl=0.5 %R=0.353554 %imag=1e-06 %noloadloss=0
~ wdg=1 bus=168768311.2.3 kV=33 kVA=833.333 conn=delta
~ wdg=2 bus=-999999168768311.2.0 kV=0.159926 kVA=833.333 conn=wye
New Transformer.293588B4498FEE34E0637F61810A7CE3_5_2 phases=1 windings=2 xhl=0.5 %R=0.353554 %imag=1e-06 %noloadloss=0
~ wdg=1 bus=168768311.3.1 kV=33 kVA=833.333 conn=delta
~ wdg=2 bus=-999999168768311.3.0 kV=0.159926 kVA=833.333 conn=wye
New Transformer.293588B44990EE34E0637F61810A7CE3_6_0 phases=1 windings=2 xhl=0.5 %R=0.353554 %imag=1e-06 %noloadloss=0
~ wdg=1 bus=168768343.1.2 kV=33 kVA=250 conn=delta
~ wdg=2 bus=-999999168768343.1.0 kV=0.159926 kVA=250 conn=wye
New Transformer.293588B44990EE34E0637F61810A7CE3_6_1 phases=1 windings=2 xhl=0.5 %R=0.353554 %imag=1e-06 %noloadloss=0
~ wdg=1 bus=168768343.2.3 kV=33 kVA=250 conn=delta
~ wdg=2 bus=-999999168768343.2.0 kV=0.159926 kVA=250 conn=wye
New Transformer.293588B44990EE34E0637F61810A7CE3_6_2 phases=1 windings=2 xhl=0.5 %R=0.353554 %imag=1e-06 %noloadloss=0
~ wdg=1 bus=168768343.3.1 kV=33 kVA=250 conn=delta
~ wdg=2 bus=-999999168768343.3.0 kV=0.159926 kVA=250 conn=wye
New Transformer.293588A94EC3EE34E0637F61810A7CE3_7_0 phases=1 windings=2 xhl=0.5 %R=0.353554 %imag=1e-06 %noloadloss=0
~ wdg=1 bus=60976461.1.2 kV=33 kVA=25 conn=delta
~ wdg=2 bus=-99999960976461.1.2 kV=0.069282 kVA=25 conn=delta
New Transformer.293588A94EC3EE34E0637F61810A7CE3_7_1 phases=1 windings=2 xhl=0.5 %R=0.353554 %imag=1e-06 %noloadloss=0
~ wdg=1 bus=60976461.2.3 kV=33 kVA=25 conn=delta
~ wdg=2 bus=-99999960976461.2.3 kV=0.069282 kVA=25 conn=delta
New Transformer.293588A94EC3EE34E0637F61810A7CE3_7_2 phases=1 windings=2 xhl=0.5 %R=0.353554 %imag=1e-06 %noloadloss=0
~ wdg=1 bus=60976461.3.1 kV=33 kVA=25 conn=delta
~ wdg=2 bus=-99999960976461.3.1 kV=0.069282 kVA=25 conn=delta

Set voltagebases=[33.0 0.277 0.24 0.12]
CalcVoltageBases
Solve
