! OpenDSS script generated from multiconductor network
Clear

New Circuit.mc_network basekv=33.0 pu=1.000000 angle=0.00 frequency=60.0 phases=3 Mvasc3=1.08895e+06 Mvasc1=362982
~ bus1=-8888882182609.1.2.3

! Line codes
New LineCode.4/0_JCN_3PH_33KV_3 nphases=3 units=km Rmatrix=[ 0.025005 | 0 0.025005 | 0 0 0.025005 ] Xmatrix=[ 0.012439 | 0 0.012439 | 0 0 0.012439 ] Cmatrix=[ 0 | 0 0 | 0 0 0 ]
New LineCode.4/0_CLP_3PH_33KV_3 nphases=3 units=km Rmatrix=[ 0.225988 | 0 0.225988 | 0 0 0.225988 ] Xmatrix=[ 0.112421 | 0 0.112421 | 0 0 0.112421 ] Cmatrix=[ 0 | 0 0 | 0 0 0 ]
New LineCode.1500_JCN_3PH_33KV_3 nphases=3 units=km Rmatrix=[ 0.003795 | 0 0.003795 | 0 0 0.003795 ] Xmatrix=[ 0.006885 | 0 0.006885 | 0 0 0.006885 ] Cmatrix=[ 0 | 0 0 | 0 0 0 ]
New LineCode.750_CLP_3PH_33KV_3 nphases=3 units=km Rmatrix=[ 0.059455 | 0 0.059455 | 0 0 0.059455 ] Xmatrix=[ 0.076623 | 0 0.076623 | 0 0 0.076623 ] Cmatrix=[ 0 | 0 0 | 0 0 0 ]
New LineCode.750_JCN_3PH_33KV_3 nphases=3 units=km Rmatrix=[ 0.04287 | 0 0.04287 | 0 0 0.04287 ] Xmatrix=[ 0.055248 | 0 0.055248 | 0 0 0.055248 ] Cmatrix=[ 0 | 0 0 | 0 0 0 ]
New LineCode.4/0_JCN_2PH_33KV_2 nphases=2 units=km Rmatrix=[ 0.016428 | 0 0.016428 ] Xmatrix=[ 0.008173 | 0 0.008173 ] Cmatrix=[ 0 | 0 0 ]
New LineCode.336_ACSR_3PH_33KV_3 nphases=3 units=km Rmatrix=[ 0.018513 | 0 0.018513 | 0 0 0.018513 ] Xmatrix=[ 0.041457 | 0 0.041457 | 0 0 0.041457 ] Cmatrix=[ 0 | 0 0 | 0 0 0 ]
New LineCode.4_CU_3PH_33KV_3 nphases=3 units=km Rmatrix=[ 0.052408 | 0 0.052408 | 0 0 0.052408 ] Xmatrix=[ 0.028563 | 0 0.028563 | 0 0 0.028563 ] Cmatrix=[ 0 | 0 0 | 0 0 0 ]
New LineCode.477_ACSR_3PH_33KV_3 nphases=3 units=km Rmatrix=[ 0.035844 | 0 0.035844 | 0 0 0.035844 ] Xmatrix=[ 0.110335 | 0 0.110335 | 0 0 0.110335 ] Cmatrix=[ 0 | 0 0 | 0 0 0 ]
New LineCode.1/0_AL_3PH_33KV_3 nphases=3 units=km Rmatrix=[ 0.051641 | 0 0.051641 | 0 0 0.051641 ] Xmatrix=[ 0.015738 | 0 0.015738 | 0 0 0.015738 ] Cmatrix=[ 0 | 0 0 | 0 0 0 ]
New LineCode.1/0_ACSR_3PH_33KV_3 nphases=3 units=km Rmatrix=[ 0.45309 | 0 0.45309 | 0 0 0.45309 ] Xmatrix=[ 0.360748 | 0 0.360748 | 0 0 0.360748 ] Cmatrix=[ 0 | 0 0 | 0 0 0 ]
New LineCode.4/0_ACSR_3PH_33KV_3 nphases=3 units=km Rmatrix=[ 0.007709 | 0 0.007709 | 0 0 0.007709 ] Xmatrix=[ 0.010895 | 0 0.010895 | 0 0 0.010895 ] Cmatrix=[ 0 | 0 0 | 0 0 0 ]
New LineCode.2_CU_3PH_33KV_3 nphases=3 units=km Rmatrix=[ 1e-05 | 0 1e-05 | 0 0 1e-05 ] Xmatrix=[ 1e-05 | 0 1e-05 | 0 0 1e-05 ] Cmatrix=[ 0 | 0 0 | 0 0 0 ]
New LineCode.954_ACSR_3PH_33KV_3 nphases=3 units=km Rmatrix=[ 1e-05 | 0 1e-05 | 0 0 1e-05 ] Xmatrix=[ 1e-05 | 0 1e-05 | 0 0 1e-05 ] Cmatrix=[ 0 | 0 0 | 0 0 0 ]
New LineCode.350_CLP_3PH_33KV_3 nphases=3 units=km Rmatrix=[ 1e-05 | 0 1e-05 | 0 0 1e-05 ] Xmatrix=[ 1e-05 | 0 1e-05 | 0 0 1e-05 ] Cmatrix=[ 0 | 0 0 | 0 0 0 ]
New LineCode.1/0_ATW_3PH_33KV_3 nphases=3 units=km Rmatrix=[ 1e-05 | 0 1e-05 | 0 0 1e-05 ] Xmatrix=[ 1e-05 | 0 1e-05 | 0 0 1e-05 ] Cmatrix=[ 0 | 0 0 | 0 0 0 ]
New LineCode.336_ATW_3PH_33KV_3 nphases=3 units=km Rmatrix=[ 1e-05 | 0 1e-05 | 0 0 1e-05 ] Xmatrix=[ 1e-05 | 0 1e-05 | 0 0 1e-05 ] Cmatrix=[ 0 | 0 0 | 0 0 0 ]
New LineCode.1/0_CLP_3PH_33KV_3 nphases=3 units=km Rmatrix=[ 0.055909 | 0 0.055909 | 0 0 0.055909 ] Xmatrix=[ 0.017038 | 0 0.017038 | 0 0 0.017038 ] Cmatrix=[ 0 | 0 0 | 0 0 0 ]
New LineCode.4/0_EPR_3PH_33KV_3 nphases=3 units=km Rmatrix=[ 1e-05 | 0 1e-05 | 0 0 1e-05 ] Xmatrix=[ 1e-05 | 0 1e-05 | 0 0 1e-05 ] Cmatrix=[ 0 | 0 0 | 0 0 0 ]
New LineCode.336_ATW_ABC_33_3 nphases=3 units=km Rmatrix=[ 1e-05 | 0 1e-05 | 0 0 1e-05 ] Xmatrix=[ 1e-05 | 0 1e-05 | 0 0 1e-05 ] Cmatrix=[ 0 | 0 0 | 0 0 0 ]

! Lines
New Line.GS7472-2$VFI7473-1 phases=3 Bus1=177829997.1.2.3 Bus2=177830116.1.2.3 LineCode=4/0_JCN_3PH_33KV_3 Length=0.00598 units=km
New Line.GS6245-1$GS6246-3 phases=3 Bus1=106021629.1.2.3 Bus2=106022133.1.2.3 LineCode=4/0_CLP_3PH_33KV_3 Length=0.216879 units=km
New Line.VFI7473-1$GS7472-3 phases=3 Bus1=177830013.1.2.3 Bus2=177830115.1.2.3 LineCode=4/0_JCN_3PH_33KV_3 Length=0.041249 units=km
New Line.VFI7622-1$GS7621-2 phases=3 Bus1=179149575.1.2.3 Bus2=179149694.1.2.3 LineCode=4/0_JCN_3PH_33KV_3 Length=0.004998 units=km
New Line.867E$ND84896716 phases=3 Bus1=30976190.1.2.3 Bus2=84896698.1.2.3 LineCode=4/0_CLP_3PH_33KV_3 Length=0.045677 units=km
New Line.GS6246-2$VFI6244-1 phases=3 Bus1=106021895.1.2.3 Bus2=106022125.1.2.3 LineCode=4/0_CLP_3PH_33KV_3 Length=0.096064 units=km
New Line.ND177830227$GS7472-4 phases=3 Bus1=177830020.1.2.3 Bus2=177830209.1.2.3 LineCode=4/0_JCN_3PH_33KV_3 Length=0.030826 units=km
New Line.VFI7622-1$GS7621-3 phases=3 Bus1=179149591.1.2.3 Bus2=179149693.1.2.3 LineCode=4/0_JCN_3PH_33KV_3 Length=0.043452 units=km
New Line.GS7621-4$ND179149780 phases=3 Bus1=179149598.1.2.3 Bus2=179149762.1.2.3 LineCode=4/0_JCN_3PH_33KV_3 Length=0.024917 units=km
New Line.491E$ND210741674 phases=3 Bus1=31054272.1.2.3 Bus2=210741656.1.2.3 LineCode=4/0_CLP_3PH_33KV_3 Length=0.057881 units=km
New Line.PH093E$ND214957796 phases=3 Bus1=214957796.1.2.3 Bus2=30976674.1.2.3 LineCode=1500_JCN_3PH_33KV_3 Length=0.080218 units=km
New Line.4138796E$ND31056665 phases=3 Bus1=30976704.1.2.3 Bus2=31056665.1.2.3 LineCode=750_CLP_3PH_33KV_3 Length=0.017129 units=km
New Line.ND31056665$ND31056621 phases=3 Bus1=31056665.1.2.3 Bus2=31056621.1.2.3 LineCode=750_CLP_3PH_33KV_3 Length=0.417718 units=km
New Line.ND31056621$ND31056010 phases=3 Bus1=31056621.1.2.3 Bus2=31056010.1.2.3 LineCode=750_CLP_3PH_33KV_3 Length=0.297677 units=km
New Line.ND31056010$ND31056011 phases=3 Bus1=31056010.1.2.3 Bus2=31056011.1.2.3 LineCode=750_CLP_3PH_33KV_3 Length=0.157949 units=km
New Line.ND31056011$ND31055943 phases=3 Bus1=31056011.1.2.3 Bus2=31055943.1.2.3 LineCode=750_CLP_3PH_33KV_3 Length=0.143688 units=km
New Line.ND31055943$4175996E phases=3 Bus1=31055943.1.2.3 Bus2=30975756.1.2.3 LineCode=1500_JCN_3PH_33KV_3 Length=0.009237 units=km
New Line.4238030E$GS7575-1 phases=3 Bus1=30976468.1.2.3 Bus2=200741520.1.2.3 LineCode=1500_JCN_3PH_33KV_3 Length=0.475082 units=km
New Line.GS7956-1$GS7575-2 phases=3 Bus1=200741528.1.2.3 Bus2=207749613.1.2.3 LineCode=4/0_JCN_3PH_33KV_3 Length=0.448779 units=km
New Line.GS7575-3$GS7581-1 phases=3 Bus1=200741536.1.2.3 Bus2=217525548.1.2.3 LineCode=1500_JCN_3PH_33KV_3 Length=1.16836 units=km
New Line.GS7956-2$P5710363-1 phases=3 Bus1=207749621.1.2.3 Bus2=207750480.1.2.3 LineCode=4/0_JCN_3PH_33KV_3 Length=0.019 units=km
New Line.GS7956-3$GS7957-1 phases=3 Bus1=207749629.1.2.3 Bus2=207749836.1.2.3 LineCode=4/0_JCN_3PH_33KV_3 Length=0.046811 units=km
New Line.GS7581-3$GS5755-3 phases=3 Bus1=217525564.1.2.3 Bus2=70061225.1.2.3 LineCode=1500_JCN_3PH_33KV_3 Length=0.1528 units=km
New Line.GS7957-2$RAR7962 phases=3 Bus1=207749844.1.2.3 Bus2=207749991.1.2.3 LineCode=4/0_JCN_3PH_33KV_3 Length=0.05222 units=km
New Line.GS5755-4$ND206696185 phases=3 Bus1=70061233.1.2.3 Bus2=206696185.1.2.3 LineCode=1500_JCN_3PH_33KV_3 Length=0.254783 units=km
New Line.GS7957-3$RAR7962 phases=3 Bus1=207749860.1.2.3 Bus2=207749992.1.2.3 LineCode=4/0_JCN_3PH_33KV_3 Length=0.051872 units=km
New Line.GS6077-2$GS5755-2 phases=3 Bus1=70061209.1.2.3 Bus2=89976670.1.2.3 LineCode=750_JCN_3PH_33KV_3 Length=0.447502 units=km
New Line.ND206696185$P5728124 phases=3 Bus1=206696185.1.2.3 Bus2=206696198.1.2.3 LineCode=750_JCN_3PH_33KV_3 Length=0.023375 units=km
New Line.GS7957-4$GS7959-1 phases=3 Bus1=207749867.1.2.3 Bus2=207749717.1.2.3 LineCode=4/0_JCN_3PH_33KV_3 Length=0.04699 units=km
New Line.ND206696185$RCS8091-1 phases=3 Bus1=206696185.1.2.3 Bus2=210568185.1.2.3 LineCode=750_CLP_3PH_33KV_3 Length=0.02548 units=km
New Line.6511E$GS5755-1 phases=3 Bus1=70061217.1.2.3 Bus2=30976759.1.2.3 LineCode=4/0_CLP_3PH_33KV_3 Length=0.070265 units=km
New Line.GS6077-1$RCS8520-4 phases=3 Bus1=89976678.1.2.3 Bus2=228514856.1.2.3 LineCode=750_CLP_3PH_33KV_3 Length=0.038409 units=km
New Line.ND89977430$GS6077-3 phases=3 Bus1=89976686.1.2.3 Bus2=89977430.1.2.3 LineCode=750_CLP_3PH_33KV_3 Length=0.286598 units=km
New Line.ND89977430$ND89977518 phases=3 Bus1=89977430.1.2.3 Bus2=89977518.1.2.3 LineCode=750_CLP_3PH_33KV_3 Length=0.129169 units=km
New Line.GS6968-3$ND89977518 phases=3 Bus1=89977518.1.2.3 Bus2=89977287.1.2.3 LineCode=750_CLP_3PH_33KV_3 Length=0.268424 units=km
New Line.ND228515137$RCS8520-3 phases=2 Bus1=228514848.1.3 Bus2=228515142.1.3 LineCode=4/0_JCN_2PH_33KV_2 Length=0.050792 units=km
New Line.ND31056004$BF08743 phases=3 Bus1=31056004.1.2.3 Bus2=218521716.1.2.3 LineCode=336_ACSR_3PH_33KV_3 Length=0.002957 units=km
New Line.ND31056004$ND31056039 phases=3 Bus1=31056004.1.2.3 Bus2=31056039.1.2.3 LineCode=336_ACSR_3PH_33KV_3 Length=0.169477 units=km
New Line.ND31056039$PS8162 phases=3 Bus1=31056039.1.2.3 Bus2=210741602.1.2.3 LineCode=336_ACSR_3PH_33KV_3 Length=0.003192 units=km
New Line.PS4806$ND31056039 phases=3 Bus1=31056039.1.2.3 Bus2=243625596.1.2.3 LineCode=336_ACSR_3PH_33KV_3 Length=0.194409 units=km
New Line.BF08743$2362437E phases=3 Bus1=218521717.1.2.3 Bus2=31054263.1.2.3 LineCode=336_ACSR_3PH_33KV_3 Length=0.099113 units=km
New Line.ND166571276$PS4806 phases=3 Bus1=243625595.1.2.3 Bus2=166571276.1.2.3 LineCode=336_ACSR_3PH_33KV_3 Length=0.09917 units=km
New Line.PS8162$491E phases=3 Bus1=210741603.1.2.3 Bus2=31054271.1.2.3 LineCode=336_ACSR_3PH_33KV_3 Length=0.00473 units=km
New Line.ND244359948$ND246695296 phases=3 Bus1=246695296.1.2.3 Bus2=244359948.1.2.3 LineCode=336_ACSR_3PH_33KV_3 Length=0.237828 units=km
New Line.PS4703$ND244359948 phases=3 Bus1=244359948.1.2.3 Bus2=31055165.1.2.3 LineCode=336_ACSR_3PH_33KV_3 Length=0.075934 units=km
New Line.ND31055934$ND258955705 phases=3 Bus1=258955705.1.2.3 Bus2=31055934.1.2.3 LineCode=4_CU_3PH_33KV_3 Length=0.369175 units=km
New Line.ND31055934$4445947EP1 phases=3 Bus1=31055934.1.2.3 Bus2=30976255.1.2.3 LineCode=4_CU_3PH_33KV_3 Length=0.050206 units=km
New Line.4445942EP2$RCS1947 phases=3 Bus1=30976285.1.2.3 Bus2=61168226.1.2.3 LineCode=4_CU_3PH_33KV_3 Length=0.105823 units=km
New Line.4175996E$ND246627140 phases=3 Bus1=30975755.1.2.3 Bus2=246627140.1.2.3 LineCode=477_ACSR_3PH_33KV_3 Length=0.36657 units=km
New Line.ND106684590$GS6246-1 phases=3 Bus1=106022117.1.2.3 Bus2=-777777106022117.1.2.3 LineCode=4/0_CLP_3PH_33KV_3 Length=0.288705 units=km
New Line.GS7959-2$ND207249888 phases=3 Bus1=207749725.1.2.3 Bus2=-777777207749725.1.2.3 LineCode=4/0_JCN_3PH_33KV_3 Length=0.117456 units=km
New Line.GS7959-3$ND207249890 phases=3 Bus1=207749733.1.2.3 Bus2=-777777207749733.1.2.3 LineCode=4/0_JCN_3PH_33KV_3 Length=0.105428 units=km
New Line.PS4703$ND244359975 phases=3 Bus1=31055164.1.2.3 Bus2=-77777731055164.1.2.3 LineCode=336_ACSR_3PH_33KV_3 Length=0.947219 units=km
New Line.ND244359816$ND31057211 phases=3 Bus1=244359816.1.2.3 Bus2=-777777244359816.1.2.3 LineCode=336_ACSR_3PH_33KV_3 Length=0.711123 units=km
New Line.FD9587$ND30976152 phases=3 Bus1=30976114.1.2.3 Bus2=30976130.1.2.3 LineCode=1/0_AL_3PH_33KV_3 Length=0.073241 units=km
New Line.GS7380-1$375E phases=3 Bus1=182460475.1.2.3 Bus2=182460385.1.2.3 LineCode=1500_JCN_3PH_33KV_3 Length=0.059673 units=km
New Line.GS7380-3$ND183145688 phases=3 Bus1=182460401.1.2.3 Bus2=183145688.1.2.3 LineCode=1500_JCN_3PH_33KV_3 Length=0.573679 units=km
New Line.2043E$4473478E phases=3 Bus1=30975816.1.2.3 Bus2=30975786.1.2.3 LineCode=1500_JCN_3PH_33KV_3 Length=0.105555 units=km
New Line.ND183145688$RCS7431-3 phases=3 Bus1=183145688.1.2.3 Bus2=182221615.1.2.3 LineCode=1500_JCN_3PH_33KV_3 Length=0.01043 units=km
New Line.ND183145688$P5636566 phases=3 Bus1=183145688.1.2.3 Bus2=183145682.1.2.3 LineCode=4/0_JCN_3PH_33KV_3 Length=0.025119 units=km
New Line.189E$RCS7431-2 phases=3 Bus1=182221607.1.2.3 Bus2=182460647.1.2.3 LineCode=1500_JCN_3PH_33KV_3 Length=0.051946 units=km
New Line.GS7624-1$PH030E phases=3 Bus1=30975852.1.2.3 Bus2=192802712.1.2.3 LineCode=4/0_CLP_3PH_33KV_3 Length=0.14201 units=km
New Line.GS7624-3$ND31055993 phases=3 Bus1=192802728.1.2.3 Bus2=31055993.1.2.3 LineCode=1500_JCN_3PH_33KV_3 Length=0.406963 units=km
New Line.ND31055993$ND85338973 phases=3 Bus1=31055993.1.2.3 Bus2=85338973.1.2.3 LineCode=1500_JCN_3PH_33KV_3 Length=0.230596 units=km
New Line.ND31056216$ND85338973 phases=3 Bus1=85338973.1.2.3 Bus2=31056216.1.2.3 LineCode=1500_JCN_3PH_33KV_3 Length=0.730722 units=km
New Line.ND31056216$ND31056217 phases=3 Bus1=31056216.1.2.3 Bus2=31056217.1.2.3 LineCode=1500_JCN_3PH_33KV_3 Length=0.579573 units=km
New Line.ND31056217$ND31056205 phases=3 Bus1=31056217.1.2.3 Bus2=31056205.1.2.3 LineCode=4/0_CLP_3PH_33KV_3 Length=0.050451 units=km
New Line.ND31056205$ND31056206 phases=3 Bus1=31056205.1.2.3 Bus2=31056206.1.2.3 LineCode=1500_JCN_3PH_33KV_3 Length=0.305062 units=km
New Line.ND31056206$ND31056426 phases=3 Bus1=31056206.1.2.3 Bus2=31056426.1.2.3 LineCode=1500_JCN_3PH_33KV_3 Length=0.533044 units=km
New Line.ND31056426$ND31057290 phases=3 Bus1=31056426.1.2.3 Bus2=31057290.1.2.3 LineCode=1500_JCN_3PH_33KV_3 Length=0.315666 units=km
New Line.ND31057290$ND191552177 phases=3 Bus1=31057290.1.2.3 Bus2=191552177.1.2.3 LineCode=4/0_CLP_3PH_33KV_3 Length=0.033179 units=km
New Line.ND31056046$ND191552177 phases=3 Bus1=191552177.1.2.3 Bus2=31056046.1.2.3 LineCode=1500_JCN_3PH_33KV_3 Length=0.289212 units=km
New Line.ND31056047$ND31056046 phases=3 Bus1=31056046.1.2.3 Bus2=31056047.1.2.3 LineCode=1500_JCN_3PH_33KV_3 Length=0.47355 units=km
New Line.ND31056047$ND31056803 phases=3 Bus1=31056047.1.2.3 Bus2=31056803.1.2.3 LineCode=1500_JCN_3PH_33KV_3 Length=0.020532 units=km
New Line.ND31056803$ND191552152 phases=3 Bus1=31056803.1.2.3 Bus2=191552152.1.2.3 LineCode=1500_JCN_3PH_33KV_3 Length=0.236804 units=km
New Line.ND191552152$4068103E phases=3 Bus1=191552152.1.2.3 Bus2=30976160.1.2.3 LineCode=1500_JCN_3PH_33KV_3 Length=0.430769 units=km
New Line.4403733E$ND31056270 phases=3 Bus1=31054404.1.2.3 Bus2=31056270.1.2.3 LineCode=1500_JCN_3PH_33KV_3 Length=0.036964 units=km
New Line.ND150118765$ND31056270 phases=3 Bus1=31056270.1.2.3 Bus2=150118765.1.2.3 LineCode=750_CLP_3PH_33KV_3 Length=0.373925 units=km
New Line.ND150118765$ND150118770 phases=3 Bus1=150118765.1.2.3 Bus2=150118770.1.2.3 LineCode=750_CLP_3PH_33KV_3 Length=0.17015 units=km
New Line.GS5746-1$ND150118770 phases=3 Bus1=150118770.1.2.3 Bus2=31054448.1.2.3 LineCode=750_CLP_3PH_33KV_3 Length=0.062851 units=km
New Line.GS5746-3$ND150118780 phases=3 Bus1=31054464.1.2.3 Bus2=150118780.1.2.3 LineCode=750_CLP_3PH_33KV_3 Length=0.177396 units=km
New Line.ND150118780$ND150118785 phases=3 Bus1=150118780.1.2.3 Bus2=150118785.1.2.3 LineCode=750_JCN_3PH_33KV_3 Length=0.296054 units=km
New Line.ND150118785$ND150118790 phases=3 Bus1=150118785.1.2.3 Bus2=150118790.1.2.3 LineCode=750_JCN_3PH_33KV_3 Length=0.174072 units=km
New Line.ND150118790$ND214957796 phases=3 Bus1=150118790.1.2.3 Bus2=214957796.1.2.3 LineCode=750_JCN_3PH_33KV_3 Length=0.157503 units=km
New Line.PS0026$ND31056707 phases=3 Bus1=31054636.1.2.3 Bus2=31056707.1.2.3 LineCode=336_ACSR_3PH_33KV_3 Length=0.028633 units=km
New Line.PS0084$ND31056707 phases=3 Bus1=31056707.1.2.3 Bus2=31054671.1.2.3 LineCode=1/0_ACSR_3PH_33KV_3 Length=0.024535 units=km
New Line.PS0027$ND31056707 phases=3 Bus1=31056707.1.2.3 Bus2=31054704.1.2.3 LineCode=336_ACSR_3PH_33KV_3 Length=0.054736 units=km
New Line.PS0028$PS0027 phases=3 Bus1=31054705.1.2.3 Bus2=31054738.1.2.3 LineCode=336_ACSR_3PH_33KV_3 Length=0.471194 units=km
New Line.PS0084$ND31056547 phases=3 Bus1=31054670.1.2.3 Bus2=31056547.1.2.3 LineCode=1/0_ACSR_3PH_33KV_3 Length=0.077344 units=km
New Line.ND31056547$FD9587 phases=3 Bus1=31056547.1.2.3 Bus2=30976113.1.2.3 LineCode=1/0_ACSR_3PH_33KV_3 Length=0.077344 units=km
New Line.PS0028$ND182460568 phases=3 Bus1=31054739.1.2.3 Bus2=182460568.1.2.3 LineCode=336_ACSR_3PH_33KV_3 Length=0.09576 units=km
New Line.ND182460568$ND180299812 phases=3 Bus1=182460568.1.2.3 Bus2=180299812.1.2.3 LineCode=336_ACSR_3PH_33KV_3 Length=0.1754 units=km
New Line.ND182460568$375E phases=3 Bus1=182460568.1.2.3 Bus2=182460474.1.2.3 LineCode=336_ACSR_3PH_33KV_3 Length=0.008777 units=km
New Line.ND180299812$ND31056096 phases=3 Bus1=180299812.1.2.3 Bus2=31056096.1.2.3 LineCode=477_ACSR_3PH_33KV_3 Length=0.121622 units=km
New Line.PS0030$ND31056096 phases=3 Bus1=31056096.1.2.3 Bus2=31054773.1.2.3 LineCode=477_ACSR_3PH_33KV_3 Length=0.295936 units=km
New Line.PS0030$ND31055962 phases=3 Bus1=31054772.1.2.3 Bus2=31055962.1.2.3 LineCode=336_ACSR_3PH_33KV_3 Length=1.18611 units=km
New Line.ND31055962$4473478E phases=3 Bus1=31055962.1.2.3 Bus2=30975815.1.2.3 LineCode=336_ACSR_3PH_33KV_3 Length=1.18493 units=km
New Line.ND31056640$ND207281675 phases=3 Bus1=31056640.1.2.3 Bus2=207281675.1.2.3 LineCode=336_ACSR_3PH_33KV_3 Length=0.03288 units=km
New Line.ND207281675$PH030E phases=3 Bus1=207281675.1.2.3 Bus2=30975851.1.2.3 LineCode=336_ACSR_3PH_33KV_3 Length=0.012518 units=km
New Line.PS0046$189E phases=3 Bus1=182460646.1.2.3 Bus2=31054806.1.2.3 LineCode=336_ACSR_3PH_33KV_3 Length=0.125264 units=km
New Line.PS0046$ND67576930 phases=3 Bus1=31054807.1.2.3 Bus2=67576930.1.2.3 LineCode=477_ACSR_3PH_33KV_3 Length=0.040333 units=km
New Line.ND67576930$PS0047 phases=3 Bus1=67576930.1.2.3 Bus2=43570584.1.2.3 LineCode=4/0_ACSR_3PH_33KV_3 Length=0.027738 units=km
New Line.4068103E$ND30976092 phases=3 Bus1=30976159.1.2.3 Bus2=30976028.1.2.3 LineCode=336_ACSR_3PH_33KV_3 Length=0.09344 units=km
New Line.1790755E$ND30976090 phases=3 Bus1=30976010.1.2.3 Bus2=30975583.1.2.3 LineCode=336_ACSR_3PH_33KV_3 Length=0.191407 units=km
New Line.1790755E$ND31056089 phases=3 Bus1=30975583.1.2.3 Bus2=31056089.1.2.3 LineCode=477_ACSR_3PH_33KV_3 Length=0.053376 units=km
New Line.ND31056089$4403733E phases=3 Bus1=31056089.1.2.3 Bus2=31054403.1.2.3 LineCode=336_ACSR_3PH_33KV_3 Length=0.124925 units=km
New Line.ND67576930$ND11419812 phases=3 Bus1=67576930.1.2.3 Bus2=-77777767576930.1.2.3 LineCode=477_ACSR_3PH_33KV_3 Length=0.027738 units=km
New Line.4445942EP2$4445947EP1 phases=3 Bus1=30976256.1.2.3 Bus2=30976286.1.2.3 LineCode=2_CU_3PH_33KV_3 Length=0.367182 units=km
New Line.ND246627140$4238030E phases=3 Bus1=246627140.1.2.3 Bus2=30976467.1.2.3 LineCode=954_ACSR_3PH_33KV_3 Length=0.00928 units=km
New Line.GS6077-4$VFI6076-1 phases=3 Bus1=89976694.1.2.3 Bus2=89976945.1.2.3 LineCode=350_CLP_3PH_33KV_3 Length=0.007469 units=km
New Line.ND177829742$PS7457 phases=3 Bus1=177829742.1.2.3 Bus2=244449529.1.2.3 LineCode=1/0_ATW_3PH_33KV_3 Length=0.019135 units=km
New Line.ND31056110$ND30976416 phases=3 Bus1=30976352.1.2.3 Bus2=31056110.1.2.3 LineCode=336_ATW_3PH_33KV_3 Length=0.194507 units=km
New Line.ND31056110$2328689E phases=3 Bus1=31056110.1.2.3 Bus2=31054349.1.2.3 LineCode=1/0_ATW_3PH_33KV_3 Length=0.010004 units=km
New Line.ND31056110$ND31056058 phases=3 Bus1=31056110.1.2.3 Bus2=31056058.1.2.3 LineCode=336_ATW_3PH_33KV_3 Length=0.653061 units=km
New Line.ND31056058$BF08739 phases=3 Bus1=31056058.1.2.3 Bus2=218521674.1.2.3 LineCode=1/0_ATW_3PH_33KV_3 Length=0.010347 units=km
New Line.4211115E$ND31056058 phases=3 Bus1=31056058.1.2.3 Bus2=70606641.1.2.3 LineCode=336_ATW_3PH_33KV_3 Length=0.106217 units=km
New Line.4211115E$4523898E phases=3 Bus1=70606641.1.2.3 Bus2=151398514.1.2.3 LineCode=336_ATW_3PH_33KV_3 Length=0.235161 units=km
New Line.PS4798$4523898E phases=3 Bus1=151398514.1.2.3 Bus2=239678917.1.2.3 LineCode=336_ATW_3PH_33KV_3 Length=0.04775 units=km
New Line.4116618E$BF08739 phases=3 Bus1=218521675.1.2.3 Bus2=30975911.1.2.3 LineCode=1/0_ATW_3PH_33KV_3 Length=0.010347 units=km
New Line.4771467E$PS4798 phases=3 Bus1=239678918.1.2.3 Bus2=229703419.1.2.3 LineCode=336_ATW_3PH_33KV_3 Length=0.321808 units=km
New Line.2362444ET1$4771467E phases=3 Bus1=229703419.1.2.3 Bus2=30976245.1.2.3 LineCode=336_ATW_3PH_33KV_3 Length=0.044693 units=km
New Line.2362444ET1$ND31056004 phases=3 Bus1=30976245.1.2.3 Bus2=31056004.1.2.3 LineCode=336_ATW_3PH_33KV_3 Length=0.085892 units=km
New Line.ND166571276$ND266161818 phases=3 Bus1=166571276.1.2.3 Bus2=266161818.1.2.3 LineCode=336_ATW_3PH_33KV_3 Length=0.704655 units=km
New Line.ND246695296$ND266161818 phases=3 Bus1=266161818.1.2.3 Bus2=246695296.1.2.3 LineCode=336_ATW_3PH_33KV_3 Length=0.99416 units=km
New Line.PS0071$ND244359948 phases=3 Bus1=244359948.1.2.3 Bus2=31055199.1.2.3 LineCode=336_ATW_3PH_33KV_3 Length=0.386379 units=km
New Line.ND244359933$PS0071 phases=3 Bus1=31055198.1.2.3 Bus2=244359933.1.2.3 LineCode=336_ATW_3PH_33KV_3 Length=0.273739 units=km
New Line.ND244359816$ND244359933 phases=3 Bus1=244359933.1.2.3 Bus2=244359816.1.2.3 LineCode=336_ATW_3PH_33KV_3 Length=0.130982 units=km
New Line.ND244359816$PS3192 phases=3 Bus1=244359816.1.2.3 Bus2=31055233.1.2.3 LineCode=336_ATW_3PH_33KV_3 Length=0.238643 units=km
New Line.ND266769753$PS3192 phases=3 Bus1=31055232.1.2.3 Bus2=266769753.1.2.3 LineCode=336_ATW_3PH_33KV_3 Length=0.36783 units=km
New Line.PS0072$ND266769753 phases=3 Bus1=266769753.1.2.3 Bus2=31055267.1.2.3 LineCode=336_ATW_3PH_33KV_3 Length=0.011252 units=km
New Line.ND258955705$PS0072 phases=3 Bus1=31055266.1.2.3 Bus2=258955705.1.2.3 LineCode=336_ATW_3PH_33KV_3 Length=0.739328 units=km
New Line.PH093E$PS8506 phases=3 Bus1=30976673.1.2.3 Bus2=241180571.1.2.3 LineCode=336_ATW_3PH_33KV_3 Length=0.131904 units=km
New Line.PS8506$4138796E phases=3 Bus1=241180570.1.2.3 Bus2=30976703.1.2.3 LineCode=336_ATW_3PH_33KV_3 Length=0.062595 units=km
New Line.RCS0731$6511E phases=3 Bus1=30976758.1.2.3 Bus2=177962234.1.2.3 LineCode=336_ATW_3PH_33KV_3 Length=0.03925 units=km
New Line.ND245804940$RCS0731 phases=3 Bus1=177962235.1.2.3 Bus2=245804940.1.2.3 LineCode=336_ATW_3PH_33KV_3 Length=0.003385 units=km
New Line.ND245804905$ND245804940 phases=3 Bus1=245804940.1.2.3 Bus2=245804905.1.2.3 LineCode=336_ATW_3PH_33KV_3 Length=0.274414 units=km
New Line.ND217753074$ND245804905 phases=3 Bus1=245804905.1.2.3 Bus2=217753074.1.2.3 LineCode=336_ATW_3PH_33KV_3 Length=0.0659 units=km
New Line.ND177829742$ND217753074 phases=3 Bus1=217753074.1.2.3 Bus2=177829742.1.2.3 LineCode=336_ATW_3PH_33KV_3 Length=0.041357 units=km
New Line.ND245804891$ND177829742 phases=3 Bus1=177829742.1.2.3 Bus2=245804891.1.2.3 LineCode=336_ATW_3PH_33KV_3 Length=0.245195 units=km
New Line.2043E$ND31056640 phases=3 Bus1=30975785.1.2.3 Bus2=31056640.1.2.3 LineCode=336_ACSR_3PH_33KV_3 Length=0.710991 units=km
New Line.PS0026$13386 phases=3 Bus1=-8888882182609.1.2.3 Bus2=31054637.1.2.3 LineCode=336_ACSR_3PH_33KV_3 Length=0.209974 units=km
New Line.VFI6076-2$ND89977241 phases=3 Bus1=89976960.1.2.3 Bus2=89977241.1.2.3 LineCode=4/0_CLP_3PH_33KV_3 Length=0.052139 units=km
New Line.ND89977241$P5397348 phases=3 Bus1=89977241.1.2.3 Bus2=168990563.1.2.3 LineCode=4/0_CLP_3PH_33KV_3 Length=0.162717 units=km
New Line.GS5977-1$RCS8520-1 phases=3 Bus1=228514840.1.2.3 Bus2=83960643.1.2.3 LineCode=4/0_JCN_3PH_33KV_3 Length=0.017693 units=km
New Line.GS6968-2$282E phases=3 Bus1=89977279.1.2.3 Bus2=89978673.1.2.3 LineCode=4/0_CLP_3PH_33KV_3 Length=0.763944 units=km
New Line.GS6968-1$GS6243-2 phases=3 Bus1=89977271.1.2.3 Bus2=106684623.1.2.3 LineCode=750_CLP_3PH_33KV_3 Length=0.558686 units=km
New Line.GS7471-1$2306146E phases=3 Bus1=177829754.1.2.3 Bus2=177829815.1.2.3 LineCode=4/0_JCN_3PH_33KV_3 Length=0.926112 units=km
New Line.GS5978-2$GS5977-2 phases=3 Bus1=83960651.1.2.3 Bus2=83960755.1.2.3 LineCode=4/0_CLP_3PH_33KV_3 Length=0.120544 units=km
New Line.GS6243-3$ND218791062 phases=3 Bus1=106684631.1.2.3 Bus2=218791062.1.2.3 LineCode=4/0_CLP_3PH_33KV_3 Length=0.697746 units=km
New Line.GS5977-3$VFI6020-1 phases=3 Bus1=83960659.1.2.3 Bus2=83960896.1.2.3 LineCode=4/0_CLP_3PH_33KV_3 Length=0.201237 units=km
New Line.463E$GS6243-1 phases=3 Bus1=106684615.1.2.3 Bus2=89977479.1.2.3 LineCode=750_CLP_3PH_33KV_3 Length=0.131603 units=km
New Line.ND218791057$ND218791062 phases=3 Bus1=218791062.1.2.3 Bus2=218791057.1.2.3 LineCode=4/0_JCN_3PH_33KV_3 Length=0.07752 units=km
New Line.GS6245-3$ND218791057 phases=3 Bus1=218791057.1.2.3 Bus2=106021645.1.2.3 LineCode=4/0_JCN_3PH_33KV_3 Length=0.1719 units=km
New Line.GS7472-1$GS7471-2 phases=3 Bus1=177829807.1.2.3 Bus2=177829989.1.2.3 LineCode=4/0_JCN_3PH_33KV_3 Length=0.02601 units=km
New Line.043E$ND89738931 phases=3 Bus1=90277598.1.2.3 Bus2=89738913.1.2.3 LineCode=1/0_CLP_3PH_33KV_3 Length=0.079297 units=km
New Line.ND110995690$PH566E phases=3 Bus1=110995690.1.2.3 Bus2=110995684.1.2.3 LineCode=1/0_ACSR_3PH_33KV_3 Length=0.007216 units=km
New Line.GS7621-1$GS7471-3 phases=3 Bus1=177829823.1.2.3 Bus2=179149567.1.2.3 LineCode=4/0_JCN_3PH_33KV_3 Length=0.033761 units=km
New Line.PH566E$ND110995724 phases=3 Bus1=110995702.1.2.3 Bus2=110995729.1.2.3 LineCode=1/0_CLP_3PH_33KV_3 Length=0.012809 units=km
New Line.GS6245-2$VFI6244-1 phases=3 Bus1=106021637.1.2.3 Bus2=106021894.1.2.3 LineCode=4/0_CLP_3PH_33KV_3 Length=0.067387 units=km
New Line.PS6751$ND90277656 phases=3 Bus1=110947203.1.2.3 Bus2=90277656.1.2.3 LineCode=1/0_ACSR_3PH_33KV_3 Length=0.021532 units=km
New Line.PS6034$ND90277656 phases=3 Bus1=90277656.1.2.3 Bus2=83333675.1.2.3 LineCode=1/0_ACSR_3PH_33KV_3 Length=1.3376 units=km
New Line.ND90277656$043E phases=3 Bus1=90277656.1.2.3 Bus2=90277597.1.2.3 LineCode=1/0_ACSR_3PH_33KV_3 Length=0.006797 units=km
New Line.PS6034$ND110995690 phases=3 Bus1=83333674.1.2.3 Bus2=110995690.1.2.3 LineCode=1/0_ACSR_3PH_33KV_3 Length=0.009989 units=km
New Line.PS9034$FD85885 phases=3 Bus1=244449642.1.2.3 Bus2=30976189.1.2.3 LineCode=1/0_ACSR_3PH_33KV_3 Length=0.003053 units=km
New Line.ND83961303$GS5978-3 phases=3 Bus1=83960763.1.2.3 Bus2=-77777783960763.1.2.3 LineCode=4/0_CLP_3PH_33KV_3 Length=0.027447 units=km
New Line.PS7457$2306146E phases=3 Bus1=244449528.1.2.3 Bus2=177829736.1.2.3 LineCode=1/0_ATW_3PH_33KV_3 Length=0.000252 units=km
New Line.ND230450640$ND31056022 phases=3 Bus1=31056022.1.2.3 Bus2=230450640.1.2.3 LineCode=336_ATW_3PH_33KV_3 Length=0.006978 units=km
New Line.GS5978-1$VFI6020-2 phases=3 Bus1=83960902.1.2.3 Bus2=83960747.1.2.3 LineCode=4/0_EPR_3PH_33KV_3 Length=0.01223 units=km
New Line.ND31056022$ND245804891 phases=3 Bus1=245804891.1.2.3 Bus2=31056022.1.2.3 LineCode=336_ATW_3PH_33KV_3 Length=0.54214 units=km
New Line.ND31056022$ND243048011 phases=3 Bus1=31056022.1.2.3 Bus2=243048011.1.2.3 LineCode=1/0_ATW_3PH_33KV_3 Length=0.008288 units=km
New Line.ND243048011$PS6751 phases=3 Bus1=243048011.1.2.3 Bus2=110947202.1.2.3 LineCode=1/0_ATW_3PH_33KV_3 Length=0.172088 units=km
New Line.PS2353$437E phases=3 Bus1=89978672.1.2.3 Bus2=244449601.1.2.3 LineCode=1/0_ATW_3PH_33KV_3 Length=0.573606 units=km
New Line.PS4937$ND230450640 phases=3 Bus1=230450640.1.2.3 Bus2=31054981.1.2.3 LineCode=336_ATW_3PH_33KV_3 Length=0.217126 units=km
New Line.4206611E$PS4937 phases=3 Bus1=31054982.1.2.3 Bus2=183072156.1.2.3 LineCode=336_ATW_3PH_33KV_3 Length=0.411523 units=km
New Line.1802581E$PS2353 phases=3 Bus1=244449600.1.2.3 Bus2=30975722.1.2.3 LineCode=1/0_ATW_3PH_33KV_3 Length=0.631746 units=km
New Line.PS5170$4206611E phases=3 Bus1=183072156.1.2.3 Bus2=31055321.1.2.3 LineCode=336_ATW_3PH_33KV_3 Length=0.056451 units=km
New Line.ND30976414$463E phases=3 Bus1=89977478.1.2.3 Bus2=30976334.1.2.3 LineCode=336_ATW_3PH_33KV_3 Length=0.021273 units=km
New Line.ND99550234$PS5170 phases=3 Bus1=31055320.1.2.3 Bus2=99550234.1.2.3 LineCode=336_ATW_3PH_33KV_3 Length=0.064837 units=km
New Line.ND110995690$PS9034 phases=3 Bus1=110995690.1.2.3 Bus2=244449643.1.2.3 LineCode=1/0_ATW_3PH_33KV_3 Length=0.411961 units=km
New Line.unset$ND99550234 phases=3 Bus1=99550234.1.2.3 Bus2=-77777799550234.1.2.3 LineCode=336_ATW_ABC_33_3 Length=0.028584 units=km
New Line.ND99550234$ND99550044 phases=3 Bus1=99550234.1.2.3 Bus2=-77777799550234.1.2.3 LineCode=336_ATW_3PH_33KV_3 Length=0.030731 units=km

! Switches
New Line.5554518:RCS7431-1 phases=3 Bus1=182221585.1.2.3 Bus2=182221599.1.2.3 switch=y r1=0.001 x1=0.001 r0=0.001 x0=0.001 Length=0.001 units=km enabled=false
New Line.2314795E:PS0047 phases=3 Bus1=43570584.1.2.3 Bus2=43570583.1.2.3 switch=y r1=0.001 x1=0.001 r0=0.001 x0=0.001 Length=0.001 units=km enabled=false
New Line.5506728:VFI6244-1 phases=3 Bus1=106021894.1.2.3 Bus2=106021895.1.2.3 switch=y r1=0.001 x1=0.001 r0=0.001 x0=0.001 Length=0.001 units=km
New Line.5627516:VFI7473-1 phases=3 Bus1=177830116.1.2.3 Bus2=177830115.1.2.3 switch=y r1=0.001 x1=0.001 r0=0.001 x0=0.001 Length=0.001 units=km
New Line.5627519:VFI7622-1 phases=3 Bus1=179149694.1.2.3 Bus2=179149693.1.2.3 switch=y r1=0.001 x1=0.001 r0=0.001 x0=0.001 Length=0.001 units=km
New Line.5710365:RAR7962 phases=3 Bus1=207749991.1.2.3 Bus2=207749992.1.2.3 switch=y r1=0.001 x1=0.001 r0=0.001 x0=0.001 Length=0.001 units=km
New Line.5524614:VFI6076-2 phases=3 Bus1=89976924.1.2.3 Bus2=89976960.1.2.3 switch=y r1=0.001 x1=0.001 r0=0.001 x0=0.001 Length=0.001 units=km
New Line.4516733E:RAR0037 phases=3 Bus1=30976316.1.2.3 Bus2=30976317.1.2.3 switch=y r1=0.001 x1=0.001 r0=0.001 x0=0.001 Length=0.001 units=km
New Line.4817621E:RAR0392 phases=3 Bus1=30975993.1.2.3 Bus2=30975992.1.2.3 switch=y r1=0.001 x1=0.001 r0=0.001 x0=0.001 Length=0.001 units=km
New Line.OWENS$TERRA_COTTA_RCS1947$RCS1947 phases=3 Bus1=31055604.1.2.3 Bus2=-77777731055604.1.2.3 switch=y r1=0.001 x1=0.001 r0=0.001 x0=0.001 Length=0.001 units=km
New Line.OWENS$CUPPLES_RCS7431-1$RCS7431-1 phases=3 Bus1=182221599.1.2.3 Bus2=-777777182221599.1.2.3 switch=y r1=0.001 x1=0.001 r0=0.001 x0=0.001 Length=0.001 units=km
New Line.OWENS$CUPPLES_PS0047$PS0047 phases=3 Bus1=43570583.1.2.3 Bus2=-77777743570583.1.2.3 switch=y r1=0.001 x1=0.001 r0=0.001 x0=0.001 Length=0.001 units=km
New Line.110995736$P5610957 phases=3 Bus1=110995729.1.2.3 Bus2=110995730.1.2.3 switch=y r1=0.001 x1=0.001 r0=0.001 x0=0.001 Length=0.001 units=km
New Line.GS7472-T$GS7472-4 phases=3 Bus1=177829982.1.2.3 Bus2=177829983.1.2.3 switch=y r1=0.001 x1=0.001 r0=0.001 x0=0.001 Length=0.001 units=km
New Line.30976378$D phases=3 Bus1=30976352.1.2.3 Bus2=30976328.1.2.3 switch=y r1=0.001 x1=0.001 r0=0.001 x0=0.001 Length=0.001 units=km
New Line.GS7621-T$GS7621-4 phases=3 Bus1=179149560.1.2.3 Bus2=179149561.1.2.3 switch=y r1=0.001 x1=0.001 r0=0.001 x0=0.001 Length=0.001 units=km
New Line.RAR0037$D phases=3 Bus1=30976317.1.2.3 Bus2=30976329.1.2.3 switch=y r1=0.001 x1=0.001 r0=0.001 x0=0.001 Length=0.001 units=km
New Line.84896705$P5534132 phases=3 Bus1=84896698.1.2.3 Bus2=84896699.1.2.3 switch=y r1=0.001 x1=0.001 r0=0.001 x0=0.001 Length=0.001 units=km
New Line.106022123$106022131 phases=3 Bus1=106022110.1.2.3 Bus2=106022104.1.2.3 switch=y r1=0.001 x1=0.001 r0=0.001 x0=0.001 Length=0.001 units=km
New Line.177830216$P5627517 phases=3 Bus1=177830209.1.2.3 Bus2=177830210.1.2.3 switch=y r1=0.001 x1=0.001 r0=0.001 x0=0.001 Length=0.001 units=km
New Line.106022115$106022123 phases=3 Bus1=106022104.1.2.3 Bus2=106022103.1.2.3 switch=y r1=0.001 x1=0.001 r0=0.001 x0=0.001 Length=0.001 units=km
New Line.179149769$P5627520 phases=3 Bus1=179149762.1.2.3 Bus2=179149763.1.2.3 switch=y r1=0.001 x1=0.001 r0=0.001 x0=0.001 Length=0.001 units=km
New Line.210741663$P5464035 phases=3 Bus1=210741656.1.2.3 Bus2=210741657.1.2.3 switch=y r1=0.001 x1=0.001 r0=0.001 x0=0.001 Length=0.001 units=km
New Line.200741518$200741526 phases=3 Bus1=200741506.1.2.3 Bus2=200741507.1.2.3 switch=y r1=0.001 x1=0.001 r0=0.001 x0=0.001 Length=0.001 units=km
New Line.200741526$200741534 phases=3 Bus1=200741507.1.2.3 Bus2=200741513.1.2.3 switch=y r1=0.001 x1=0.001 r0=0.001 x0=0.001 Length=0.001 units=km
New Line.207749611$207749619 phases=3 Bus1=207749599.1.2.3 Bus2=207749600.1.2.3 switch=y r1=0.001 x1=0.001 r0=0.001 x0=0.001 Length=0.001 units=km
New Line.207749619$207749627 phases=3 Bus1=207749600.1.2.3 Bus2=207749606.1.2.3 switch=y r1=0.001 x1=0.001 r0=0.001 x0=0.001 Length=0.001 units=km
New Line.217525546$GS7581-2 phases=3 Bus1=217525534.1.2.3 Bus2=217525535.1.2.3 switch=y r1=0.001 x1=0.001 r0=0.001 x0=0.001 Length=0.001 units=km
New Line.GS7581-2$217525562 phases=3 Bus1=217525535.1.2.3 Bus2=217525541.1.2.3 switch=y r1=0.001 x1=0.001 r0=0.001 x0=0.001 Length=0.001 units=km
New Line.207749834$GS7957-T phases=3 Bus1=207749823.1.2.3 Bus2=207749824.1.2.3 switch=y r1=0.001 x1=0.001 r0=0.001 x0=0.001 Length=0.001 units=km
New Line.70061207$70061223 phases=3 Bus1=70061196.1.2.3 Bus2=70061190.1.2.3 switch=y r1=0.001 x1=0.001 r0=0.001 x0=0.001 Length=0.001 units=km
New Line.70061223$GS5755-4 phases=3 Bus1=70061196.1.2.3 Bus2=70061202.1.2.3 switch=y r1=0.001 x1=0.001 r0=0.001 x0=0.001 Length=0.001 units=km
New Line.GS7957-T$207749865 phases=3 Bus1=207749829.1.2.3 Bus2=207749830.1.2.3 switch=y r1=0.001 x1=0.001 r0=0.001 x0=0.001 Length=0.001 units=km
New Line.70061215$70061207 phases=3 Bus1=70061190.1.2.3 Bus2=70061189.1.2.3 switch=y r1=0.001 x1=0.001 r0=0.001 x0=0.001 Length=0.001 units=km
New Line.89976676$89976668 phases=3 Bus1=89976651.1.2.3 Bus2=89976650.1.2.3 switch=y r1=0.001 x1=0.001 r0=0.001 x0=0.001 Length=0.001 units=km
New Line.89976668$89976684 phases=3 Bus1=89976651.1.2.3 Bus2=89976657.1.2.3 switch=y r1=0.001 x1=0.001 r0=0.001 x0=0.001 Length=0.001 units=km
New Line.207749715$207749723 phases=3 Bus1=207749703.1.2.3 Bus2=207749704.1.2.3 switch=y r1=0.001 x1=0.001 r0=0.001 x0=0.001 Length=0.001 units=km
New Line.89976684$89976692 phases=3 Bus1=89976657.1.2.3 Bus2=89976663.1.2.3 switch=y r1=0.001 x1=0.001 r0=0.001 x0=0.001 Length=0.001 units=km
New Line.207749723$207749731 phases=3 Bus1=207749704.1.2.3 Bus2=207749710.1.2.3 switch=y r1=0.001 x1=0.001 r0=0.001 x0=0.001 Length=0.001 units=km
New Line.228514846$228514854 phases=3 Bus1=228514825.1.2.3 Bus2=228514819.1.2.3 switch=y r1=0.001 x1=0.001 r0=0.001 x0=0.001 Length=0.001 units=km
New Line.228514830$228514846 phases=3 Bus1=228514819.1.2.3 Bus2=228514813.1.2.3 switch=y r1=0.001 x1=0.001 r0=0.001 x0=0.001 Length=0.001 units=km
New Line.89976942$89976958 phases=3 Bus1=89976930.1.2.3 Bus2=89976924.1.2.3 switch=y r1=0.001 x1=0.001 r0=0.001 x0=0.001 Length=0.001 units=km
New Line.228514838$228514830 phases=3 Bus1=228514813.1.2.3 Bus2=228514812.1.2.3 switch=y r1=0.001 x1=0.001 r0=0.001 x0=0.001 Length=0.001 units=km
New Line.89976958$89976964 phases=3 Bus1=89976924.1.2.3 Bus2=89976925.1.2.3 switch=y r1=0.001 x1=0.001 r0=0.001 x0=0.001 Length=0.001 units=km
New Line.89977277$89977285 phases=3 Bus1=89977264.1.2.3 Bus2=89977258.1.2.3 switch=y r1=0.001 x1=0.001 r0=0.001 x0=0.001 Length=0.001 units=km
New Line.228515149$P5151817 phases=3 Bus1=228515142.1.2.3 Bus2=228515143.1.2.3 switch=y r1=0.001 x1=0.001 r0=0.001 x0=0.001 Length=0.001 units=km
New Line.89976964$89976951 phases=3 Bus1=89976925.1.2.3 Bus2=89976937.1.2.3 switch=y r1=0.001 x1=0.001 r0=0.001 x0=0.001 Length=0.001 units=km
New Line.5627515:GS7472-3 phases=3 Bus1=177829982.1.2.3 Bus2=177830013.1.2.3 switch=y r1=0.001 x1=0.001 r0=0.001 x0=0.001 Length=0.001 units=km
New Line.5627518:GS7621-T phases=3 Bus1=179149555.1.2.3 Bus2=179149560.1.2.3 switch=y r1=0.001 x1=0.001 r0=0.001 x0=0.001 Length=0.001 units=km enabled=false
New Line.5627518:GS7621-2 phases=3 Bus1=179149555.1.2.3 Bus2=179149575.1.2.3 switch=y r1=0.001 x1=0.001 r0=0.001 x0=0.001 Length=0.001 units=km
New Line.5627515:GS7472-4 phases=3 Bus1=177829983.1.2.3 Bus2=177830020.1.2.3 switch=y r1=0.001 x1=0.001 r0=0.001 x0=0.001 Length=0.001 units=km
New Line.5627518:GS7621-3 phases=3 Bus1=179149560.1.2.3 Bus2=179149591.1.2.3 switch=y r1=0.001 x1=0.001 r0=0.001 x0=0.001 Length=0.001 units=km
New Line.4516733E:RAR0037_D phases=3 Bus1=30976328.1.2.3 Bus2=30976329.1.2.3 switch=y r1=0.001 x1=0.001 r0=0.001 x0=0.001 Length=0.001 units=km
New Line.5506728:GS6246-3 phases=3 Bus1=106022133.1.2.3 Bus2=106022110.1.2.3 switch=y r1=0.001 x1=0.001 r0=0.001 x0=0.001 Length=0.001 units=km enabled=false
New Line.5627518:GS7621-4 phases=3 Bus1=179149561.1.2.3 Bus2=179149598.1.2.3 switch=y r1=0.001 x1=0.001 r0=0.001 x0=0.001 Length=0.001 units=km
New Line.5506728:GS6246-2 phases=3 Bus1=106022125.1.2.3 Bus2=106022104.1.2.3 switch=y r1=0.001 x1=0.001 r0=0.001 x0=0.001 Length=0.001 units=km
New Line.5506728:GS6246-1 phases=3 Bus1=106022103.1.2.3 Bus2=106022117.1.2.3 switch=y r1=0.001 x1=0.001 r0=0.001 x0=0.001 Length=0.001 units=km
New Line.4211114E:PS4798 phases=3 Bus1=239678917.1.2.3 Bus2=239678918.1.2.3 switch=y r1=0.001 x1=0.001 r0=0.001 x0=0.001 Length=0.001 units=km
New Line.4326491E:PS8162 phases=3 Bus1=210741602.1.2.3 Bus2=210741603.1.2.3 switch=y r1=0.001 x1=0.001 r0=0.001 x0=0.001 Length=0.001 units=km
New Line.4326489E:PS4806 phases=3 Bus1=243625596.1.2.3 Bus2=243625595.1.2.3 switch=y r1=0.001 x1=0.001 r0=0.001 x0=0.001 Length=0.001 units=km
New Line.1757379E:PS4703 phases=3 Bus1=31055165.1.2.3 Bus2=31055164.1.2.3 switch=y r1=0.001 x1=0.001 r0=0.001 x0=0.001 Length=0.001 units=km
New Line.2084429E:PS0071 phases=3 Bus1=31055199.1.2.3 Bus2=31055198.1.2.3 switch=y r1=0.001 x1=0.001 r0=0.001 x0=0.001 Length=0.001 units=km
New Line.2362239E:PS3192 phases=3 Bus1=31055233.1.2.3 Bus2=31055232.1.2.3 switch=y r1=0.001 x1=0.001 r0=0.001 x0=0.001 Length=0.001 units=km
New Line.1607738E:PS0072 phases=3 Bus1=31055267.1.2.3 Bus2=31055266.1.2.3 switch=y r1=0.001 x1=0.001 r0=0.001 x0=0.001 Length=0.001 units=km
New Line.4562867E:FD85885 phases=3 Bus1=30976189.1.2.3 Bus2=30976190.1.2.3 switch=y r1=0.001 x1=0.001 r0=0.001 x0=0.001 Length=0.001 units=km
New Line.4326491E:491E phases=3 Bus1=31054271.1.2.3 Bus2=31054272.1.2.3 switch=y r1=0.001 x1=0.001 r0=0.001 x0=0.001 Length=0.001 units=km
New Line.4445947E:4445947EP1 phases=3 Bus1=30976255.1.2.3 Bus2=30976256.1.2.3 switch=y r1=0.001 x1=0.001 r0=0.001 x0=0.001 Length=0.001 units=km
New Line.4445942E:4445942EP2 phases=3 Bus1=30976286.1.2.3 Bus2=30976285.1.2.3 switch=y r1=0.001 x1=0.001 r0=0.001 x0=0.001 Length=0.001 units=km
New Line.1790822E:RCS1947 phases=3 Bus1=61168226.1.2.3 Bus2=31055604.1.2.3 switch=y r1=0.001 x1=0.001 r0=0.001 x0=0.001 Length=0.001 units=km enabled=false
New Line.4494093E:PS8506 phases=3 Bus1=241180571.1.2.3 Bus2=241180570.1.2.3 switch=y r1=0.001 x1=0.001 r0=0.001 x0=0.001 Length=0.001 units=km
New Line.5557187:GS7575-1 phases=3 Bus1=200741520.1.2.3 Bus2=200741506.1.2.3 switch=y r1=0.001 x1=0.001 r0=0.001 x0=0.001 Length=0.001 units=km
New Line.5557187:GS7575-2 phases=3 Bus1=200741507.1.2.3 Bus2=200741528.1.2.3 switch=y r1=0.001 x1=0.001 r0=0.001 x0=0.001 Length=0.001 units=km
New Line.5557187:GS7575-3 phases=3 Bus1=200741513.1.2.3 Bus2=200741536.1.2.3 switch=y r1=0.001 x1=0.001 r0=0.001 x0=0.001 Length=0.001 units=km
New Line.5710362:GS7956-1 phases=3 Bus1=207749613.1.2.3 Bus2=207749599.1.2.3 switch=y r1=0.001 x1=0.001 r0=0.001 x0=0.001 Length=0.001 units=km
New Line.5710362:GS7956-2 phases=3 Bus1=207749600.1.2.3 Bus2=207749621.1.2.3 switch=y r1=0.001 x1=0.001 r0=0.001 x0=0.001 Length=0.001 units=km
New Line.5710362:GS7956-3 phases=3 Bus1=207749606.1.2.3 Bus2=207749629.1.2.3 switch=y r1=0.001 x1=0.001 r0=0.001 x0=0.001 Length=0.001 units=km
New Line.5710363:P5710363-1 phases=3 Bus1=207750480.1.2.3 Bus2=207750481.1.2.3 switch=y r1=0.001 x1=0.001 r0=0.001 x0=0.001 Length=0.001 units=km
New Line.5710364:GS7957-1 phases=3 Bus1=207749836.1.2.3 Bus2=207749823.1.2.3 switch=y r1=0.001 x1=0.001 r0=0.001 x0=0.001 Length=0.001 units=km
New Line.5518315:GS5755-3 phases=3 Bus1=70061225.1.2.3 Bus2=70061196.1.2.3 switch=y r1=0.001 x1=0.001 r0=0.001 x0=0.001 Length=0.001 units=km
New Line.5710364:GS7957-T phases=3 Bus1=207749824.1.2.3 Bus2=207749829.1.2.3 switch=y r1=0.001 x1=0.001 r0=0.001 x0=0.001 Length=0.001 units=km enabled=false
New Line.5710364:GS7957-2 phases=3 Bus1=207749824.1.2.3 Bus2=207749844.1.2.3 switch=y r1=0.001 x1=0.001 r0=0.001 x0=0.001 Length=0.001 units=km
New Line.5710364:GS7957-3 phases=3 Bus1=207749829.1.2.3 Bus2=207749860.1.2.3 switch=y r1=0.001 x1=0.001 r0=0.001 x0=0.001 Length=0.001 units=km
New Line.5518315:GS5755-2 phases=3 Bus1=70061190.1.2.3 Bus2=70061209.1.2.3 switch=y r1=0.001 x1=0.001 r0=0.001 x0=0.001 Length=0.001 units=km
New Line.5518315:GS5755-4 phases=3 Bus1=70061202.1.2.3 Bus2=70061233.1.2.3 switch=y r1=0.001 x1=0.001 r0=0.001 x0=0.001 Length=0.001 units=km
New Line.5710364:GS7957-4 phases=3 Bus1=207749830.1.2.3 Bus2=207749867.1.2.3 switch=y r1=0.001 x1=0.001 r0=0.001 x0=0.001 Length=0.001 units=km
New Line.5518315:GS5755-1 phases=3 Bus1=70061189.1.2.3 Bus2=70061217.1.2.3 switch=y r1=0.001 x1=0.001 r0=0.001 x0=0.001 Length=0.001 units=km
New Line.5524603:GS6077-2 phases=3 Bus1=89976670.1.2.3 Bus2=89976651.1.2.3 switch=y r1=0.001 x1=0.001 r0=0.001 x0=0.001 Length=0.001 units=km
New Line.5710366:GS7959-1 phases=3 Bus1=207749717.1.2.3 Bus2=207749703.1.2.3 switch=y r1=0.001 x1=0.001 r0=0.001 x0=0.001 Length=0.001 units=km
New Line.5524603:GS6077-1 phases=3 Bus1=89976650.1.2.3 Bus2=89976678.1.2.3 switch=y r1=0.001 x1=0.001 r0=0.001 x0=0.001 Length=0.001 units=km
New Line.5524603:GS6077-3 phases=3 Bus1=89976657.1.2.3 Bus2=89976686.1.2.3 switch=y r1=0.001 x1=0.001 r0=0.001 x0=0.001 Length=0.001 units=km
New Line.2169603E:RCS0731 phases=3 Bus1=177962234.1.2.3 Bus2=177962235.1.2.3 switch=y r1=0.001 x1=0.001 r0=0.001 x0=0.001 Length=0.001 units=km
New Line.5710366:GS7959-2 phases=3 Bus1=207749704.1.2.3 Bus2=207749725.1.2.3 switch=y r1=0.001 x1=0.001 r0=0.001 x0=0.001 Length=0.001 units=km
New Line.5524603:GS6077-4 phases=3 Bus1=89976663.1.2.3 Bus2=89976694.1.2.3 switch=y r1=0.001 x1=0.001 r0=0.001 x0=0.001 Length=0.001 units=km
New Line.5710366:GS7959-3 phases=3 Bus1=207749710.1.2.3 Bus2=207749733.1.2.3 switch=y r1=0.001 x1=0.001 r0=0.001 x0=0.001 Length=0.001 units=km
New Line.5524603:RCS8520-4 phases=3 Bus1=228514856.1.2.3 Bus2=228514825.1.2.3 switch=y r1=0.001 x1=0.001 r0=0.001 x0=0.001 Length=0.001 units=km
New Line.5524614:VFI6076-1 phases=3 Bus1=89976945.1.2.3 Bus2=89976930.1.2.3 switch=y r1=0.001 x1=0.001 r0=0.001 x0=0.001 Length=0.001 units=km
New Line.5524603:RCS8520-3 phases=3 Bus1=228514819.1.2.3 Bus2=228514848.1.2.3 switch=y r1=0.001 x1=0.001 r0=0.001 x0=0.001 Length=0.001 units=km
New Line.5524609:GS6968-3 phases=3 Bus1=89977287.1.2.3 Bus2=89977264.1.2.3 switch=y r1=0.001 x1=0.001 r0=0.001 x0=0.001 Length=0.001 units=km
New Line.5524603:RCS8520-1 phases=3 Bus1=228514812.1.2.3 Bus2=228514840.1.2.3 switch=y r1=0.001 x1=0.001 r0=0.001 x0=0.001 Length=0.001 units=km
New Line.30976137$P5140453 phases=3 Bus1=30976130.1.2.3 Bus2=30976131.1.2.3 switch=y r1=0.001 x1=0.001 r0=0.001 x0=0.001 Length=0.001 units=km
New Line.182460383$GS7380-2 phases=3 Bus1=182460371.1.2.3 Bus2=182460372.1.2.3 switch=y r1=0.001 x1=0.001 r0=0.001 x0=0.001 Length=0.001 units=km
New Line.GS7380-2$182460399 phases=3 Bus1=182460372.1.2.3 Bus2=182460378.1.2.3 switch=y r1=0.001 x1=0.001 r0=0.001 x0=0.001 Length=0.001 units=km
New Line.182221605$182221613 phases=3 Bus1=182221592.1.2.3 Bus2=182221586.1.2.3 switch=y r1=0.001 x1=0.001 r0=0.001 x0=0.001 Length=0.001 units=km
New Line.182221597$182221605 phases=3 Bus1=182221586.1.2.3 Bus2=182221585.1.2.3 switch=y r1=0.001 x1=0.001 r0=0.001 x0=0.001 Length=0.001 units=km
New Line.192802710$GS7624-2 phases=3 Bus1=192802698.1.2.3 Bus2=192802699.1.2.3 switch=y r1=0.001 x1=0.001 r0=0.001 x0=0.001 Length=0.001 units=km
New Line.GS7624-2$192802726 phases=3 Bus1=192802699.1.2.3 Bus2=192802705.1.2.3 switch=y r1=0.001 x1=0.001 r0=0.001 x0=0.001 Length=0.001 units=km
New Line.30976054$D phases=3 Bus1=30976028.1.2.3 Bus2=30976004.1.2.3 switch=y r1=0.001 x1=0.001 r0=0.001 x0=0.001 Length=0.001 units=km
New Line.30976054$C phases=3 Bus1=30976028.1.2.3 Bus2=30976029.1.2.3 switch=y r1=0.001 x1=0.001 r0=0.001 x0=0.001 Length=0.001 units=km
New Line.RAR0392$D phases=3 Bus1=30976005.1.2.3 Bus2=30975993.1.2.3 switch=y r1=0.001 x1=0.001 r0=0.001 x0=0.001 Length=0.001 units=km
New Line.30976050$C phases=3 Bus1=30976011.1.2.3 Bus2=30976010.1.2.3 switch=y r1=0.001 x1=0.001 r0=0.001 x0=0.001 Length=0.001 units=km
New Line.30976050$B phases=3 Bus1=30976010.1.2.3 Bus2=30975998.1.2.3 switch=y r1=0.001 x1=0.001 r0=0.001 x0=0.001 Length=0.001 units=km
New Line.B$RAR0392 phases=3 Bus1=30975992.1.2.3 Bus2=30975999.1.2.3 switch=y r1=0.001 x1=0.001 r0=0.001 x0=0.001 Length=0.001 units=km
New Line.31054446$GS5746-2 phases=3 Bus1=31054434.1.2.3 Bus2=31054435.1.2.3 switch=y r1=0.001 x1=0.001 r0=0.001 x0=0.001 Length=0.001 units=km
New Line.GS5746-2$31054462 phases=3 Bus1=31054435.1.2.3 Bus2=31054441.1.2.3 switch=y r1=0.001 x1=0.001 r0=0.001 x0=0.001 Length=0.001 units=km
New Line.4494093E:PH093E phases=3 Bus1=30976674.1.2.3 Bus2=30976673.1.2.3 switch=y r1=0.001 x1=0.001 r0=0.001 x0=0.001 Length=0.001 units=km
New Line.4138796E:4138796E phases=3 Bus1=30976703.1.2.3 Bus2=30976704.1.2.3 switch=y r1=0.001 x1=0.001 r0=0.001 x0=0.001 Length=0.001 units=km
New Line.4175996E:4175996E phases=3 Bus1=30975756.1.2.3 Bus2=30975755.1.2.3 switch=y r1=0.001 x1=0.001 r0=0.001 x0=0.001 Length=0.001 units=km
New Line.4238030E:4238030E phases=3 Bus1=30976467.1.2.3 Bus2=30976468.1.2.3 switch=y r1=0.001 x1=0.001 r0=0.001 x0=0.001 Length=0.001 units=km
New Line.4516511E:6511E phases=3 Bus1=30976759.1.2.3 Bus2=30976758.1.2.3 switch=y r1=0.001 x1=0.001 r0=0.001 x0=0.001 Length=0.001 units=km
New Line.2328689E:31054331 phases=3 Bus1=31054333.1.2.3 Bus2=31054334.1.2.3 switch=y r1=0.001 x1=0.001 r0=0.001 x0=0.001 Length=0.001 units=km
New Line.4211115E:70606671 phases=3 Bus1=70606673.1.2.3 Bus2=70606674.1.2.3 switch=y r1=0.001 x1=0.001 r0=0.001 x0=0.001 Length=0.001 units=km
New Line.4523898E:151398493 phases=3 Bus1=151398495.1.2.3 Bus2=151398496.1.2.3 switch=y r1=0.001 x1=0.001 r0=0.001 x0=0.001 Length=0.001 units=km
New Line.4116618E:30975893 phases=3 Bus1=30975895.1.2.3 Bus2=30975896.1.2.3 switch=y r1=0.001 x1=0.001 r0=0.001 x0=0.001 Length=0.001 units=km
New Line.4771467E:229703398 phases=3 Bus1=229703400.1.2.3 Bus2=229703401.1.2.3 switch=y r1=0.001 x1=0.001 r0=0.001 x0=0.001 Length=0.001 units=km
New Line.2362444E:30976225 phases=3 Bus1=30976227.1.2.3 Bus2=30976228.1.2.3 switch=y r1=0.001 x1=0.001 r0=0.001 x0=0.001 Length=0.001 units=km
New Line.2362437E:31054245 phases=3 Bus1=31054247.1.2.3 Bus2=31054248.1.2.3 switch=y r1=0.001 x1=0.001 r0=0.001 x0=0.001 Length=0.001 units=km
New Line.CAB_4523898E:4523898E phases=3 Bus1=151398514.1.2.3 Bus2=151398495.1.2.3 switch=y r1=0.001 x1=0.001 r0=0.001 x0=0.001 Length=0.001 units=km
New Line.CAB_2362437E:2362437E phases=3 Bus1=31054263.1.2.3 Bus2=31054247.1.2.3 switch=y r1=0.001 x1=0.001 r0=0.001 x0=0.001 Length=0.001 units=km
New Line.1555681E:BF08739 phases=3 Bus1=218521674.1.2.3 Bus2=218521675.1.2.3 switch=y r1=0.001 x1=0.001 r0=0.001 x0=0.001 Length=0.001 units=km
New Line.2362441E:BF08743 phases=3 Bus1=218521716.1.2.3 Bus2=218521717.1.2.3 switch=y r1=0.001 x1=0.001 r0=0.001 x0=0.001 Length=0.001 units=km
New Line.5511721:GS7581-1 phases=3 Bus1=217525548.1.2.3 Bus2=217525534.1.2.3 switch=y r1=0.001 x1=0.001 r0=0.001 x0=0.001 Length=0.001 units=km
New Line.5511721:GS7581-3 phases=3 Bus1=217525541.1.2.3 Bus2=217525564.1.2.3 switch=y r1=0.001 x1=0.001 r0=0.001 x0=0.001 Length=0.001 units=km
New Line.5524603:RCS8520-2 phases=3 Bus1=228514813.1.2.3 Bus2=228514832.1.2.3 switch=y r1=0.001 x1=0.001 r0=0.001 x0=0.001 Length=0.001 units=km enabled=false
New Line.4473358E:PS0026 phases=3 Bus1=31054637.1.2.3 Bus2=31054636.1.2.3 switch=y r1=0.001 x1=0.001 r0=0.001 x0=0.001 Length=0.001 units=km
New Line.1859588E:PS0084 phases=3 Bus1=31054671.1.2.3 Bus2=31054670.1.2.3 switch=y r1=0.001 x1=0.001 r0=0.001 x0=0.001 Length=0.001 units=km
New Line.4473373E:PS0028 phases=3 Bus1=31054738.1.2.3 Bus2=31054739.1.2.3 switch=y r1=0.001 x1=0.001 r0=0.001 x0=0.001 Length=0.001 units=km
New Line.4473381E:PS0030 phases=3 Bus1=31054773.1.2.3 Bus2=31054772.1.2.3 switch=y r1=0.001 x1=0.001 r0=0.001 x0=0.001 Length=0.001 units=km
New Line.5554518:RCS7431-3 phases=3 Bus1=182221615.1.2.3 Bus2=182221592.1.2.3 switch=y r1=0.001 x1=0.001 r0=0.001 x0=0.001 Length=0.001 units=km
New Line.5554518:RCS7431-2 phases=3 Bus1=182221586.1.2.3 Bus2=182221607.1.2.3 switch=y r1=0.001 x1=0.001 r0=0.001 x0=0.001 Length=0.001 units=km
New Line.5633116:GS7624-1 phases=3 Bus1=192802712.1.2.3 Bus2=192802698.1.2.3 switch=y r1=0.001 x1=0.001 r0=0.001 x0=0.001 Length=0.001 units=km
New Line.X9637E:PS0046 phases=3 Bus1=31054806.1.2.3 Bus2=31054807.1.2.3 switch=y r1=0.001 x1=0.001 r0=0.001 x0=0.001 Length=0.001 units=km
New Line.5633116:GS7624-3 phases=3 Bus1=192802705.1.2.3 Bus2=192802728.1.2.3 switch=y r1=0.001 x1=0.001 r0=0.001 x0=0.001 Length=0.001 units=km
New Line.4817621E:RAR0392_D phases=3 Bus1=30976004.1.2.3 Bus2=30976005.1.2.3 switch=y r1=0.001 x1=0.001 r0=0.001 x0=0.001 Length=0.001 units=km
New Line.4817621E:RAR0392_C phases=3 Bus1=30976029.1.2.3 Bus2=30976011.1.2.3 switch=y r1=0.001 x1=0.001 r0=0.001 x0=0.001 Length=0.001 units=km enabled=false
New Line.4817621E:RAR0392_B phases=3 Bus1=30975998.1.2.3 Bus2=30975999.1.2.3 switch=y r1=0.001 x1=0.001 r0=0.001 x0=0.001 Length=0.001 units=km
New Line.5513835:RCS8091-1 phases=3 Bus1=210568185.1.2.3 Bus2=-777777210568185.1.2.3 switch=y r1=0.001 x1=0.001 r0=0.001 x0=0.001 Length=0.001 units=km enabled=false
New Line.4473366E:PS0027 phases=3 Bus1=31054704.1.2.3 Bus2=31054705.1.2.3 switch=y r1=0.001 x1=0.001 r0=0.001 x0=0.001 Length=0.001 units=km
New Line.5558085:GS7380-1 phases=3 Bus1=182460385.1.2.3 Bus2=182460371.1.2.3 switch=y r1=0.001 x1=0.001 r0=0.001 x0=0.001 Length=0.001 units=km
New Line.5558085:GS7380-3 phases=3 Bus1=182460378.1.2.3 Bus2=182460401.1.2.3 switch=y r1=0.001 x1=0.001 r0=0.001 x0=0.001 Length=0.001 units=km
New Line.CAB_2328689E:2328689E phases=3 Bus1=31054349.1.2.3 Bus2=31054333.1.2.3 switch=y r1=0.001 x1=0.001 r0=0.001 x0=0.001 Length=0.001 units=km
New Line.CAB_4211115E:4211115E phases=3 Bus1=70606641.1.2.3 Bus2=70606673.1.2.3 switch=y r1=0.001 x1=0.001 r0=0.001 x0=0.001 Length=0.001 units=km
New Line.CAB_4116618E:4116618E phases=3 Bus1=30975911.1.2.3 Bus2=30975895.1.2.3 switch=y r1=0.001 x1=0.001 r0=0.001 x0=0.001 Length=0.001 units=km
New Line.CAB_4771467E:4771467E phases=3 Bus1=229703419.1.2.3 Bus2=229703400.1.2.3 switch=y r1=0.001 x1=0.001 r0=0.001 x0=0.001 Length=0.001 units=km
New Line.CAB_2362444E:2362444ET1 phases=3 Bus1=30976245.1.2.3 Bus2=30976227.1.2.3 switch=y r1=0.001 x1=0.001 r0=0.001 x0=0.001 Length=0.001 units=km
New Line.CAB_1790755E:1790755E phases=3 Bus1=30975583.1.2.3 Bus2=30975565.1.2.3 switch=y r1=0.001 x1=0.001 r0=0.001 x0=0.001 Length=0.001 units=km
New Line.1859587E:FD9587 phases=3 Bus1=30976113.1.2.3 Bus2=30976114.1.2.3 switch=y r1=0.001 x1=0.001 r0=0.001 x0=0.001 Length=0.001 units=km
New Line.4473375E:375E phases=3 Bus1=182460474.1.2.3 Bus2=182460475.1.2.3 switch=y r1=0.001 x1=0.001 r0=0.001 x0=0.001 Length=0.001 units=km
New Line.4473478E:4473478E phases=3 Bus1=30975815.1.2.3 Bus2=30975816.1.2.3 switch=y r1=0.001 x1=0.001 r0=0.001 x0=0.001 Length=0.001 units=km
New Line.4092043E:2043E phases=3 Bus1=30975786.1.2.3 Bus2=30975785.1.2.3 switch=y r1=0.001 x1=0.001 r0=0.001 x0=0.001 Length=0.001 units=km
New Line.4092030E:PH030E phases=3 Bus1=30975851.1.2.3 Bus2=30975852.1.2.3 switch=y r1=0.001 x1=0.001 r0=0.001 x0=0.001 Length=0.001 units=km
New Line.1869189E:189E phases=3 Bus1=182460647.1.2.3 Bus2=182460646.1.2.3 switch=y r1=0.001 x1=0.001 r0=0.001 x0=0.001 Length=0.001 units=km
New Line.4068103E:4068103E phases=3 Bus1=30976160.1.2.3 Bus2=30976159.1.2.3 switch=y r1=0.001 x1=0.001 r0=0.001 x0=0.001 Length=0.001 units=km
New Line.4403733E:4403733E phases=3 Bus1=31054403.1.2.3 Bus2=31054404.1.2.3 switch=y r1=0.001 x1=0.001 r0=0.001 x0=0.001 Length=0.001 units=km
New Line.5511693:GS5746-1 phases=3 Bus1=31054448.1.2.3 Bus2=31054434.1.2.3 switch=y r1=0.001 x1=0.001 r0=0.001 x0=0.001 Length=0.001 units=km
New Line.5511693:GS5746-3 phases=3 Bus1=31054441.1.2.3 Bus2=31054464.1.2.3 switch=y r1=0.001 x1=0.001 r0=0.001 x0=0.001 Length=0.001 units=km
New Line.5524614:VFI6076-3 phases=3 Bus1=89976925.1.2.3 Bus2=89976966.1.2.3 switch=y r1=0.001 x1=0.001 r0=0.001 x0=0.001 Length=0.001 units=km enabled=false
New Line.1790755E:30975563 phases=3 Bus1=30975565.1.2.3 Bus2=30975566.1.2.3 switch=y r1=0.001 x1=0.001 r0=0.001 x0=0.001 Length=0.001 units=km
New Line.5491320:VFI6020-2 phases=3 Bus1=83960897.1.2.3 Bus2=83960902.1.2.3 switch=y r1=0.001 x1=0.001 r0=0.001 x0=0.001 Length=0.001 units=km
New Line.OWENS$PORPHYRY_RCS8520-2$RCS8520-2 phases=3 Bus1=228514832.1.2.3 Bus2=-777777228514832.1.2.3 switch=y r1=0.001 x1=0.001 r0=0.001 x0=0.001 Length=0.001 units=km
New Line.5511721:GS7581-2 phases=3 Bus1=217525535.1.2.3 Bus2=217525556.1.2.3 switch=y r1=0.001 x1=0.001 r0=0.001 x0=0.001 Length=0.001 units=km enabled=false
New Line.5633116:GS7624-2 phases=3 Bus1=192802699.1.2.3 Bus2=192802720.1.2.3 switch=y r1=0.001 x1=0.001 r0=0.001 x0=0.001 Length=0.001 units=km enabled=false
New Line.5558085:GS7380-2 phases=3 Bus1=182460372.1.2.3 Bus2=182460393.1.2.3 switch=y r1=0.001 x1=0.001 r0=0.001 x0=0.001 Length=0.001 units=km enabled=false
New Line.5511693:GS5746-2 phases=3 Bus1=31054435.1.2.3 Bus2=31054456.1.2.3 switch=y r1=0.001 x1=0.001 r0=0.001 x0=0.001 Length=0.001 units=km enabled=false
New Line.5524614:VFI6076-4 phases=3 Bus1=89976937.1.2.3 Bus2=89976954.1.2.3 switch=y r1=0.001 x1=0.001 r0=0.001 x0=0.001 Length=0.001 units=km enabled=false
New Line.5627514:GS7471-4 phases=3 Bus1=177829800.1.2.3 Bus2=177829831.1.2.3 switch=y r1=0.001 x1=0.001 r0=0.001 x0=0.001 Length=0.001 units=km enabled=false
New Line.89977269$89977277 phases=3 Bus1=89977258.1.2.3 Bus2=89977257.1.2.3 switch=y r1=0.001 x1=0.001 r0=0.001 x0=0.001 Length=0.001 units=km
New Line.83960641$83960649 phases=3 Bus1=83960629.1.2.3 Bus2=83960630.1.2.3 switch=y r1=0.001 x1=0.001 r0=0.001 x0=0.001 Length=0.001 units=km
New Line.106684613$106684621 phases=3 Bus1=106684602.1.2.3 Bus2=106684601.1.2.3 switch=y r1=0.001 x1=0.001 r0=0.001 x0=0.001 Length=0.001 units=km
New Line.106684621$GS6243-3 phases=3 Bus1=106684602.1.2.3 Bus2=106684608.1.2.3 switch=y r1=0.001 x1=0.001 r0=0.001 x0=0.001 Length=0.001 units=km
New Line.83960649$83960657 phases=3 Bus1=83960630.1.2.3 Bus2=83960636.1.2.3 switch=y r1=0.001 x1=0.001 r0=0.001 x0=0.001 Length=0.001 units=km
New Line.GS7471-1$GS7471-2 phases=3 Bus1=177829787.1.2.3 Bus2=177829788.1.2.3 switch=y r1=0.001 x1=0.001 r0=0.001 x0=0.001 Length=0.001 units=km
New Line.GS7471-2$GS7471-3 phases=3 Bus1=177829788.1.2.3 Bus2=177829794.1.2.3 switch=y r1=0.001 x1=0.001 r0=0.001 x0=0.001 Length=0.001 units=km
New Line.83960745$83960753 phases=3 Bus1=83960734.1.2.3 Bus2=83960733.1.2.3 switch=y r1=0.001 x1=0.001 r0=0.001 x0=0.001 Length=0.001 units=km
New Line.83960753$83960761 phases=3 Bus1=83960734.1.2.3 Bus2=83960740.1.2.3 switch=y r1=0.001 x1=0.001 r0=0.001 x0=0.001 Length=0.001 units=km
New Line.GS7471-3$GS7471-4 phases=3 Bus1=177829794.1.2.3 Bus2=177829800.1.2.3 switch=y r1=0.001 x1=0.001 r0=0.001 x0=0.001 Length=0.001 units=km
New Line.30976374$B phases=3 Bus1=30976334.1.2.3 Bus2=30976322.1.2.3 switch=y r1=0.001 x1=0.001 r0=0.001 x0=0.001 Length=0.001 units=km
New Line.30976374$C phases=3 Bus1=30976334.1.2.3 Bus2=30976335.1.2.3 switch=y r1=0.001 x1=0.001 r0=0.001 x0=0.001 Length=0.001 units=km
New Line.89738920$P5457915 phases=3 Bus1=89738913.1.2.3 Bus2=89738914.1.2.3 switch=y r1=0.001 x1=0.001 r0=0.001 x0=0.001 Length=0.001 units=km
New Line.106021635$106021643 phases=3 Bus1=106021622.1.2.3 Bus2=106021616.1.2.3 switch=y r1=0.001 x1=0.001 r0=0.001 x0=0.001 Length=0.001 units=km
New Line.GS7472-1$GS7472-T phases=3 Bus1=177829976.1.2.3 Bus2=177829977.1.2.3 switch=y r1=0.001 x1=0.001 r0=0.001 x0=0.001 Length=0.001 units=km
New Line.106021627$106021635 phases=3 Bus1=106021616.1.2.3 Bus2=106021615.1.2.3 switch=y r1=0.001 x1=0.001 r0=0.001 x0=0.001 Length=0.001 units=km
New Line.GS7621-1$GS7621-T phases=3 Bus1=179149554.1.2.3 Bus2=179149555.1.2.3 switch=y r1=0.001 x1=0.001 r0=0.001 x0=0.001 Length=0.001 units=km
New Line.B$RAR0037 phases=3 Bus1=30976323.1.2.3 Bus2=30976316.1.2.3 switch=y r1=0.001 x1=0.001 r0=0.001 x0=0.001 Length=0.001 units=km
New Line.30976378$C phases=3 Bus1=30976353.1.2.3 Bus2=30976352.1.2.3 switch=y r1=0.001 x1=0.001 r0=0.001 x0=0.001 Length=0.001 units=km
New Line.5524609:GS6968-2 phases=3 Bus1=89977258.1.2.3 Bus2=89977279.1.2.3 switch=y r1=0.001 x1=0.001 r0=0.001 x0=0.001 Length=0.001 units=km
New Line.2306146E:PS7457 phases=3 Bus1=244449529.1.2.3 Bus2=244449528.1.2.3 switch=y r1=0.001 x1=0.001 r0=0.001 x0=0.001 Length=0.001 units=km
New Line.5524609:GS6968-1 phases=3 Bus1=89977257.1.2.3 Bus2=89977271.1.2.3 switch=y r1=0.001 x1=0.001 r0=0.001 x0=0.001 Length=0.001 units=km
New Line.5491320:GS5977-1 phases=3 Bus1=83960643.1.2.3 Bus2=83960629.1.2.3 switch=y r1=0.001 x1=0.001 r0=0.001 x0=0.001 Length=0.001 units=km
New Line.5524611:GS6243-2 phases=3 Bus1=106684623.1.2.3 Bus2=106684602.1.2.3 switch=y r1=0.001 x1=0.001 r0=0.001 x0=0.001 Length=0.001 units=km
New Line.4885600E:PS6751 phases=3 Bus1=110947202.1.2.3 Bus2=110947203.1.2.3 switch=y r1=0.001 x1=0.001 r0=0.001 x0=0.001 Length=0.001 units=km
New Line.4572437E:PS2353 phases=3 Bus1=244449601.1.2.3 Bus2=244449600.1.2.3 switch=y r1=0.001 x1=0.001 r0=0.001 x0=0.001 Length=0.001 units=km
New Line.210192S:PS4937 phases=3 Bus1=31054981.1.2.3 Bus2=31054982.1.2.3 switch=y r1=0.001 x1=0.001 r0=0.001 x0=0.001 Length=0.001 units=km
New Line.5491320:GS5977-2 phases=3 Bus1=83960630.1.2.3 Bus2=83960651.1.2.3 switch=y r1=0.001 x1=0.001 r0=0.001 x0=0.001 Length=0.001 units=km enabled=false
New Line.5524611:GS6243-1 phases=3 Bus1=106684601.1.2.3 Bus2=106684615.1.2.3 switch=y r1=0.001 x1=0.001 r0=0.001 x0=0.001 Length=0.001 units=km
New Line.5524611:GS6243-3 phases=3 Bus1=106684608.1.2.3 Bus2=106684631.1.2.3 switch=y r1=0.001 x1=0.001 r0=0.001 x0=0.001 Length=0.001 units=km
New Line.5627514:GS7471-1 phases=3 Bus1=177829815.1.2.3 Bus2=177829787.1.2.3 switch=y r1=0.001 x1=0.001 r0=0.001 x0=0.001 Length=0.001 units=km
New Line.5491320:GS5977-3 phases=3 Bus1=83960636.1.2.3 Bus2=83960659.1.2.3 switch=y r1=0.001 x1=0.001 r0=0.001 x0=0.001 Length=0.001 units=km
New Line.5491320:GS5978-2 phases=3 Bus1=83960755.1.2.3 Bus2=83960734.1.2.3 switch=y r1=0.001 x1=0.001 r0=0.001 x0=0.001 Length=0.001 units=km
New Line.5627514:GS7471-2 phases=3 Bus1=177829788.1.2.3 Bus2=177829807.1.2.3 switch=y r1=0.001 x1=0.001 r0=0.001 x0=0.001 Length=0.001 units=km
New Line.2215311E:PS5170 phases=3 Bus1=31055321.1.2.3 Bus2=31055320.1.2.3 switch=y r1=0.001 x1=0.001 r0=0.001 x0=0.001 Length=0.001 units=km
New Line.4562861E:PS6034 phases=3 Bus1=83333675.1.2.3 Bus2=83333674.1.2.3 switch=y r1=0.001 x1=0.001 r0=0.001 x0=0.001 Length=0.001 units=km
New Line.5491320:VFI6020-1 phases=3 Bus1=83960896.1.2.3 Bus2=83960897.1.2.3 switch=y r1=0.001 x1=0.001 r0=0.001 x0=0.001 Length=0.001 units=km
New Line.5627514:GS7471-3 phases=3 Bus1=177829794.1.2.3 Bus2=177829823.1.2.3 switch=y r1=0.001 x1=0.001 r0=0.001 x0=0.001 Length=0.001 units=km
New Line.5491320:GS5978-1 phases=3 Bus1=83960733.1.2.3 Bus2=83960747.1.2.3 switch=y r1=0.001 x1=0.001 r0=0.001 x0=0.001 Length=0.001 units=km
New Line.5491320:GS5978-3 phases=3 Bus1=83960740.1.2.3 Bus2=83960763.1.2.3 switch=y r1=0.001 x1=0.001 r0=0.001 x0=0.001 Length=0.001 units=km
New Line.5506728:GS6245-3 phases=3 Bus1=106021645.1.2.3 Bus2=106021622.1.2.3 switch=y r1=0.001 x1=0.001 r0=0.001 x0=0.001 Length=0.001 units=km
New Line.5627515:GS7472-1 phases=3 Bus1=177829989.1.2.3 Bus2=177829976.1.2.3 switch=y r1=0.001 x1=0.001 r0=0.001 x0=0.001 Length=0.001 units=km
New Line.5627518:GS7621-1 phases=3 Bus1=179149567.1.2.3 Bus2=179149554.1.2.3 switch=y r1=0.001 x1=0.001 r0=0.001 x0=0.001 Length=0.001 units=km
New Line.4562867E:PS9034 phases=3 Bus1=244449643.1.2.3 Bus2=244449642.1.2.3 switch=y r1=0.001 x1=0.001 r0=0.001 x0=0.001 Length=0.001 units=km
New Line.4516733E:RAR0037_B phases=3 Bus1=30976322.1.2.3 Bus2=30976323.1.2.3 switch=y r1=0.001 x1=0.001 r0=0.001 x0=0.001 Length=0.001 units=km
New Line.4516733E:RAR0037_C phases=3 Bus1=30976335.1.2.3 Bus2=30976353.1.2.3 switch=y r1=0.001 x1=0.001 r0=0.001 x0=0.001 Length=0.001 units=km enabled=false
New Line.5506728:GS6245-2 phases=3 Bus1=106021616.1.2.3 Bus2=106021637.1.2.3 switch=y r1=0.001 x1=0.001 r0=0.001 x0=0.001 Length=0.001 units=km
New Line.5627515:GS7472-T phases=3 Bus1=177829977.1.2.3 Bus2=177829982.1.2.3 switch=y r1=0.001 x1=0.001 r0=0.001 x0=0.001 Length=0.001 units=km enabled=false
New Line.5627515:GS7472-2 phases=3 Bus1=177829977.1.2.3 Bus2=177829997.1.2.3 switch=y r1=0.001 x1=0.001 r0=0.001 x0=0.001 Length=0.001 units=km
New Line.5506728:GS6245-1 phases=3 Bus1=106021615.1.2.3 Bus2=106021629.1.2.3 switch=y r1=0.001 x1=0.001 r0=0.001 x0=0.001 Length=0.001 units=km
New Line.CAB_1802581E:1802581E phases=3 Bus1=30975722.1.2.3 Bus2=30975706.1.2.3 switch=y r1=0.001 x1=0.001 r0=0.001 x0=0.001 Length=0.001 units=km
New Line.CAB_4206611E:4206611E phases=3 Bus1=183072156.1.2.3 Bus2=183072138.1.2.3 switch=y r1=0.001 x1=0.001 r0=0.001 x0=0.001 Length=0.001 units=km
New Line.4206611E:183072136 phases=3 Bus1=183072138.1.2.3 Bus2=183072139.1.2.3 switch=y r1=0.001 x1=0.001 r0=0.001 x0=0.001 Length=0.001 units=km
New Line.1802581E:30975704 phases=3 Bus1=30975706.1.2.3 Bus2=30975707.1.2.3 switch=y r1=0.001 x1=0.001 r0=0.001 x0=0.001 Length=0.001 units=km
New Line.4572437E:437E phases=3 Bus1=89978673.1.2.3 Bus2=89978672.1.2.3 switch=y r1=0.001 x1=0.001 r0=0.001 x0=0.001 Length=0.001 units=km
New Line.2306146E:2306146E phases=3 Bus1=177829736.1.2.3 Bus2=177829754.1.2.3 switch=y r1=0.001 x1=0.001 r0=0.001 x0=0.001 Length=0.001 units=km
New Line.4517463E:463E phases=3 Bus1=89977479.1.2.3 Bus2=89977478.1.2.3 switch=y r1=0.001 x1=0.001 r0=0.001 x0=0.001 Length=0.001 units=km
New Line.4323043E:043E phases=3 Bus1=90277597.1.2.3 Bus2=90277598.1.2.3 switch=y r1=0.001 x1=0.001 r0=0.001 x0=0.001 Length=0.001 units=km
New Line.4594566E:PH566E phases=3 Bus1=110995684.1.2.3 Bus2=110995702.1.2.3 switch=y r1=0.001 x1=0.001 r0=0.001 x0=0.001 Length=0.001 units=km

! Loads
New Load.4771467E_0 Bus1=-999999229703401.1.0 phases=1 kV=0.159926 kW=0 kvar=0 model=1
New Load.4771467E_1 Bus1=-999999229703401.2.0 phases=1 kV=0.159926 kW=0 kvar=0 model=1
New Load.4771467E_2 Bus1=-999999229703401.3.0 phases=1 kV=0.159926 kW=0 kvar=0 model=1
New Load.5140453_0 Bus1=-99999930976131.1.0 phases=1 kV=0.159926 kW=0 kvar=0 model=1
New Load.5140453_1 Bus1=-99999930976131.2.0 phases=1 kV=0.159926 kW=0 kvar=0 model=1
New Load.5140453_2 Bus1=-99999930976131.3.0 phases=1 kV=0.159926 kW=0 kvar=0 model=1
New Load.4211115E_0 Bus1=-99999970606674.3.0 phases=1 kV=0.069282 kW=0 kvar=0 model=1
New Load.4211115E_1 Bus1=-99999970606674.1.0 phases=1 kV=0.069282 kW=0 kvar=0 model=1
New Load.5627520_0 Bus1=-999999179149763.1.0 phases=1 kV=0.159926 kW=0 kvar=0 model=1
New Load.5627520_1 Bus1=-999999179149763.2.0 phases=1 kV=0.159926 kW=0 kvar=0 model=1
New Load.5627520_2 Bus1=-999999179149763.3.0 phases=1 kV=0.159926 kW=0 kvar=0 model=1
New Load.5534132_0 Bus1=-99999984896699.1.0 phases=1 kV=0.159926 kW=0 kvar=0 model=1
New Load.5534132_1 Bus1=-99999984896699.2.0 phases=1 kV=0.159926 kW=0 kvar=0 model=1
New Load.5534132_2 Bus1=-99999984896699.3.0 phases=1 kV=0.159926 kW=0 kvar=0 model=1
New Load.2362444E_0 Bus1=-99999930976228.2.0 phases=1 kV=0.069282 kW=0 kvar=0 model=1
New Load.2362444E_1 Bus1=-99999930976228.3.0 phases=1 kV=0.069282 kW=0 kvar=0 model=1
New Load.4206611E_0 Bus1=-999999183072139.1.2 phases=1 kV=0.138564 kW=0 kvar=0 model=1
New Load.4206611E_1 Bus1=-999999183072139.2.3 phases=1 kV=0.138564 kW=0 kvar=0 model=1
New Load.4206611E_2 Bus1=-999999183072139.3.1 phases=1 kV=0.138564 kW=0 kvar=0 model=1
New Load.1802581E_0 Bus1=-99999930975707.1.0 phases=1 kV=0.069282 kW=0 kvar=0 model=1
New Load.1802581E_1 Bus1=-99999930975707.2.0 phases=1 kV=0.069282 kW=0 kvar=0 model=1
New Load.4116618E_0 Bus1=-99999930975896.1.0 phases=1 kV=0.159926 kW=0 kvar=0 model=1
New Load.4116618E_1 Bus1=-99999930975896.2.0 phases=1 kV=0.159926 kW=0 kvar=0 model=1
New Load.4116618E_2 Bus1=-99999930975896.3.0 phases=1 kV=0.159926 kW=0 kvar=0 model=1
New Load.5397348_0 Bus1=-999999168990563.1.0 phases=1 kV=0.159926 kW=0 kvar=0 model=1
New Load.5397348_1 Bus1=-999999168990563.2.0 phases=1 kV=0.159926 kW=0 kvar=0 model=1
New Load.5397348_2 Bus1=-999999168990563.3.0 phases=1 kV=0.159926 kW=0 kvar=0 model=1
New Load.1790755E_0 Bus1=-99999930975566.1.2 phases=1 kV=0.069282 kW=0 kvar=0 model=1
New Load.1790755E_1 Bus1=-99999930975566.2.3 phases=1 kV=0.069282 kW=0 kvar=0 model=1
New Load.1790755E_2 Bus1=-99999930975566.3.1 phases=1 kV=0.069282 kW=0 kvar=0 model=1
New Load.4523898E_0 Bus1=-999999151398496.1.0 phases=1 kV=0.159926 kW=0 kvar=0 model=1
New Load.4523898E_1 Bus1=-999999151398496.2.0 phases=1 kV=0.159926 kW=0 kvar=0 model=1
New Load.4523898E_2 Bus1=-999999151398496.3.0 phases=1 kV=0.159926 kW=0 kvar=0 model=1
New Load.5464035_0 Bus1=-999999210741657.1.0 phases=1 kV=0.159926 kW=0 kvar=0 model=1
New Load.5464035_1 Bus1=-999999210741657.2.0 phases=1 kV=0.159926 kW=0 kvar=0 model=1
New Load.5464035_2 Bus1=-999999210741657.3.0 phases=1 kV=0.159926 kW=0 kvar=0 model=1
New Load.2362437E_0 Bus1=-99999931054248.1.0 phases=1 kV=0.069282 kW=0 kvar=0 model=1
New Load.2362437E_1 Bus1=-99999931054248.2.0 phases=1 kV=0.069282 kW=0 kvar=0 model=1
New Load.5710363_0 Bus1=-999999207750481.2.0 phases=1 kV=0.069282 kW=0 kvar=0 model=1
New Load.5710363_1 Bus1=-999999207750481.3.0 phases=1 kV=0.069282 kW=0 kvar=0 model=1
New Load.5610957_0 Bus1=-999999110995730.1.0 phases=1 kV=0.159926 kW=0 kvar=0 model=1
New Load.5610957_1 Bus1=-999999110995730.2.0 phases=1 kV=0.159926 kW=0 kvar=0 model=1
New Load.5610957_2 Bus1=-999999110995730.3.0 phases=1 kV=0.159926 kW=0 kvar=0 model=1
New Load.5151817_0 Bus1=-999999228515143.1.0 phases=1 kV=0.069282 kW=0 kvar=0 model=1
New Load.5151817_1 Bus1=-999999228515143.2.0 phases=1 kV=0.069282 kW=0 kvar=0 model=1
New Load.2328689E_0 Bus1=-99999931054334.1.0 phases=1 kV=0.159926 kW=0 kvar=0 model=1
New Load.2328689E_1 Bus1=-99999931054334.2.0 phases=1 kV=0.159926 kW=0 kvar=0 model=1
New Load.2328689E_2 Bus1=-99999931054334.3.0 phases=1 kV=0.159926 kW=0 kvar=0 model=1
New Load.5627517_0 Bus1=-999999177830210.1.0 phases=1 kV=0.159926 kW=0 kvar=0 model=1
New Load.5627517_1 Bus1=-999999177830210.2.0 phases=1 kV=0.159926 kW=0 kvar=0 model=1
New Load.5627517_2 Bus1=-999999177830210.3.0 phases=1 kV=0.159926 kW=0 kvar=0 model=1
New Load.5728124_0 Bus1=-999999206696198.2.0 phases=1 kV=0.069282 kW=0 kvar=0 model=1
New Load.5728124_1 Bus1=-999999206696198.3.0 phases=1 kV=0.069282 kW=0 kvar=0 model=1
New Load.5636566_0 Bus1=-999999183145682.1.0 phases=1 kV=0.069282 kW=0 kvar=0 model=1
New Load.5636566_1 Bus1=-999999183145682.2.0 phases=1 kV=0.069282 kW=0 kvar=0 model=1
New Load.5457915_0 Bus1=-99999989738914.1.0 phases=1 kV=0.159926 kW=0 kvar=0 model=1
New Load.5457915_1 Bus1=-99999989738914.2.0 phases=1 kV=0.159926 kW=0 kvar=0 model=1
New Load.5457915_2 Bus1=-99999989738914.3.0 phases=1 kV=0.159926 kW=0 kvar=0 model=1

! Generators
New Generator.500135517_PHOTOVOLTAIC_0 Bus1=-999999228515143.1.0 phases=1 kV=0.069282 kW=0 kvar=0 model=7
New Generator.500135517_PHOTOVOLTAIC_1 Bus1=-999999228515143.2.0 phases=1 kV=0.069282 kW=0 kvar=0 model=7
New Generator.SCE-72005_PHOTOVOLTAIC_0 Bus1=-999999228515143.1.0 phases=1 kV=0.069282 kW=0 kvar=0 model=7
New Generator.SCE-72005_PHOTOVOLTAIC_1 Bus1=-999999228515143.2.0 phases=1 kV=0.069282 kW=0 kvar=0 model=7

! Transformers
New Transformer.293588B3E21EEE34E0637F61810A7CE3_0_0 phases=1 windings=2 xhl=0.5 %R=0.353554 %imag=1e-06 %noloadloss=0
~ wdg=1 bus=110995730.1.2 kV=33 kVA=333.333 conn=delta
~ wdg=2 bus=-999999110995730.1.0 kV=0.159926 kVA=333.333 conn=wye
New Transformer.293588B3E21EEE34E0637F61810A7CE3_0_1 phases=1 windings=2 xhl=0.5 %R=0.353554 %imag=1e-06 %noloadloss=0
~ wdg=1 bus=110995730.2.3 kV=33 kVA=333.333 conn=delta
~ wdg=2 bus=-999999110995730.2.0 kV=0.159926 kVA=333.333 conn=wye
New Transformer.293588B3E21EEE34E0637F61810A7CE3_0_2 phases=1 windings=2 xhl=0.5 %R=0.353554 %imag=1e-06 %noloadloss=0
~ wdg=1 bus=110995730.3.1 kV=33 kVA=333.333 conn=delta
~ wdg=2 bus=-999999110995730.3.0 kV=0.159926 kVA=333.333 conn=wye
New Transformer.293588B36D00EE34E0637F61810A7CE3_1_0 phases=1 windings=2 xhl=0.5 %R=0.353554 %imag=1e-06 %noloadloss=0
~ wdg=1 bus=84896699.1.2 kV=33 kVA=833.333 conn=delta
~ wdg=2 bus=-99999984896699.1.0 kV=0.159926 kVA=833.333 conn=wye
New Transformer.293588B36D00EE34E0637F61810A7CE3_1_1 phases=1 windings=2 xhl=0.5 %R=0.353554 %imag=1e-06 %noloadloss=0
~ wdg=1 bus=84896699.2.3 kV=33 kVA=833.333 conn=delta
~ wdg=2 bus=-99999984896699.2.0 kV=0.159926 kVA=833.333 conn=wye
New Transformer.293588B36D00EE34E0637F61810A7CE3_1_2 phases=1 windings=2 xhl=0.5 %R=0.353554 %imag=1e-06 %noloadloss=0
~ wdg=1 bus=84896699.3.1 kV=33 kVA=833.333 conn=delta
~ wdg=2 bus=-99999984896699.3.0 kV=0.159926 kVA=833.333 conn=wye
New Transformer.293588B4580BEE34E0637F61810A7CE3_2_0 phases=1 windings=2 xhl=0.5 %R=0.353554 %imag=1e-06 %noloadloss=0
~ wdg=1 bus=179149763.1.2 kV=33 kVA=833.333 conn=delta
~ wdg=2 bus=-999999179149763.1.0 kV=0.159926 kVA=833.333 conn=wye
New Transformer.293588B4580BEE34E0637F61810A7CE3_2_1 phases=1 windings=2 xhl=0.5 %R=0.353554 %imag=1e-06 %noloadloss=0
~ wdg=1 bus=179149763.2.3 kV=33 kVA=833.333 conn=delta
~ wdg=2 bus=-999999179149763.2.0 kV=0.159926 kVA=833.333 conn=wye
New Transformer.293588B4580BEE34E0637F61810A7CE3_2_2 phases=1 windings=2 xhl=0.5 %R=0.353554 %imag=1e-06 %noloadloss=0
~ wdg=1 bus=179149763.3.1 kV=33 kVA=833.333 conn=delta
~ wdg=2 bus=-999999179149763.3.0 kV=0.159926 kVA=833.333 conn=wye
New Transformer.293588A60EA0EE34E0637F61810A7CE3_3_0 phases=1 windings=2 xhl=0.5 %R=0.353554 %imag=1e-06 %noloadloss=0
~ wdg=1 bus=31054248.1.0 kV=19.0526 kVA=12.5 conn=wye
~ wdg=2 bus=-99999931054248.1.0 kV=0.069282 kVA=12.5 conn=wye
New Transformer.293588A60EA0EE34E0637F61810A7CE3_3_1 phases=1 windings=2 xhl=0.5 %R=0.353554 %imag=1e-06 %noloadloss=0
~ wdg=1 bus=31054248.2.0 kV=19.0526 kVA=12.5 conn=wye
~ wdg=2 bus=-99999931054248.2.0 kV=0.069282 kVA=12.5 conn=wye
New Transformer.293588B4A9C5EE34E0637F61810A7CE3_4_0 phases=1 windings=2 xhl=0.5 %R=0.353554 %imag=1e-06 %noloadloss=0
~ wdg=1 bus=207750481.2.0 kV=19.0526 kVA=12.5 conn=wye
~ wdg=2 bus=-999999207750481.2.0 kV=0.069282 kVA=12.5 conn=wye
New Transformer.293588B4A9C5EE34E0637F61810A7CE3_4_1 phases=1 windings=2 xhl=0.5 %R=0.353554 %imag=1e-06 %noloadloss=0
~ wdg=1 bus=207750481.3.0 kV=19.0526 kVA=12.5 conn=wye
~ wdg=2 bus=-999999207750481.3.0 kV=0.069282 kVA=12.5 conn=wye
New Transformer.293588B21125EE34E0637F61810A7CE3_5_0 phases=1 windings=2 xhl=0.5 %R=0.353554 %imag=1e-06 %noloadloss=0
~ wdg=1 bus=206696198.2.0 kV=19.0526 kVA=12.5 conn=wye
~ wdg=2 bus=-999999206696198.2.0 kV=0.069282 kVA=12.5 conn=wye
New Transformer.293588B21125EE34E0637F61810A7CE3_5_1 phases=1 windings=2 xhl=0.5 %R=0.353554 %imag=1e-06 %noloadloss=0
~ wdg=1 bus=206696198.3.0 kV=19.0526 kVA=12.5 conn=wye
~ wdg=2 bus=-999999206696198.3.0 kV=0.069282 kVA=12.5 conn=wye
New Transformer.293588B45AB5EE34E0637F61810A7CE3_6_0 phases=1 windings=2 xhl=0.5 %R=0.353554 %imag=1e-06 %noloadloss=0
~ wdg=1 bus=177830210.1.2 kV=33 kVA=833.333 conn=delta
~ wdg=2 bus=-999999177830210.1.0 kV=0.159926 kVA=833.333 conn=wye
New Transformer.293588B45AB5EE34E0637F61810A7CE3_6_1 phases=1 windings=2 xhl=0.5 %R=0.353554 %imag=1e-06 %noloadloss=0
~ wdg=1 bus=177830210.2.3 kV=33 kVA=833.333 conn=delta
~ wdg=2 bus=-999999177830210.2.0 kV=0.159926 kVA=833.333 conn=wye
New Transformer.293588B45AB5EE34E0637F61810A7CE3_6_2 phases=1 windings=2 xhl=0.5 %R=0.353554 %imag=1e-06 %noloadloss=0
~ wdg=1 bus=177830210.3.1 kV=33 kVA=833.333 conn=delta
~ wdg=2 bus=-999999177830210.3.0 kV=0.159926 kVA=833.333 conn=wye
New Transformer.293588A852F2EE34E0637F61810A7CE3_7_0 phases=1 windings=2 xhl=0.5 %R=0.353554 %imag=1e-06 %noloadloss=0
~ wdg=1 bus=70606674.3.0 kV=19.0526 kVA=25 conn=wye
~ wdg=2 bus=-99999970606674.3.0 kV=0.069282 kVA=25 conn=wye
New Transformer.293588A852F2EE34E0637F61810A7CE3_7_1 phases=1 windings=2 xhl=0.5 %R=0.353554 %imag=1e-06 %noloadloss=0
~ wdg=1 bus=70606674.1.0 kV=19.0526 kVA=25 conn=wye
~ wdg=2 bus=-99999970606674.1.0 kV=0.069282 kVA=25 conn=wye
New Transformer.293588A60E00EE34E0637F61810A7CE3_8_0 phases=1 windings=2 xhl=0.5 %R=0.353554 %imag=1e-06 %noloadloss=0
~ wdg=1 bus=30976228.2.0 kV=19.0526 kVA=12.5 conn=wye
~ wdg=2 bus=-99999930976228.2.0 kV=0.069282 kVA=12.5 conn=wye
New Transformer.293588A60E00EE34E0637F61810A7CE3_8_1 phases=1 windings=2 xhl=0.5 %R=0.353554 %imag=1e-06 %noloadloss=0
~ wdg=1 bus=30976228.3.0 kV=19.0526 kVA=12.5 conn=wye
~ wdg=2 bus=-99999930976228.3.0 kV=0.069282 kVA=12.5 conn=wye
New Transformer.293588B4ACF8EE34E0637F61810A7CE3_9_0 phases=1 windings=2 xhl=0.5 %R=0.353554 %imag=1e-06 %noloadloss=0
~ wdg=1 bus=210741657.1.2 kV=33 kVA=833.333 conn=delta
~ wdg=2 bus=-999999210741657.1.0 kV=0.159926 kVA=833.333 conn=wye
New Transformer.293588B4ACF8EE34E0637F61810A7CE3_9_1 phases=1 windings=2 xhl=0.5 %R=0.353554 %imag=1e-06 %noloadloss=0
~ wdg=1 bus=210741657.2.3 kV=33 kVA=833.333 conn=delta
~ wdg=2 bus=-999999210741657.2.0 kV=0.159926 kVA=833.333 conn=wye
New Transformer.293588B4ACF8EE34E0637F61810A7CE3_9_2 phases=1 windings=2 xhl=0.5 %R=0.353554 %imag=1e-06 %noloadloss=0
~ wdg=1 bus=210741657.3.1 kV=33 kVA=833.333 conn=delta
~ wdg=2 bus=-999999210741657.3.0 kV=0.159926 kVA=833.333 conn=wye
New Transformer.293588A8FED2EE34E0637F61810A7CE3_10_0 phases=1 windings=2 xhl=0.5 %R=0.353554 %imag=1e-06 %noloadloss=0
~ wdg=1 bus=151398496.1.2 kV=33 kVA=50 conn=delta
~ wdg=2 bus=-999999151398496.1.0 kV=0.159926 kVA=50 conn=wye
New Transformer.293588A8FED2EE34E0637F61810A7CE3_10_1 phases=1 windings=2 xhl=0.5 %R=0.353554 %imag=1e-06 %noloadloss=0
~ wdg=1 bus=151398496.2.3 kV=33 kVA=50 conn=delta
~ wdg=2 bus=-999999151398496.2.0 kV=0.159926 kVA=50 conn=wye
New Transformer.293588A8FED2EE34E0637F61810A7CE3_10_2 phases=1 windings=2 xhl=0.5 %R=0.353554 %imag=1e-06 %noloadloss=0
~ wdg=1 bus=151398496.3.1 kV=33 kVA=50 conn=delta
~ wdg=2 bus=-999999151398496.3.0 kV=0.159926 kVA=50 conn=wye
New Transformer.293588A60EA1EE34E0637F61810A7CE3_11_0 phases=1 windings=2 xhl=0.5 %R=0.353554 %imag=1e-06 %noloadloss=0
~ wdg=1 bus=31054334.1.2 kV=33 kVA=167 conn=delta
~ wdg=2 bus=-99999931054334.1.0 kV=0.159926 kVA=167 conn=wye
New Transformer.293588A60EA1EE34E0637F61810A7CE3_11_1 phases=1 windings=2 xhl=0.5 %R=0.353554 %imag=1e-06 %noloadloss=0
~ wdg=1 bus=31054334.2.3 kV=33 kVA=167 conn=delta
~ wdg=2 bus=-99999931054334.2.0 kV=0.159926 kVA=167 conn=wye
New Transformer.293588A60EA1EE34E0637F61810A7CE3_11_2 phases=1 windings=2 xhl=0.5 %R=0.353554 %imag=1e-06 %noloadloss=0
~ wdg=1 bus=31054334.3.1 kV=33 kVA=167 conn=delta
~ wdg=2 bus=-99999931054334.3.0 kV=0.159926 kVA=167 conn=wye
New Transformer.293588A60DFFEE34E0637F61810A7CE3_12_0 phases=1 windings=2 xhl=0.5 %R=0.353554 %imag=1e-06 %noloadloss=0
~ wdg=1 bus=30975896.1.2 kV=33 kVA=50 conn=delta
~ wdg=2 bus=-99999930975896.1.0 kV=0.159926 kVA=50 conn=wye
New Transformer.293588A60DFFEE34E0637F61810A7CE3_12_1 phases=1 windings=2 xhl=0.5 %R=0.353554 %imag=1e-06 %noloadloss=0
~ wdg=1 bus=30975896.2.3 kV=33 kVA=50 conn=delta
~ wdg=2 bus=-99999930975896.2.0 kV=0.159926 kVA=50 conn=wye
New Transformer.293588A60DFFEE34E0637F61810A7CE3_12_2 phases=1 windings=2 xhl=0.5 %R=0.353554 %imag=1e-06 %noloadloss=0
~ wdg=1 bus=30975896.3.1 kV=33 kVA=50 conn=delta
~ wdg=2 bus=-99999930975896.3.0 kV=0.159926 kVA=50 conn=wye
New Transformer.293588A71AC7EE34E0637F61810A7CE3_13_0 phases=1 windings=2 xhl=0.5 %R=0.353554 %imag=1e-06 %noloadloss=0
~ wdg=1 bus=229703401.1.2 kV=33 kVA=100 conn=delta
~ wdg=2 bus=-999999229703401.1.0 kV=0.159926 kVA=100 conn=wye
New Transformer.293588A71AC7EE34E0637F61810A7CE3_13_1 phases=1 windings=2 xhl=0.5 %R=0.353554 %imag=1e-06 %noloadloss=0
~ wdg=1 bus=229703401.2.3 kV=33 kVA=100 conn=delta
~ wdg=2 bus=-999999229703401.2.0 kV=0.159926 kVA=100 conn=wye
New Transformer.293588A71AC7EE34E0637F61810A7CE3_13_2 phases=1 windings=2 xhl=0.5 %R=0.353554 %imag=1e-06 %noloadloss=0
~ wdg=1 bus=229703401.3.1 kV=33 kVA=100 conn=delta
~ wdg=2 bus=-999999229703401.3.0 kV=0.159926 kVA=100 conn=wye
New Transformer.293588B47278EE34E0637F61810A7CE3_14_0 phases=1 windings=2 xhl=0.5 %R=0.353554 %imag=1e-06 %noloadloss=0
~ wdg=1 bus=183145682.1.0 kV=19.0526 kVA=12.5 conn=wye
~ wdg=2 bus=-999999183145682.1.0 kV=0.069282 kVA=12.5 conn=wye
New Transformer.293588B47278EE34E0637F61810A7CE3_14_1 phases=1 windings=2 xhl=0.5 %R=0.353554 %imag=1e-06 %noloadloss=0
~ wdg=1 bus=183145682.2.0 kV=19.0526 kVA=12.5 conn=wye
~ wdg=2 bus=-999999183145682.2.0 kV=0.069282 kVA=12.5 conn=wye
New Transformer.293588B16D54EE34E0637F61810A7CE3_15_0 phases=1 windings=2 xhl=0.5 %R=0.353554 %imag=1e-06 %noloadloss=0
~ wdg=1 bus=30976131.1.2 kV=33 kVA=833.333 conn=delta
~ wdg=2 bus=-99999930976131.1.0 kV=0.159926 kVA=833.333 conn=wye
New Transformer.293588B16D54EE34E0637F61810A7CE3_15_1 phases=1 windings=2 xhl=0.5 %R=0.353554 %imag=1e-06 %noloadloss=0
~ wdg=1 bus=30976131.2.3 kV=33 kVA=833.333 conn=delta
~ wdg=2 bus=-99999930976131.2.0 kV=0.159926 kVA=833.333 conn=wye
New Transformer.293588B16D54EE34E0637F61810A7CE3_15_2 phases=1 windings=2 xhl=0.5 %R=0.353554 %imag=1e-06 %noloadloss=0
~ wdg=1 bus=30976131.3.1 kV=33 kVA=833.333 conn=delta
~ wdg=2 bus=-99999930976131.3.0 kV=0.159926 kVA=833.333 conn=wye
New Transformer.293588A60DFDEE34E0637F61810A7CE3_16_0 phases=1 windings=2 xhl=0.5 %R=0.353554 %imag=1e-06 %noloadloss=0
~ wdg=1 bus=30975566.1.2 kV=33 kVA=333 conn=delta
~ wdg=2 bus=-99999930975566.1.2 kV=0.069282 kVA=333 conn=delta
New Transformer.293588A60DFDEE34E0637F61810A7CE3_16_1 phases=1 windings=2 xhl=0.5 %R=0.353554 %imag=1e-06 %noloadloss=0
~ wdg=1 bus=30975566.2.3 kV=33 kVA=333 conn=delta
~ wdg=2 bus=-99999930975566.2.3 kV=0.069282 kVA=333 conn=delta
New Transformer.293588A60DFDEE34E0637F61810A7CE3_16_2 phases=1 windings=2 xhl=0.5 %R=0.353554 %imag=1e-06 %noloadloss=0
~ wdg=1 bus=30975566.3.1 kV=33 kVA=333 conn=delta
~ wdg=2 bus=-99999930975566.3.1 kV=0.069282 kVA=333 conn=delta
New Transformer.293588A60DFEEE34E0637F61810A7CE3_17_0 phases=1 windings=2 xhl=0.5 %R=0.353554 %imag=1e-06 %noloadloss=0
~ wdg=1 bus=30975707.1.0 kV=19.0526 kVA=12.5 conn=wye
~ wdg=2 bus=-99999930975707.1.0 kV=0.069282 kVA=12.5 conn=wye
New Transformer.293588A60DFEEE34E0637F61810A7CE3_17_1 phases=1 windings=2 xhl=0.5 %R=0.353554 %imag=1e-06 %noloadloss=0
~ wdg=1 bus=30975707.2.0 kV=19.0526 kVA=12.5 conn=wye
~ wdg=2 bus=-99999930975707.2.0 kV=0.069282 kVA=12.5 conn=wye
New Transformer.293588B373F9EE34E0637F61810A7CE3_18_0 phases=1 windings=2 xhl=0.5 %R=0.353554 %imag=1e-06 %noloadloss=0
~ wdg=1 bus=89738914.1.2 kV=33 kVA=333.333 conn=delta
~ wdg=2 bus=-99999989738914.1.0 kV=0.159926 kVA=333.333 conn=wye
New Transformer.293588B373F9EE34E0637F61810A7CE3_18_1 phases=1 windings=2 xhl=0.5 %R=0.353554 %imag=1e-06 %noloadloss=0
~ wdg=1 bus=89738914.2.3 kV=33 kVA=333.333 conn=delta
~ wdg=2 bus=-99999989738914.2.0 kV=0.159926 kVA=333.333 conn=wye
New Transformer.293588B373F9EE34E0637F61810A7CE3_18_2 phases=1 windings=2 xhl=0.5 %R=0.353554 %imag=1e-06 %noloadloss=0
~ wdg=1 bus=89738914.3.1 kV=33 kVA=333.333 conn=delta
~ wdg=2 bus=-99999989738914.3.0 kV=0.159926 kVA=333.333 conn=wye
New Transformer.293588B448B2EE34E0637F61810A7CE3_19_0 phases=1 windings=2 xhl=0.5 %R=0.353554 %imag=1e-06 %noloadloss=0
~ wdg=1 bus=168990563.1.2 kV=33 kVA=333.333 conn=delta
~ wdg=2 bus=-999999168990563.1.0 kV=0.159926 kVA=333.333 conn=wye
New Transformer.293588B448B2EE34E0637F61810A7CE3_19_1 phases=1 windings=2 xhl=0.5 %R=0.353554 %imag=1e-06 %noloadloss=0
~ wdg=1 bus=168990563.2.3 kV=33 kVA=333.333 conn=delta
~ wdg=2 bus=-999999168990563.2.0 kV=0.159926 kVA=333.333 conn=wye
New Transformer.293588B448B2EE34E0637F61810A7CE3_19_2 phases=1 windings=2 xhl=0.5 %R=0.353554 %imag=1e-06 %noloadloss=0
~ wdg=1 bus=168990563.3.1 kV=33 kVA=333.333 conn=delta
~ wdg=2 bus=-999999168990563.3.0 kV=0.159926 kVA=333.333 conn=wye
New Transformer.293588B4D185EE34E0637F61810A7CE3_20_0 phases=1 windings=2 xhl=0.5 %R=0.353554 %imag=1e-06 %noloadloss=0
~ wdg=1 bus=228515143.1.0 kV=19.0526 kVA=25 conn=wye
~ wdg=2 bus=-999999228515143.1.0 kV=0.069282 kVA=25 conn=wye
New Transformer.293588B4D185EE34E0637F61810A7CE3_20_1 phases=1 windings=2 xhl=0.5 %R=0.353554 %imag=1e-06 %noloadloss=0
~ wdg=1 bus=228515143.2.0 kV=19.0526 kVA=25 conn=wye
~ wdg=2 bus=-999999228515143.2.0 kV=0.069282 kVA=25 conn=wye
New Transformer.293588A70EFCEE34E0637F61810A7CE3_21_0 phases=1 windings=2 xhl=0.5 %R=0.353554 %imag=1e-06 %noloadloss=0
~ wdg=1 bus=183072139.1.2 kV=33 kVA=16.6667 conn=delta
~ wdg=2 bus=-999999183072139.1.2 kV=0.138564 kVA=16.6667 conn=delta
New Transformer.293588A70EFCEE34E0637F61810A7CE3_21_1 phases=1 windings=2 xhl=0.5 %R=0.353554 %imag=1e-06 %noloadloss=0
~ wdg=1 bus=183072139.2.3 kV=33 kVA=16.6667 conn=delta
~ wdg=2 bus=-999999183072139.2.3 kV=0.138564 kVA=16.6667 conn=delta
New Transformer.293588A70EFCEE34E0637F61810A7CE3_21_2 phases=1 windings=2 xhl=0.5 %R=0.353554 %imag=1e-06 %noloadloss=0
~ wdg=1 bus=183072139.3.1 kV=33 kVA=16.6667 conn=delta
~ wdg=2 bus=-999999183072139.3.1 kV=0.138564 kVA=16.6667 conn=delta

Set voltagebases=[33.0 0.277 0.24 0.12]
CalcVoltageBases
Solve
