! OpenDSS script generated from multiconductor network
Clear

New Circuit.mc_network basekv=16.0 pu=1.000000 angle=0.00 frequency=60.0 phases=3 Mvasc3=255987 Mvasc1=85329.1
~ bus1=-8888882188198.1.2.3

! Line codes
New LineCode.1000_CLP_3PH_16KV_3 nphases=3 units=km Rmatrix=[ 0.012062 | 0 0.012062 | 0 0 0.012062 ] Xmatrix=[ 0.018258 | 0 0.018258 | 0 0 0.018258 ] Cmatrix=[ 0 | 0 0 | 0 0 0 ]
New LineCode.350_JCN_ABC_16_3 nphases=3 units=km Rmatrix=[ 0.016952 | 0 0.016952 | 0 0 0.016952 ] Xmatrix=[ 0.01288 | 0 0.01288 | 0 0 0.01288 ] Cmatrix=[ 0 | 0 0 | 0 0 0 ]
New LineCode.350_AL_3PH_16KV_3 nphases=3 units=km Rmatrix=[ 0.022154 | 0 0.022154 | 0 0 0.022154 ] Xmatrix=[ 0.016833 | 0 0.016833 | 0 0 0.016833 ] Cmatrix=[ 0 | 0 0 | 0 0 0 ]
New LineCode.750_CLP_3PH_16KV_3 nphases=3 units=km Rmatrix=[ 0.000515 | 0 0.000515 | 0 0 0.000515 ] Xmatrix=[ 0.000633 | 0 0.000633 | 0 0 0.000633 ] Cmatrix=[ 0 | 0 0 | 0 0 0 ]
New LineCode.1/0_CLP_3PH_16KV_3 nphases=3 units=km Rmatrix=[ 0.001186 | 0 0.001186 | 0 0 0.001186 ] Xmatrix=[ 0.000362 | 0 0.000362 | 0 0 0.000362 ] Cmatrix=[ 0 | 0 0 | 0 0 0 ]
New LineCode.1/0_JCN_3PH_16KV_3 nphases=3 units=km Rmatrix=[ 0.069148 | 0 0.069148 | 0 0 0.069148 ] Xmatrix=[ 0.021135 | 0 0.021135 | 0 0 0.021135 ] Cmatrix=[ 0 | 0 0 | 0 0 0 ]
New LineCode.750_AL_3PH_16KV_3 nphases=3 units=km Rmatrix=[ 0.000225 | 0 0.000225 | 0 0 0.000225 ] Xmatrix=[ 0.000276 | 0 0.000276 | 0 0 0.000276 ] Cmatrix=[ 0 | 0 0 | 0 0 0 ]
New LineCode.336_ACSR_3PH_16KV_3 nphases=3 units=km Rmatrix=[ 0.001052 | 0 0.001052 | 0 0 0.001052 ] Xmatrix=[ 0.002356 | 0 0.002356 | 0 0 0.002356 ] Cmatrix=[ 0 | 0 0 | 0 0 0 ]
New LineCode.1000_JCN_3PH_16KV_3 nphases=3 units=km Rmatrix=[ 0.000418 | 0 0.000418 | 0 0 0.000418 ] Xmatrix=[ 0.000633 | 0 0.000633 | 0 0 0.000633 ] Cmatrix=[ 0 | 0 0 | 0 0 0 ]
New LineCode.336_ACSR_3PH_336_ACSR_N_16KV_4 nphases=4 units=km Rmatrix=[ 0.005262 | 0 0.005262 | 0 0 0.005262 | 0 0 0 0.005262 ] Xmatrix=[ 0.010493 | 0 0.010493 | 0 0 0.010493 | 0 0 0 0.010493 ] Cmatrix=[ 0 | 0 0 | 0 0 0 | 0 0 0 0 ]
New LineCode.653_ACSR_3PH_653_ACSR_N_16KV_4 nphases=4 units=km Rmatrix=[ 0.00867 | 0 0.00867 | 0 0 0.00867 | 0 0 0 0.00867 ] Xmatrix=[ 0.029479 | 0 0.029479 | 0 0 0.029479 | 0 0 0 0.029479 ] Cmatrix=[ 0 | 0 0 | 0 0 0 | 0 0 0 0 ]
New LineCode.653_ACSR_3PH_16KV_3 nphases=3 units=km Rmatrix=[ 0.00053 | 0 0.00053 | 0 0 0.00053 ] Xmatrix=[ 0.002059 | 0 0.002059 | 0 0 0.002059 ] Cmatrix=[ 0 | 0 0 | 0 0 0 ]
New LineCode.4_ACSR_3PH_16KV_3 nphases=3 units=km Rmatrix=[ 0.032373 | 0 0.032373 | 0 0 0.032373 ] Xmatrix=[ 0.011879 | 0 0.011879 | 0 0 0.011879 ] Cmatrix=[ 0 | 0 0 | 0 0 0 ]
New LineCode.1/0_ACSR_3PH_16KV_3 nphases=3 units=km Rmatrix=[ 0.002409 | 0 0.002409 | 0 0 0.002409 ] Xmatrix=[ 0.001918 | 0 0.001918 | 0 0 0.001918 ] Cmatrix=[ 0 | 0 0 | 0 0 0 ]
New LineCode.2_CU_3PH_16KV_3 nphases=3 units=km Rmatrix=[ 1e-05 | 0 1e-05 | 0 0 1e-05 ] Xmatrix=[ 1e-05 | 0 1e-05 | 0 0 1e-05 ] Cmatrix=[ 0 | 0 0 | 0 0 0 ]
New LineCode.336_ATW_3PH_16KV_3 nphases=3 units=km Rmatrix=[ 1e-05 | 0 1e-05 | 0 0 1e-05 ] Xmatrix=[ 1e-05 | 0 1e-05 | 0 0 1e-05 ] Cmatrix=[ 0 | 0 0 | 0 0 0 ]
New LineCode.336_ATW_3PH_336_ATW_N_16KV_4 nphases=4 units=km Rmatrix=[ 1e-05 | 0 1e-05 | 0 0 1e-05 | 0 0 0 1e-05 ] Xmatrix=[ 1e-05 | 0 1e-05 | 0 0 1e-05 | 0 0 0 1e-05 ] Cmatrix=[ 0 | 0 0 | 0 0 0 | 0 0 0 0 ]
New LineCode.350_CLP_3PH_16KV_3 nphases=3 units=km Rmatrix=[ 0.008724 | 0 0.008724 | 0 0 0.008724 ] Xmatrix=[ 0.006628 | 0 0.006628 | 0 0 0.006628 ] Cmatrix=[ 0 | 0 0 | 0 0 0 ]

! Lines
New Line.18580$4253673E phases=3 Bus1=-8888882188198.1.2.3 Bus2=42779583.1.2.3 LineCode=1000_CLP_3PH_16KV_3 Length=0.218488 units=km
New Line.GS8322-4$unset phases=3 Bus1=236238311.1.2.3 Bus2=-777777236238311.1.2.3 LineCode=350_JCN_ABC_16_3 Length=0.07644 units=km
New Line.2265721E$GS8517-1 phases=3 Bus1=42780579.1.2.3 Bus2=42780637.1.2.3 LineCode=350_AL_3PH_16KV_3 Length=0.31465 units=km
New Line.ND71916439$ND71916418 phases=3 Bus1=71916439.1.2.3 Bus2=71916418.1.2.3 LineCode=750_CLP_3PH_16KV_3 Length=0.012081 units=km
New Line.FD59626$P5036781-1 phases=3 Bus1=42779509.1.2.3 Bus2=42778604.1.2.3 LineCode=350_AL_3PH_16KV_3 Length=0.079415 units=km
New Line.240060037$P5035746-1 phases=3 Bus1=240060040.1.2.3 Bus2=42778652.1.2.3 LineCode=1/0_CLP_3PH_16KV_3 Length=0.001923 units=km
New Line.FD02692$P5036248-1 phases=3 Bus1=42778697.1.2.3 Bus2=42778723.1.2.3 LineCode=350_AL_3PH_16KV_3 Length=0.091704 units=km
New Line.FD02089$P5036839-1 phases=3 Bus1=42778710.1.2.3 Bus2=42778771.1.2.3 LineCode=350_AL_3PH_16KV_3 Length=0.051464 units=km
New Line.BS6887-1$ND71916418 phases=3 Bus1=71916418.1.2.3 Bus2=42815977.1.2.3 LineCode=750_CLP_3PH_16KV_3 Length=0.082354 units=km
New Line.P5138533-B$P5138534-A phases=3 Bus1=153932292.1.2.3 Bus2=153932408.1.2.3 LineCode=350_AL_3PH_16KV_3 Length=0.084586 units=km
New Line.FD59266$242038810 phases=3 Bus1=42815673.1.2.3 Bus2=242038812.1.2.3 LineCode=350_AL_3PH_16KV_3 Length=0.023028 units=km
New Line.BS6887-1CL$P5036887GB phases=3 Bus1=42815978.1.2.3 Bus2=42816729.1.2.3 LineCode=750_CLP_3PH_16KV_3 Length=0.025552 units=km
New Line.GS8517-2$239788161 phases=3 Bus1=42780629.1.2.3 Bus2=239788163.1.2.3 LineCode=1/0_CLP_3PH_16KV_3 Length=0.149326 units=km
New Line.242038810$P5373701-A phases=3 Bus1=242038813.1.2.3 Bus2=153932489.1.2.3 LineCode=350_AL_3PH_16KV_3 Length=0.002176 units=km
New Line.GS8517-3$239967191 phases=3 Bus1=42780645.1.2.3 Bus2=239967193.1.2.3 LineCode=1/0_CLP_3PH_16KV_3 Length=0.141202 units=km
New Line.P5138534-B$P5403770-1 phases=3 Bus1=153932391.1.2.3 Bus2=42778985.1.2.3 LineCode=350_AL_3PH_16KV_3 Length=0.022944 units=km
New Line.2086324E$P5310445-1 phases=3 Bus1=42815613.1.2.3 Bus2=42780425.1.2.3 LineCode=350_AL_3PH_16KV_3 Length=0.12837 units=km
New Line.239788161$PME6646-1 phases=3 Bus1=239788164.1.2.3 Bus2=239788192.1.2.3 LineCode=1/0_CLP_3PH_16KV_3 Length=0.00231 units=km
New Line.GS8517-4$PMH8665-2 phases=3 Bus1=42780653.1.2.3 Bus2=42780842.1.2.3 LineCode=350_AL_3PH_16KV_3 Length=0.191123 units=km
New Line.239967191$FC3948-1 phases=3 Bus1=239967194.1.2.3 Bus2=42815629.1.2.3 LineCode=1/0_CLP_3PH_16KV_3 Length=0.001681 units=km
New Line.242038837$P5373701-B phases=3 Bus1=153932507.1.2.3 Bus2=242038840.1.2.3 LineCode=350_AL_3PH_16KV_3 Length=0.174786 units=km
New Line.FC3948-1$239967164 phases=3 Bus1=42815630.1.2.3 Bus2=239967167.1.2.3 LineCode=1/0_CLP_3PH_16KV_3 Length=0.016724 units=km
New Line.PMH8665-3$ND42781021 phases=3 Bus1=42780824.1.2.3 Bus2=42780999.1.2.3 LineCode=1/0_CLP_3PH_16KV_3 Length=0.084146 units=km
New Line.PME6646-2$239788151 phases=3 Bus1=239788183.1.2.3 Bus2=239788154.1.2.3 LineCode=1/0_CLP_3PH_16KV_3 Length=0.001978 units=km
New Line.PMH8665-1$0023402 phases=3 Bus1=42780851.1.2.3 Bus2=42816772.1.2.3 LineCode=350_AL_3PH_16KV_3 Length=0.168966 units=km
New Line.ND42816965$242038837 phases=3 Bus1=242038839.1.2.3 Bus2=42816965.1.2.3 LineCode=350_AL_3PH_16KV_3 Length=0.07292 units=km
New Line.ND42816965$239391748 phases=3 Bus1=42816965.1.2.3 Bus2=239391750.1.2.3 LineCode=350_AL_3PH_16KV_3 Length=0.026157 units=km
New Line.239967164$ND42780810 phases=3 Bus1=239967166.1.2.3 Bus2=42780788.1.2.3 LineCode=1/0_CLP_3PH_16KV_3 Length=0.017143 units=km
New Line.239788151$239788139 phases=3 Bus1=239788153.1.2.3 Bus2=239788141.1.2.3 LineCode=1/0_CLP_3PH_16KV_3 Length=0.010976 units=km
New Line.239391748$P5373702-A phases=3 Bus1=239391751.1.2.3 Bus2=153932588.1.2.3 LineCode=350_AL_3PH_16KV_3 Length=0.001567 units=km
New Line.239788139$P5371289-1 phases=3 Bus1=239788142.1.2.3 Bus2=42780521.1.2.3 LineCode=1/0_CLP_3PH_16KV_3 Length=0.001725 units=km
New Line.239391780$P5373702-B phases=3 Bus1=153932606.1.2.3 Bus2=239391783.1.2.3 LineCode=350_AL_3PH_16KV_3 Length=0.24633 units=km
New Line.ND239388661$239391780 phases=3 Bus1=239391782.1.2.3 Bus2=239388661.1.2.3 LineCode=350_AL_3PH_16KV_3 Length=0.008112 units=km
New Line.P5035854-1$ND239388661 phases=3 Bus1=239388661.1.2.3 Bus2=42815568.1.2.3 LineCode=350_AL_3PH_16KV_3 Length=0.099939 units=km
New Line.239766593$P5706613-1 phases=3 Bus1=239766596.1.2.3 Bus2=239766558.1.2.3 LineCode=1/0_JCN_3PH_16KV_3 Length=0.002519 units=km
New Line.4260523E$885160E phases=3 Bus1=42779613.1.2.3 Bus2=42779643.1.2.3 LineCode=1000_CLP_3PH_16KV_3 Length=0.060259 units=km
New Line.FD02051$241949100 phases=3 Bus1=42778175.1.2.3 Bus2=241949102.1.2.3 LineCode=750_AL_3PH_16KV_3 Length=0.057429 units=km
New Line.ND236238159$PS7917 phases=3 Bus1=236238159.1.2.3 Bus2=236238169.1.2.3 LineCode=336_ACSR_3PH_16KV_3 Length=0.005636 units=km
New Line.FD02098$237502674 phases=3 Bus1=42778188.1.2.3 Bus2=237502676.1.2.3 LineCode=750_AL_3PH_16KV_3 Length=0.040175 units=km
New Line.241949100$P5138390-1 phases=3 Bus1=241949103.1.2.3 Bus2=42778230.1.2.3 LineCode=750_AL_3PH_16KV_3 Length=0.002 units=km
New Line.FD02099$P5036142-1 phases=3 Bus1=42778201.1.2.3 Bus2=42778326.1.2.3 LineCode=750_AL_3PH_16KV_3 Length=0.067213 units=km
New Line.237502674$P5035959 phases=3 Bus1=237502677.1.2.3 Bus2=237502661.1.2.3 LineCode=750_AL_3PH_16KV_3 Length=0.009214 units=km
New Line.PH823$240060081 phases=3 Bus1=42777152.1.2.3 Bus2=240060083.1.2.3 LineCode=350_AL_3PH_16KV_3 Length=0.040841 units=km
New Line.PS7917$ND283723535 phases=3 Bus1=236238170.1.2.3 Bus2=283723535.1.2.3 LineCode=336_ACSR_3PH_16KV_3 Length=0.001961 units=km
New Line.4104136E$P5370991-1 phases=3 Bus1=42779522.1.2.3 Bus2=42778374.1.2.3 LineCode=750_AL_3PH_16KV_3 Length=0.060062 units=km
New Line.ND283723535$987917E phases=3 Bus1=283723535.1.2.3 Bus2=236238200.1.2.3 LineCode=336_ACSR_3PH_16KV_3 Length=0.001556 units=km
New Line.FD01291$P5310412-1 phases=3 Bus1=42778214.1.2.3 Bus2=42778422.1.2.3 LineCode=750_AL_3PH_16KV_3 Length=0.024886 units=km
New Line.240060081$P5137099-1 phases=3 Bus1=240060084.1.2.3 Bus2=135965293.1.2.3 LineCode=350_AL_3PH_16KV_3 Length=0.002333 units=km
New Line.4468432EPH$PEA0652-2 phases=3 Bus1=89998462.1.2.3 Bus2=183212178.1.2.3 LineCode=1000_JCN_3PH_16KV_3 Length=0.00494 units=km
New Line.FD59238$ND42816901 phases=3 Bus1=42780355.1.2.3 Bus2=42816901.1.2.3 LineCode=1/0_CLP_3PH_16KV_3 Length=0.089603 units=km
New Line.987917E$GS8322-3 phases=3 Bus1=236238201.1.2.3 Bus2=236238302.1.2.3 LineCode=1000_JCN_3PH_16KV_3 Length=0.314635 units=km
New Line.ND42816901$P5509114-1 phases=3 Bus1=42816901.1.2.3 Bus2=42780377.1.2.3 LineCode=1/0_CLP_3PH_16KV_3 Length=0.147269 units=km
New Line.ND42816901$ND42816902 phases=3 Bus1=42816901.1.2.3 Bus2=42816902.1.2.3 LineCode=1/0_CLP_3PH_16KV_3 Length=0.206315 units=km
New Line.FD59060$ND42817005 phases=3 Bus1=42779401.1.2.3 Bus2=42817005.1.2.3 LineCode=350_AL_3PH_16KV_3 Length=0.101395 units=km
New Line.226450269$ND42816902 phases=3 Bus1=42816902.1.2.3 Bus2=226450271.1.2.3 LineCode=1/0_CLP_3PH_16KV_3 Length=0.013491 units=km
New Line.ND42817005$P5137300-1 phases=3 Bus1=42817005.1.2.3 Bus2=42777254.1.2.3 LineCode=350_AL_3PH_16KV_3 Length=0.065923 units=km
New Line.PH820$P5036256-1 phases=3 Bus1=42777299.1.2.3 Bus2=42777315.1.2.3 LineCode=350_AL_3PH_16KV_3 Length=0.079021 units=km
New Line.ND42817005$P5138615-1 phases=3 Bus1=42817005.1.2.3 Bus2=42780262.1.2.3 LineCode=350_AL_3PH_16KV_3 Length=0.022257 units=km
New Line.ND42816902$ND42816804 phases=3 Bus1=42816902.1.2.3 Bus2=42816804.1.2.3 LineCode=1/0_CLP_3PH_16KV_3 Length=0.059161 units=km
New Line.ND71916439$ND71916480 phases=3 Bus1=71916439.1.2.3 Bus2=-77777771916439.1.2.3 LineCode=750_CLP_3PH_16KV_3 Length=0.02554 units=km
New Line.ND71916418$CUST_SUB phases=3 Bus1=71916418.1.2.3 Bus2=-77777771916418.1.2.3 LineCode=750_CLP_3PH_16KV_3 Length=0.042436 units=km
New Line.PS4264$ND42816948 phases=4 Bus1=176484594.0.1.2.3 Bus2=42816948.0.1.2.3 LineCode=336_ACSR_3PH_336_ACSR_N_16KV_4 Length=0.07541 units=km
New Line.ND42816948$1790506E phases=3 Bus1=42816948.1.2.3 Bus2=42815672.1.2.3 LineCode=336_ACSR_3PH_16KV_3 Length=0.233033 units=km
New Line.ND42816948$ND42816761 phases=4 Bus1=42816948.0.1.2.3 Bus2=42816761.0.1.2.3 LineCode=336_ACSR_3PH_336_ACSR_N_16KV_4 Length=0.030389 units=km
New Line.ND42816761$ND42817046 phases=4 Bus1=42816761.0.1.2.3 Bus2=42817046.0.1.2.3 LineCode=336_ACSR_3PH_336_ACSR_N_16KV_4 Length=0.038961 units=km
New Line.ND42817046$RCS0231 phases=4 Bus1=42817046.0.1.2.3 Bus2=14096991.0.1.2.3 LineCode=336_ACSR_3PH_336_ACSR_N_16KV_4 Length=0.053597 units=km
New Line.ND42817046$2086324E phases=3 Bus1=42817046.1.2.3 Bus2=42815612.1.2.3 LineCode=336_ACSR_3PH_16KV_3 Length=0.05389 units=km
New Line.PS0584$1872049E phases=4 Bus1=42816308.0.1.2.3 Bus2=42779301.0.1.2.3 LineCode=653_ACSR_3PH_653_ACSR_N_16KV_4 Length=0.084817 units=km
New Line.1872049E$ND42817292 phases=4 Bus1=42779301.0.1.2.3 Bus2=42817292.0.1.2.3 LineCode=653_ACSR_3PH_653_ACSR_N_16KV_4 Length=0.163672 units=km
New Line.ND42817292$PS4262 phases=4 Bus1=42817292.0.1.2.3 Bus2=176484747.0.1.2.3 LineCode=336_ACSR_3PH_336_ACSR_N_16KV_4 Length=0.06809 units=km
New Line.ND42817292$PS5014 phases=3 Bus1=42817292.1.2.3 Bus2=235656356.1.2.3 LineCode=653_ACSR_3PH_16KV_3 Length=0.029854 units=km
New Line.PS4262$1920825E phases=4 Bus1=176484746.0.1.2.3 Bus2=110757317.0.1.2.3 LineCode=336_ACSR_3PH_336_ACSR_N_16KV_4 Length=0.091892 units=km
New Line.2242184E$ND235994684 phases=3 Bus1=235994684.1.2.3 Bus2=42778174.1.2.3 LineCode=653_ACSR_3PH_16KV_3 Length=0.003842 units=km
New Line.ND42817409$1920825E phases=3 Bus1=42816209.1.2.3 Bus2=42817409.1.2.3 LineCode=4_ACSR_3PH_16KV_3 Length=0.020938 units=km
New Line.ND42817409$PS4263 phases=4 Bus1=42817409.0.1.2.3 Bus2=176484672.0.1.2.3 LineCode=336_ACSR_3PH_336_ACSR_N_16KV_4 Length=0.130532 units=km
New Line.ND242978888$ND42817409 phases=3 Bus1=42817409.1.2.3 Bus2=242978888.1.2.3 LineCode=336_ACSR_3PH_16KV_3 Length=0.081251 units=km
New Line.ND42816958$PH817 phases=3 Bus1=42816958.1.2.3 Bus2=42778187.1.2.3 LineCode=653_ACSR_3PH_16KV_3 Length=0.005231 units=km
New Line.ND135965261$PS4263 phases=4 Bus1=176484671.0.1.2.3 Bus2=135965261.0.1.2.3 LineCode=336_ACSR_3PH_336_ACSR_N_16KV_4 Length=0.064085 units=km
New Line.ND42817280$FD02099 phases=3 Bus1=42817280.1.2.3 Bus2=42778200.1.2.3 LineCode=653_ACSR_3PH_16KV_3 Length=0.002374 units=km
New Line.ND135965261$PH823 phases=3 Bus1=135965261.1.2.3 Bus2=42777151.1.2.3 LineCode=336_ACSR_3PH_16KV_3 Length=0.031291 units=km
New Line.ND135965261$1920822E phases=4 Bus1=135965261.0.1.2.3 Bus2=42779435.0.1.2.3 LineCode=336_ACSR_3PH_336_ACSR_N_16KV_4 Length=0.064085 units=km
New Line.ND42816830$4104136E phases=3 Bus1=42816830.1.2.3 Bus2=42779521.1.2.3 LineCode=653_ACSR_3PH_16KV_3 Length=0.009665 units=km
New Line.ND42816831$4869185E phases=3 Bus1=42816831.1.2.3 Bus2=42778213.1.2.3 LineCode=653_ACSR_3PH_16KV_3 Length=0.00409 units=km
New Line.1920822E$ND42817396 phases=4 Bus1=42779435.0.1.2.3 Bus2=42817396.0.1.2.3 LineCode=336_ACSR_3PH_336_ACSR_N_16KV_4 Length=0.039718 units=km
New Line.ND42817396$FD59238 phases=3 Bus1=42817396.1.2.3 Bus2=42780354.1.2.3 LineCode=1/0_ACSR_3PH_16KV_3 Length=0.00587 units=km
New Line.ND42817396$ND42817397 phases=4 Bus1=42817396.0.1.2.3 Bus2=42817397.0.1.2.3 LineCode=336_ACSR_3PH_336_ACSR_N_16KV_4 Length=0.026521 units=km
New Line.ND42817397$FD59060 phases=3 Bus1=42817397.1.2.3 Bus2=42779400.1.2.3 LineCode=336_ACSR_3PH_16KV_3 Length=0.0062 units=km
New Line.ND42817397$ND42816994 phases=4 Bus1=42817397.0.1.2.3 Bus2=42816994.0.1.2.3 LineCode=336_ACSR_3PH_336_ACSR_N_16KV_4 Length=0.064742 units=km
New Line.ND42816994$PH820 phases=3 Bus1=42816994.1.2.3 Bus2=42777298.1.2.3 LineCode=336_ACSR_3PH_16KV_3 Length=0.069727 units=km
New Line.RCS0309$ND42816994 phases=4 Bus1=42816994.0.1.2.3 Bus2=42816658.0.1.2.3 LineCode=336_ACSR_3PH_336_ACSR_N_16KV_4 Length=0.069727 units=km
New Line.RCS0309$ND42816878 phases=4 Bus1=42816659.0.1.2.3 Bus2=42816878.0.1.2.3 LineCode=336_ACSR_3PH_336_ACSR_N_16KV_4 Length=0.073762 units=km
New Line.ND239388661$239766593 phases=3 Bus1=239388661.1.2.3 Bus2=239766595.1.2.3 LineCode=2_CU_3PH_16KV_3 Length=0.198456 units=km
New Line.987918E$ND236238159 phases=3 Bus1=42777141.1.2.3 Bus2=236238159.1.2.3 LineCode=336_ATW_3PH_16KV_3 Length=0.07324 units=km
New Line.ND236238159$PS5136 phases=3 Bus1=236238159.1.2.3 Bus2=283723480.1.2.3 LineCode=336_ATW_3PH_16KV_3 Length=0.027581 units=km
New Line.PS0232$ND42816831 phases=3 Bus1=42816831.1.2.3 Bus2=42816245.1.2.3 LineCode=336_ATW_3PH_16KV_3 Length=0.049066 units=km
New Line.PS5136$4468432EPH phases=3 Bus1=283723481.1.2.3 Bus2=89998461.1.2.3 LineCode=336_ATW_3PH_16KV_3 Length=0.002431 units=km
New Line.4253673E$4260523E phases=4 Bus1=42779582.0.1.2.3 Bus2=42779612.0.1.2.3 LineCode=336_ATW_3PH_336_ATW_N_16KV_4 Length=0.505304 units=km
New Line.885160E$ND196999547 phases=4 Bus1=42779642.0.1.2.3 Bus2=196999547.0.1.2.3 LineCode=336_ATW_3PH_336_ATW_N_16KV_4 Length=0.049196 units=km
New Line.PS0584$ND196999547 phases=4 Bus1=196999547.0.1.2.3 Bus2=42816307.0.1.2.3 LineCode=336_ATW_3PH_336_ATW_N_16KV_4 Length=0.21342 units=km
New Line.PS5014$ND235994695 phases=3 Bus1=235656357.1.2.3 Bus2=235994695.1.2.3 LineCode=336_ATW_3PH_16KV_3 Length=0.005458 units=km
New Line.ND235994695$ND235994684 phases=3 Bus1=235994695.1.2.3 Bus2=235994684.1.2.3 LineCode=336_ATW_3PH_16KV_3 Length=0.006829 units=km
New Line.ND42817887$ND42816958 phases=3 Bus1=42817887.1.2.3 Bus2=42816958.1.2.3 LineCode=336_ATW_3PH_16KV_3 Length=0.068708 units=km
New Line.987918E$ND242978888 phases=3 Bus1=242978888.1.2.3 Bus2=42777141.1.2.3 LineCode=336_ATW_3PH_16KV_3 Length=0.294954 units=km
New Line.ND42816958$ND42817280 phases=3 Bus1=42816958.1.2.3 Bus2=42817280.1.2.3 LineCode=336_ATW_3PH_16KV_3 Length=0.047785 units=km
New Line.ND42817280$ND42816830 phases=3 Bus1=42817280.1.2.3 Bus2=42816830.1.2.3 LineCode=336_ATW_3PH_16KV_3 Length=0.044541 units=km
New Line.ND42816830$ND42816831 phases=3 Bus1=42816830.1.2.3 Bus2=42816831.1.2.3 LineCode=336_ATW_3PH_16KV_3 Length=0.051562 units=km
New Line.PS0232$4789698E phases=3 Bus1=42816244.1.2.3 Bus2=169406909.1.2.3 LineCode=336_ATW_3PH_16KV_3 Length=0.059463 units=km
New Line.4789698E$ND42817445 phases=3 Bus1=169406909.1.2.3 Bus2=42817445.1.2.3 LineCode=336_ATW_3PH_16KV_3 Length=0.007535 units=km
New Line.ND42817445$ND237530705 phases=3 Bus1=42817445.1.2.3 Bus2=237530705.1.2.3 LineCode=336_ATW_3PH_16KV_3 Length=0.042503 units=km
New Line.ND42817445$FD59057 phases=3 Bus1=42817445.1.2.3 Bus2=42779311.1.2.3 LineCode=336_ATW_3PH_16KV_3 Length=0.001774 units=km
New Line.ND235994684$ND42817887 phases=3 Bus1=235994684.1.2.3 Bus2=42817887.1.2.3 LineCode=336_ATW_3PH_16KV_3 Length=0.038928 units=km
New Line.228076218$ND42816804 phases=3 Bus1=42816804.1.2.3 Bus2=228076220.1.2.3 LineCode=1/0_CLP_3PH_16KV_3 Length=0.028658 units=km
New Line.FD59057$P5137230-1 phases=3 Bus1=42779312.1.2.3 Bus2=42779238.1.2.3 LineCode=350_CLP_3PH_16KV_3 Length=0.131996 units=km
New Line.ND42816804$P5472898-1 phases=3 Bus1=42816804.1.2.3 Bus2=42779783.1.2.3 LineCode=1/0_CLP_3PH_16KV_3 Length=0.127291 units=km
New Line.226450269$P5417877-1 phases=3 Bus1=226450272.1.2.3 Bus2=42779538.1.2.3 LineCode=1/0_CLP_3PH_16KV_3 Length=0.001586 units=km
New Line.P5502511T1$PEA0652-4 phases=3 Bus1=183212169.1.2.3 Bus2=42816754.1.2.3 LineCode=1000_JCN_3PH_16KV_3 Length=0.006122 units=km
New Line.P5502511T1$VFI2511-2 phases=3 Bus1=42816754.1.2.3 Bus2=143936375.1.2.3 LineCode=750_CLP_3PH_16KV_3 Length=0.015326 units=km
New Line.GS8322-2$0212554 phases=3 Bus1=236238293.1.2.3 Bus2=237645072.1.2.3 LineCode=1/0_JCN_3PH_16KV_3 Length=0.098091 units=km
New Line.4424643E$P5349143-1 phases=3 Bus1=42777360.1.2.3 Bus2=42777376.1.2.3 LineCode=350_AL_3PH_16KV_3 Length=0.11547 units=km
New Line.FD02100$P5525705-1 phases=3 Bus1=42779091.1.2.3 Bus2=42779107.1.2.3 LineCode=750_AL_3PH_16KV_3 Length=0.027044 units=km
New Line.228076218$P5498445-1 phases=3 Bus1=228076221.1.2.3 Bus2=42780310.1.2.3 LineCode=1/0_CLP_3PH_16KV_3 Length=0.000729 units=km
New Line.PS0213$ND42816781 phases=3 Bus1=42816151.1.2.3 Bus2=42816781.1.2.3 LineCode=653_ACSR_3PH_16KV_3 Length=0.058346 units=km
New Line.FD59059$ND42817256 phases=3 Bus1=42779338.1.2.3 Bus2=42817256.1.2.3 LineCode=350_AL_3PH_16KV_3 Length=0.137552 units=km
New Line.ND42817256$P5137294-A phases=3 Bus1=42817256.1.2.3 Bus2=153932191.1.2.3 LineCode=350_AL_3PH_16KV_3 Length=0.027188 units=km
New Line.ND42817256$P5037163-1 phases=3 Bus1=42817256.1.2.3 Bus2=42778556.1.2.3 LineCode=350_AL_3PH_16KV_3 Length=0.029135 units=km
New Line.VFI2511-3$ND42817206 phases=3 Bus1=143936381.1.2.3 Bus2=42817206.1.2.3 LineCode=750_CLP_3PH_16KV_3 Length=0.019464 units=km
New Line.X8728E$P5498496-1 phases=3 Bus1=42779030.1.2.3 Bus2=42779046.1.2.3 LineCode=750_AL_3PH_16KV_3 Length=0.107967 units=km
New Line.2321694E$P5334371-1 phases=3 Bus1=42780566.1.2.3 Bus2=42780473.1.2.3 LineCode=350_AL_3PH_16KV_3 Length=0.020308 units=km
New Line.ND42817206$ND42815962 phases=3 Bus1=42817206.1.2.3 Bus2=42815941.1.2.3 LineCode=350_CLP_3PH_16KV_3 Length=0.039277 units=km
New Line.VFI2511-1$0176510 phases=3 Bus1=143936366.1.2.3 Bus2=42816712.1.2.3 LineCode=1/0_CLP_3PH_16KV_3 Length=0.105849 units=km
New Line.ND42817206$ND71916465 phases=3 Bus1=42817206.1.2.3 Bus2=71916465.1.2.3 LineCode=750_CLP_3PH_16KV_3 Length=0.004357 units=km
New Line.ND71916465$ND42815926 phases=3 Bus1=71916465.1.2.3 Bus2=42815902.1.2.3 LineCode=750_CLP_3PH_16KV_3 Length=0.014705 units=km
New Line.ND42815926$ND71916465 phases=3 Bus1=71916465.1.2.3 Bus2=42815902.1.2.3 LineCode=750_CLP_3PH_16KV_3 Length=0.014705 units=km
New Line.P5138533-A$FD59058 phases=3 Bus1=42779325.1.2.3 Bus2=153932309.1.2.3 LineCode=350_AL_3PH_16KV_3 Length=0.014967 units=km
New Line.FD02016$240060037 phases=3 Bus1=42779496.1.2.3 Bus2=240060039.1.2.3 LineCode=1/0_CLP_3PH_16KV_3 Length=0.008465 units=km
New Line.ND71916439$ND42815926 phases=3 Bus1=42815902.1.2.3 Bus2=71916439.1.2.3 LineCode=750_CLP_3PH_16KV_3 Length=0.05168 units=km
New Line.ND237530705$ND42816923 phases=3 Bus1=237530705.1.2.3 Bus2=42816923.1.2.3 LineCode=653_ACSR_3PH_16KV_3 Length=0.04515 units=km
New Line.ND42816878$4424643E phases=3 Bus1=42816878.1.2.3 Bus2=42777359.1.2.3 LineCode=336_ACSR_3PH_16KV_3 Length=0.149373 units=km
New Line.ND42816923$PH725 phases=3 Bus1=42816923.1.2.3 Bus2=42779090.1.2.3 LineCode=653_ACSR_3PH_16KV_3 Length=0.04515 units=km
New Line.PS0213$ND42816923 phases=3 Bus1=42816923.1.2.3 Bus2=42816150.1.2.3 LineCode=653_ACSR_3PH_16KV_3 Length=0.062061 units=km
New Line.ND42816878$ND42817427 phases=4 Bus1=42816878.0.1.2.3 Bus2=42817427.0.1.2.3 LineCode=336_ACSR_3PH_336_ACSR_N_16KV_4 Length=0.143488 units=km
New Line.ND42817427$RCS5164 phases=4 Bus1=42817427.0.1.2.3 Bus2=105326351.0.1.2.3 LineCode=336_ACSR_3PH_336_ACSR_N_16KV_4 Length=0.028261 units=km
New Line.ND42817427$ND42816841 phases=4 Bus1=42817427.0.1.2.3 Bus2=42816841.0.1.2.3 LineCode=336_ACSR_3PH_336_ACSR_N_16KV_4 Length=0.069147 units=km
New Line.ND42816841$FD59059 phases=3 Bus1=42816841.1.2.3 Bus2=42779337.1.2.3 LineCode=336_ACSR_3PH_16KV_3 Length=0.078484 units=km
New Line.ND42816841$ND42816651 phases=4 Bus1=42816841.0.1.2.3 Bus2=42816651.0.1.2.3 LineCode=336_ACSR_3PH_336_ACSR_N_16KV_4 Length=0.031426 units=km
New Line.ND42816781$ND42816915 phases=3 Bus1=42816781.1.2.3 Bus2=42816915.1.2.3 LineCode=653_ACSR_3PH_16KV_3 Length=0.057905 units=km
New Line.ND42817354$ND42816651 phases=4 Bus1=42816651.0.1.2.3 Bus2=42817354.0.1.2.3 LineCode=336_ACSR_3PH_336_ACSR_N_16KV_4 Length=0.047057 units=km
New Line.ND42816915$X8728E phases=3 Bus1=42816915.1.2.3 Bus2=42779029.1.2.3 LineCode=653_ACSR_3PH_16KV_3 Length=0.009931 units=km
New Line.ND42817354$2321694E phases=3 Bus1=42817354.1.2.3 Bus2=42780565.1.2.3 LineCode=336_ACSR_3PH_16KV_3 Length=0.047057 units=km
New Line.PS0607$ND42817354 phases=4 Bus1=42817354.0.1.2.3 Bus2=42816604.0.1.2.3 LineCode=336_ACSR_3PH_336_ACSR_N_16KV_4 Length=0.014821 units=km
New Line.ND42816915$ND42817563 phases=3 Bus1=42816915.1.2.3 Bus2=42817563.1.2.3 LineCode=653_ACSR_3PH_16KV_3 Length=0.053697 units=km
New Line.ND42817563$PS0631 phases=3 Bus1=42817563.1.2.3 Bus2=14096300.1.2.3 LineCode=653_ACSR_3PH_16KV_3 Length=0.029245 units=km
New Line.ND42817563$ND42817248 phases=3 Bus1=42817563.1.2.3 Bus2=42817248.1.2.3 LineCode=336_ACSR_3PH_16KV_3 Length=0.115603 units=km
New Line.ND42817248$FD59058 phases=3 Bus1=42817248.1.2.3 Bus2=42779324.1.2.3 LineCode=336_ACSR_3PH_16KV_3 Length=0.008979 units=km
New Line.ND42817248$FD02016 phases=3 Bus1=42817248.1.2.3 Bus2=42779495.1.2.3 LineCode=1/0_ACSR_3PH_16KV_3 Length=0.003773 units=km
New Line.ND42817248$ND42816520 phases=3 Bus1=42817248.1.2.3 Bus2=42816520.1.2.3 LineCode=336_ACSR_3PH_16KV_3 Length=0.093405 units=km
New Line.ND42816947$PS0607 phases=4 Bus1=42816603.0.1.2.3 Bus2=42816947.0.1.2.3 LineCode=336_ACSR_3PH_336_ACSR_N_16KV_4 Length=0.028284 units=km
New Line.ND42816947$PS4264 phases=4 Bus1=42816947.0.1.2.3 Bus2=176484593.0.1.2.3 LineCode=336_ACSR_3PH_336_ACSR_N_16KV_4 Length=0.075607 units=km
New Line.ND42816947$2265721E phases=3 Bus1=42816947.1.2.3 Bus2=42780578.1.2.3 LineCode=336_ACSR_3PH_16KV_3 Length=0.007038 units=km
New Line.ND42816520$ND42816863 phases=3 Bus1=42816520.1.2.3 Bus2=42816863.1.2.3 LineCode=336_ACSR_3PH_16KV_3 Length=0.063244 units=km
New Line.ND42816863$FD02692 phases=3 Bus1=42816863.1.2.3 Bus2=42778696.1.2.3 LineCode=336_ACSR_3PH_16KV_3 Length=0.004896 units=km
New Line.ND42816863$FD02089 phases=3 Bus1=42816863.1.2.3 Bus2=42778709.1.2.3 LineCode=336_ACSR_3PH_16KV_3 Length=0.009944 units=km
New Line.ND42816863$FD59626 phases=3 Bus1=42816863.1.2.3 Bus2=42779508.1.2.3 LineCode=336_ACSR_3PH_16KV_3 Length=0.023577 units=km

! Switches
New Line.1920825E:1920825E phases=3 Bus1=110757317.1.2.3 Bus2=42816209.1.2.3 switch=y r1=0.001 x1=0.001 r0=0.001 x0=0.001 Length=0.001 units=km
New Line.VAL_VERDE$NIGHTHAWK_RCS0231$RCS0231 phases=3 Bus1=42816689.1.2.3 Bus2=-77777742816689.1.2.3 switch=y r1=0.001 x1=0.001 r0=0.001 x0=0.001 Length=0.001 units=km
New Line.5138665:PMH8665-4 phases=3 Bus1=42780815.1.2.3 Bus2=42780833.1.2.3 switch=y r1=0.001 x1=0.001 r0=0.001 x0=0.001 Length=0.001 units=km enabled=false
New Line.5458732:PEA0652-3 phases=3 Bus1=183212151.1.2.3 Bus2=183212160.1.2.3 switch=y r1=0.001 x1=0.001 r0=0.001 x0=0.001 Length=0.001 units=km enabled=false
New Line.VAL_VERDE$CRABTREE_PEA0652-1$PEA0652-1 phases=3 Bus1=183212187.1.2.3 Bus2=-777777183212187.1.2.3 switch=y r1=0.001 x1=0.001 r0=0.001 x0=0.001 Length=0.001 units=km
New Line.VAL_VERDE$CRABTREE_RCS5164$RCS5164 phases=3 Bus1=105326352.1.2.3 Bus2=-777777105326352.1.2.3 switch=y r1=0.001 x1=0.001 r0=0.001 x0=0.001 Length=0.001 units=km
New Line.VAL_VERDE$NIGHTHAWK_PS0631$PS0631 phases=3 Bus1=14096299.1.2.3 Bus2=-77777714096299.1.2.3 switch=y r1=0.001 x1=0.001 r0=0.001 x0=0.001 Length=0.001 units=km
New Line.226450269 phases=3 Bus1=226450271.1.2.3 Bus2=226450272.1.2.3 switch=y r1=0.001 x1=0.001 r0=0.001 x0=0.001 Length=0.001 units=km
New Line.236238290$236238299 phases=3 Bus1=236238270.1.2.3 Bus2=236238264.1.2.3 switch=y r1=0.001 x1=0.001 r0=0.001 x0=0.001 Length=0.001 units=km
New Line.236238299$236238308 phases=3 Bus1=236238270.1.2.3 Bus2=236238276.1.2.3 switch=y r1=0.001 x1=0.001 r0=0.001 x0=0.001 Length=0.001 units=km
New Line.228076218 phases=3 Bus1=228076220.1.2.3 Bus2=228076221.1.2.3 switch=y r1=0.001 x1=0.001 r0=0.001 x0=0.001 Length=0.001 units=km
New Line.GS8322-1$236238290 phases=3 Bus1=236238264.1.2.3 Bus2=236238263.1.2.3 switch=y r1=0.001 x1=0.001 r0=0.001 x0=0.001 Length=0.001 units=km
New Line.143936363$143936371 phases=3 Bus1=143936358.1.2.3 Bus2=143936357.1.2.3 switch=y r1=0.001 x1=0.001 r0=0.001 x0=0.001 Length=0.001 units=km
New Line.42815948$P5036887T-B phases=3 Bus1=42815941.1.2.3 Bus2=42815942.1.2.3 switch=y r1=0.001 x1=0.001 r0=0.001 x0=0.001 Length=0.001 units=km
New Line.42815909$P5036887T-A phases=3 Bus1=42815902.1.2.3 Bus2=42815903.1.2.3 switch=y r1=0.001 x1=0.001 r0=0.001 x0=0.001 Length=0.001 units=km
New Line.5458732:PEA0652-4 phases=3 Bus1=183212152.1.2.3 Bus2=183212169.1.2.3 switch=y r1=0.001 x1=0.001 r0=0.001 x0=0.001 Length=0.001 units=km
New Line.5708322:GS8322-2 phases=3 Bus1=236238264.1.2.3 Bus2=236238293.1.2.3 switch=y r1=0.001 x1=0.001 r0=0.001 x0=0.001 Length=0.001 units=km
New Line.5708322:GS8322-4 phases=3 Bus1=236238276.1.2.3 Bus2=236238311.1.2.3 switch=y r1=0.001 x1=0.001 r0=0.001 x0=0.001 Length=0.001 units=km
New Line.4854106E:PS0213 phases=3 Bus1=42816150.1.2.3 Bus2=42816151.1.2.3 switch=y r1=0.001 x1=0.001 r0=0.001 x0=0.001 Length=0.001 units=km
New Line.1394825E:RCS5164 phases=3 Bus1=105326351.1.2.3 Bus2=105326352.1.2.3 switch=y r1=0.001 x1=0.001 r0=0.001 x0=0.001 Length=0.001 units=km enabled=false
New Line.5502511:VFI2511-2 phases=3 Bus1=143936375.1.2.3 Bus2=143936358.1.2.3 switch=y r1=0.001 x1=0.001 r0=0.001 x0=0.001 Length=0.001 units=km
New Line.5502511:VFI2511-1 phases=3 Bus1=143936357.1.2.3 Bus2=143936366.1.2.3 switch=y r1=0.001 x1=0.001 r0=0.001 x0=0.001 Length=0.001 units=km
New Line.4786505E:PS0607 phases=3 Bus1=42816604.1.2.3 Bus2=42816603.1.2.3 switch=y r1=0.001 x1=0.001 r0=0.001 x0=0.001 Length=0.001 units=km
New Line.2265287E:PS4264 phases=3 Bus1=176484593.1.2.3 Bus2=176484594.1.2.3 switch=y r1=0.001 x1=0.001 r0=0.001 x0=0.001 Length=0.001 units=km
New Line.4424643E:FD00108 phases=3 Bus1=42777359.1.2.3 Bus2=42777360.1.2.3 switch=y r1=0.001 x1=0.001 r0=0.001 x0=0.001 Length=0.001 units=km
New Line.4854108E:FD02100 phases=3 Bus1=42779090.1.2.3 Bus2=42779091.1.2.3 switch=y r1=0.001 x1=0.001 r0=0.001 x0=0.001 Length=0.001 units=km
New Line.2321695E:FD59059 phases=3 Bus1=42779337.1.2.3 Bus2=42779338.1.2.3 switch=y r1=0.001 x1=0.001 r0=0.001 x0=0.001 Length=0.001 units=km
New Line.X8728E:X8728E phases=3 Bus1=42779029.1.2.3 Bus2=42779030.1.2.3 switch=y r1=0.001 x1=0.001 r0=0.001 x0=0.001 Length=0.001 units=km
New Line.2321694E:2321694E phases=3 Bus1=42780565.1.2.3 Bus2=42780566.1.2.3 switch=y r1=0.001 x1=0.001 r0=0.001 x0=0.001 Length=0.001 units=km
New Line.4789929E:FD59058 phases=3 Bus1=42779324.1.2.3 Bus2=42779325.1.2.3 switch=y r1=0.001 x1=0.001 r0=0.001 x0=0.001 Length=0.001 units=km
New Line.4789929E:FD02016 phases=3 Bus1=42779495.1.2.3 Bus2=42779496.1.2.3 switch=y r1=0.001 x1=0.001 r0=0.001 x0=0.001 Length=0.001 units=km
New Line.2265721E:2265721E phases=3 Bus1=42780578.1.2.3 Bus2=42780579.1.2.3 switch=y r1=0.001 x1=0.001 r0=0.001 x0=0.001 Length=0.001 units=km
New Line.5137300:P5137300-1 phases=3 Bus1=42777254.1.2.3 Bus2=42777255.1.2.3 switch=y r1=0.001 x1=0.001 r0=0.001 x0=0.001 Length=0.001 units=km
New Line.5036256:P5036256-1 phases=3 Bus1=42777315.1.2.3 Bus2=42777316.1.2.3 switch=y r1=0.001 x1=0.001 r0=0.001 x0=0.001 Length=0.001 units=km
New Line.5138615:P5138615-1 phases=3 Bus1=42780262.1.2.3 Bus2=42780263.1.2.3 switch=y r1=0.001 x1=0.001 r0=0.001 x0=0.001 Length=0.001 units=km
New Line.5137230:P5137230-1 phases=3 Bus1=42779238.1.2.3 Bus2=42779239.1.2.3 switch=y r1=0.001 x1=0.001 r0=0.001 x0=0.001 Length=0.001 units=km
New Line.5472898:P5472898-1 phases=3 Bus1=42779783.1.2.3 Bus2=42779784.1.2.3 switch=y r1=0.001 x1=0.001 r0=0.001 x0=0.001 Length=0.001 units=km
New Line.5417877:P5417877-1 phases=3 Bus1=42779538.1.2.3 Bus2=42779539.1.2.3 switch=y r1=0.001 x1=0.001 r0=0.001 x0=0.001 Length=0.001 units=km
New Line.5349143:P5349143-1 phases=3 Bus1=42777376.1.2.3 Bus2=42777377.1.2.3 switch=y r1=0.001 x1=0.001 r0=0.001 x0=0.001 Length=0.001 units=km
New Line.5525705:P5525705-1 phases=3 Bus1=42779107.1.2.3 Bus2=42779108.1.2.3 switch=y r1=0.001 x1=0.001 r0=0.001 x0=0.001 Length=0.001 units=km
New Line.5498445:P5498445-1 phases=3 Bus1=42780310.1.2.3 Bus2=42780311.1.2.3 switch=y r1=0.001 x1=0.001 r0=0.001 x0=0.001 Length=0.001 units=km
New Line.5137294:P5137294-A phases=3 Bus1=153932191.1.2.3 Bus2=153932192.1.2.3 switch=y r1=0.001 x1=0.001 r0=0.001 x0=0.001 Length=0.001 units=km
New Line.5037163:P5037163-1 phases=3 Bus1=42778556.1.2.3 Bus2=42778557.1.2.3 switch=y r1=0.001 x1=0.001 r0=0.001 x0=0.001 Length=0.001 units=km
New Line.5137294:P5137294-T phases=3 Bus1=153932192.1.2.3 Bus2=153932200.1.2.3 switch=y r1=0.001 x1=0.001 r0=0.001 x0=0.001 Length=0.001 units=km
New Line.5498496:P5498496-1 phases=3 Bus1=42779046.1.2.3 Bus2=42779047.1.2.3 switch=y r1=0.001 x1=0.001 r0=0.001 x0=0.001 Length=0.001 units=km
New Line.5334371:P5334371-1 phases=3 Bus1=42780473.1.2.3 Bus2=42780474.1.2.3 switch=y r1=0.001 x1=0.001 r0=0.001 x0=0.001 Length=0.001 units=km
New Line.5458732:PEA0652-1 phases=3 Bus1=183212152.1.2.3 Bus2=183212187.1.2.3 switch=y r1=0.001 x1=0.001 r0=0.001 x0=0.001 Length=0.001 units=km enabled=false
New Line.4331484E:PS0631 phases=3 Bus1=14096300.1.2.3 Bus2=14096299.1.2.3 switch=y r1=0.001 x1=0.001 r0=0.001 x0=0.001 Length=0.001 units=km enabled=false
New Line.5502511:VFI2511-3 phases=3 Bus1=143936358.1.2.3 Bus2=143936381.1.2.3 switch=y r1=0.001 x1=0.001 r0=0.001 x0=0.001 Length=0.001 units=km
New Line.5502511:VFI2511-4 phases=3 Bus1=143936357.1.2.3 Bus2=143936387.1.2.3 switch=y r1=0.001 x1=0.001 r0=0.001 x0=0.001 Length=0.001 units=km enabled=false
New Line.293588A3E4FDEE34E0637F61810A7CE3 phases=3 Bus1=42816729.1.2.3 Bus2=-77777742816729.1.2.3 switch=y r1=0.001 x1=0.001 r0=0.001 x0=0.001 Length=0.001 units=km
New Line.5708322:GS8322-1 phases=3 Bus1=236238263.1.2.3 Bus2=236238284.1.2.3 switch=y r1=0.001 x1=0.001 r0=0.001 x0=0.001 Length=0.001 units=km enabled=false
New Line.5137294:P5137294-B phases=3 Bus1=153932192.1.2.3 Bus2=153932209.1.2.3 switch=y r1=0.001 x1=0.001 r0=0.001 x0=0.001 Length=0.001 units=km enabled=false
New Line.240060037 phases=3 Bus1=240060039.1.2.3 Bus2=240060040.1.2.3 switch=y r1=0.001 x1=0.001 r0=0.001 x0=0.001 Length=0.001 units=km
New Line.42780635$GS8517-2 phases=3 Bus1=42780609.1.2.3 Bus2=42780610.1.2.3 switch=y r1=0.001 x1=0.001 r0=0.001 x0=0.001 Length=0.001 units=km
New Line.242038810 phases=3 Bus1=242038812.1.2.3 Bus2=242038813.1.2.3 switch=y r1=0.001 x1=0.001 r0=0.001 x0=0.001 Length=0.001 units=km
New Line.GS8517-3$42780651 phases=3 Bus1=42780616.1.2.3 Bus2=42780622.1.2.3 switch=y r1=0.001 x1=0.001 r0=0.001 x0=0.001 Length=0.001 units=km
New Line.239788161 phases=3 Bus1=239788163.1.2.3 Bus2=239788164.1.2.3 switch=y r1=0.001 x1=0.001 r0=0.001 x0=0.001 Length=0.001 units=km
New Line.239967191 phases=3 Bus1=239967193.1.2.3 Bus2=239967194.1.2.3 switch=y r1=0.001 x1=0.001 r0=0.001 x0=0.001 Length=0.001 units=km
New Line.PMH8665-4$PMH8665-3 phases=3 Bus1=42780816.1.2.3 Bus2=42780815.1.2.3 switch=y r1=0.001 x1=0.001 r0=0.001 x0=0.001 Length=0.001 units=km
New Line.242038837 phases=3 Bus1=242038840.1.2.3 Bus2=242038839.1.2.3 switch=y r1=0.001 x1=0.001 r0=0.001 x0=0.001 Length=0.001 units=km
New Line.239967164 phases=3 Bus1=239967167.1.2.3 Bus2=239967166.1.2.3 switch=y r1=0.001 x1=0.001 r0=0.001 x0=0.001 Length=0.001 units=km
New Line.42781006$P5138665 phases=3 Bus1=42780999.1.2.3 Bus2=42781000.1.2.3 switch=y r1=0.001 x1=0.001 r0=0.001 x0=0.001 Length=0.001 units=km
New Line.239788151 phases=3 Bus1=239788154.1.2.3 Bus2=239788153.1.2.3 switch=y r1=0.001 x1=0.001 r0=0.001 x0=0.001 Length=0.001 units=km
New Line.239391748 phases=3 Bus1=239391750.1.2.3 Bus2=239391751.1.2.3 switch=y r1=0.001 x1=0.001 r0=0.001 x0=0.001 Length=0.001 units=km
New Line.42780795$P5373948 phases=3 Bus1=42780788.1.2.3 Bus2=42780789.1.2.3 switch=y r1=0.001 x1=0.001 r0=0.001 x0=0.001 Length=0.001 units=km
New Line.239788139 phases=3 Bus1=239788141.1.2.3 Bus2=239788142.1.2.3 switch=y r1=0.001 x1=0.001 r0=0.001 x0=0.001 Length=0.001 units=km
New Line.239391780 phases=3 Bus1=239391783.1.2.3 Bus2=239391782.1.2.3 switch=y r1=0.001 x1=0.001 r0=0.001 x0=0.001 Length=0.001 units=km
New Line.CAB_4789698E:4789698E phases=3 Bus1=169406909.1.2.3 Bus2=169406891.1.2.3 switch=y r1=0.001 x1=0.001 r0=0.001 x0=0.001 Length=0.001 units=km
New Line.CAB_1872049E:1872049E phases=3 Bus1=42779301.1.2.3 Bus2=42779283.1.2.3 switch=y r1=0.001 x1=0.001 r0=0.001 x0=0.001 Length=0.001 units=km
New Line.CAB_987918E:987918E phases=3 Bus1=42777141.1.2.3 Bus2=42777123.1.2.3 switch=y r1=0.001 x1=0.001 r0=0.001 x0=0.001 Length=0.001 units=km
New Line.CAB_1920822E:1920822E phases=3 Bus1=42779435.1.2.3 Bus2=42779417.1.2.3 switch=y r1=0.001 x1=0.001 r0=0.001 x0=0.001 Length=0.001 units=km
New Line.239766593 phases=3 Bus1=239766595.1.2.3 Bus2=239766596.1.2.3 switch=y r1=0.001 x1=0.001 r0=0.001 x0=0.001 Length=0.001 units=km
New Line.241949100 phases=3 Bus1=241949102.1.2.3 Bus2=241949103.1.2.3 switch=y r1=0.001 x1=0.001 r0=0.001 x0=0.001 Length=0.001 units=km
New Line.237502674 phases=3 Bus1=237502676.1.2.3 Bus2=237502677.1.2.3 switch=y r1=0.001 x1=0.001 r0=0.001 x0=0.001 Length=0.001 units=km
New Line.240060081 phases=3 Bus1=240060083.1.2.3 Bus2=240060084.1.2.3 switch=y r1=0.001 x1=0.001 r0=0.001 x0=0.001 Length=0.001 units=km
New Line.PEA0652-3$183212185 phases=3 Bus1=183212151.1.2.3 Bus2=183212152.1.2.3 switch=y r1=0.001 x1=0.001 r0=0.001 x0=0.001 Length=0.001 units=km
New Line.5138517:GS8517-1 phases=3 Bus1=42780637.1.2.3 Bus2=42780609.1.2.3 switch=y r1=0.001 x1=0.001 r0=0.001 x0=0.001 Length=0.001 units=km
New Line.5138517:GS8517-2 phases=3 Bus1=42780610.1.2.3 Bus2=42780629.1.2.3 switch=y r1=0.001 x1=0.001 r0=0.001 x0=0.001 Length=0.001 units=km
New Line.5138517:GS8517-3 phases=3 Bus1=42780616.1.2.3 Bus2=42780645.1.2.3 switch=y r1=0.001 x1=0.001 r0=0.001 x0=0.001 Length=0.001 units=km
New Line.5138517:GS8517-4 phases=3 Bus1=42780622.1.2.3 Bus2=42780653.1.2.3 switch=y r1=0.001 x1=0.001 r0=0.001 x0=0.001 Length=0.001 units=km
New Line.5706646:PME6646-1 phases=3 Bus1=239788192.1.2.3 Bus2=239788175.1.2.3 switch=y r1=0.001 x1=0.001 r0=0.001 x0=0.001 Length=0.001 units=km
New Line.5138533:P5138533-A phases=3 Bus1=153932309.1.2.3 Bus2=153932293.1.2.3 switch=y r1=0.001 x1=0.001 r0=0.001 x0=0.001 Length=0.001 units=km
New Line.5138533:P5138533-B phases=3 Bus1=153932293.1.2.3 Bus2=153932292.1.2.3 switch=y r1=0.001 x1=0.001 r0=0.001 x0=0.001 Length=0.001 units=km
New Line.5138533:P5138533-T phases=3 Bus1=153932293.1.2.3 Bus2=153932301.1.2.3 switch=y r1=0.001 x1=0.001 r0=0.001 x0=0.001 Length=0.001 units=km
New Line.5036781:P5036781-1 phases=3 Bus1=42778604.1.2.3 Bus2=42778605.1.2.3 switch=y r1=0.001 x1=0.001 r0=0.001 x0=0.001 Length=0.001 units=km
New Line.5035746:P5035746-1 phases=3 Bus1=42778652.1.2.3 Bus2=42778653.1.2.3 switch=y r1=0.001 x1=0.001 r0=0.001 x0=0.001 Length=0.001 units=km
New Line.5036248:P5036248-1 phases=3 Bus1=42778723.1.2.3 Bus2=42778724.1.2.3 switch=y r1=0.001 x1=0.001 r0=0.001 x0=0.001 Length=0.001 units=km
New Line.5036839:P5036839-1 phases=3 Bus1=42778771.1.2.3 Bus2=42778772.1.2.3 switch=y r1=0.001 x1=0.001 r0=0.001 x0=0.001 Length=0.001 units=km
New Line.5036887:BS6887-1 phases=3 Bus1=42815977.1.2.3 Bus2=42815978.1.2.3 switch=y r1=0.001 x1=0.001 r0=0.001 x0=0.001 Length=0.001 units=km
New Line.5138534:P5138534-A phases=3 Bus1=153932408.1.2.3 Bus2=153932392.1.2.3 switch=y r1=0.001 x1=0.001 r0=0.001 x0=0.001 Length=0.001 units=km
New Line.5138534:P5138534-B phases=3 Bus1=153932392.1.2.3 Bus2=153932391.1.2.3 switch=y r1=0.001 x1=0.001 r0=0.001 x0=0.001 Length=0.001 units=km
New Line.5138534:P5138534-T phases=3 Bus1=153932392.1.2.3 Bus2=153932400.1.2.3 switch=y r1=0.001 x1=0.001 r0=0.001 x0=0.001 Length=0.001 units=km
New Line.5373701:P5373701-A phases=3 Bus1=153932489.1.2.3 Bus2=153932490.1.2.3 switch=y r1=0.001 x1=0.001 r0=0.001 x0=0.001 Length=0.001 units=km
New Line.5403770:P5403770-1 phases=3 Bus1=42778985.1.2.3 Bus2=42778986.1.2.3 switch=y r1=0.001 x1=0.001 r0=0.001 x0=0.001 Length=0.001 units=km
New Line.5310445:P5310445-1 phases=3 Bus1=42780425.1.2.3 Bus2=42780426.1.2.3 switch=y r1=0.001 x1=0.001 r0=0.001 x0=0.001 Length=0.001 units=km
New Line.5373701:P5373701-T phases=3 Bus1=153932490.1.2.3 Bus2=153932498.1.2.3 switch=y r1=0.001 x1=0.001 r0=0.001 x0=0.001 Length=0.001 units=km
New Line.5373701:P5373701-B phases=3 Bus1=153932490.1.2.3 Bus2=153932507.1.2.3 switch=y r1=0.001 x1=0.001 r0=0.001 x0=0.001 Length=0.001 units=km
New Line.5138665:PMH8665-2 phases=3 Bus1=42780842.1.2.3 Bus2=42780816.1.2.3 switch=y r1=0.001 x1=0.001 r0=0.001 x0=0.001 Length=0.001 units=km
New Line.5138665:PMH8665-1 phases=3 Bus1=42780815.1.2.3 Bus2=42780851.1.2.3 switch=y r1=0.001 x1=0.001 r0=0.001 x0=0.001 Length=0.001 units=km
New Line.5373702:P5373702-A phases=3 Bus1=153932588.1.2.3 Bus2=153932589.1.2.3 switch=y r1=0.001 x1=0.001 r0=0.001 x0=0.001 Length=0.001 units=km
New Line.5373702:P5373702-T phases=3 Bus1=153932589.1.2.3 Bus2=153932597.1.2.3 switch=y r1=0.001 x1=0.001 r0=0.001 x0=0.001 Length=0.001 units=km
New Line.5373702:P5373702-B phases=3 Bus1=153932589.1.2.3 Bus2=153932606.1.2.3 switch=y r1=0.001 x1=0.001 r0=0.001 x0=0.001 Length=0.001 units=km
New Line.5371289:P5371289-1 phases=3 Bus1=42780521.1.2.3 Bus2=42780522.1.2.3 switch=y r1=0.001 x1=0.001 r0=0.001 x0=0.001 Length=0.001 units=km
New Line.5706613:P5706613-1 phases=3 Bus1=239766558.1.2.3 Bus2=239766559.1.2.3 switch=y r1=0.001 x1=0.001 r0=0.001 x0=0.001 Length=0.001 units=km
New Line.885161E:PS2576 phases=3 Bus1=42816307.1.2.3 Bus2=42816308.1.2.3 switch=y r1=0.001 x1=0.001 r0=0.001 x0=0.001 Length=0.001 units=km
New Line.1920826E:PS4262 phases=3 Bus1=176484747.1.2.3 Bus2=176484746.1.2.3 switch=y r1=0.001 x1=0.001 r0=0.001 x0=0.001 Length=0.001 units=km
New Line.4959620E:PS5014 phases=3 Bus1=235656356.1.2.3 Bus2=235656357.1.2.3 switch=y r1=0.001 x1=0.001 r0=0.001 x0=0.001 Length=0.001 units=km
New Line.1920824E:PS4263 phases=3 Bus1=176484672.1.2.3 Bus2=176484671.1.2.3 switch=y r1=0.001 x1=0.001 r0=0.001 x0=0.001 Length=0.001 units=km
New Line.987917E:PS7917 phases=3 Bus1=236238169.1.2.3 Bus2=236238170.1.2.3 switch=y r1=0.001 x1=0.001 r0=0.001 x0=0.001 Length=0.001 units=km
New Line.4468432E:PS5136 phases=3 Bus1=283723480.1.2.3 Bus2=283723481.1.2.3 switch=y r1=0.001 x1=0.001 r0=0.001 x0=0.001 Length=0.001 units=km
New Line.4669851E:PS0232 phases=3 Bus1=42816245.1.2.3 Bus2=42816244.1.2.3 switch=y r1=0.001 x1=0.001 r0=0.001 x0=0.001 Length=0.001 units=km
New Line.5370991:P5370991-1 phases=3 Bus1=42778374.1.2.3 Bus2=42778375.1.2.3 switch=y r1=0.001 x1=0.001 r0=0.001 x0=0.001 Length=0.001 units=km
New Line.5458732:PEA0652-2 phases=3 Bus1=183212178.1.2.3 Bus2=183212151.1.2.3 switch=y r1=0.001 x1=0.001 r0=0.001 x0=0.001 Length=0.001 units=km
New Line.1920819E:RCS0309 phases=3 Bus1=42816658.1.2.3 Bus2=42816659.1.2.3 switch=y r1=0.001 x1=0.001 r0=0.001 x0=0.001 Length=0.001 units=km
New Line.5708322:GS8322-3 phases=3 Bus1=236238302.1.2.3 Bus2=236238270.1.2.3 switch=y r1=0.001 x1=0.001 r0=0.001 x0=0.001 Length=0.001 units=km
New Line.4402692E:FD02692 phases=3 Bus1=42778696.1.2.3 Bus2=42778697.1.2.3 switch=y r1=0.001 x1=0.001 r0=0.001 x0=0.001 Length=0.001 units=km
New Line.4402692E:FD02089 phases=3 Bus1=42778709.1.2.3 Bus2=42778710.1.2.3 switch=y r1=0.001 x1=0.001 r0=0.001 x0=0.001 Length=0.001 units=km
New Line.4235626E:FD59626 phases=3 Bus1=42779508.1.2.3 Bus2=42779509.1.2.3 switch=y r1=0.001 x1=0.001 r0=0.001 x0=0.001 Length=0.001 units=km
New Line.1790506E:FD59266 phases=3 Bus1=42815672.1.2.3 Bus2=42815673.1.2.3 switch=y r1=0.001 x1=0.001 r0=0.001 x0=0.001 Length=0.001 units=km
New Line.2086324E:2086324E phases=3 Bus1=42815612.1.2.3 Bus2=42815613.1.2.3 switch=y r1=0.001 x1=0.001 r0=0.001 x0=0.001 Length=0.001 units=km
New Line.4253673E:4253673E phases=3 Bus1=42779583.1.2.3 Bus2=42779582.1.2.3 switch=y r1=0.001 x1=0.001 r0=0.001 x0=0.001 Length=0.001 units=km
New Line.4260523E:4260523E phases=3 Bus1=42779612.1.2.3 Bus2=42779613.1.2.3 switch=y r1=0.001 x1=0.001 r0=0.001 x0=0.001 Length=0.001 units=km
New Line.885160E:885160E phases=3 Bus1=42779643.1.2.3 Bus2=42779642.1.2.3 switch=y r1=0.001 x1=0.001 r0=0.001 x0=0.001 Length=0.001 units=km
New Line.2242184E:FD02051 phases=3 Bus1=42778174.1.2.3 Bus2=42778175.1.2.3 switch=y r1=0.001 x1=0.001 r0=0.001 x0=0.001 Length=0.001 units=km
New Line.4959621E:FD02098 phases=3 Bus1=42778187.1.2.3 Bus2=42778188.1.2.3 switch=y r1=0.001 x1=0.001 r0=0.001 x0=0.001 Length=0.001 units=km
New Line.4854107E:FD02099 phases=3 Bus1=42778200.1.2.3 Bus2=42778201.1.2.3 switch=y r1=0.001 x1=0.001 r0=0.001 x0=0.001 Length=0.001 units=km
New Line.4141310E:PH823 phases=3 Bus1=42777151.1.2.3 Bus2=42777152.1.2.3 switch=y r1=0.001 x1=0.001 r0=0.001 x0=0.001 Length=0.001 units=km
New Line.4104136E:FD01290 phases=3 Bus1=42779521.1.2.3 Bus2=42779522.1.2.3 switch=y r1=0.001 x1=0.001 r0=0.001 x0=0.001 Length=0.001 units=km
New Line.4869185E:FD01291 phases=3 Bus1=42778213.1.2.3 Bus2=42778214.1.2.3 switch=y r1=0.001 x1=0.001 r0=0.001 x0=0.001 Length=0.001 units=km
New Line.4257622E:FD59238 phases=3 Bus1=42780354.1.2.3 Bus2=42780355.1.2.3 switch=y r1=0.001 x1=0.001 r0=0.001 x0=0.001 Length=0.001 units=km
New Line.4468432E:4468432EPH phases=3 Bus1=89998461.1.2.3 Bus2=89998462.1.2.3 switch=y r1=0.001 x1=0.001 r0=0.001 x0=0.001 Length=0.001 units=km
New Line.987917E:987917E phases=3 Bus1=236238200.1.2.3 Bus2=236238201.1.2.3 switch=y r1=0.001 x1=0.001 r0=0.001 x0=0.001 Length=0.001 units=km
New Line.1920821E:FD59060 phases=3 Bus1=42779400.1.2.3 Bus2=42779401.1.2.3 switch=y r1=0.001 x1=0.001 r0=0.001 x0=0.001 Length=0.001 units=km
New Line.1920820E:FD00112 phases=3 Bus1=42777298.1.2.3 Bus2=42777299.1.2.3 switch=y r1=0.001 x1=0.001 r0=0.001 x0=0.001 Length=0.001 units=km
New Line.4669854E:FD59057 phases=3 Bus1=42779311.1.2.3 Bus2=42779312.1.2.3 switch=y r1=0.001 x1=0.001 r0=0.001 x0=0.001 Length=0.001 units=km
New Line.5035854:P5035854-1 phases=3 Bus1=42815568.1.2.3 Bus2=42815569.1.2.3 switch=y r1=0.001 x1=0.001 r0=0.001 x0=0.001 Length=0.001 units=km
New Line.5138390:P5138390-1 phases=3 Bus1=42778230.1.2.3 Bus2=42778231.1.2.3 switch=y r1=0.001 x1=0.001 r0=0.001 x0=0.001 Length=0.001 units=km
New Line.5036142:P5036142-1 phases=3 Bus1=42778326.1.2.3 Bus2=42778327.1.2.3 switch=y r1=0.001 x1=0.001 r0=0.001 x0=0.001 Length=0.001 units=km
New Line.5310412:P5310412-1 phases=3 Bus1=42778422.1.2.3 Bus2=42778423.1.2.3 switch=y r1=0.001 x1=0.001 r0=0.001 x0=0.001 Length=0.001 units=km
New Line.5137099:P5137099-1 phases=3 Bus1=135965293.1.2.3 Bus2=135965294.1.2.3 switch=y r1=0.001 x1=0.001 r0=0.001 x0=0.001 Length=0.001 units=km
New Line.5509114:P5509114-1 phases=3 Bus1=42780377.1.2.3 Bus2=42780378.1.2.3 switch=y r1=0.001 x1=0.001 r0=0.001 x0=0.001 Length=0.001 units=km
New Line.1872049E:42779281 phases=3 Bus1=42779283.1.2.3 Bus2=42779284.1.2.3 switch=y r1=0.001 x1=0.001 r0=0.001 x0=0.001 Length=0.001 units=km
New Line.987918E:42777121 phases=3 Bus1=42777123.1.2.3 Bus2=42777124.1.2.3 switch=y r1=0.001 x1=0.001 r0=0.001 x0=0.001 Length=0.001 units=km
New Line.1920822E:42779415 phases=3 Bus1=42779417.1.2.3 Bus2=42779418.1.2.3 switch=y r1=0.001 x1=0.001 r0=0.001 x0=0.001 Length=0.001 units=km
New Line.4789698E:169406889 phases=3 Bus1=169406891.1.2.3 Bus2=169406892.1.2.3 switch=y r1=0.001 x1=0.001 r0=0.001 x0=0.001 Length=0.001 units=km
New Line.GS8517-2$GS8517-3 phases=3 Bus1=42780610.1.2.3 Bus2=42780616.1.2.3 switch=y r1=0.001 x1=0.001 r0=0.001 x0=0.001 Length=0.001 units=km
New Line.PME6646-2$PME6646-1 phases=3 Bus1=239788175.1.2.3 Bus2=239788174.1.2.3 switch=y r1=0.001 x1=0.001 r0=0.001 x0=0.001 Length=0.001 units=km
New Line.2265346E:RCS0231 phases=3 Bus1=14096991.1.2.3 Bus2=42816689.1.2.3 switch=y r1=0.001 x1=0.001 r0=0.001 x0=0.001 Length=0.001 units=km enabled=false
New Line.5318665:FC3948-1 phases=3 Bus1=42815629.1.2.3 Bus2=42815630.1.2.3 switch=y r1=0.001 x1=0.001 r0=0.001 x0=0.001 Length=0.001 units=km
New Line.5706646:PME6646-2 phases=3 Bus1=239788174.1.2.3 Bus2=239788183.1.2.3 switch=y r1=0.001 x1=0.001 r0=0.001 x0=0.001 Length=0.001 units=km
New Line.5138665:PMH8665-3 phases=3 Bus1=42780816.1.2.3 Bus2=42780824.1.2.3 switch=y r1=0.001 x1=0.001 r0=0.001 x0=0.001 Length=0.001 units=km

! Loads
New Load.5137230_0 Bus1=-99999942779239.1.0 phases=1 kV=0.069282 kW=0 kvar=0 model=1
New Load.5137230_1 Bus1=-99999942779239.2.0 phases=1 kV=0.069282 kW=0 kvar=0 model=1
New Load.5137230_2 Bus1=-99999942779239.3.0 phases=1 kV=0.069282 kW=0 kvar=0 model=1
New Load.5472898_0 Bus1=-99999942779784.1.0 phases=1 kV=0.069282 kW=0 kvar=0 model=1
New Load.5472898_1 Bus1=-99999942779784.2.0 phases=1 kV=0.069282 kW=0 kvar=0 model=1
New Load.5472898_2 Bus1=-99999942779784.3.0 phases=1 kV=0.069282 kW=0 kvar=0 model=1
New Load.5502511 Bus1=-99999942816754.3.0 phases=1 kV=0.069282 kW=0 kvar=0 model=1
New Load.5509114_0 Bus1=-99999942780378.1.0 phases=1 kV=0.069282 kW=0 kvar=0 model=1
New Load.5509114_1 Bus1=-99999942780378.2.0 phases=1 kV=0.069282 kW=0 kvar=0 model=1
New Load.5509114_2 Bus1=-99999942780378.3.0 phases=1 kV=0.069282 kW=0 kvar=0 model=1
New Load.5138534_0 Bus1=-999999153932400.1.0 phases=1 kV=0.069282 kW=0 kvar=0 model=1
New Load.5138534_1 Bus1=-999999153932400.2.0 phases=1 kV=0.069282 kW=0 kvar=0 model=1
New Load.5138534_2 Bus1=-999999153932400.3.0 phases=1 kV=0.069282 kW=0 kvar=0 model=1
New Load.5373948_0 Bus1=-99999942780789.1.0 phases=1 kV=0.159926 kW=0 kvar=0 model=1
New Load.5373948_1 Bus1=-99999942780789.2.0 phases=1 kV=0.159926 kW=0 kvar=0 model=1
New Load.5373948_2 Bus1=-99999942780789.3.0 phases=1 kV=0.159926 kW=0 kvar=0 model=1
New Load.5417877_0 Bus1=-99999942779539.1.0 phases=1 kV=0.069282 kW=0 kvar=0 model=1
New Load.5417877_1 Bus1=-99999942779539.2.0 phases=1 kV=0.069282 kW=0 kvar=0 model=1
New Load.5417877_2 Bus1=-99999942779539.3.0 phases=1 kV=0.069282 kW=0 kvar=0 model=1
New Load.5137294_0 Bus1=-999999153932200.1.0 phases=1 kV=0.159926 kW=0 kvar=0 model=1
New Load.5137294_1 Bus1=-999999153932200.2.0 phases=1 kV=0.159926 kW=0 kvar=0 model=1
New Load.5137294_2 Bus1=-999999153932200.3.0 phases=1 kV=0.159926 kW=0 kvar=0 model=1
New Load.5036887_0 Bus1=-99999942815942.1.2 phases=1 kV=1.38564 kW=0 kvar=0 model=1
New Load.5036887_1 Bus1=-99999942815942.2.3 phases=1 kV=1.38564 kW=0 kvar=0 model=1
New Load.5036887_2 Bus1=-99999942815942.3.1 phases=1 kV=1.38564 kW=0 kvar=0 model=1
New Load.5498496_0 Bus1=-99999942779047.1.0 phases=1 kV=0.159926 kW=0 kvar=0 model=1
New Load.5498496_1 Bus1=-99999942779047.2.0 phases=1 kV=0.159926 kW=0 kvar=0 model=1
New Load.5498496_2 Bus1=-99999942779047.3.0 phases=1 kV=0.159926 kW=0 kvar=0 model=1
New Load.5334371_0 Bus1=-99999942780474.1.0 phases=1 kV=0.159926 kW=0 kvar=0 model=1
New Load.5334371_1 Bus1=-99999942780474.2.0 phases=1 kV=0.159926 kW=0 kvar=0 model=1
New Load.5334371_2 Bus1=-99999942780474.3.0 phases=1 kV=0.159926 kW=0 kvar=0 model=1
New Load.987918E_0 Bus1=-99999942777124.1.0 phases=1 kV=0.069282 kW=0 kvar=0 model=1
New Load.987918E_1 Bus1=-99999942777124.2.0 phases=1 kV=0.069282 kW=0 kvar=0 model=1
New Load.5036887_0_2 Bus1=-99999942815903.1.2 phases=1 kV=1.38564 kW=0 kvar=0 model=1
New Load.5036887_1_2 Bus1=-99999942815903.2.3 phases=1 kV=1.38564 kW=0 kvar=0 model=1
New Load.5036887_2_2 Bus1=-99999942815903.3.1 phases=1 kV=1.38564 kW=0 kvar=0 model=1
New Load.5349143_0 Bus1=-99999942777377.1.0 phases=1 kV=0.069282 kW=0 kvar=0 model=1
New Load.5349143_1 Bus1=-99999942777377.2.0 phases=1 kV=0.069282 kW=0 kvar=0 model=1
New Load.5349143_2 Bus1=-99999942777377.3.0 phases=1 kV=0.069282 kW=0 kvar=0 model=1
New Load.5498445 Bus1=-99999942780311.3.0 phases=1 kV=0.069282 kW=0 kvar=0 model=1
New Load.5525705_0 Bus1=-99999942779108.1.0 phases=1 kV=0.069282 kW=0 kvar=0 model=1
New Load.5525705_1 Bus1=-99999942779108.2.0 phases=1 kV=0.069282 kW=0 kvar=0 model=1
New Load.5525705_2 Bus1=-99999942779108.3.0 phases=1 kV=0.069282 kW=0 kvar=0 model=1
New Load.5373701_0 Bus1=-999999153932498.1.0 phases=1 kV=0.159926 kW=0 kvar=0 model=1
New Load.5373701_1 Bus1=-999999153932498.2.0 phases=1 kV=0.159926 kW=0 kvar=0 model=1
New Load.5373701_2 Bus1=-999999153932498.3.0 phases=1 kV=0.159926 kW=0 kvar=0 model=1
New Load.5035746_0 Bus1=-99999942778653.1.0 phases=1 kV=0.159926 kW=0 kvar=0 model=1
New Load.5035746_1 Bus1=-99999942778653.2.0 phases=1 kV=0.159926 kW=0 kvar=0 model=1
New Load.5035746_2 Bus1=-99999942778653.3.0 phases=1 kV=0.159926 kW=0 kvar=0 model=1
New Load.5036248_0 Bus1=-99999942778724.1.0 phases=1 kV=0.159926 kW=0 kvar=0 model=1
New Load.5036248_1 Bus1=-99999942778724.2.0 phases=1 kV=0.159926 kW=0 kvar=0 model=1
New Load.5036248_2 Bus1=-99999942778724.3.0 phases=1 kV=0.159926 kW=0 kvar=0 model=1
New Load.5036839_0 Bus1=-99999942778772.1.0 phases=1 kV=0.069282 kW=0 kvar=0 model=1
New Load.5036839_1 Bus1=-99999942778772.2.0 phases=1 kV=0.069282 kW=0 kvar=0 model=1
New Load.5036839_2 Bus1=-99999942778772.3.0 phases=1 kV=0.069282 kW=0 kvar=0 model=1
New Load.5036781_0 Bus1=-99999942778605.1.0 phases=1 kV=0.159926 kW=0 kvar=0 model=1
New Load.5036781_1 Bus1=-99999942778605.2.0 phases=1 kV=0.159926 kW=0 kvar=0 model=1
New Load.5036781_2 Bus1=-99999942778605.3.0 phases=1 kV=0.159926 kW=0 kvar=0 model=1
New Load.5706613_0 Bus1=-999999239766559.1.0 phases=1 kV=0.159926 kW=0 kvar=0 model=1
New Load.5706613_1 Bus1=-999999239766559.2.0 phases=1 kV=0.159926 kW=0 kvar=0 model=1
New Load.5706613_2 Bus1=-999999239766559.3.0 phases=1 kV=0.159926 kW=0 kvar=0 model=1
New Load.5403770_0 Bus1=-99999942778986.1.0 phases=1 kV=0.159926 kW=0 kvar=0 model=1
New Load.5403770_1 Bus1=-99999942778986.2.0 phases=1 kV=0.159926 kW=0 kvar=0 model=1
New Load.5403770_2 Bus1=-99999942778986.3.0 phases=1 kV=0.159926 kW=0 kvar=0 model=1
New Load.5310445_0 Bus1=-99999942780426.1.0 phases=1 kV=0.159926 kW=0 kvar=0 model=1
New Load.5310445_1 Bus1=-99999942780426.2.0 phases=1 kV=0.159926 kW=0 kvar=0 model=1
New Load.5310445_2 Bus1=-99999942780426.3.0 phases=1 kV=0.159926 kW=0 kvar=0 model=1
New Load.5370991_0 Bus1=-99999942778375.1.0 phases=1 kV=0.159926 kW=0 kvar=0 model=1
New Load.5370991_1 Bus1=-99999942778375.2.0 phases=1 kV=0.159926 kW=0 kvar=0 model=1
New Load.5370991_2 Bus1=-99999942778375.3.0 phases=1 kV=0.159926 kW=0 kvar=0 model=1
New Load.5035854_0 Bus1=-99999942815569.1.0 phases=1 kV=0.159926 kW=0 kvar=0 model=1
New Load.5035854_1 Bus1=-99999942815569.2.0 phases=1 kV=0.159926 kW=0 kvar=0 model=1
New Load.5035854_2 Bus1=-99999942815569.3.0 phases=1 kV=0.159926 kW=0 kvar=0 model=1
New Load.1872049E_0 Bus1=-99999942779284.1.0 phases=1 kV=0.069282 kW=0 kvar=0 model=1
New Load.1872049E_1 Bus1=-99999942779284.2.0 phases=1 kV=0.069282 kW=0 kvar=0 model=1
New Load.5035959_0 Bus1=-999999237502661.1.0 phases=1 kV=0.069282 kW=0 kvar=0 model=1
New Load.5035959_1 Bus1=-999999237502661.2.0 phases=1 kV=0.069282 kW=0 kvar=0 model=1
New Load.5035959_2 Bus1=-999999237502661.3.0 phases=1 kV=0.069282 kW=0 kvar=0 model=1
New Load.1920822E_0 Bus1=-99999942779418.1.0 phases=1 kV=0.069282 kW=0 kvar=0 model=1
New Load.1920822E_1 Bus1=-99999942779418.2.0 phases=1 kV=0.069282 kW=0 kvar=0 model=1
New Load.5036142_0 Bus1=-99999942778327.1.2 phases=1 kV=0.069282 kW=0 kvar=0 model=1
New Load.5036142_1 Bus1=-99999942778327.2.3 phases=1 kV=0.069282 kW=0 kvar=0 model=1
New Load.5036142_2 Bus1=-99999942778327.3.1 phases=1 kV=0.069282 kW=0 kvar=0 model=1
New Load.5037163_0 Bus1=-99999942778557.1.0 phases=1 kV=0.069282 kW=0 kvar=0 model=1
New Load.5037163_1 Bus1=-99999942778557.2.0 phases=1 kV=0.069282 kW=0 kvar=0 model=1
New Load.5037163_2 Bus1=-99999942778557.3.0 phases=1 kV=0.069282 kW=0 kvar=0 model=1
New Load.5310412_0 Bus1=-99999942778423.1.0 phases=1 kV=0.159926 kW=0 kvar=0 model=1
New Load.5310412_1 Bus1=-99999942778423.2.0 phases=1 kV=0.159926 kW=0 kvar=0 model=1
New Load.5310412_2 Bus1=-99999942778423.3.0 phases=1 kV=0.159926 kW=0 kvar=0 model=1
New Load.5137099_0 Bus1=-999999135965294.1.0 phases=1 kV=0.159926 kW=0 kvar=0 model=1
New Load.5137099_1 Bus1=-999999135965294.2.0 phases=1 kV=0.159926 kW=0 kvar=0 model=1
New Load.5137099_2 Bus1=-999999135965294.3.0 phases=1 kV=0.159926 kW=0 kvar=0 model=1
New Load.4789698E_0 Bus1=-999999169406892.1.2 phases=1 kV=0.069282 kW=0 kvar=0 model=1
New Load.4789698E_1 Bus1=-999999169406892.2.3 phases=1 kV=0.069282 kW=0 kvar=0 model=1
New Load.4789698E_2 Bus1=-999999169406892.3.1 phases=1 kV=0.069282 kW=0 kvar=0 model=1
New Load.5137300_0 Bus1=-99999942777255.1.0 phases=1 kV=0.069282 kW=0 kvar=0 model=1
New Load.5137300_1 Bus1=-99999942777255.2.0 phases=1 kV=0.069282 kW=0 kvar=0 model=1
New Load.5137300_2 Bus1=-99999942777255.3.0 phases=1 kV=0.069282 kW=0 kvar=0 model=1
New Load.5036256_0 Bus1=-99999942777316.1.0 phases=1 kV=0.159926 kW=0 kvar=0 model=1
New Load.5036256_1 Bus1=-99999942777316.2.0 phases=1 kV=0.159926 kW=0 kvar=0 model=1
New Load.5036256_2 Bus1=-99999942777316.3.0 phases=1 kV=0.159926 kW=0 kvar=0 model=1
New Load.5138615_0 Bus1=-99999942780263.1.0 phases=1 kV=0.159926 kW=0 kvar=0 model=1
New Load.5138615_1 Bus1=-99999942780263.2.0 phases=1 kV=0.159926 kW=0 kvar=0 model=1
New Load.5138615_2 Bus1=-99999942780263.3.0 phases=1 kV=0.159926 kW=0 kvar=0 model=1
New Load.5138665_0 Bus1=-99999942781000.1.0 phases=1 kV=0.159926 kW=0 kvar=0 model=1
New Load.5138665_1 Bus1=-99999942781000.2.0 phases=1 kV=0.159926 kW=0 kvar=0 model=1
New Load.5138665_2 Bus1=-99999942781000.3.0 phases=1 kV=0.159926 kW=0 kvar=0 model=1
New Load.5138390_0 Bus1=-99999942778231.1.0 phases=1 kV=0.159926 kW=0 kvar=0 model=1
New Load.5138390_1 Bus1=-99999942778231.2.0 phases=1 kV=0.159926 kW=0 kvar=0 model=1
New Load.5138390_2 Bus1=-99999942778231.3.0 phases=1 kV=0.159926 kW=0 kvar=0 model=1
New Load.5138533_0 Bus1=-999999153932301.1.0 phases=1 kV=0.159926 kW=0 kvar=0 model=1
New Load.5138533_1 Bus1=-999999153932301.2.0 phases=1 kV=0.159926 kW=0 kvar=0 model=1
New Load.5138533_2 Bus1=-999999153932301.3.0 phases=1 kV=0.159926 kW=0 kvar=0 model=1
New Load.5371289_0 Bus1=-99999942780522.1.0 phases=1 kV=0.159926 kW=0 kvar=0 model=1
New Load.5371289_1 Bus1=-99999942780522.2.0 phases=1 kV=0.159926 kW=0 kvar=0 model=1
New Load.5371289_2 Bus1=-99999942780522.3.0 phases=1 kV=0.159926 kW=0 kvar=0 model=1
New Load.5373702_0 Bus1=-999999153932597.1.0 phases=1 kV=0.159926 kW=0 kvar=0 model=1
New Load.5373702_1 Bus1=-999999153932597.2.0 phases=1 kV=0.159926 kW=0 kvar=0 model=1
New Load.5373702_2 Bus1=-999999153932597.3.0 phases=1 kV=0.159926 kW=0 kvar=0 model=1

! Generators
New Generator.NST-501523_PHOTOVOLTAIC_0 Bus1=-999999153932498.1.0 phases=1 kV=0.159926 kW=0 kvar=0 model=7
New Generator.NST-501523_PHOTOVOLTAIC_1 Bus1=-999999153932498.2.0 phases=1 kV=0.159926 kW=0 kvar=0 model=7
New Generator.NST-501523_PHOTOVOLTAIC_2 Bus1=-999999153932498.3.0 phases=1 kV=0.159926 kW=0 kvar=0 model=7
New Generator.SCE-38067_PHOTOVOLTAIC_0 Bus1=-99999942779539.1.0 phases=1 kV=0.069282 kW=0 kvar=0 model=7
New Generator.SCE-38067_PHOTOVOLTAIC_1 Bus1=-99999942779539.2.0 phases=1 kV=0.069282 kW=0 kvar=0 model=7
New Generator.SCE-38067_PHOTOVOLTAIC_2 Bus1=-99999942779539.3.0 phases=1 kV=0.069282 kW=0 kvar=0 model=7
New Generator.NST-47493_PHOTOVOLTAIC_0 Bus1=-99999942778653.1.0 phases=1 kV=0.159926 kW=0 kvar=0 model=7
New Generator.NST-47493_PHOTOVOLTAIC_1 Bus1=-99999942778653.2.0 phases=1 kV=0.159926 kW=0 kvar=0 model=7
New Generator.NST-47493_PHOTOVOLTAIC_2 Bus1=-99999942778653.3.0 phases=1 kV=0.159926 kW=0 kvar=0 model=7

! Transformers
New Transformer.293588B210B8EE34E0637F61810A7CE3_0_0 phases=1 windings=2 xhl=0.5 %R=0.353554 %imag=1e-06 %noloadloss=0
~ wdg=1 bus=42781000.1.2 kV=16 kVA=833.333 conn=delta
~ wdg=2 bus=-99999942781000.1.0 kV=0.159926 kVA=833.333 conn=wye
New Transformer.293588B210B8EE34E0637F61810A7CE3_0_1 phases=1 windings=2 xhl=0.5 %R=0.353554 %imag=1e-06 %noloadloss=0
~ wdg=1 bus=42781000.2.3 kV=16 kVA=833.333 conn=delta
~ wdg=2 bus=-99999942781000.2.0 kV=0.159926 kVA=833.333 conn=wye
New Transformer.293588B210B8EE34E0637F61810A7CE3_0_2 phases=1 windings=2 xhl=0.5 %R=0.353554 %imag=1e-06 %noloadloss=0
~ wdg=1 bus=42781000.3.1 kV=16 kVA=833.333 conn=delta
~ wdg=2 bus=-99999942781000.3.0 kV=0.159926 kVA=833.333 conn=wye
New Transformer.293588B210B7EE34E0637F61810A7CE3_1_0 phases=1 windings=2 xhl=0.5 %R=0.353554 %imag=1e-06 %noloadloss=0
~ wdg=1 bus=42780789.1.2 kV=16 kVA=500 conn=delta
~ wdg=2 bus=-99999942780789.1.0 kV=0.159926 kVA=500 conn=wye
New Transformer.293588B210B7EE34E0637F61810A7CE3_1_1 phases=1 windings=2 xhl=0.5 %R=0.353554 %imag=1e-06 %noloadloss=0
~ wdg=1 bus=42780789.2.3 kV=16 kVA=500 conn=delta
~ wdg=2 bus=-99999942780789.2.0 kV=0.159926 kVA=500 conn=wye
New Transformer.293588B210B7EE34E0637F61810A7CE3_1_2 phases=1 windings=2 xhl=0.5 %R=0.353554 %imag=1e-06 %noloadloss=0
~ wdg=1 bus=42780789.3.1 kV=16 kVA=500 conn=delta
~ wdg=2 bus=-99999942780789.3.0 kV=0.159926 kVA=500 conn=wye
New Transformer.293588B210B6EE34E0637F61810A7CE3_2_0 phases=1 windings=2 xhl=0.5 %R=0.353554 %imag=1e-06 %noloadloss=0
~ wdg=1 bus=42780522.1.2 kV=16 kVA=833.333 conn=delta
~ wdg=2 bus=-99999942780522.1.0 kV=0.159926 kVA=833.333 conn=wye
New Transformer.293588B210B6EE34E0637F61810A7CE3_2_1 phases=1 windings=2 xhl=0.5 %R=0.353554 %imag=1e-06 %noloadloss=0
~ wdg=1 bus=42780522.2.3 kV=16 kVA=833.333 conn=delta
~ wdg=2 bus=-99999942780522.2.0 kV=0.159926 kVA=833.333 conn=wye
New Transformer.293588B210B6EE34E0637F61810A7CE3_2_2 phases=1 windings=2 xhl=0.5 %R=0.353554 %imag=1e-06 %noloadloss=0
~ wdg=1 bus=42780522.3.1 kV=16 kVA=833.333 conn=delta
~ wdg=2 bus=-99999942780522.3.0 kV=0.159926 kVA=833.333 conn=wye
New Transformer.293588B42CEEEE34E0637F61810A7CE3_3_0 phases=1 windings=2 xhl=0.5 %R=0.353554 %imag=1e-06 %noloadloss=0
~ wdg=1 bus=153932597.1.2 kV=16 kVA=100 conn=delta
~ wdg=2 bus=-999999153932597.1.0 kV=0.159926 kVA=100 conn=wye
New Transformer.293588B42CEEEE34E0637F61810A7CE3_3_1 phases=1 windings=2 xhl=0.5 %R=0.353554 %imag=1e-06 %noloadloss=0
~ wdg=1 bus=153932597.2.3 kV=16 kVA=100 conn=delta
~ wdg=2 bus=-999999153932597.2.0 kV=0.159926 kVA=100 conn=wye
New Transformer.293588B42CEEEE34E0637F61810A7CE3_3_2 phases=1 windings=2 xhl=0.5 %R=0.353554 %imag=1e-06 %noloadloss=0
~ wdg=1 bus=153932597.3.1 kV=16 kVA=100 conn=delta
~ wdg=2 bus=-999999153932597.3.0 kV=0.159926 kVA=100 conn=wye
New Transformer.293588B2104EEE34E0637F61810A7CE3_4_0 phases=1 windings=2 xhl=0.5 %R=0.353554 %imag=1e-06 %noloadloss=0
~ wdg=1 bus=42815569.1.2 kV=16 kVA=166.667 conn=delta
~ wdg=2 bus=-99999942815569.1.0 kV=0.159926 kVA=166.667 conn=wye
New Transformer.293588B2104EEE34E0637F61810A7CE3_4_1 phases=1 windings=2 xhl=0.5 %R=0.353554 %imag=1e-06 %noloadloss=0
~ wdg=1 bus=42815569.2.3 kV=16 kVA=166.667 conn=delta
~ wdg=2 bus=-99999942815569.2.0 kV=0.159926 kVA=166.667 conn=wye
New Transformer.293588B2104EEE34E0637F61810A7CE3_4_2 phases=1 windings=2 xhl=0.5 %R=0.353554 %imag=1e-06 %noloadloss=0
~ wdg=1 bus=42815569.3.1 kV=16 kVA=166.667 conn=delta
~ wdg=2 bus=-99999942815569.3.0 kV=0.159926 kVA=166.667 conn=wye
New Transformer.293588A7F2C5EE34E0637F61810A7CE3_5_0 phases=1 windings=2 xhl=0.5 %R=0.353554 %imag=1e-06 %noloadloss=0
~ wdg=1 bus=42779284.1.0 kV=9.2376 kVA=50 conn=wye
~ wdg=2 bus=-99999942779284.1.0 kV=0.069282 kVA=50 conn=wye
New Transformer.293588A7F2C5EE34E0637F61810A7CE3_5_1 phases=1 windings=2 xhl=0.5 %R=0.353554 %imag=1e-06 %noloadloss=0
~ wdg=1 bus=42779284.2.0 kV=9.2376 kVA=50 conn=wye
~ wdg=2 bus=-99999942779284.2.0 kV=0.069282 kVA=50 conn=wye
New Transformer.293588A7F2C4EE34E0637F61810A7CE3_6_0 phases=1 windings=2 xhl=0.5 %R=0.353554 %imag=1e-06 %noloadloss=0
~ wdg=1 bus=42777124.1.0 kV=9.2376 kVA=12.5 conn=wye
~ wdg=2 bus=-99999942777124.1.0 kV=0.069282 kVA=12.5 conn=wye
New Transformer.293588A7F2C4EE34E0637F61810A7CE3_6_1 phases=1 windings=2 xhl=0.5 %R=0.353554 %imag=1e-06 %noloadloss=0
~ wdg=1 bus=42777124.2.0 kV=9.2376 kVA=12.5 conn=wye
~ wdg=2 bus=-99999942777124.2.0 kV=0.069282 kVA=12.5 conn=wye
New Transformer.293588B21075EE34E0637F61810A7CE3_7_0 phases=1 windings=2 xhl=0.5 %R=0.353554 %imag=1e-06 %noloadloss=0
~ wdg=1 bus=42778231.1.2 kV=16 kVA=250 conn=delta
~ wdg=2 bus=-99999942778231.1.0 kV=0.159926 kVA=250 conn=wye
New Transformer.293588B21075EE34E0637F61810A7CE3_7_1 phases=1 windings=2 xhl=0.5 %R=0.353554 %imag=1e-06 %noloadloss=0
~ wdg=1 bus=42778231.2.3 kV=16 kVA=250 conn=delta
~ wdg=2 bus=-99999942778231.2.0 kV=0.159926 kVA=250 conn=wye
New Transformer.293588B21075EE34E0637F61810A7CE3_7_2 phases=1 windings=2 xhl=0.5 %R=0.353554 %imag=1e-06 %noloadloss=0
~ wdg=1 bus=42778231.3.1 kV=16 kVA=250 conn=delta
~ wdg=2 bus=-99999942778231.3.0 kV=0.159926 kVA=250 conn=wye
New Transformer.293588B4DA2BEE34E0637F61810A7CE3_8_0 phases=1 windings=2 xhl=0.5 %R=0.353554 %imag=1e-06 %noloadloss=0
~ wdg=1 bus=237502661.1.2 kV=16 kVA=50 conn=delta
~ wdg=2 bus=-999999237502661.1.0 kV=0.069282 kVA=50 conn=wye
New Transformer.293588B4DA2BEE34E0637F61810A7CE3_8_1 phases=1 windings=2 xhl=0.5 %R=0.353554 %imag=1e-06 %noloadloss=0
~ wdg=1 bus=237502661.2.3 kV=16 kVA=50 conn=delta
~ wdg=2 bus=-999999237502661.2.0 kV=0.069282 kVA=50 conn=wye
New Transformer.293588B4DA2BEE34E0637F61810A7CE3_8_2 phases=1 windings=2 xhl=0.5 %R=0.353554 %imag=1e-06 %noloadloss=0
~ wdg=1 bus=237502661.3.1 kV=16 kVA=50 conn=delta
~ wdg=2 bus=-999999237502661.3.0 kV=0.069282 kVA=50 conn=wye
New Transformer.293588A7F3A0EE34E0637F61810A7CE3_9_0 phases=1 windings=2 xhl=0.5 %R=0.353554 %imag=1e-06 %noloadloss=0
~ wdg=1 bus=42779418.1.0 kV=9.2376 kVA=12.5 conn=wye
~ wdg=2 bus=-99999942779418.1.0 kV=0.069282 kVA=12.5 conn=wye
New Transformer.293588A7F3A0EE34E0637F61810A7CE3_9_1 phases=1 windings=2 xhl=0.5 %R=0.353554 %imag=1e-06 %noloadloss=0
~ wdg=1 bus=42779418.2.0 kV=9.2376 kVA=12.5 conn=wye
~ wdg=2 bus=-99999942779418.2.0 kV=0.069282 kVA=12.5 conn=wye
New Transformer.293588B21076EE34E0637F61810A7CE3_10_0 phases=1 windings=2 xhl=0.5 %R=0.353554 %imag=1e-06 %noloadloss=0
~ wdg=1 bus=42778327.1.2 kV=16 kVA=100 conn=delta
~ wdg=2 bus=-99999942778327.1.2 kV=0.069282 kVA=100 conn=delta
New Transformer.293588B21076EE34E0637F61810A7CE3_10_1 phases=1 windings=2 xhl=0.5 %R=0.353554 %imag=1e-06 %noloadloss=0
~ wdg=1 bus=42778327.2.3 kV=16 kVA=100 conn=delta
~ wdg=2 bus=-99999942778327.2.3 kV=0.069282 kVA=100 conn=delta
New Transformer.293588B21076EE34E0637F61810A7CE3_10_2 phases=1 windings=2 xhl=0.5 %R=0.353554 %imag=1e-06 %noloadloss=0
~ wdg=1 bus=42778327.3.1 kV=16 kVA=100 conn=delta
~ wdg=2 bus=-99999942778327.3.1 kV=0.069282 kVA=100 conn=delta
New Transformer.293588B21078EE34E0637F61810A7CE3_11_0 phases=1 windings=2 xhl=0.5 %R=0.353554 %imag=1e-06 %noloadloss=0
~ wdg=1 bus=42778423.1.2 kV=16 kVA=50 conn=delta
~ wdg=2 bus=-99999942778423.1.0 kV=0.159926 kVA=50 conn=wye
New Transformer.293588B21078EE34E0637F61810A7CE3_11_1 phases=1 windings=2 xhl=0.5 %R=0.353554 %imag=1e-06 %noloadloss=0
~ wdg=1 bus=42778423.2.3 kV=16 kVA=50 conn=delta
~ wdg=2 bus=-99999942778423.2.0 kV=0.159926 kVA=50 conn=wye
New Transformer.293588B21078EE34E0637F61810A7CE3_11_2 phases=1 windings=2 xhl=0.5 %R=0.353554 %imag=1e-06 %noloadloss=0
~ wdg=1 bus=42778423.3.1 kV=16 kVA=50 conn=delta
~ wdg=2 bus=-99999942778423.3.0 kV=0.159926 kVA=50 conn=wye
New Transformer.293588B42C10EE34E0637F61810A7CE3_12_0 phases=1 windings=2 xhl=0.5 %R=0.353554 %imag=1e-06 %noloadloss=0
~ wdg=1 bus=153932200.1.2 kV=16 kVA=50 conn=delta
~ wdg=2 bus=-999999153932200.1.0 kV=0.159926 kVA=50 conn=wye
New Transformer.293588B42C10EE34E0637F61810A7CE3_12_1 phases=1 windings=2 xhl=0.5 %R=0.353554 %imag=1e-06 %noloadloss=0
~ wdg=1 bus=153932200.2.3 kV=16 kVA=50 conn=delta
~ wdg=2 bus=-999999153932200.2.0 kV=0.159926 kVA=50 conn=wye
New Transformer.293588B42C10EE34E0637F61810A7CE3_12_2 phases=1 windings=2 xhl=0.5 %R=0.353554 %imag=1e-06 %noloadloss=0
~ wdg=1 bus=153932200.3.1 kV=16 kVA=50 conn=delta
~ wdg=2 bus=-999999153932200.3.0 kV=0.159926 kVA=50 conn=wye
New Transformer.293588B21050EE34E0637F61810A7CE3_13_0 phases=1 windings=2 xhl=0.5 %R=0.353554 %imag=1e-06 %noloadloss=0
~ wdg=1 bus=42815942.1.2 kV=16 kVA=1250 conn=delta
~ wdg=2 bus=-99999942815942.1.2 kV=1.38564 kVA=1250 conn=delta
New Transformer.293588B21050EE34E0637F61810A7CE3_13_1 phases=1 windings=2 xhl=0.5 %R=0.353554 %imag=1e-06 %noloadloss=0
~ wdg=1 bus=42815942.2.3 kV=16 kVA=1250 conn=delta
~ wdg=2 bus=-99999942815942.2.3 kV=1.38564 kVA=1250 conn=delta
New Transformer.293588B21050EE34E0637F61810A7CE3_13_2 phases=1 windings=2 xhl=0.5 %R=0.353554 %imag=1e-06 %noloadloss=0
~ wdg=1 bus=42815942.3.1 kV=16 kVA=1250 conn=delta
~ wdg=2 bus=-99999942815942.3.1 kV=1.38564 kVA=1250 conn=delta
New Transformer.293588B2107FEE34E0637F61810A7CE3_14_0 phases=1 windings=2 xhl=0.5 %R=0.353554 %imag=1e-06 %noloadloss=0
~ wdg=1 bus=42779047.1.2 kV=16 kVA=333.333 conn=delta
~ wdg=2 bus=-99999942779047.1.0 kV=0.159926 kVA=333.333 conn=wye
New Transformer.293588B2107FEE34E0637F61810A7CE3_14_1 phases=1 windings=2 xhl=0.5 %R=0.353554 %imag=1e-06 %noloadloss=0
~ wdg=1 bus=42779047.2.3 kV=16 kVA=333.333 conn=delta
~ wdg=2 bus=-99999942779047.2.0 kV=0.159926 kVA=333.333 conn=wye
New Transformer.293588B2107FEE34E0637F61810A7CE3_14_2 phases=1 windings=2 xhl=0.5 %R=0.353554 %imag=1e-06 %noloadloss=0
~ wdg=1 bus=42779047.3.1 kV=16 kVA=333.333 conn=delta
~ wdg=2 bus=-99999942779047.3.0 kV=0.159926 kVA=333.333 conn=wye
New Transformer.293588B210B5EE34E0637F61810A7CE3_15_0 phases=1 windings=2 xhl=0.5 %R=0.353554 %imag=1e-06 %noloadloss=0
~ wdg=1 bus=42780474.1.2 kV=16 kVA=166.667 conn=delta
~ wdg=2 bus=-99999942780474.1.0 kV=0.159926 kVA=166.667 conn=wye
New Transformer.293588B210B5EE34E0637F61810A7CE3_15_1 phases=1 windings=2 xhl=0.5 %R=0.353554 %imag=1e-06 %noloadloss=0
~ wdg=1 bus=42780474.2.3 kV=16 kVA=166.667 conn=delta
~ wdg=2 bus=-99999942780474.2.0 kV=0.159926 kVA=166.667 conn=wye
New Transformer.293588B210B5EE34E0637F61810A7CE3_15_2 phases=1 windings=2 xhl=0.5 %R=0.353554 %imag=1e-06 %noloadloss=0
~ wdg=1 bus=42780474.3.1 kV=16 kVA=166.667 conn=delta
~ wdg=2 bus=-99999942780474.3.0 kV=0.159926 kVA=166.667 conn=wye
New Transformer.293588B2104FEE34E0637F61810A7CE3_16_0 phases=1 windings=2 xhl=0.5 %R=0.353554 %imag=1e-06 %noloadloss=0
~ wdg=1 bus=42815903.1.2 kV=16 kVA=1250 conn=delta
~ wdg=2 bus=-99999942815903.1.2 kV=1.38564 kVA=1250 conn=delta
New Transformer.293588B2104FEE34E0637F61810A7CE3_16_1 phases=1 windings=2 xhl=0.5 %R=0.353554 %imag=1e-06 %noloadloss=0
~ wdg=1 bus=42815903.2.3 kV=16 kVA=1250 conn=delta
~ wdg=2 bus=-99999942815903.2.3 kV=1.38564 kVA=1250 conn=delta
New Transformer.293588B2104FEE34E0637F61810A7CE3_16_2 phases=1 windings=2 xhl=0.5 %R=0.353554 %imag=1e-06 %noloadloss=0
~ wdg=1 bus=42815903.3.1 kV=16 kVA=1250 conn=delta
~ wdg=2 bus=-99999942815903.3.1 kV=1.38564 kVA=1250 conn=delta
New Transformer.293588B42CEBEE34E0637F61810A7CE3_17_0 phases=1 windings=2 xhl=0.5 %R=0.353554 %imag=1e-06 %noloadloss=0
~ wdg=1 bus=153932301.1.2 kV=16 kVA=100 conn=delta
~ wdg=2 bus=-999999153932301.1.0 kV=0.159926 kVA=100 conn=wye
New Transformer.293588B42CEBEE34E0637F61810A7CE3_17_1 phases=1 windings=2 xhl=0.5 %R=0.353554 %imag=1e-06 %noloadloss=0
~ wdg=1 bus=153932301.2.3 kV=16 kVA=100 conn=delta
~ wdg=2 bus=-999999153932301.2.0 kV=0.159926 kVA=100 conn=wye
New Transformer.293588B42CEBEE34E0637F61810A7CE3_17_2 phases=1 windings=2 xhl=0.5 %R=0.353554 %imag=1e-06 %noloadloss=0
~ wdg=1 bus=153932301.3.1 kV=16 kVA=100 conn=delta
~ wdg=2 bus=-999999153932301.3.0 kV=0.159926 kVA=100 conn=wye
New Transformer.293588B2107BEE34E0637F61810A7CE3_18_0 phases=1 windings=2 xhl=0.5 %R=0.353554 %imag=1e-06 %noloadloss=0
~ wdg=1 bus=42778653.1.2 kV=16 kVA=250 conn=delta
~ wdg=2 bus=-99999942778653.1.0 kV=0.159926 kVA=250 conn=wye
New Transformer.293588B2107BEE34E0637F61810A7CE3_18_1 phases=1 windings=2 xhl=0.5 %R=0.353554 %imag=1e-06 %noloadloss=0
~ wdg=1 bus=42778653.2.3 kV=16 kVA=250 conn=delta
~ wdg=2 bus=-99999942778653.2.0 kV=0.159926 kVA=250 conn=wye
New Transformer.293588B2107BEE34E0637F61810A7CE3_18_2 phases=1 windings=2 xhl=0.5 %R=0.353554 %imag=1e-06 %noloadloss=0
~ wdg=1 bus=42778653.3.1 kV=16 kVA=250 conn=delta
~ wdg=2 bus=-99999942778653.3.0 kV=0.159926 kVA=250 conn=wye
New Transformer.293588B2107CEE34E0637F61810A7CE3_19_0 phases=1 windings=2 xhl=0.5 %R=0.353554 %imag=1e-06 %noloadloss=0
~ wdg=1 bus=42778724.1.2 kV=16 kVA=75 conn=delta
~ wdg=2 bus=-99999942778724.1.0 kV=0.159926 kVA=75 conn=wye
New Transformer.293588B2107CEE34E0637F61810A7CE3_19_1 phases=1 windings=2 xhl=0.5 %R=0.353554 %imag=1e-06 %noloadloss=0
~ wdg=1 bus=42778724.2.3 kV=16 kVA=75 conn=delta
~ wdg=2 bus=-99999942778724.2.0 kV=0.159926 kVA=75 conn=wye
New Transformer.293588B2107CEE34E0637F61810A7CE3_19_2 phases=1 windings=2 xhl=0.5 %R=0.353554 %imag=1e-06 %noloadloss=0
~ wdg=1 bus=42778724.3.1 kV=16 kVA=75 conn=delta
~ wdg=2 bus=-99999942778724.3.0 kV=0.159926 kVA=75 conn=wye
New Transformer.293588B2107DEE34E0637F61810A7CE3_20_0 phases=1 windings=2 xhl=0.5 %R=0.353554 %imag=1e-06 %noloadloss=0
~ wdg=1 bus=42778772.1.2 kV=16 kVA=50 conn=delta
~ wdg=2 bus=-99999942778772.1.0 kV=0.069282 kVA=50 conn=wye
New Transformer.293588B2107DEE34E0637F61810A7CE3_20_1 phases=1 windings=2 xhl=0.5 %R=0.353554 %imag=1e-06 %noloadloss=0
~ wdg=1 bus=42778772.2.3 kV=16 kVA=50 conn=delta
~ wdg=2 bus=-99999942778772.2.0 kV=0.069282 kVA=50 conn=wye
New Transformer.293588B2107DEE34E0637F61810A7CE3_20_2 phases=1 windings=2 xhl=0.5 %R=0.353554 %imag=1e-06 %noloadloss=0
~ wdg=1 bus=42778772.3.1 kV=16 kVA=50 conn=delta
~ wdg=2 bus=-99999942778772.3.0 kV=0.069282 kVA=50 conn=wye
New Transformer.293588B2107AEE34E0637F61810A7CE3_21_0 phases=1 windings=2 xhl=0.5 %R=0.353554 %imag=1e-06 %noloadloss=0
~ wdg=1 bus=42778605.1.2 kV=16 kVA=75 conn=delta
~ wdg=2 bus=-99999942778605.1.0 kV=0.159926 kVA=75 conn=wye
New Transformer.293588B2107AEE34E0637F61810A7CE3_21_1 phases=1 windings=2 xhl=0.5 %R=0.353554 %imag=1e-06 %noloadloss=0
~ wdg=1 bus=42778605.2.3 kV=16 kVA=75 conn=delta
~ wdg=2 bus=-99999942778605.2.0 kV=0.159926 kVA=75 conn=wye
New Transformer.293588B2107AEE34E0637F61810A7CE3_21_2 phases=1 windings=2 xhl=0.5 %R=0.353554 %imag=1e-06 %noloadloss=0
~ wdg=1 bus=42778605.3.1 kV=16 kVA=75 conn=delta
~ wdg=2 bus=-99999942778605.3.0 kV=0.159926 kVA=75 conn=wye
New Transformer.293588B42CECEE34E0637F61810A7CE3_22_0 phases=1 windings=2 xhl=0.5 %R=0.353554 %imag=1e-06 %noloadloss=0
~ wdg=1 bus=153932400.1.2 kV=16 kVA=50 conn=delta
~ wdg=2 bus=-999999153932400.1.0 kV=0.069282 kVA=50 conn=wye
New Transformer.293588B42CECEE34E0637F61810A7CE3_22_1 phases=1 windings=2 xhl=0.5 %R=0.353554 %imag=1e-06 %noloadloss=0
~ wdg=1 bus=153932400.2.3 kV=16 kVA=50 conn=delta
~ wdg=2 bus=-999999153932400.2.0 kV=0.069282 kVA=50 conn=wye
New Transformer.293588B42CECEE34E0637F61810A7CE3_22_2 phases=1 windings=2 xhl=0.5 %R=0.353554 %imag=1e-06 %noloadloss=0
~ wdg=1 bus=153932400.3.1 kV=16 kVA=50 conn=delta
~ wdg=2 bus=-999999153932400.3.0 kV=0.069282 kVA=50 conn=wye
New Transformer.293588B2107EEE34E0637F61810A7CE3_23_0 phases=1 windings=2 xhl=0.5 %R=0.353554 %imag=1e-06 %noloadloss=0
~ wdg=1 bus=42778986.1.2 kV=16 kVA=166.667 conn=delta
~ wdg=2 bus=-99999942778986.1.0 kV=0.159926 kVA=166.667 conn=wye
New Transformer.293588B2107EEE34E0637F61810A7CE3_23_1 phases=1 windings=2 xhl=0.5 %R=0.353554 %imag=1e-06 %noloadloss=0
~ wdg=1 bus=42778986.2.3 kV=16 kVA=166.667 conn=delta
~ wdg=2 bus=-99999942778986.2.0 kV=0.159926 kVA=166.667 conn=wye
New Transformer.293588B2107EEE34E0637F61810A7CE3_23_2 phases=1 windings=2 xhl=0.5 %R=0.353554 %imag=1e-06 %noloadloss=0
~ wdg=1 bus=42778986.3.1 kV=16 kVA=166.667 conn=delta
~ wdg=2 bus=-99999942778986.3.0 kV=0.159926 kVA=166.667 conn=wye
New Transformer.293588B210B4EE34E0637F61810A7CE3_24_0 phases=1 windings=2 xhl=0.5 %R=0.353554 %imag=1e-06 %noloadloss=0
~ wdg=1 bus=42780426.1.2 kV=16 kVA=100 conn=delta
~ wdg=2 bus=-99999942780426.1.0 kV=0.159926 kVA=100 conn=wye
New Transformer.293588B210B4EE34E0637F61810A7CE3_24_1 phases=1 windings=2 xhl=0.5 %R=0.353554 %imag=1e-06 %noloadloss=0
~ wdg=1 bus=42780426.2.3 kV=16 kVA=100 conn=delta
~ wdg=2 bus=-99999942780426.2.0 kV=0.159926 kVA=100 conn=wye
New Transformer.293588B210B4EE34E0637F61810A7CE3_24_2 phases=1 windings=2 xhl=0.5 %R=0.353554 %imag=1e-06 %noloadloss=0
~ wdg=1 bus=42780426.3.1 kV=16 kVA=100 conn=delta
~ wdg=2 bus=-99999942780426.3.0 kV=0.159926 kVA=100 conn=wye
New Transformer.293588B42CEDEE34E0637F61810A7CE3_25_0 phases=1 windings=2 xhl=0.5 %R=0.353554 %imag=1e-06 %noloadloss=0
~ wdg=1 bus=153932498.1.2 kV=16 kVA=166.667 conn=delta
~ wdg=2 bus=-999999153932498.1.0 kV=0.159926 kVA=166.667 conn=wye
New Transformer.293588B42CEDEE34E0637F61810A7CE3_25_1 phases=1 windings=2 xhl=0.5 %R=0.353554 %imag=1e-06 %noloadloss=0
~ wdg=1 bus=153932498.2.3 kV=16 kVA=166.667 conn=delta
~ wdg=2 bus=-999999153932498.2.0 kV=0.159926 kVA=166.667 conn=wye
New Transformer.293588B42CEDEE34E0637F61810A7CE3_25_2 phases=1 windings=2 xhl=0.5 %R=0.353554 %imag=1e-06 %noloadloss=0
~ wdg=1 bus=153932498.3.1 kV=16 kVA=166.667 conn=delta
~ wdg=2 bus=-999999153932498.3.0 kV=0.159926 kVA=166.667 conn=wye
New Transformer.293588B4EA52EE34E0637F61810A7CE3_26_0 phases=1 windings=2 xhl=0.5 %R=0.353554 %imag=1e-06 %noloadloss=0
~ wdg=1 bus=239766559.1.2 kV=16 kVA=166.667 conn=delta
~ wdg=2 bus=-999999239766559.1.0 kV=0.159926 kVA=166.667 conn=wye
New Transformer.293588B4EA52EE34E0637F61810A7CE3_26_1 phases=1 windings=2 xhl=0.5 %R=0.353554 %imag=1e-06 %noloadloss=0
~ wdg=1 bus=239766559.2.3 kV=16 kVA=166.667 conn=delta
~ wdg=2 bus=-999999239766559.2.0 kV=0.159926 kVA=166.667 conn=wye
New Transformer.293588B4EA52EE34E0637F61810A7CE3_26_2 phases=1 windings=2 xhl=0.5 %R=0.353554 %imag=1e-06 %noloadloss=0
~ wdg=1 bus=239766559.3.1 kV=16 kVA=166.667 conn=delta
~ wdg=2 bus=-999999239766559.3.0 kV=0.159926 kVA=166.667 conn=wye
New Transformer.293588B21077EE34E0637F61810A7CE3_27_0 phases=1 windings=2 xhl=0.5 %R=0.353554 %imag=1e-06 %noloadloss=0
~ wdg=1 bus=42778375.1.2 kV=16 kVA=75 conn=delta
~ wdg=2 bus=-99999942778375.1.0 kV=0.159926 kVA=75 conn=wye
New Transformer.293588B21077EE34E0637F61810A7CE3_27_1 phases=1 windings=2 xhl=0.5 %R=0.353554 %imag=1e-06 %noloadloss=0
~ wdg=1 bus=42778375.2.3 kV=16 kVA=75 conn=delta
~ wdg=2 bus=-99999942778375.2.0 kV=0.159926 kVA=75 conn=wye
New Transformer.293588B21077EE34E0637F61810A7CE3_27_2 phases=1 windings=2 xhl=0.5 %R=0.353554 %imag=1e-06 %noloadloss=0
~ wdg=1 bus=42778375.3.1 kV=16 kVA=75 conn=delta
~ wdg=2 bus=-99999942778375.3.0 kV=0.159926 kVA=75 conn=wye
New Transformer.293588B21052EE34E0637F61810A7CE3_28_0 phases=1 windings=2 xhl=0.5 %R=0.353554 %imag=1e-06 %noloadloss=0
~ wdg=1 bus=42816754.3.0 kV=9.2376 kVA=25 conn=wye
~ wdg=2 bus=-99999942816754.3.0 kV=0.069282 kVA=25 conn=wye
New Transformer.293588B3EEC1EE34E0637F61810A7CE3_29_0 phases=1 windings=2 xhl=0.5 %R=0.353554 %imag=1e-06 %noloadloss=0
~ wdg=1 bus=135965294.1.2 kV=16 kVA=250 conn=delta
~ wdg=2 bus=-999999135965294.1.0 kV=0.159926 kVA=250 conn=wye
New Transformer.293588B3EEC1EE34E0637F61810A7CE3_29_1 phases=1 windings=2 xhl=0.5 %R=0.353554 %imag=1e-06 %noloadloss=0
~ wdg=1 bus=135965294.2.3 kV=16 kVA=250 conn=delta
~ wdg=2 bus=-999999135965294.2.0 kV=0.159926 kVA=250 conn=wye
New Transformer.293588B3EEC1EE34E0637F61810A7CE3_29_2 phases=1 windings=2 xhl=0.5 %R=0.353554 %imag=1e-06 %noloadloss=0
~ wdg=1 bus=135965294.3.1 kV=16 kVA=250 conn=delta
~ wdg=2 bus=-999999135965294.3.0 kV=0.159926 kVA=250 conn=wye
New Transformer.293588B210B3EE34E0637F61810A7CE3_30_0 phases=1 windings=2 xhl=0.5 %R=0.353554 %imag=1e-06 %noloadloss=0
~ wdg=1 bus=42780378.1.2 kV=16 kVA=100 conn=delta
~ wdg=2 bus=-99999942780378.1.0 kV=0.069282 kVA=100 conn=wye
New Transformer.293588B210B3EE34E0637F61810A7CE3_30_1 phases=1 windings=2 xhl=0.5 %R=0.353554 %imag=1e-06 %noloadloss=0
~ wdg=1 bus=42780378.2.3 kV=16 kVA=100 conn=delta
~ wdg=2 bus=-99999942780378.2.0 kV=0.069282 kVA=100 conn=wye
New Transformer.293588B210B3EE34E0637F61810A7CE3_30_2 phases=1 windings=2 xhl=0.5 %R=0.353554 %imag=1e-06 %noloadloss=0
~ wdg=1 bus=42780378.3.1 kV=16 kVA=100 conn=delta
~ wdg=2 bus=-99999942780378.3.0 kV=0.069282 kVA=100 conn=wye
New Transformer.293588B21040EE34E0637F61810A7CE3_31_0 phases=1 windings=2 xhl=0.5 %R=0.353554 %imag=1e-06 %noloadloss=0
~ wdg=1 bus=42777255.1.2 kV=16 kVA=100 conn=delta
~ wdg=2 bus=-99999942777255.1.0 kV=0.069282 kVA=100 conn=wye
New Transformer.293588B21040EE34E0637F61810A7CE3_31_1 phases=1 windings=2 xhl=0.5 %R=0.353554 %imag=1e-06 %noloadloss=0
~ wdg=1 bus=42777255.2.3 kV=16 kVA=100 conn=delta
~ wdg=2 bus=-99999942777255.2.0 kV=0.069282 kVA=100 conn=wye
New Transformer.293588B21040EE34E0637F61810A7CE3_31_2 phases=1 windings=2 xhl=0.5 %R=0.353554 %imag=1e-06 %noloadloss=0
~ wdg=1 bus=42777255.3.1 kV=16 kVA=100 conn=delta
~ wdg=2 bus=-99999942777255.3.0 kV=0.069282 kVA=100 conn=wye
New Transformer.293588B21041EE34E0637F61810A7CE3_32_0 phases=1 windings=2 xhl=0.5 %R=0.353554 %imag=1e-06 %noloadloss=0
~ wdg=1 bus=42777316.1.2 kV=16 kVA=100 conn=delta
~ wdg=2 bus=-99999942777316.1.0 kV=0.159926 kVA=100 conn=wye
New Transformer.293588B21041EE34E0637F61810A7CE3_32_1 phases=1 windings=2 xhl=0.5 %R=0.353554 %imag=1e-06 %noloadloss=0
~ wdg=1 bus=42777316.2.3 kV=16 kVA=100 conn=delta
~ wdg=2 bus=-99999942777316.2.0 kV=0.159926 kVA=100 conn=wye
New Transformer.293588B21041EE34E0637F61810A7CE3_32_2 phases=1 windings=2 xhl=0.5 %R=0.353554 %imag=1e-06 %noloadloss=0
~ wdg=1 bus=42777316.3.1 kV=16 kVA=100 conn=delta
~ wdg=2 bus=-99999942777316.3.0 kV=0.159926 kVA=100 conn=wye
New Transformer.293588B210B1EE34E0637F61810A7CE3_33_0 phases=1 windings=2 xhl=0.5 %R=0.353554 %imag=1e-06 %noloadloss=0
~ wdg=1 bus=42780263.1.2 kV=16 kVA=50 conn=delta
~ wdg=2 bus=-99999942780263.1.0 kV=0.159926 kVA=50 conn=wye
New Transformer.293588B210B1EE34E0637F61810A7CE3_33_1 phases=1 windings=2 xhl=0.5 %R=0.353554 %imag=1e-06 %noloadloss=0
~ wdg=1 bus=42780263.2.3 kV=16 kVA=50 conn=delta
~ wdg=2 bus=-99999942780263.2.0 kV=0.159926 kVA=50 conn=wye
New Transformer.293588B210B1EE34E0637F61810A7CE3_33_2 phases=1 windings=2 xhl=0.5 %R=0.353554 %imag=1e-06 %noloadloss=0
~ wdg=1 bus=42780263.3.1 kV=16 kVA=50 conn=delta
~ wdg=2 bus=-99999942780263.3.0 kV=0.159926 kVA=50 conn=wye
New Transformer.293588B210ADEE34E0637F61810A7CE3_34_0 phases=1 windings=2 xhl=0.5 %R=0.353554 %imag=1e-06 %noloadloss=0
~ wdg=1 bus=42779239.1.2 kV=16 kVA=50 conn=delta
~ wdg=2 bus=-99999942779239.1.0 kV=0.069282 kVA=50 conn=wye
New Transformer.293588B210ADEE34E0637F61810A7CE3_34_1 phases=1 windings=2 xhl=0.5 %R=0.353554 %imag=1e-06 %noloadloss=0
~ wdg=1 bus=42779239.2.3 kV=16 kVA=50 conn=delta
~ wdg=2 bus=-99999942779239.2.0 kV=0.069282 kVA=50 conn=wye
New Transformer.293588B210ADEE34E0637F61810A7CE3_34_2 phases=1 windings=2 xhl=0.5 %R=0.353554 %imag=1e-06 %noloadloss=0
~ wdg=1 bus=42779239.3.1 kV=16 kVA=50 conn=delta
~ wdg=2 bus=-99999942779239.3.0 kV=0.069282 kVA=50 conn=wye
New Transformer.293588B210AFEE34E0637F61810A7CE3_35_0 phases=1 windings=2 xhl=0.5 %R=0.353554 %imag=1e-06 %noloadloss=0
~ wdg=1 bus=42779784.1.2 kV=16 kVA=75 conn=delta
~ wdg=2 bus=-99999942779784.1.0 kV=0.069282 kVA=75 conn=wye
New Transformer.293588B210AFEE34E0637F61810A7CE3_35_1 phases=1 windings=2 xhl=0.5 %R=0.353554 %imag=1e-06 %noloadloss=0
~ wdg=1 bus=42779784.2.3 kV=16 kVA=75 conn=delta
~ wdg=2 bus=-99999942779784.2.0 kV=0.069282 kVA=75 conn=wye
New Transformer.293588B210AFEE34E0637F61810A7CE3_35_2 phases=1 windings=2 xhl=0.5 %R=0.353554 %imag=1e-06 %noloadloss=0
~ wdg=1 bus=42779784.3.1 kV=16 kVA=75 conn=delta
~ wdg=2 bus=-99999942779784.3.0 kV=0.069282 kVA=75 conn=wye
New Transformer.293588B210AEEE34E0637F61810A7CE3_36_0 phases=1 windings=2 xhl=0.5 %R=0.353554 %imag=1e-06 %noloadloss=0
~ wdg=1 bus=42779539.1.2 kV=16 kVA=50 conn=delta
~ wdg=2 bus=-99999942779539.1.0 kV=0.069282 kVA=50 conn=wye
New Transformer.293588B210AEEE34E0637F61810A7CE3_36_1 phases=1 windings=2 xhl=0.5 %R=0.353554 %imag=1e-06 %noloadloss=0
~ wdg=1 bus=42779539.2.3 kV=16 kVA=50 conn=delta
~ wdg=2 bus=-99999942779539.2.0 kV=0.069282 kVA=50 conn=wye
New Transformer.293588B210AEEE34E0637F61810A7CE3_36_2 phases=1 windings=2 xhl=0.5 %R=0.353554 %imag=1e-06 %noloadloss=0
~ wdg=1 bus=42779539.3.1 kV=16 kVA=50 conn=delta
~ wdg=2 bus=-99999942779539.3.0 kV=0.069282 kVA=50 conn=wye
New Transformer.293588B21042EE34E0637F61810A7CE3_37_0 phases=1 windings=2 xhl=0.5 %R=0.353554 %imag=1e-06 %noloadloss=0
~ wdg=1 bus=42777377.1.2 kV=16 kVA=166.667 conn=delta
~ wdg=2 bus=-99999942777377.1.0 kV=0.069282 kVA=166.667 conn=wye
New Transformer.293588B21042EE34E0637F61810A7CE3_37_1 phases=1 windings=2 xhl=0.5 %R=0.353554 %imag=1e-06 %noloadloss=0
~ wdg=1 bus=42777377.2.3 kV=16 kVA=166.667 conn=delta
~ wdg=2 bus=-99999942777377.2.0 kV=0.069282 kVA=166.667 conn=wye
New Transformer.293588B21042EE34E0637F61810A7CE3_37_2 phases=1 windings=2 xhl=0.5 %R=0.353554 %imag=1e-06 %noloadloss=0
~ wdg=1 bus=42777377.3.1 kV=16 kVA=166.667 conn=delta
~ wdg=2 bus=-99999942777377.3.0 kV=0.069282 kVA=166.667 conn=wye
New Transformer.293588B210B2EE34E0637F61810A7CE3_38_0 phases=1 windings=2 xhl=0.5 %R=0.353554 %imag=1e-06 %noloadloss=0
~ wdg=1 bus=42780311.3.0 kV=9.2376 kVA=75 conn=wye
~ wdg=2 bus=-99999942780311.3.0 kV=0.069282 kVA=75 conn=wye
New Transformer.293588B210ACEE34E0637F61810A7CE3_39_0 phases=1 windings=2 xhl=0.5 %R=0.353554 %imag=1e-06 %noloadloss=0
~ wdg=1 bus=42779108.1.2 kV=16 kVA=50 conn=delta
~ wdg=2 bus=-99999942779108.1.0 kV=0.069282 kVA=50 conn=wye
New Transformer.293588B210ACEE34E0637F61810A7CE3_39_1 phases=1 windings=2 xhl=0.5 %R=0.353554 %imag=1e-06 %noloadloss=0
~ wdg=1 bus=42779108.2.3 kV=16 kVA=50 conn=delta
~ wdg=2 bus=-99999942779108.2.0 kV=0.069282 kVA=50 conn=wye
New Transformer.293588B210ACEE34E0637F61810A7CE3_39_2 phases=1 windings=2 xhl=0.5 %R=0.353554 %imag=1e-06 %noloadloss=0
~ wdg=1 bus=42779108.3.1 kV=16 kVA=50 conn=delta
~ wdg=2 bus=-99999942779108.3.0 kV=0.069282 kVA=50 conn=wye
New Transformer.293588B21079EE34E0637F61810A7CE3_40_0 phases=1 windings=2 xhl=0.5 %R=0.353554 %imag=1e-06 %noloadloss=0
~ wdg=1 bus=42778557.1.2 kV=16 kVA=100 conn=delta
~ wdg=2 bus=-99999942778557.1.0 kV=0.069282 kVA=100 conn=wye
New Transformer.293588B21079EE34E0637F61810A7CE3_40_1 phases=1 windings=2 xhl=0.5 %R=0.353554 %imag=1e-06 %noloadloss=0
~ wdg=1 bus=42778557.2.3 kV=16 kVA=100 conn=delta
~ wdg=2 bus=-99999942778557.2.0 kV=0.069282 kVA=100 conn=wye
New Transformer.293588B21079EE34E0637F61810A7CE3_40_2 phases=1 windings=2 xhl=0.5 %R=0.353554 %imag=1e-06 %noloadloss=0
~ wdg=1 bus=42778557.3.1 kV=16 kVA=100 conn=delta
~ wdg=2 bus=-99999942778557.3.0 kV=0.069282 kVA=100 conn=wye
New Transformer.293588A72BDBEE34E0637F61810A7CE3_41_0 phases=1 windings=2 xhl=0.5 %R=0.353554 %imag=1e-06 %noloadloss=0
~ wdg=1 bus=169406892.1.2 kV=16 kVA=75 conn=delta
~ wdg=2 bus=-999999169406892.1.2 kV=0.069282 kVA=75 conn=delta
New Transformer.293588A72BDBEE34E0637F61810A7CE3_41_1 phases=1 windings=2 xhl=0.5 %R=0.353554 %imag=1e-06 %noloadloss=0
~ wdg=1 bus=169406892.2.3 kV=16 kVA=75 conn=delta
~ wdg=2 bus=-999999169406892.2.3 kV=0.069282 kVA=75 conn=delta
New Transformer.293588A72BDBEE34E0637F61810A7CE3_41_2 phases=1 windings=2 xhl=0.5 %R=0.353554 %imag=1e-06 %noloadloss=0
~ wdg=1 bus=169406892.3.1 kV=16 kVA=75 conn=delta
~ wdg=2 bus=-999999169406892.3.1 kV=0.069282 kVA=75 conn=delta

Set voltagebases=[16.0 2.4 0.277 0.12]
CalcVoltageBases
Solve
