! OpenDSS script generated from multiconductor network
Clear

New Circuit.mc_network basekv=33.0 pu=1.000000 angle=0.00 frequency=60.0 phases=3 Mvasc3=1.08895e+06 Mvasc1=362982
~ bus1=-8888882189855.1.2.3

! Line codes
New LineCode.653_ACSR_3PH_33KV_3 nphases=3 units=km Rmatrix=[ 0.191189 | 0 0.191189 | 0 0 0.191189 ] Xmatrix=[ 0.742219 | 0 0.742219 | 0 0 0.742219 ] Cmatrix=[ 0 | 0 0 | 0 0 0 ]
New LineCode.1500_JCN_3PH_33KV_3 nphases=3 units=km Rmatrix=[ 0.039365 | 0 0.039365 | 0 0 0.039365 ] Xmatrix=[ 0.071424 | 0 0.071424 | 0 0 0.071424 ] Cmatrix=[ 0 | 0 0 | 0 0 0 ]
New LineCode.2_ACSR_2PH_33KV_2 nphases=2 units=km Rmatrix=[ 0.262227 | 0 0.262227 ] Xmatrix=[ 0.140976 | 0 0.140976 ] Cmatrix=[ 0 | 0 0 ]
New LineCode.4_ACSR_3PH_33KV_3 nphases=3 units=km Rmatrix=[ 4.328424 | 0 4.328424 | 0 0 4.328424 ] Xmatrix=[ 1.588283 | 0 1.588283 | 0 0 1.588283 ] Cmatrix=[ 0 | 0 0 | 0 0 0 ]
New LineCode.1/0_ACSR_3PH_33KV_3 nphases=3 units=km Rmatrix=[ 9.124649 | 0 9.124649 | 0 0 9.124649 ] Xmatrix=[ 7.265006 | 0 7.265006 | 0 0 7.265006 ] Cmatrix=[ 0 | 0 0 | 0 0 0 ]
New LineCode.653_ATW_3PH_33KV_3 nphases=3 units=km Rmatrix=[ 1e-05 | 0 1e-05 | 0 0 1e-05 ] Xmatrix=[ 1e-05 | 0 1e-05 | 0 0 1e-05 ] Cmatrix=[ 0 | 0 0 | 0 0 0 ]

! Lines
New Line.RCS1046$ND285981925 phases=3 Bus1=240365404.1.2.3 Bus2=285981925.1.2.3 LineCode=653_ACSR_3PH_33KV_3 Length=1.44214 units=km
New Line.4961730E$ND285982012 phases=3 Bus1=285981964.1.2.3 Bus2=285982012.1.2.3 LineCode=653_ACSR_3PH_33KV_3 Length=2.82497 units=km
New Line.ND285982012$ND285982019 phases=3 Bus1=285982012.1.2.3 Bus2=285982019.1.2.3 LineCode=653_ACSR_3PH_33KV_3 Length=2.94673 units=km
New Line.ND285982019$ND285982029 phases=3 Bus1=285982019.1.2.3 Bus2=285982029.1.2.3 LineCode=653_ACSR_3PH_33KV_3 Length=4.73233 units=km
New Line.ND285982029$ND285982039 phases=3 Bus1=285982029.1.2.3 Bus2=285982039.1.2.3 LineCode=653_ACSR_3PH_33KV_3 Length=3.10808 units=km
New Line.ND285982039$ND285982049 phases=3 Bus1=285982039.1.2.3 Bus2=285982049.1.2.3 LineCode=653_ACSR_3PH_33KV_3 Length=2.02384 units=km
New Line.ND285982049$ND285982059 phases=3 Bus1=285982049.1.2.3 Bus2=285982059.1.2.3 LineCode=653_ACSR_3PH_33KV_3 Length=1.40007 units=km
New Line.ND285982059$ND285982069 phases=3 Bus1=285982059.1.2.3 Bus2=285982069.1.2.3 LineCode=653_ACSR_3PH_33KV_3 Length=1.66487 units=km
New Line.ND285982069$ND285982079 phases=3 Bus1=285982069.1.2.3 Bus2=285982079.1.2.3 LineCode=653_ACSR_3PH_33KV_3 Length=0.908544 units=km
New Line.ND285982079$ND237824855 phases=3 Bus1=285982079.1.2.3 Bus2=237824791.1.2.3 LineCode=653_ACSR_3PH_33KV_3 Length=0.617904 units=km
New Line.4961729E$4961730E phases=3 Bus1=285981910.1.2.3 Bus2=285981960.1.2.3 LineCode=1500_JCN_3PH_33KV_3 Length=0.618174 units=km
New Line.ND15665682$ND143682409 phases=3 Bus1=15665682.1.2.3 Bus2=143682409.1.2.3 LineCode=653_ACSR_3PH_33KV_3 Length=0.290355 units=km
New Line.ND15665682$PS0047 phases=3 Bus1=15665682.1.2.3 Bus2=32208610.1.2.3 LineCode=653_ACSR_3PH_33KV_3 Length=0.121051 units=km
New Line.ND15665637$ND143682409 phases=3 Bus1=143682409.1.2.3 Bus2=15665637.1.2.3 LineCode=653_ACSR_3PH_33KV_3 Length=0.46581 units=km
New Line.ND15665637$ND143682383 phases=3 Bus1=15665637.1.2.3 Bus2=143682383.1.2.3 LineCode=653_ACSR_3PH_33KV_3 Length=0.182784 units=km
New Line.ND143682383$ND240365249 phases=3 Bus1=143682383.1.2.3 Bus2=240365249.1.2.3 LineCode=653_ACSR_3PH_33KV_3 Length=0.309109 units=km
New Line.RCS0018$ND240365249 phases=3 Bus1=240365249.1.2.3 Bus2=15665513.1.2.3 LineCode=653_ACSR_3PH_33KV_3 Length=1.43246 units=km
New Line.ND143682357$PS0018 phases=3 Bus1=15665512.1.2.3 Bus2=143682357.1.2.3 LineCode=653_ACSR_3PH_33KV_3 Length=0.045145 units=km
New Line.ND143682357$PS0016 phases=3 Bus1=143682357.1.2.3 Bus2=15665459.1.2.3 LineCode=653_ACSR_3PH_33KV_3 Length=0.061155 units=km
New Line.ND240365432$PS0016 phases=3 Bus1=15665458.1.2.3 Bus2=240365432.1.2.3 LineCode=653_ACSR_3PH_33KV_3 Length=0.067217 units=km
New Line.ND15665617$ND240365432 phases=3 Bus1=240365432.1.2.3 Bus2=15665617.1.2.3 LineCode=653_ACSR_3PH_33KV_3 Length=0.009797 units=km
New Line.ND240365432$RCS1046 phases=3 Bus1=240365432.1.2.3 Bus2=240365408.1.2.3 LineCode=653_ACSR_3PH_33KV_3 Length=0.181316 units=km
New Line.ND15665617$ND240365357 phases=3 Bus1=15665617.1.2.3 Bus2=240365291.1.2.3 LineCode=653_ACSR_3PH_33KV_3 Length=2.6373 units=km
New Line.ND73457508$4418295E phases=2 Bus1=73457508.1.3 Bus2=73457495.1.3 LineCode=2_ACSR_2PH_33KV_2 Length=0.283394 units=km
New Line.PS0020$4028923E phases=3 Bus1=15665241.1.2.3 Bus2=15665469.1.2.3 LineCode=4_ACSR_3PH_33KV_3 Length=0.150242 units=km
New Line.PS0020$ND15665668 phases=3 Bus1=15665470.1.2.3 Bus2=15665668.1.2.3 LineCode=4_ACSR_3PH_33KV_3 Length=4.87014 units=km
New Line.ND15665668$ND15665631 phases=3 Bus1=15665668.1.2.3 Bus2=15665631.1.2.3 LineCode=4_ACSR_3PH_33KV_3 Length=2.82007 units=km
New Line.PS0664$ND15665631 phases=3 Bus1=15665631.1.2.3 Bus2=15665554.1.2.3 LineCode=4_ACSR_3PH_33KV_3 Length=3.72377 units=km
New Line.PS0664$4829997E phases=3 Bus1=15665553.1.2.3 Bus2=15665432.1.2.3 LineCode=4_ACSR_3PH_33KV_3 Length=2.3295 units=km
New Line.RCS0023$4829997E phases=3 Bus1=15665432.1.2.3 Bus2=35220434.1.2.3 LineCode=1/0_ACSR_3PH_33KV_3 Length=14.2565 units=km
New Line.ND73457508$ND240365355 phases=3 Bus1=240365309.1.2.3 Bus2=73457508.1.2.3 LineCode=4_ACSR_3PH_33KV_3 Length=0.083327 units=km
New Line.4028923E$ND73457508 phases=3 Bus1=73457508.1.2.3 Bus2=15665241.1.2.3 LineCode=4_ACSR_3PH_33KV_3 Length=0.986625 units=km
New Line.ND285981925$4961729E phases=3 Bus1=285981925.1.2.3 Bus2=285981940.1.2.3 LineCode=653_ATW_3PH_33KV_3 Length=0.061792 units=km
New Line.ND75325891$ND143682357 phases=3 Bus1=143682357.1.2.3 Bus2=-777777143682357.1.2.3 LineCode=653_ACSR_3PH_33KV_3 Length=0.013457 units=km
New Line.13655$ND15665682 phases=3 Bus1=-8888882189855.1.2.3 Bus2=15665682.1.2.3 LineCode=653_ACSR_3PH_33KV_3 Length=1.88534 units=km

! Switches
New Line.PDRAR1047-B$RAR1047 phases=3 Bus1=240365280.1.2.3 Bus2=240365273.1.2.3 switch=y r1=0.001 x1=0.001 r0=0.001 x0=0.001 Length=0.001 units=km
New Line.RAR1047$PDRAR1047-D phases=3 Bus1=240365274.1.2.3 Bus2=240365286.1.2.3 switch=y r1=0.001 x1=0.001 r0=0.001 x0=0.001 Length=0.001 units=km
New Line.1649802E:PS0047 phases=3 Bus1=32208610.1.2.3 Bus2=32208609.1.2.3 switch=y r1=0.001 x1=0.001 r0=0.001 x0=0.001 Length=0.001 units=km enabled=false
New Line.4241561E:RCS0023 phases=3 Bus1=35220434.1.2.3 Bus2=35220489.1.2.3 switch=y r1=0.001 x1=0.001 r0=0.001 x0=0.001 Length=0.001 units=km enabled=false
New Line.PAPPAS$HEAVY_PS0047$PS0047 phases=3 Bus1=32208609.1.2.3 Bus2=-77777732208609.1.2.3 switch=y r1=0.001 x1=0.001 r0=0.001 x0=0.001 Length=0.001 units=km
New Line.PAPPAS$ISNER_RCS0023$RCS0023 phases=3 Bus1=35220489.1.2.3 Bus2=-77777735220489.1.2.3 switch=y r1=0.001 x1=0.001 r0=0.001 x0=0.001 Length=0.001 units=km
New Line.240365331$PDRAR1047-B phases=3 Bus1=240365291.1.2.3 Bus2=240365279.1.2.3 switch=y r1=0.001 x1=0.001 r0=0.001 x0=0.001 Length=0.001 units=km
New Line.240365331$PDRAR1047-C phases=3 Bus1=240365291.1.2.3 Bus2=240365292.1.2.3 switch=y r1=0.001 x1=0.001 r0=0.001 x0=0.001 Length=0.001 units=km
New Line.237824831$PDRAR1045-B phases=3 Bus1=237824791.1.2.3 Bus2=237824779.1.2.3 switch=y r1=0.001 x1=0.001 r0=0.001 x0=0.001 Length=0.001 units=km
New Line.237824831$PDRAR1045-C phases=3 Bus1=237824791.1.2.3 Bus2=237824792.1.2.3 switch=y r1=0.001 x1=0.001 r0=0.001 x0=0.001 Length=0.001 units=km
New Line.PDRAR1045-B$RAR1045 phases=3 Bus1=237824780.1.2.3 Bus2=237824773.1.2.3 switch=y r1=0.001 x1=0.001 r0=0.001 x0=0.001 Length=0.001 units=km
New Line.240365335$PDRAR1047-C phases=3 Bus1=240365310.1.2.3 Bus2=240365309.1.2.3 switch=y r1=0.001 x1=0.001 r0=0.001 x0=0.001 Length=0.001 units=km
New Line.240365335$PDRAR1047-D phases=3 Bus1=240365309.1.2.3 Bus2=240365285.1.2.3 switch=y r1=0.001 x1=0.001 r0=0.001 x0=0.001 Length=0.001 units=km
New Line.CAB_4028923E:4028923E phases=3 Bus1=15665241.1.2.3 Bus2=15665223.1.2.3 switch=y r1=0.001 x1=0.001 r0=0.001 x0=0.001 Length=0.001 units=km
New Line.CAB_4418295E:4418295E phases=3 Bus1=73457495.1.2.3 Bus2=73457478.1.2.3 switch=y r1=0.001 x1=0.001 r0=0.001 x0=0.001 Length=0.001 units=km
New Line.1923683E:RCS0018 phases=3 Bus1=15665513.1.2.3 Bus2=15665512.1.2.3 switch=y r1=0.001 x1=0.001 r0=0.001 x0=0.001 Length=0.001 units=km
New Line.1923684E:PS0016 phases=3 Bus1=15665459.1.2.3 Bus2=15665458.1.2.3 switch=y r1=0.001 x1=0.001 r0=0.001 x0=0.001 Length=0.001 units=km
New Line.4961705E:RCS1046 phases=3 Bus1=240365408.1.2.3 Bus2=240365404.1.2.3 switch=y r1=0.001 x1=0.001 r0=0.001 x0=0.001 Length=0.001 units=km
New Line.4418611E:PS0020 phases=3 Bus1=15665469.1.2.3 Bus2=15665470.1.2.3 switch=y r1=0.001 x1=0.001 r0=0.001 x0=0.001 Length=0.001 units=km
New Line.4028923E:15665221 phases=3 Bus1=15665223.1.2.3 Bus2=15665224.1.2.3 switch=y r1=0.001 x1=0.001 r0=0.001 x0=0.001 Length=0.001 units=km
New Line.4418295E:73457476 phases=2 Bus1=73457478.1.3 Bus2=73457479.1.3 switch=y r1=0.001 x1=0.001 r0=0.001 x0=0.001 Length=0.001 units=km
New Line.4829997E:15665412 phases=3 Bus1=15665414.1.2.3 Bus2=15665415.1.2.3 switch=y r1=0.001 x1=0.001 r0=0.001 x0=0.001 Length=0.001 units=km
New Line.2292067E:PS0664 phases=3 Bus1=15665554.1.2.3 Bus2=15665553.1.2.3 switch=y r1=0.001 x1=0.001 r0=0.001 x0=0.001 Length=0.001 units=km
New Line.4919744E:PDRAR1045-B phases=3 Bus1=237824779.1.2.3 Bus2=237824780.1.2.3 switch=y r1=0.001 x1=0.001 r0=0.001 x0=0.001 Length=0.001 units=km
New Line.1923688E:PDRAR1047-B phases=3 Bus1=240365279.1.2.3 Bus2=240365280.1.2.3 switch=y r1=0.001 x1=0.001 r0=0.001 x0=0.001 Length=0.001 units=km
New Line.1923688E:PDRAR1047-C phases=3 Bus1=240365292.1.2.3 Bus2=240365310.1.2.3 switch=y r1=0.001 x1=0.001 r0=0.001 x0=0.001 Length=0.001 units=km enabled=false
New Line.1923688E:PDRAR1047-D phases=3 Bus1=240365285.1.2.3 Bus2=240365286.1.2.3 switch=y r1=0.001 x1=0.001 r0=0.001 x0=0.001 Length=0.001 units=km
New Line.4961730E:4961730E phases=3 Bus1=285981960.1.2.3 Bus2=285981964.1.2.3 switch=y r1=0.001 x1=0.001 r0=0.001 x0=0.001 Length=0.001 units=km
New Line.4961729E:4961729E phases=3 Bus1=285981940.1.2.3 Bus2=285981910.1.2.3 switch=y r1=0.001 x1=0.001 r0=0.001 x0=0.001 Length=0.001 units=km
New Line.CAB_4829997E:4829997E phases=3 Bus1=15665432.1.2.3 Bus2=15665414.1.2.3 switch=y r1=0.001 x1=0.001 r0=0.001 x0=0.001 Length=0.001 units=km
New Line.4919744E:PDRAR1045-C phases=3 Bus1=237824792.1.2.3 Bus2=-777777237824792.1.2.3 switch=y r1=0.001 x1=0.001 r0=0.001 x0=0.001 Length=0.001 units=km enabled=false
New Line.1923688E:RAR1047 phases=3 Bus1=240365273.1.2.3 Bus2=240365274.1.2.3 switch=y r1=0.001 x1=0.001 r0=0.001 x0=0.001 Length=0.001 units=km
New Line.4919744E:RAR1045 phases=3 Bus1=237824773.1.2.3 Bus2=-777777237824773.1.2.3 switch=y r1=0.001 x1=0.001 r0=0.001 x0=0.001 Length=0.001 units=km

! Loads
New Load.4028923E_0 Bus1=-99999915665224.3.0 phases=1 kV=0.069282 kW=0 kvar=0 model=1
New Load.4028923E_1 Bus1=-99999915665224.1.0 phases=1 kV=0.069282 kW=0 kvar=0 model=1
New Load.4418295E_0 Bus1=-99999973457479.3.0 phases=1 kV=0.069282 kW=0 kvar=0 model=1
New Load.4418295E_1 Bus1=-99999973457479.1.0 phases=1 kV=0.069282 kW=0 kvar=0 model=1
New Load.4829997E_0 Bus1=-99999915665415.2.0 phases=1 kV=0.069282 kW=0 kvar=0 model=1
New Load.4829997E_1 Bus1=-99999915665415.3.0 phases=1 kV=0.069282 kW=0 kvar=0 model=1

! Transformers
New Transformer.293588A61841EE34E0637F61810A7CE3_0_0 phases=1 windings=2 xhl=0.5 %R=0.353554 %imag=1e-06 %noloadloss=0
~ wdg=1 bus=15665224.3.0 kV=19.0526 kVA=12.5 conn=wye
~ wdg=2 bus=-99999915665224.3.0 kV=0.069282 kVA=12.5 conn=wye
New Transformer.293588A61841EE34E0637F61810A7CE3_0_1 phases=1 windings=2 xhl=0.5 %R=0.353554 %imag=1e-06 %noloadloss=0
~ wdg=1 bus=15665224.1.0 kV=19.0526 kVA=12.5 conn=wye
~ wdg=2 bus=-99999915665224.1.0 kV=0.069282 kVA=12.5 conn=wye
New Transformer.293588A61842EE34E0637F61810A7CE3_1_0 phases=1 windings=2 xhl=0.5 %R=0.353554 %imag=1e-06 %noloadloss=0
~ wdg=1 bus=15665415.2.0 kV=19.0526 kVA=12.5 conn=wye
~ wdg=2 bus=-99999915665415.2.0 kV=0.069282 kVA=12.5 conn=wye
New Transformer.293588A61842EE34E0637F61810A7CE3_1_1 phases=1 windings=2 xhl=0.5 %R=0.353554 %imag=1e-06 %noloadloss=0
~ wdg=1 bus=15665415.3.0 kV=19.0526 kVA=12.5 conn=wye
~ wdg=2 bus=-99999915665415.3.0 kV=0.069282 kVA=12.5 conn=wye
New Transformer.293588A81CA9EE34E0637F61810A7CE3_2_0 phases=1 windings=2 xhl=0.5 %R=0.353554 %imag=1e-06 %noloadloss=0
~ wdg=1 bus=73457479.3.0 kV=19.0526 kVA=25 conn=wye
~ wdg=2 bus=-99999973457479.3.0 kV=0.069282 kVA=25 conn=wye
New Transformer.293588A81CA9EE34E0637F61810A7CE3_2_1 phases=1 windings=2 xhl=0.5 %R=0.353554 %imag=1e-06 %noloadloss=0
~ wdg=1 bus=73457479.1.0 kV=19.0526 kVA=25 conn=wye
~ wdg=2 bus=-99999973457479.1.0 kV=0.069282 kVA=25 conn=wye

Set voltagebases=[33.0 0.12]
CalcVoltageBases
Solve
