! OpenDSS script generated from multiconductor network
Clear

New Circuit.mc_network basekv=16.0 pu=1.000000 angle=0.00 frequency=60.0 phases=3 Mvasc3=255987 Mvasc1=85329.1
~ bus1=-88888835274536.1.2.3

! Line codes
New LineCode.1/0_JCN_3PH_16KV_3 nphases=3 units=km Rmatrix=[ 0.024931 | 0 0.024931 | 0 0 0.024931 ] Xmatrix=[ 0.00762 | 0 0.00762 | 0 0 0.00762 ] Cmatrix=[ 0 | 0 0 | 0 0 0 ]
New LineCode.1000_JCN_3PH_16KV_3 nphases=3 units=km Rmatrix=[ 0.014488 | 0 0.014488 | 0 0 0.014488 ] Xmatrix=[ 0.02193 | 0 0.02193 | 0 0 0.02193 ] Cmatrix=[ 0 | 0 0 | 0 0 0 ]
New LineCode.1/0_JCN_2PH_16KV_2 nphases=2 units=km Rmatrix=[ 0.001569 | 0 0.001569 ] Xmatrix=[ 0.00048 | 0 0.00048 ] Cmatrix=[ 0 | 0 0 ]
New LineCode.350_JCN_3PH_16KV_3 nphases=3 units=km Rmatrix=[ 0.088316 | 0 0.088316 | 0 0 0.088316 ] Xmatrix=[ 0.067102 | 0 0.067102 | 0 0 0.067102 ] Cmatrix=[ 0 | 0 0 | 0 0 0 ]
New LineCode.1/0_JCN_ABC_16_3 nphases=3 units=km Rmatrix=[ 0.003223 | 0 0.003223 | 0 0 0.003223 ] Xmatrix=[ 0.000985 | 0 0.000985 | 0 0 0.000985 ] Cmatrix=[ 0 | 0 0 | 0 0 0 ]

! Lines
New Line.GS6844-5$224182278 phases=3 Bus1=223366797.1.2.3 Bus2=224182280.1.2.3 LineCode=1/0_JCN_3PH_16KV_3 Length=0.08379 units=km
New Line.GS6874-3$RCS7017-5 phases=3 Bus1=224181810.1.2.3 Bus2=224183925.1.2.3 LineCode=1000_JCN_3PH_16KV_3 Length=0.852959 units=km
New Line.236185860$236185833 phases=3 Bus1=236185862.1.2.3 Bus2=236185835.1.2.3 LineCode=1/0_JCN_3PH_16KV_3 Length=0.018833 units=km
New Line.PME7115-1$240062820 phases=3 Bus1=240062618.1.2.3 Bus2=240062823.1.2.3 LineCode=1/0_JCN_3PH_16KV_3 Length=0.019867 units=km
New Line.264299883$GS6874-5 phases=3 Bus1=224181828.1.2.3 Bus2=264299886.1.2.3 LineCode=1/0_JCN_3PH_16KV_3 Length=0.001485 units=km
New Line.GS6771-4$V5648846PT phases=3 Bus1=212886397.1.2.3 Bus2=220106485.1.2.3 LineCode=1000_JCN_3PH_16KV_3 Length=0.779465 units=km
New Line.V5648846PT$RCS6768-4 phases=3 Bus1=220106485.1.2.3 Bus2=239120068.1.2.3 LineCode=1000_JCN_3PH_16KV_3 Length=0.030476 units=km
New Line.GS6767-4$RCS6768-3 phases=3 Bus1=239120059.1.2.3 Bus2=220106814.1.2.3 LineCode=1000_JCN_3PH_16KV_3 Length=0.568667 units=km
New Line.GS6842-2$RCS6768-5 phases=3 Bus1=239120077.1.2.3 Bus2=223366097.1.2.3 LineCode=1000_JCN_3PH_16KV_3 Length=0.565006 units=km
New Line.GS6769-4$RCS6768-2 phases=3 Bus1=239120050.1.2.3 Bus2=218556059.1.2.3 LineCode=1000_JCN_3PH_16KV_3 Length=0.459756 units=km
New Line.RCS6768-6$263861296 phases=3 Bus1=239120086.1.2.3 Bus2=263861298.1.2.3 LineCode=1/0_JCN_3PH_16KV_3 Length=0.160718 units=km
New Line.263861296$P5765774-1 phases=3 Bus1=263861299.1.2.3 Bus2=263861256.1.2.3 LineCode=1/0_JCN_3PH_16KV_3 Length=0.000526 units=km
New Line.GS6928-1$0223451 phases=3 Bus1=231194032.1.2.3 Bus2=231194151.1.2.3 LineCode=1/0_JCN_3PH_16KV_3 Length=0.031366 units=km
New Line.232838088$P5748444-1 phases=3 Bus1=232838091.1.2.3 Bus2=232838034.1.2.3 LineCode=1/0_JCN_3PH_16KV_3 Length=0.002427 units=km
New Line.237042101$237042013 phases=3 Bus1=237042103.1.2.3 Bus2=237042015.1.2.3 LineCode=1/0_JCN_3PH_16KV_3 Length=0.027742 units=km
New Line.GS6874-2$264299825 phases=3 Bus1=224181801.1.2.3 Bus2=264299828.1.2.3 LineCode=1/0_JCN_3PH_16KV_3 Length=0.000742 units=km
New Line.P5741362-B$297358061 phases=2 Bus1=224181415.1.3 Bus2=297358063.1.3 LineCode=1/0_JCN_2PH_16KV_2 Length=0.141949 units=km
New Line.GS6842-3$GS6843-1 phases=3 Bus1=223366106.1.2.3 Bus2=223368984.1.2.3 LineCode=1000_JCN_3PH_16KV_3 Length=0.356652 units=km
New Line.GS6842-4$ND224182023 phases=3 Bus1=223366115.1.2.3 Bus2=224182023.1.2.3 LineCode=1000_JCN_3PH_16KV_3 Length=0.062016 units=km
New Line.GS6767-1$GS6866-2 phases=3 Bus1=220106787.1.2.3 Bus2=222233812.1.2.3 LineCode=1000_JCN_3PH_16KV_3 Length=0.791329 units=km
New Line.GS6873-3$ND224182023 phases=3 Bus1=224182023.1.2.3 Bus2=223369549.1.2.3 LineCode=1000_JCN_3PH_16KV_3 Length=0.629846 units=km
New Line.ND224182023$224182045 phases=3 Bus1=224182023.1.2.3 Bus2=224182047.1.2.3 LineCode=1/0_JCN_3PH_16KV_3 Length=0.088261 units=km
New Line.GS6842-5$ND239923124 phases=3 Bus1=223366124.1.2.3 Bus2=239923124.1.2.3 LineCode=1000_JCN_3PH_16KV_3 Length=0.152315 units=km
New Line.223243015$264299883 phases=3 Bus1=264299885.1.2.3 Bus2=223243017.1.2.3 LineCode=1/0_JCN_3PH_16KV_3 Length=0.22766 units=km
New Line.224182278$J740A-2P phases=3 Bus1=224182281.1.2.3 Bus2=223369322.1.2.3 LineCode=1/0_JCN_3PH_16KV_3 Length=0.001942 units=km
New Line.GS6928-4$PME6929-2 phases=3 Bus1=231194059.1.2.3 Bus2=231193881.1.2.3 LineCode=1000_JCN_3PH_16KV_3 Length=0.099347 units=km
New Line.236185833$P5750915-1 phases=3 Bus1=236185836.1.2.3 Bus2=236185787.1.2.3 LineCode=1/0_JCN_3PH_16KV_3 Length=0.009628 units=km
New Line.PME6887-1$236686114 phases=3 Bus1=236685806.1.2.3 Bus2=236686117.1.2.3 LineCode=1/0_JCN_3PH_16KV_3 Length=0.00356 units=km
New Line.240062820$240062847 phases=3 Bus1=240062822.1.2.3 Bus2=240062849.1.2.3 LineCode=1/0_JCN_3PH_16KV_3 Length=0.015332 units=km
New Line.240478962$GS6891-3 phases=3 Bus1=224182816.1.2.3 Bus2=240478964.1.2.3 LineCode=1/0_JCN_3PH_16KV_3 Length=0.147394 units=km
New Line.ND239923124$PME6926-1 phases=3 Bus1=239923124.1.2.3 Bus2=231193602.1.2.3 LineCode=1000_JCN_3PH_16KV_3 Length=0.009486 units=km
New Line.239923137$ND239923124 phases=3 Bus1=239923124.1.2.3 Bus2=239923139.1.2.3 LineCode=1/0_JCN_3PH_16KV_3 Length=0.007983 units=km
New Line.ND241577949$GS6842-6 phases=3 Bus1=223366133.1.2.3 Bus2=241577949.1.2.3 LineCode=1000_JCN_3PH_16KV_3 Length=0.069125 units=km
New Line.224182045$P5750870-A phases=3 Bus1=224182048.1.2.3 Bus2=223945173.1.2.3 LineCode=1/0_JCN_3PH_16KV_3 Length=0.003096 units=km
New Line.GS6843-2$232838263 phases=3 Bus1=223368993.1.2.3 Bus2=232838265.1.2.3 LineCode=1/0_JCN_3PH_16KV_3 Length=0.060556 units=km
New Line.GS6948-3$ND241577949 phases=3 Bus1=241577949.1.2.3 Bus2=241577819.1.2.3 LineCode=1000_JCN_3PH_16KV_3 Length=0.140407 units=km
New Line.GS6843-3$PME6888-2 phases=3 Bus1=223369002.1.2.3 Bus2=224071566.1.2.3 LineCode=1000_JCN_3PH_16KV_3 Length=0.158709 units=km
New Line.239923137$P5750912-1 phases=3 Bus1=239923140.1.2.3 Bus2=239923079.1.2.3 LineCode=1/0_JCN_3PH_16KV_3 Length=0.004664 units=km
New Line.GS6843-4$GS6844-2 phases=3 Bus1=223369011.1.2.3 Bus2=223366770.1.2.3 LineCode=1000_JCN_3PH_16KV_3 Length=0.344196 units=km
New Line.GS6873-4$224182358 phases=3 Bus1=223369558.1.2.3 Bus2=224182360.1.2.3 LineCode=1/0_JCN_3PH_16KV_3 Length=0.145596 units=km
New Line.GS6866-3$GS6877-2 phases=3 Bus1=222233821.1.2.3 Bus2=224182674.1.2.3 LineCode=1000_JCN_3PH_16KV_3 Length=0.171366 units=km
New Line.232838263$P5748443-1 phases=3 Bus1=232838266.1.2.3 Bus2=232838217.1.2.3 LineCode=1/0_JCN_3PH_16KV_3 Length=0.002787 units=km
New Line.PME6926-4$236089989 phases=3 Bus1=231193584.1.2.3 Bus2=236089992.1.2.3 LineCode=1/0_JCN_3PH_16KV_3 Length=0.003017 units=km
New Line.ND223367284$GS6891-2 phases=3 Bus1=224182807.1.2.3 Bus2=223367200.1.2.3 LineCode=1000_JCN_3PH_16KV_3 Length=0.152097 units=km
New Line.297358061$P5750867-1 phases=2 Bus1=297358064.1.3 Bus2=224181504.1.3 LineCode=1/0_JCN_2PH_16KV_2 Length=0.002235 units=km
New Line.264299825$J367A-3P phases=3 Bus1=264299827.1.2.3 Bus2=224183599.1.2.3 LineCode=1/0_JCN_3PH_16KV_3 Length=0.098282 units=km
New Line.237042013$P5750916-1 phases=3 Bus1=237042016.1.2.3 Bus2=237041965.1.2.3 LineCode=1/0_JCN_3PH_16KV_3 Length=0.002936 units=km
New Line.266405280$266405307 phases=3 Bus1=266405282.1.2.3 Bus2=266405309.1.2.3 LineCode=1/0_JCN_3PH_16KV_3 Length=0.01781 units=km
New Line.223243015$P5748369-1 phases=3 Bus1=223243018.1.2.3 Bus2=223242939.1.2.3 LineCode=1/0_JCN_3PH_16KV_3 Length=0.006299 units=km
New Line.223945249$P5750870-B phases=3 Bus1=223945156.1.2.3 Bus2=223945252.1.2.3 LineCode=1/0_JCN_3PH_16KV_3 Length=0.004104 units=km
New Line.GS6873-1$ND224181720 phases=3 Bus1=223369531.1.2.3 Bus2=224181720.1.2.3 LineCode=1/0_JCN_3PH_16KV_3 Length=0.012222 units=km
New Line.PME6926-2$PME6927-1 phases=3 Bus1=231193593.1.2.3 Bus2=231193743.1.2.3 LineCode=1000_JCN_3PH_16KV_3 Length=0.06222 units=km
New Line.236686047$PME6926-3 phases=3 Bus1=231193575.1.2.3 Bus2=236686050.1.2.3 LineCode=1/0_JCN_3PH_16KV_3 Length=0.002094 units=km
New Line.PME6888-3$224071784 phases=3 Bus1=224071548.1.2.3 Bus2=224071787.1.2.3 LineCode=1/0_JCN_3PH_16KV_3 Length=0.003035 units=km
New Line.224182358$J363A-1P phases=3 Bus1=224182361.1.2.3 Bus2=224181323.1.2.3 LineCode=1/0_JCN_3PH_16KV_3 Length=0.018054 units=km
New Line.GS6873-6$224181636 phases=3 Bus1=223369576.1.2.3 Bus2=224181638.1.2.3 LineCode=1/0_JCN_3PH_16KV_3 Length=0.106237 units=km
New Line.ND224181720$GS6874-4 phases=3 Bus1=224181720.1.2.3 Bus2=224181819.1.2.3 LineCode=1000_JCN_3PH_16KV_3 Length=0.161275 units=km
New Line.ND224181720$224184651 phases=3 Bus1=224181720.1.2.3 Bus2=224184653.1.2.3 LineCode=1/0_JCN_3PH_16KV_3 Length=0.108935 units=km
New Line.236089989$236089962 phases=3 Bus1=236089991.1.2.3 Bus2=236089964.1.2.3 LineCode=1/0_JCN_3PH_16KV_3 Length=0.015217 units=km
New Line.GS6948-2$PME7115-2 phases=3 Bus1=241577810.1.2.3 Bus2=240062609.1.2.3 LineCode=350_JCN_3PH_16KV_3 Length=0.397812 units=km
New Line.224182090$223945249 phases=3 Bus1=223945251.1.2.3 Bus2=224182092.1.2.3 LineCode=1/0_JCN_3PH_16KV_3 Length=0.062284 units=km
New Line.PME6888-1$GS6928-2 phases=3 Bus1=224071575.1.2.3 Bus2=231194041.1.2.3 LineCode=1000_JCN_3PH_16KV_3 Length=0.314648 units=km
New Line.PME6888-4$232838138 phases=3 Bus1=224071557.1.2.3 Bus2=232838141.1.2.3 LineCode=1/0_JCN_3PH_16KV_3 Length=0.001626 units=km
New Line.236686047$236685594 phases=3 Bus1=236686049.1.2.3 Bus2=236685596.1.2.3 LineCode=1/0_JCN_3PH_16KV_3 Length=0.015881 units=km
New Line.GS6948-1$ND266405215 phases=3 Bus1=241577801.1.2.3 Bus2=266405215.1.2.3 LineCode=1/0_JCN_3PH_16KV_3 Length=0.011713 units=km
New Line.224071784$224071810 phases=3 Bus1=224071786.1.2.3 Bus2=224071812.1.2.3 LineCode=1/0_JCN_3PH_16KV_3 Length=0.080963 units=km
New Line.224181636$P5750868-1 phases=3 Bus1=224181639.1.2.3 Bus2=224181271.1.2.3 LineCode=1/0_JCN_3PH_16KV_3 Length=0.008991 units=km
New Line.224184651$P5741362-A phases=3 Bus1=224184654.1.2.3 Bus2=224181432.1.2.3 LineCode=1/0_JCN_3PH_16KV_3 Length=0.01032 units=km
New Line.0228112$240478962 phases=3 Bus1=240478965.1.2.3 Bus2=224182979.1.2.3 LineCode=1/0_JCN_3PH_16KV_3 Length=0.001734 units=km
New Line.PME6893-2$GS6891-1 phases=3 Bus1=224182798.1.2.3 Bus2=224183010.1.2.3 LineCode=1000_JCN_3PH_16KV_3 Length=0.169504 units=km
New Line.RCS7017-6$224184624 phases=3 Bus1=224183934.1.2.3 Bus2=224184626.1.2.3 LineCode=1/0_JCN_3PH_16KV_3 Length=0.176901 units=km
New Line.236686114$236686011 phases=3 Bus1=236686116.1.2.3 Bus2=236686013.1.2.3 LineCode=1/0_JCN_3PH_16KV_3 Length=0.013286 units=km
New Line.240062847$P5748366-1 phases=3 Bus1=240062850.1.2.3 Bus2=240062738.1.2.3 LineCode=1/0_JCN_3PH_16KV_3 Length=0.002466 units=km
New Line.RCS7017-3$PME6935-1 phases=3 Bus1=224183907.1.2.3 Bus2=223331483.1.2.3 LineCode=350_JCN_3PH_16KV_3 Length=0.138245 units=km
New Line.237042075$PME6929-3 phases=3 Bus1=231193863.1.2.3 Bus2=237042078.1.2.3 LineCode=1/0_JCN_3PH_16KV_3 Length=0.002137 units=km
New Line.266405307$P5745025-1 phases=3 Bus1=266405310.1.2.3 Bus2=266405230.1.2.3 LineCode=1/0_JCN_3PH_16KV_3 Length=0.001132 units=km
New Line.224184624$P5741374-1 phases=3 Bus1=224184627.1.2.3 Bus2=224183794.1.2.3 LineCode=1/0_JCN_3PH_16KV_3 Length=0.002782 units=km
New Line.PME6929-4$236685499 phases=3 Bus1=231193872.1.2.3 Bus2=236685502.1.2.3 LineCode=1/0_JCN_3PH_16KV_3 Length=0.006607 units=km
New Line.P5748442-1$236686011 phases=3 Bus1=236686014.1.2.3 Bus2=236685914.1.2.3 LineCode=1/0_JCN_3PH_16KV_3 Length=0.003714 units=km
New Line.PME6929-1$237041891 phases=3 Bus1=231193890.1.2.3 Bus2=237041929.1.2.3 LineCode=1/0_JCN_3PH_16KV_3 Length=0.038557 units=km
New Line.224182321$J740A-4P phases=3 Bus1=223369314.1.2.3 Bus2=224182324.1.2.3 LineCode=1/0_JCN_3PH_16KV_3 Length=0.002431 units=km
New Line.PME6893-3$224184424 phases=3 Bus1=224182992.1.2.3 Bus2=224184427.1.2.3 LineCode=1/0_JCN_3PH_16KV_3 Length=0.002608 units=km
New Line.224184592$RCS7017-1 phases=3 Bus1=224183889.1.2.3 Bus2=224184594.1.2.3 LineCode=1/0_JCN_3PH_16KV_3 Length=0.238093 units=km
New Line.J367A-2P$231056096 phases=3 Bus1=224183607.1.2.3 Bus2=231056098.1.2.3 LineCode=1/0_JCN_3PH_16KV_3 Length=0.180456 units=km
New Line.236208779$237042075 phases=3 Bus1=237042077.1.2.3 Bus2=236208781.1.2.3 LineCode=1/0_JCN_3PH_16KV_3 Length=0.165806 units=km
New Line.GS6844-1$224182220 phases=3 Bus1=223366761.1.2.3 Bus2=224182222.1.2.3 LineCode=1/0_JCN_3PH_16KV_3 Length=0.079363 units=km
New Line.GS6877-1$GS6891-4 phases=3 Bus1=224182665.1.2.3 Bus2=224182825.1.2.3 LineCode=1000_JCN_3PH_16KV_3 Length=0.160065 units=km
New Line.236089962$P5750911-1 phases=3 Bus1=236089965.1.2.3 Bus2=236089916.1.2.3 LineCode=1/0_JCN_3PH_16KV_3 Length=0.002011 units=km
New Line.PME6927-4$236185860 phases=3 Bus1=231193725.1.2.3 Bus2=236185863.1.2.3 LineCode=1/0_JCN_3PH_16KV_3 Length=0.003329 units=km
New Line.GS6844-3$PME6887-2 phases=3 Bus1=223366779.1.2.3 Bus2=236685797.1.2.3 LineCode=350_JCN_3PH_16KV_3 Length=0.281348 units=km
New Line.PME7114-1$ND266405215 phases=3 Bus1=266405215.1.2.3 Bus2=266405120.1.2.3 LineCode=1/0_JCN_3PH_16KV_3 Length=0.035296 units=km
New Line.224182090$P5750873-1 phases=3 Bus1=224182093.1.2.3 Bus2=223369205.1.2.3 LineCode=1/0_JCN_3PH_16KV_3 Length=0.002873 units=km
New Line.PME6927-2$GS6928-3 phases=3 Bus1=231193734.1.2.3 Bus2=231194050.1.2.3 LineCode=1000_JCN_3PH_16KV_3 Length=0.244377 units=km
New Line.232838088$232838138 phases=3 Bus1=232838140.1.2.3 Bus2=232838090.1.2.3 LineCode=1/0_JCN_3PH_16KV_3 Length=0.062868 units=km
New Line.236685594$P5750913-1 phases=3 Bus1=236685597.1.2.3 Bus2=236685545.1.2.3 LineCode=1/0_JCN_3PH_16KV_3 Length=0.002997 units=km
New Line.PME6927-3$237042101 phases=3 Bus1=231193716.1.2.3 Bus2=237042104.1.2.3 LineCode=1/0_JCN_3PH_16KV_3 Length=0.002293 units=km
New Line.PME6935-4$223331849 phases=3 Bus1=223331465.1.2.3 Bus2=223331852.1.2.3 LineCode=1/0_JCN_3PH_16KV_3 Length=0.005465 units=km
New Line.PME6893-4$224184475 phases=3 Bus1=224183001.1.2.3 Bus2=224184478.1.2.3 LineCode=1/0_JCN_3PH_16KV_3 Length=0.002403 units=km
New Line.236685499$236685457 phases=3 Bus1=236685501.1.2.3 Bus2=236685459.1.2.3 LineCode=1/0_JCN_3PH_16KV_3 Length=0.061386 units=km
New Line.P5750920-1$237041891 phases=3 Bus1=237041894.1.2.3 Bus2=237041839.1.2.3 LineCode=1/0_JCN_3PH_16KV_3 Length=0.002039 units=km
New Line.PME6893-1$301807939 phases=3 Bus1=224183019.1.2.3 Bus2=301807942.1.2.3 LineCode=1/0_JCN_3PH_16KV_3 Length=0.001935 units=km
New Line.PME6935-2$223331685 phases=3 Bus1=223331474.1.2.3 Bus2=223331688.1.2.3 LineCode=1/0_JCN_3PH_16KV_3 Length=0.00539 units=km
New Line.PME6935-3$223331755 phases=3 Bus1=223331456.1.2.3 Bus2=223331758.1.2.3 LineCode=1/0_JCN_3PH_16KV_3 Length=0.002226 units=km
New Line.224184592$P5744960-1 phases=3 Bus1=224184595.1.2.3 Bus2=224183753.1.2.3 LineCode=1/0_JCN_3PH_16KV_3 Length=0.004087 units=km
New Line.224184424$224184451 phases=3 Bus1=224184426.1.2.3 Bus2=224184453.1.2.3 LineCode=1/0_JCN_3PH_16KV_3 Length=0.047163 units=km
New Line.P5748368-1$231056096 phases=3 Bus1=231056099.1.2.3 Bus2=231056035.1.2.3 LineCode=1/0_JCN_3PH_16KV_3 Length=0.002767 units=km
New Line.P5750921-1$236208779 phases=3 Bus1=236208782.1.2.3 Bus2=236208718.1.2.3 LineCode=1/0_JCN_3PH_16KV_3 Length=0.001988 units=km
New Line.224182321$298211217 phases=3 Bus1=224182323.1.2.3 Bus2=298211255.1.2.3 LineCode=1/0_JCN_3PH_16KV_3 Length=0.129549 units=km
New Line.223331849$223331797 phases=3 Bus1=223331851.1.2.3 Bus2=223331799.1.2.3 LineCode=1/0_JCN_3PH_16KV_3 Length=0.201619 units=km
New Line.224184475$224184502 phases=3 Bus1=224184477.1.2.3 Bus2=224184504.1.2.3 LineCode=1/0_JCN_3PH_16KV_3 Length=0.030838 units=km
New Line.301807939$224184539 phases=3 Bus1=301807941.1.2.3 Bus2=224184541.1.2.3 LineCode=1/0_JCN_3PH_16KV_3 Length=0.112231 units=km
New Line.236685457$P5750922-1 phases=3 Bus1=236685460.1.2.3 Bus2=236685388.1.2.3 LineCode=1/0_JCN_3PH_16KV_3 Length=0.004645 units=km
New Line.223331685$223331658 phases=3 Bus1=223331687.1.2.3 Bus2=223331660.1.2.3 LineCode=1/0_JCN_3PH_16KV_3 Length=0.05018 units=km
New Line.223331755$223331824 phases=3 Bus1=223331757.1.2.3 Bus2=223331826.1.2.3 LineCode=1/0_JCN_3PH_16KV_3 Length=0.105997 units=km
New Line.P5750874-1$298211217 phases=3 Bus1=298211220.1.2.3 Bus2=223369424.1.2.3 LineCode=1/0_JCN_3PH_16KV_3 Length=0.002842 units=km
New Line.P5750896-1$224184451 phases=3 Bus1=224184454.1.2.3 Bus2=224183127.1.2.3 LineCode=1/0_JCN_3PH_16KV_3 Length=0.003194 units=km
New Line.223331797$ND223331606 phases=3 Bus1=223331800.1.2.3 Bus2=223331588.1.2.3 LineCode=1/0_JCN_3PH_16KV_3 Length=0.010256 units=km
New Line.224184502$P5750894-1 phases=3 Bus1=224184505.1.2.3 Bus2=224183168.1.2.3 LineCode=1/0_JCN_3PH_16KV_3 Length=0.004136 units=km
New Line.224184539$P5750893-1 phases=3 Bus1=224184542.1.2.3 Bus2=224183209.1.2.3 LineCode=1/0_JCN_3PH_16KV_3 Length=0.002185 units=km
New Line.223331824$ND223331631 phases=3 Bus1=223331827.1.2.3 Bus2=223331613.1.2.3 LineCode=1/0_JCN_3PH_16KV_3 Length=0.009104 units=km
New Line.223331658$0223455 phases=3 Bus1=223331661.1.2.3 Bus2=223331640.1.2.3 LineCode=1/0_JCN_3PH_16KV_3 Length=0.005249 units=km
New Line.224182220$P5728556-1 phases=3 Bus1=224182223.1.2.3 Bus2=223369258.1.2.3 LineCode=1/0_JCN_3PH_16KV_3 Length=0.005838 units=km
New Line.P5750925-1$224071810 phases=3 Bus1=224071813.1.2.3 Bus2=224071695.1.2.3 LineCode=1/0_JCN_3PH_16KV_3 Length=0.002556 units=km
New Line.266405280$266405280 phases=3 Bus1=266405111.1.2.3 Bus2=-777777266405111.1.2.3 LineCode=1/0_JCN_ABC_16_3 Length=1e-05 units=km
New Line.11641$GS6771-1 phases=3 Bus1=-88888835274536.1.2.3 Bus2=212886370.1.2.3 LineCode=1000_JCN_3PH_16KV_3 Length=0.204431 units=km

! Switches
New Line.MENDOZA$MCDONNELL_GS6771-2$GS6771-2 phases=3 Bus1=212886379.1.2.3 Bus2=-777777212886379.1.2.3 switch=y r1=0.001 x1=0.001 r0=0.001 x0=0.001 Length=0.001 units=km
New Line.MENDOZA$REPUBLIC_GS6842-1$GS6842-1 phases=3 Bus1=223366088.1.2.3 Bus2=-777777223366088.1.2.3 switch=y r1=0.001 x1=0.001 r0=0.001 x0=0.001 Length=0.001 units=km
New Line.MENDOZA$FILLY_GS6866-4$GS6866-4 phases=3 Bus1=222233830.1.2.3 Bus2=-777777222233830.1.2.3 switch=y r1=0.001 x1=0.001 r0=0.001 x0=0.001 Length=0.001 units=km
New Line.MENDOZA$REPUBLIC_RCS7017-2$RCS7017-2 phases=3 Bus1=224183898.1.2.3 Bus2=-777777224183898.1.2.3 switch=y r1=0.001 x1=0.001 r0=0.001 x0=0.001 Length=0.001 units=km
New Line.MENDOZA$BOEING_GS6844-4$GS6844-4 phases=3 Bus1=223366788.1.2.3 Bus2=-777777223366788.1.2.3 switch=y r1=0.001 x1=0.001 r0=0.001 x0=0.001 Length=0.001 units=km
New Line.GS6891-3$GS6891-4 phases=3 Bus1=224182790.1.2.3 Bus2=224182784.1.2.3 switch=y r1=0.001 x1=0.001 r0=0.001 x0=0.001 Length=0.001 units=km
New Line.231194047$231194056 phases=3 Bus1=231194018.1.2.3 Bus2=231194024.1.2.3 switch=y r1=0.001 x1=0.001 r0=0.001 x0=0.001 Length=0.001 units=km
New Line.232838088 phases=3 Bus1=232838090.1.2.3 Bus2=232838091.1.2.3 switch=y r1=0.001 x1=0.001 r0=0.001 x0=0.001 Length=0.001 units=km
New Line.PME6887-4$PME6887-2 phases=3 Bus1=236685771.1.2.3 Bus2=236685770.1.2.3 switch=y r1=0.001 x1=0.001 r0=0.001 x0=0.001 Length=0.001 units=km
New Line.237042101 phases=3 Bus1=237042104.1.2.3 Bus2=237042103.1.2.3 switch=y r1=0.001 x1=0.001 r0=0.001 x0=0.001 Length=0.001 units=km
New Line.PME7114-2$PME7114-1 phases=3 Bus1=266405103.1.2.3 Bus2=266405102.1.2.3 switch=y r1=0.001 x1=0.001 r0=0.001 x0=0.001 Length=0.001 units=km
New Line.212886376$GS6771-3 phases=3 Bus1=212886350.1.2.3 Bus2=212886356.1.2.3 switch=y r1=0.001 x1=0.001 r0=0.001 x0=0.001 Length=0.001 units=km
New Line.GS6771-3$212886394 phases=3 Bus1=212886356.1.2.3 Bus2=212886362.1.2.3 switch=y r1=0.001 x1=0.001 r0=0.001 x0=0.001 Length=0.001 units=km
New Line.239120057$RCS6768-4 phases=3 Bus1=239120021.1.2.3 Bus2=239120015.1.2.3 switch=y r1=0.001 x1=0.001 r0=0.001 x0=0.001 Length=0.001 units=km
New Line.RCS6768-4$239120075 phases=3 Bus1=239120021.1.2.3 Bus2=239120027.1.2.3 switch=y r1=0.001 x1=0.001 r0=0.001 x0=0.001 Length=0.001 units=km
New Line.239120048$239120057 phases=3 Bus1=239120015.1.2.3 Bus2=239120009.1.2.3 switch=y r1=0.001 x1=0.001 r0=0.001 x0=0.001 Length=0.001 units=km
New Line.239120075$RCS6768-6 phases=3 Bus1=239120027.1.2.3 Bus2=239120033.1.2.3 switch=y r1=0.001 x1=0.001 r0=0.001 x0=0.001 Length=0.001 units=km
New Line.239120038$239120048 phases=3 Bus1=239120009.1.2.3 Bus2=239120008.1.2.3 switch=y r1=0.001 x1=0.001 r0=0.001 x0=0.001 Length=0.001 units=km
New Line.GS6767-3$220106811 phases=3 Bus1=220106779.1.2.3 Bus2=220106773.1.2.3 switch=y r1=0.001 x1=0.001 r0=0.001 x0=0.001 Length=0.001 units=km
New Line.223366095$223366104 phases=3 Bus1=223366056.1.2.3 Bus2=223366062.1.2.3 switch=y r1=0.001 x1=0.001 r0=0.001 x0=0.001 Length=0.001 units=km
New Line.263861296 phases=3 Bus1=263861298.1.2.3 Bus2=263861299.1.2.3 switch=y r1=0.001 x1=0.001 r0=0.001 x0=0.001 Length=0.001 units=km
New Line.GS6767-2$GS6767-3 phases=3 Bus1=220106773.1.2.3 Bus2=220106767.1.2.3 switch=y r1=0.001 x1=0.001 r0=0.001 x0=0.001 Length=0.001 units=km
New Line.223366104$223366113 phases=3 Bus1=223366062.1.2.3 Bus2=223366068.1.2.3 switch=y r1=0.001 x1=0.001 r0=0.001 x0=0.001 Length=0.001 units=km
New Line.220106784$GS6767-2 phases=3 Bus1=220106767.1.2.3 Bus2=220106766.1.2.3 switch=y r1=0.001 x1=0.001 r0=0.001 x0=0.001 Length=0.001 units=km
New Line.223366113$223366122 phases=3 Bus1=223366068.1.2.3 Bus2=223366074.1.2.3 switch=y r1=0.001 x1=0.001 r0=0.001 x0=0.001 Length=0.001 units=km
New Line.224182278 phases=3 Bus1=224182280.1.2.3 Bus2=224182281.1.2.3 switch=y r1=0.001 x1=0.001 r0=0.001 x0=0.001 Length=0.001 units=km
New Line.GS6891-2$GS6891-3 phases=3 Bus1=224182784.1.2.3 Bus2=224182778.1.2.3 switch=y r1=0.001 x1=0.001 r0=0.001 x0=0.001 Length=0.001 units=km
New Line.236185833 phases=3 Bus1=236185835.1.2.3 Bus2=236185836.1.2.3 switch=y r1=0.001 x1=0.001 r0=0.001 x0=0.001 Length=0.001 units=km
New Line.240062820 phases=3 Bus1=240062823.1.2.3 Bus2=240062822.1.2.3 switch=y r1=0.001 x1=0.001 r0=0.001 x0=0.001 Length=0.001 units=km
New Line.264299883 phases=3 Bus1=264299886.1.2.3 Bus2=264299885.1.2.3 switch=y r1=0.001 x1=0.001 r0=0.001 x0=0.001 Length=0.001 units=km
New Line.223366122$223366131 phases=3 Bus1=223366074.1.2.3 Bus2=223366080.1.2.3 switch=y r1=0.001 x1=0.001 r0=0.001 x0=0.001 Length=0.001 units=km
New Line.223368981$GS6843-2 phases=3 Bus1=223368963.1.2.3 Bus2=223368964.1.2.3 switch=y r1=0.001 x1=0.001 r0=0.001 x0=0.001 Length=0.001 units=km
New Line.GS6843-2$223368999 phases=3 Bus1=223368964.1.2.3 Bus2=223368970.1.2.3 switch=y r1=0.001 x1=0.001 r0=0.001 x0=0.001 Length=0.001 units=km
New Line.224182045 phases=3 Bus1=224182047.1.2.3 Bus2=224182048.1.2.3 switch=y r1=0.001 x1=0.001 r0=0.001 x0=0.001 Length=0.001 units=km
New Line.GS6891-1$GS6891-2 phases=3 Bus1=224182778.1.2.3 Bus2=224182777.1.2.3 switch=y r1=0.001 x1=0.001 r0=0.001 x0=0.001 Length=0.001 units=km
New Line.RCS7017-4$224183923 phases=3 Bus1=224183875.1.2.3 Bus2=224183869.1.2.3 switch=y r1=0.001 x1=0.001 r0=0.001 x0=0.001 Length=0.001 units=km
New Line.224183923$RCS7017-6 phases=3 Bus1=224183875.1.2.3 Bus2=224183881.1.2.3 switch=y r1=0.001 x1=0.001 r0=0.001 x0=0.001 Length=0.001 units=km
New Line.237042013 phases=3 Bus1=237042015.1.2.3 Bus2=237042016.1.2.3 switch=y r1=0.001 x1=0.001 r0=0.001 x0=0.001 Length=0.001 units=km
New Line.264299825 phases=3 Bus1=264299828.1.2.3 Bus2=264299827.1.2.3 switch=y r1=0.001 x1=0.001 r0=0.001 x0=0.001 Length=0.001 units=km
New Line.266405280 phases=3 Bus1=266405111.1.2.3 Bus2=266405282.1.2.3 switch=y r1=0.001 x1=0.001 r0=0.001 x0=0.001 Length=0.001 units=km
New Line.297358061 phases=2 Bus1=297358063.1.3 Bus2=297358064.1.3 switch=y r1=0.001 x1=0.001 r0=0.001 x0=0.001 Length=0.001 units=km
New Line.GS6866-1$222233810 phases=3 Bus1=222233777.1.2.3 Bus2=222233776.1.2.3 switch=y r1=0.001 x1=0.001 r0=0.001 x0=0.001 Length=0.001 units=km
New Line.222233810$222233819 phases=3 Bus1=222233777.1.2.3 Bus2=222233783.1.2.3 switch=y r1=0.001 x1=0.001 r0=0.001 x0=0.001 Length=0.001 units=km
New Line.223368999$223369008 phases=3 Bus1=223368970.1.2.3 Bus2=223368976.1.2.3 switch=y r1=0.001 x1=0.001 r0=0.001 x0=0.001 Length=0.001 units=km
New Line.GS6873-2$223369547 phases=3 Bus1=223369505.1.2.3 Bus2=223369499.1.2.3 switch=y r1=0.001 x1=0.001 r0=0.001 x0=0.001 Length=0.001 units=km
New Line.223369547$GS6873-4 phases=3 Bus1=223369505.1.2.3 Bus2=223369511.1.2.3 switch=y r1=0.001 x1=0.001 r0=0.001 x0=0.001 Length=0.001 units=km
New Line.239923137 phases=3 Bus1=239923139.1.2.3 Bus2=239923140.1.2.3 switch=y r1=0.001 x1=0.001 r0=0.001 x0=0.001 Length=0.001 units=km
New Line.222233819$222233828 phases=3 Bus1=222233783.1.2.3 Bus2=222233789.1.2.3 switch=y r1=0.001 x1=0.001 r0=0.001 x0=0.001 Length=0.001 units=km
New Line.GS6873-1$GS6873-2 phases=3 Bus1=223369499.1.2.3 Bus2=223369498.1.2.3 switch=y r1=0.001 x1=0.001 r0=0.001 x0=0.001 Length=0.001 units=km
New Line.GS6873-4$GS6873-5 phases=3 Bus1=223369511.1.2.3 Bus2=223369517.1.2.3 switch=y r1=0.001 x1=0.001 r0=0.001 x0=0.001 Length=0.001 units=km
New Line.PME6926-3$PME6926-4 phases=3 Bus1=231193567.1.2.3 Bus2=231193566.1.2.3 switch=y r1=0.001 x1=0.001 r0=0.001 x0=0.001 Length=0.001 units=km
New Line.232838263 phases=3 Bus1=232838265.1.2.3 Bus2=232838266.1.2.3 switch=y r1=0.001 x1=0.001 r0=0.001 x0=0.001 Length=0.001 units=km
New Line.222233828$GS6866-5 phases=3 Bus1=222233789.1.2.3 Bus2=222233795.1.2.3 switch=y r1=0.001 x1=0.001 r0=0.001 x0=0.001 Length=0.001 units=km
New Line.GS6873-5$GS6873-6 phases=3 Bus1=223369517.1.2.3 Bus2=223369523.1.2.3 switch=y r1=0.001 x1=0.001 r0=0.001 x0=0.001 Length=0.001 units=km
New Line.GS6948-2$241577816 phases=3 Bus1=241577787.1.2.3 Bus2=241577781.1.2.3 switch=y r1=0.001 x1=0.001 r0=0.001 x0=0.001 Length=0.001 units=km
New Line.223243015 phases=3 Bus1=223243017.1.2.3 Bus2=223243018.1.2.3 switch=y r1=0.001 x1=0.001 r0=0.001 x0=0.001 Length=0.001 units=km
New Line.RCS7017-3$RCS7017-4 phases=3 Bus1=224183869.1.2.3 Bus2=224183863.1.2.3 switch=y r1=0.001 x1=0.001 r0=0.001 x0=0.001 Length=0.001 units=km
New Line.236686114 phases=3 Bus1=236686117.1.2.3 Bus2=236686116.1.2.3 switch=y r1=0.001 x1=0.001 r0=0.001 x0=0.001 Length=0.001 units=km
New Line.240062847 phases=3 Bus1=240062849.1.2.3 Bus2=240062850.1.2.3 switch=y r1=0.001 x1=0.001 r0=0.001 x0=0.001 Length=0.001 units=km
New Line.240478962 phases=3 Bus1=240478964.1.2.3 Bus2=240478965.1.2.3 switch=y r1=0.001 x1=0.001 r0=0.001 x0=0.001 Length=0.001 units=km
New Line.223367219$223367167 phases=3 Bus1=223367200.1.2.3 Bus2=223367171.1.2.3 switch=y r1=0.001 x1=0.001 r0=0.001 x0=0.001 Length=0.001 units=km
New Line.241577816$GS6948-4 phases=3 Bus1=241577787.1.2.3 Bus2=241577793.1.2.3 switch=y r1=0.001 x1=0.001 r0=0.001 x0=0.001 Length=0.001 units=km
New Line.PME6888-3$PME6888-4 phases=3 Bus1=224071539.1.2.3 Bus2=224071540.1.2.3 switch=y r1=0.001 x1=0.001 r0=0.001 x0=0.001 Length=0.001 units=km
New Line.224182358 phases=3 Bus1=224182360.1.2.3 Bus2=224182361.1.2.3 switch=y r1=0.001 x1=0.001 r0=0.001 x0=0.001 Length=0.001 units=km
New Line.236089989 phases=3 Bus1=236089992.1.2.3 Bus2=236089991.1.2.3 switch=y r1=0.001 x1=0.001 r0=0.001 x0=0.001 Length=0.001 units=km
New Line.GS6948-1$GS6948-2 phases=3 Bus1=241577781.1.2.3 Bus2=241577780.1.2.3 switch=y r1=0.001 x1=0.001 r0=0.001 x0=0.001 Length=0.001 units=km
New Line.GS6844-1$223366768 phases=3 Bus1=223366729.1.2.3 Bus2=223366728.1.2.3 switch=y r1=0.001 x1=0.001 r0=0.001 x0=0.001 Length=0.001 units=km
New Line.223366768$GS6844-3 phases=3 Bus1=223366729.1.2.3 Bus2=223366735.1.2.3 switch=y r1=0.001 x1=0.001 r0=0.001 x0=0.001 Length=0.001 units=km
New Line.223945249 phases=3 Bus1=223945252.1.2.3 Bus2=223945251.1.2.3 switch=y r1=0.001 x1=0.001 r0=0.001 x0=0.001 Length=0.001 units=km
New Line.236686047 phases=3 Bus1=236686050.1.2.3 Bus2=236686049.1.2.3 switch=y r1=0.001 x1=0.001 r0=0.001 x0=0.001 Length=0.001 units=km
New Line.GS6844-3$223366786 phases=3 Bus1=223366735.1.2.3 Bus2=223366741.1.2.3 switch=y r1=0.001 x1=0.001 r0=0.001 x0=0.001 Length=0.001 units=km
New Line.224071784 phases=3 Bus1=224071787.1.2.3 Bus2=224071786.1.2.3 switch=y r1=0.001 x1=0.001 r0=0.001 x0=0.001 Length=0.001 units=km
New Line.224181636 phases=3 Bus1=224181638.1.2.3 Bus2=224181639.1.2.3 switch=y r1=0.001 x1=0.001 r0=0.001 x0=0.001 Length=0.001 units=km
New Line.224184651 phases=3 Bus1=224184653.1.2.3 Bus2=224184654.1.2.3 switch=y r1=0.001 x1=0.001 r0=0.001 x0=0.001 Length=0.001 units=km
New Line.PME6927-3$PME6927-4 phases=3 Bus1=231193708.1.2.3 Bus2=231193707.1.2.3 switch=y r1=0.001 x1=0.001 r0=0.001 x0=0.001 Length=0.001 units=km
New Line.236089962 phases=3 Bus1=236089964.1.2.3 Bus2=236089965.1.2.3 switch=y r1=0.001 x1=0.001 r0=0.001 x0=0.001 Length=0.001 units=km
New Line.223366786$GS6844-5 phases=3 Bus1=223366741.1.2.3 Bus2=223366747.1.2.3 switch=y r1=0.001 x1=0.001 r0=0.001 x0=0.001 Length=0.001 units=km
New Line.224181320$224181336 phases=3 Bus1=224181324.1.2.3 Bus2=224181340.1.2.3 switch=y r1=0.001 x1=0.001 r0=0.001 x0=0.001 Length=0.001 units=km
New Line.224181808$224181817 phases=3 Bus1=224181772.1.2.3 Bus2=224181766.1.2.3 switch=y r1=0.001 x1=0.001 r0=0.001 x0=0.001 Length=0.001 units=km
New Line.223369295$223369319 phases=3 Bus1=223369323.1.2.3 Bus2=223369299.1.2.3 switch=y r1=0.001 x1=0.001 r0=0.001 x0=0.001 Length=0.001 units=km
New Line.223369319$223369303 phases=3 Bus1=223369323.1.2.3 Bus2=223369307.1.2.3 switch=y r1=0.001 x1=0.001 r0=0.001 x0=0.001 Length=0.001 units=km
New Line.RCS7017-2$RCS7017-3 phases=3 Bus1=224183863.1.2.3 Bus2=224183857.1.2.3 switch=y r1=0.001 x1=0.001 r0=0.001 x0=0.001 Length=0.001 units=km
New Line.PME6929-3$PME6929-4 phases=3 Bus1=231193854.1.2.3 Bus2=231193855.1.2.3 switch=y r1=0.001 x1=0.001 r0=0.001 x0=0.001 Length=0.001 units=km
New Line.266405307 phases=3 Bus1=266405309.1.2.3 Bus2=266405310.1.2.3 switch=y r1=0.001 x1=0.001 r0=0.001 x0=0.001 Length=0.001 units=km
New Line.223369303$223369311 phases=3 Bus1=223369307.1.2.3 Bus2=223369315.1.2.3 switch=y r1=0.001 x1=0.001 r0=0.001 x0=0.001 Length=0.001 units=km
New Line.224183604$224183596 phases=3 Bus1=224183600.1.2.3 Bus2=224183608.1.2.3 switch=y r1=0.001 x1=0.001 r0=0.001 x0=0.001 Length=0.001 units=km
New Line.RCS7017-1$RCS7017-2 phases=3 Bus1=224183857.1.2.3 Bus2=224183856.1.2.3 switch=y r1=0.001 x1=0.001 r0=0.001 x0=0.001 Length=0.001 units=km
New Line.224184624 phases=3 Bus1=224184626.1.2.3 Bus2=224184627.1.2.3 switch=y r1=0.001 x1=0.001 r0=0.001 x0=0.001 Length=0.001 units=km
New Line.236686011 phases=3 Bus1=236686013.1.2.3 Bus2=236686014.1.2.3 switch=y r1=0.001 x1=0.001 r0=0.001 x0=0.001 Length=0.001 units=km
New Line.224183008$PME6893-4 phases=3 Bus1=224182983.1.2.3 Bus2=224182984.1.2.3 switch=y r1=0.001 x1=0.001 r0=0.001 x0=0.001 Length=0.001 units=km
New Line.224183588$224183604 phases=3 Bus1=224183608.1.2.3 Bus2=224183592.1.2.3 switch=y r1=0.001 x1=0.001 r0=0.001 x0=0.001 Length=0.001 units=km
New Line.237042075 phases=3 Bus1=237042078.1.2.3 Bus2=237042077.1.2.3 switch=y r1=0.001 x1=0.001 r0=0.001 x0=0.001 Length=0.001 units=km
New Line.PME6935-4$223331472 phases=3 Bus1=223331447.1.2.3 Bus2=223331448.1.2.3 switch=y r1=0.001 x1=0.001 r0=0.001 x0=0.001 Length=0.001 units=km
New Line.236685499 phases=3 Bus1=236685502.1.2.3 Bus2=236685501.1.2.3 switch=y r1=0.001 x1=0.001 r0=0.001 x0=0.001 Length=0.001 units=km
New Line.237041891 phases=3 Bus1=237041929.1.2.3 Bus2=237041894.1.2.3 switch=y r1=0.001 x1=0.001 r0=0.001 x0=0.001 Length=0.001 units=km
New Line.224181817$GS6874-5 phases=3 Bus1=224181772.1.2.3 Bus2=224181778.1.2.3 switch=y r1=0.001 x1=0.001 r0=0.001 x0=0.001 Length=0.001 units=km
New Line.224182090 phases=3 Bus1=224182092.1.2.3 Bus2=224182093.1.2.3 switch=y r1=0.001 x1=0.001 r0=0.001 x0=0.001 Length=0.001 units=km
New Line.232838138 phases=3 Bus1=232838141.1.2.3 Bus2=232838140.1.2.3 switch=y r1=0.001 x1=0.001 r0=0.001 x0=0.001 Length=0.001 units=km
New Line.236685594 phases=3 Bus1=236685596.1.2.3 Bus2=236685597.1.2.3 switch=y r1=0.001 x1=0.001 r0=0.001 x0=0.001 Length=0.001 units=km
New Line.PME7115-2$PME7115-4 phases=3 Bus1=240062582.1.2.3 Bus2=240062583.1.2.3 switch=y r1=0.001 x1=0.001 r0=0.001 x0=0.001 Length=0.001 units=km
New Line.GS6844-5$GS6844-6 phases=3 Bus1=223366747.1.2.3 Bus2=223366753.1.2.3 switch=y r1=0.001 x1=0.001 r0=0.001 x0=0.001 Length=0.001 units=km
New Line.224071810 phases=3 Bus1=224071812.1.2.3 Bus2=224071813.1.2.3 switch=y r1=0.001 x1=0.001 r0=0.001 x0=0.001 Length=0.001 units=km
New Line.224181336$224181328 phases=3 Bus1=224181340.1.2.3 Bus2=224181332.1.2.3 switch=y r1=0.001 x1=0.001 r0=0.001 x0=0.001 Length=0.001 units=km
New Line.GS6874-2$224181808 phases=3 Bus1=224181766.1.2.3 Bus2=224181760.1.2.3 switch=y r1=0.001 x1=0.001 r0=0.001 x0=0.001 Length=0.001 units=km
New Line.GS6874-5$GS6874-6 phases=3 Bus1=224181778.1.2.3 Bus2=224181784.1.2.3 switch=y r1=0.001 x1=0.001 r0=0.001 x0=0.001 Length=0.001 units=km
New Line.224182220 phases=3 Bus1=224182222.1.2.3 Bus2=224182223.1.2.3 switch=y r1=0.001 x1=0.001 r0=0.001 x0=0.001 Length=0.001 units=km
New Line.231194029$231194038 phases=3 Bus1=231194012.1.2.3 Bus2=231194011.1.2.3 switch=y r1=0.001 x1=0.001 r0=0.001 x0=0.001 Length=0.001 units=km
New Line.231194038$231194047 phases=3 Bus1=231194012.1.2.3 Bus2=231194018.1.2.3 switch=y r1=0.001 x1=0.001 r0=0.001 x0=0.001 Length=0.001 units=km
New Line.236185860 phases=3 Bus1=236185863.1.2.3 Bus2=236185862.1.2.3 switch=y r1=0.001 x1=0.001 r0=0.001 x0=0.001 Length=0.001 units=km
New Line.224182321 phases=3 Bus1=224182324.1.2.3 Bus2=224182323.1.2.3 switch=y r1=0.001 x1=0.001 r0=0.001 x0=0.001 Length=0.001 units=km
New Line.224184424 phases=3 Bus1=224184427.1.2.3 Bus2=224184426.1.2.3 switch=y r1=0.001 x1=0.001 r0=0.001 x0=0.001 Length=0.001 units=km
New Line.224184592 phases=3 Bus1=224184594.1.2.3 Bus2=224184595.1.2.3 switch=y r1=0.001 x1=0.001 r0=0.001 x0=0.001 Length=0.001 units=km
New Line.231056096 phases=3 Bus1=231056098.1.2.3 Bus2=231056099.1.2.3 switch=y r1=0.001 x1=0.001 r0=0.001 x0=0.001 Length=0.001 units=km
New Line.236208779 phases=3 Bus1=236208781.1.2.3 Bus2=236208782.1.2.3 switch=y r1=0.001 x1=0.001 r0=0.001 x0=0.001 Length=0.001 units=km
New Line.223331849 phases=3 Bus1=223331852.1.2.3 Bus2=223331851.1.2.3 switch=y r1=0.001 x1=0.001 r0=0.001 x0=0.001 Length=0.001 units=km
New Line.224184475 phases=3 Bus1=224184478.1.2.3 Bus2=224184477.1.2.3 switch=y r1=0.001 x1=0.001 r0=0.001 x0=0.001 Length=0.001 units=km
New Line.236685457 phases=3 Bus1=236685459.1.2.3 Bus2=236685460.1.2.3 switch=y r1=0.001 x1=0.001 r0=0.001 x0=0.001 Length=0.001 units=km
New Line.301807939 phases=3 Bus1=301807942.1.2.3 Bus2=301807941.1.2.3 switch=y r1=0.001 x1=0.001 r0=0.001 x0=0.001 Length=0.001 units=km
New Line.223331685 phases=3 Bus1=223331688.1.2.3 Bus2=223331687.1.2.3 switch=y r1=0.001 x1=0.001 r0=0.001 x0=0.001 Length=0.001 units=km
New Line.223331755 phases=3 Bus1=223331758.1.2.3 Bus2=223331757.1.2.3 switch=y r1=0.001 x1=0.001 r0=0.001 x0=0.001 Length=0.001 units=km
New Line.224184451 phases=3 Bus1=224184453.1.2.3 Bus2=224184454.1.2.3 switch=y r1=0.001 x1=0.001 r0=0.001 x0=0.001 Length=0.001 units=km
New Line.298211217 phases=3 Bus1=298211255.1.2.3 Bus2=298211220.1.2.3 switch=y r1=0.001 x1=0.001 r0=0.001 x0=0.001 Length=0.001 units=km
New Line.223331797 phases=3 Bus1=223331799.1.2.3 Bus2=223331800.1.2.3 switch=y r1=0.001 x1=0.001 r0=0.001 x0=0.001 Length=0.001 units=km
New Line.224184502 phases=3 Bus1=224184504.1.2.3 Bus2=224184505.1.2.3 switch=y r1=0.001 x1=0.001 r0=0.001 x0=0.001 Length=0.001 units=km
New Line.224184539 phases=3 Bus1=224184541.1.2.3 Bus2=224184542.1.2.3 switch=y r1=0.001 x1=0.001 r0=0.001 x0=0.001 Length=0.001 units=km
New Line.223331658 phases=3 Bus1=223331660.1.2.3 Bus2=223331661.1.2.3 switch=y r1=0.001 x1=0.001 r0=0.001 x0=0.001 Length=0.001 units=km
New Line.223331824 phases=3 Bus1=223331826.1.2.3 Bus2=223331827.1.2.3 switch=y r1=0.001 x1=0.001 r0=0.001 x0=0.001 Length=0.001 units=km
New Line.223331595$P5745044 phases=3 Bus1=223331588.1.2.3 Bus2=223331589.1.2.3 switch=y r1=0.001 x1=0.001 r0=0.001 x0=0.001 Length=0.001 units=km
New Line.223331620$P5745043 phases=3 Bus1=223331613.1.2.3 Bus2=223331614.1.2.3 switch=y r1=0.001 x1=0.001 r0=0.001 x0=0.001 Length=0.001 units=km
New Line.5741363:J363A-3 phases=3 Bus1=224181332.1.2.3 Bus2=224181331.1.2.3 switch=y r1=0.001 x1=0.001 r0=0.001 x0=0.001 Length=0.001 units=km
New Line.5711366:GS6874-2 phases=3 Bus1=224181760.1.2.3 Bus2=224181801.1.2.3 switch=y r1=0.001 x1=0.001 r0=0.001 x0=0.001 Length=0.001 units=km
New Line.5750918:GS6928-3 phases=3 Bus1=231194050.1.2.3 Bus2=231194018.1.2.3 switch=y r1=0.001 x1=0.001 r0=0.001 x0=0.001 Length=0.001 units=km enabled=false
New Line.5750918:GS6928-1 phases=3 Bus1=231194011.1.2.3 Bus2=231194032.1.2.3 switch=y r1=0.001 x1=0.001 r0=0.001 x0=0.001 Length=0.001 units=km
New Line.5544017:GS6771-4 phases=3 Bus1=212886362.1.2.3 Bus2=212886397.1.2.3 switch=y r1=0.001 x1=0.001 r0=0.001 x0=0.001 Length=0.001 units=km
New Line.5648846:RCS6768-4 phases=3 Bus1=239120068.1.2.3 Bus2=239120021.1.2.3 switch=y r1=0.001 x1=0.001 r0=0.001 x0=0.001 Length=0.001 units=km
New Line.5648846:RCS6768-3 phases=3 Bus1=239120015.1.2.3 Bus2=239120059.1.2.3 switch=y r1=0.001 x1=0.001 r0=0.001 x0=0.001 Length=0.001 units=km
New Line.5648846:RCS6768-5 phases=3 Bus1=239120027.1.2.3 Bus2=239120077.1.2.3 switch=y r1=0.001 x1=0.001 r0=0.001 x0=0.001 Length=0.001 units=km
New Line.5648846:RCS6768-2 phases=3 Bus1=239120009.1.2.3 Bus2=239120050.1.2.3 switch=y r1=0.001 x1=0.001 r0=0.001 x0=0.001 Length=0.001 units=km
New Line.5648846:RCS6768-6 phases=3 Bus1=239120033.1.2.3 Bus2=239120086.1.2.3 switch=y r1=0.001 x1=0.001 r0=0.001 x0=0.001 Length=0.001 units=km
New Line.5728552:GS6842-2 phases=3 Bus1=223366097.1.2.3 Bus2=223366056.1.2.3 switch=y r1=0.001 x1=0.001 r0=0.001 x0=0.001 Length=0.001 units=km
New Line.5728552:GS6842-3 phases=3 Bus1=223366062.1.2.3 Bus2=223366106.1.2.3 switch=y r1=0.001 x1=0.001 r0=0.001 x0=0.001 Length=0.001 units=km
New Line.5750891:GS6891-3 phases=3 Bus1=224182784.1.2.3 Bus2=224182816.1.2.3 switch=y r1=0.001 x1=0.001 r0=0.001 x0=0.001 Length=0.001 units=km
New Line.5741375:RCS7017-5 phases=3 Bus1=224183925.1.2.3 Bus2=224183875.1.2.3 switch=y r1=0.001 x1=0.001 r0=0.001 x0=0.001 Length=0.001 units=km
New Line.5750918:GS6928-4 phases=3 Bus1=231194024.1.2.3 Bus2=231194059.1.2.3 switch=y r1=0.001 x1=0.001 r0=0.001 x0=0.001 Length=0.001 units=km
New Line.5748441:PME6887-1 phases=3 Bus1=236685770.1.2.3 Bus2=236685806.1.2.3 switch=y r1=0.001 x1=0.001 r0=0.001 x0=0.001 Length=0.001 units=km
New Line.5728552:GS6842-4 phases=3 Bus1=223366068.1.2.3 Bus2=223366115.1.2.3 switch=y r1=0.001 x1=0.001 r0=0.001 x0=0.001 Length=0.001 units=km
New Line.5728552:GS6842-5 phases=3 Bus1=223366074.1.2.3 Bus2=223366124.1.2.3 switch=y r1=0.001 x1=0.001 r0=0.001 x0=0.001 Length=0.001 units=km
New Line.5728553:GS6843-1 phases=3 Bus1=223368984.1.2.3 Bus2=223368963.1.2.3 switch=y r1=0.001 x1=0.001 r0=0.001 x0=0.001 Length=0.001 units=km
New Line.5728552:GS6842-6 phases=3 Bus1=223366080.1.2.3 Bus2=223366133.1.2.3 switch=y r1=0.001 x1=0.001 r0=0.001 x0=0.001 Length=0.001 units=km
New Line.5740742:GS6866-2 phases=3 Bus1=222233812.1.2.3 Bus2=222233777.1.2.3 switch=y r1=0.001 x1=0.001 r0=0.001 x0=0.001 Length=0.001 units=km
New Line.5728553:GS6843-2 phases=3 Bus1=223368964.1.2.3 Bus2=223368993.1.2.3 switch=y r1=0.001 x1=0.001 r0=0.001 x0=0.001 Length=0.001 units=km
New Line.5741361:GS6873-3 phases=3 Bus1=223369549.1.2.3 Bus2=223369505.1.2.3 switch=y r1=0.001 x1=0.001 r0=0.001 x0=0.001 Length=0.001 units=km
New Line.5750891:GS6891-2 phases=3 Bus1=224182778.1.2.3 Bus2=224182807.1.2.3 switch=y r1=0.001 x1=0.001 r0=0.001 x0=0.001 Length=0.001 units=km
New Line.5728553:GS6843-3 phases=3 Bus1=223368970.1.2.3 Bus2=223369002.1.2.3 switch=y r1=0.001 x1=0.001 r0=0.001 x0=0.001 Length=0.001 units=km
New Line.5750910:PME6926-1 phases=3 Bus1=231193602.1.2.3 Bus2=231193567.1.2.3 switch=y r1=0.001 x1=0.001 r0=0.001 x0=0.001 Length=0.001 units=km
New Line.5740742:GS6866-3 phases=3 Bus1=222233783.1.2.3 Bus2=222233821.1.2.3 switch=y r1=0.001 x1=0.001 r0=0.001 x0=0.001 Length=0.001 units=km
New Line.5728553:GS6843-4 phases=3 Bus1=223368976.1.2.3 Bus2=223369011.1.2.3 switch=y r1=0.001 x1=0.001 r0=0.001 x0=0.001 Length=0.001 units=km
New Line.5741361:GS6873-4 phases=3 Bus1=223369511.1.2.3 Bus2=223369558.1.2.3 switch=y r1=0.001 x1=0.001 r0=0.001 x0=0.001 Length=0.001 units=km
New Line.5750910:PME6926-4 phases=3 Bus1=231193567.1.2.3 Bus2=231193584.1.2.3 switch=y r1=0.001 x1=0.001 r0=0.001 x0=0.001 Length=0.001 units=km
New Line.5744912:GS6948-3 phases=3 Bus1=241577819.1.2.3 Bus2=241577787.1.2.3 switch=y r1=0.001 x1=0.001 r0=0.001 x0=0.001 Length=0.001 units=km
New Line.5741361:GS6873-1 phases=3 Bus1=223369498.1.2.3 Bus2=223369531.1.2.3 switch=y r1=0.001 x1=0.001 r0=0.001 x0=0.001 Length=0.001 units=km
New Line.5748445:PME6888-2 phases=3 Bus1=224071566.1.2.3 Bus2=224071539.1.2.3 switch=y r1=0.001 x1=0.001 r0=0.001 x0=0.001 Length=0.001 units=km
New Line.5750910:PME6926-3 phases=3 Bus1=231193566.1.2.3 Bus2=231193575.1.2.3 switch=y r1=0.001 x1=0.001 r0=0.001 x0=0.001 Length=0.001 units=km
New Line.5750910:PME6926-2 phases=3 Bus1=231193566.1.2.3 Bus2=231193593.1.2.3 switch=y r1=0.001 x1=0.001 r0=0.001 x0=0.001 Length=0.001 units=km
New Line.5750912:P5750912-1 phases=3 Bus1=239923079.1.2.3 Bus2=239923080.1.2.3 switch=y r1=0.001 x1=0.001 r0=0.001 x0=0.001 Length=0.001 units=km
New Line.5740740:J740A-2 phases=3 Bus1=223369322.1.2.3 Bus2=223369323.1.2.3 switch=y r1=0.001 x1=0.001 r0=0.001 x0=0.001 Length=0.001 units=km
New Line.5750891:GS6891-1 phases=3 Bus1=224182777.1.2.3 Bus2=224182798.1.2.3 switch=y r1=0.001 x1=0.001 r0=0.001 x0=0.001 Length=0.001 units=km
New Line.5741375:RCS7017-6 phases=3 Bus1=224183881.1.2.3 Bus2=224183934.1.2.3 switch=y r1=0.001 x1=0.001 r0=0.001 x0=0.001 Length=0.001 units=km
New Line.5750919:PME6929-2 phases=3 Bus1=231193881.1.2.3 Bus2=231193854.1.2.3 switch=y r1=0.001 x1=0.001 r0=0.001 x0=0.001 Length=0.001 units=km
New Line.5728554:GS6844-2 phases=3 Bus1=223366770.1.2.3 Bus2=223366729.1.2.3 switch=y r1=0.001 x1=0.001 r0=0.001 x0=0.001 Length=0.001 units=km
New Line.5741361:GS6873-6 phases=3 Bus1=223369523.1.2.3 Bus2=223369576.1.2.3 switch=y r1=0.001 x1=0.001 r0=0.001 x0=0.001 Length=0.001 units=km
New Line.5748445:PME6888-3 phases=3 Bus1=224071539.1.2.3 Bus2=224071548.1.2.3 switch=y r1=0.001 x1=0.001 r0=0.001 x0=0.001 Length=0.001 units=km
New Line.5740741:GS6877-2 phases=3 Bus1=224182674.1.2.3 Bus2=224182651.1.2.3 switch=y r1=0.001 x1=0.001 r0=0.001 x0=0.001 Length=0.001 units=km
New Line.5744912:GS6948-2 phases=3 Bus1=241577781.1.2.3 Bus2=241577810.1.2.3 switch=y r1=0.001 x1=0.001 r0=0.001 x0=0.001 Length=0.001 units=km
New Line.5748445:PME6888-4 phases=3 Bus1=224071540.1.2.3 Bus2=224071557.1.2.3 switch=y r1=0.001 x1=0.001 r0=0.001 x0=0.001 Length=0.001 units=km
New Line.5748445:PME6888-1 phases=3 Bus1=224071540.1.2.3 Bus2=224071575.1.2.3 switch=y r1=0.001 x1=0.001 r0=0.001 x0=0.001 Length=0.001 units=km
New Line.5750914:PME6927-1 phases=3 Bus1=231193743.1.2.3 Bus2=231193708.1.2.3 switch=y r1=0.001 x1=0.001 r0=0.001 x0=0.001 Length=0.001 units=km
New Line.5744912:GS6948-1 phases=3 Bus1=241577780.1.2.3 Bus2=241577801.1.2.3 switch=y r1=0.001 x1=0.001 r0=0.001 x0=0.001 Length=0.001 units=km
New Line.5728554:GS6844-1 phases=3 Bus1=223366728.1.2.3 Bus2=223366761.1.2.3 switch=y r1=0.001 x1=0.001 r0=0.001 x0=0.001 Length=0.001 units=km
New Line.5728554:GS6844-3 phases=3 Bus1=223366735.1.2.3 Bus2=223366779.1.2.3 switch=y r1=0.001 x1=0.001 r0=0.001 x0=0.001 Length=0.001 units=km
New Line.5741363:J363A-1 phases=3 Bus1=224181323.1.2.3 Bus2=224181324.1.2.3 switch=y r1=0.001 x1=0.001 r0=0.001 x0=0.001 Length=0.001 units=km
New Line.5711366:GS6874-4 phases=3 Bus1=224181819.1.2.3 Bus2=224181772.1.2.3 switch=y r1=0.001 x1=0.001 r0=0.001 x0=0.001 Length=0.001 units=km
New Line.5740741:GS6877-1 phases=3 Bus1=224182650.1.2.3 Bus2=224182665.1.2.3 switch=y r1=0.001 x1=0.001 r0=0.001 x0=0.001 Length=0.001 units=km
New Line.5745027:PME7115-2 phases=3 Bus1=240062609.1.2.3 Bus2=240062582.1.2.3 switch=y r1=0.001 x1=0.001 r0=0.001 x0=0.001 Length=0.001 units=km
New Line.5741367:J367A-3 phases=3 Bus1=224183599.1.2.3 Bus2=224183600.1.2.3 switch=y r1=0.001 x1=0.001 r0=0.001 x0=0.001 Length=0.001 units=km
New Line.5741375:RCS7017-3 phases=3 Bus1=224183863.1.2.3 Bus2=224183907.1.2.3 switch=y r1=0.001 x1=0.001 r0=0.001 x0=0.001 Length=0.001 units=km
New Line.5740740:J740A-1 phases=3 Bus1=223369299.1.2.3 Bus2=223369298.1.2.3 switch=y r1=0.001 x1=0.001 r0=0.001 x0=0.001 Length=0.001 units=km
New Line.5740740:J740A-3 phases=3 Bus1=223369307.1.2.3 Bus2=223369306.1.2.3 switch=y r1=0.001 x1=0.001 r0=0.001 x0=0.001 Length=0.001 units=km
New Line.5750899:PME6893-2 phases=3 Bus1=224183010.1.2.3 Bus2=224182983.1.2.3 switch=y r1=0.001 x1=0.001 r0=0.001 x0=0.001 Length=0.001 units=km
New Line.5745041:PME6935-1 phases=3 Bus1=223331483.1.2.3 Bus2=223331447.1.2.3 switch=y r1=0.001 x1=0.001 r0=0.001 x0=0.001 Length=0.001 units=km
New Line.5740740:J740A-4 phases=3 Bus1=223369315.1.2.3 Bus2=223369314.1.2.3 switch=y r1=0.001 x1=0.001 r0=0.001 x0=0.001 Length=0.001 units=km
New Line.5750899:PME6893-3 phases=3 Bus1=224182983.1.2.3 Bus2=224182992.1.2.3 switch=y r1=0.001 x1=0.001 r0=0.001 x0=0.001 Length=0.001 units=km
New Line.5741367:J367A-2 phases=3 Bus1=224183608.1.2.3 Bus2=224183607.1.2.3 switch=y r1=0.001 x1=0.001 r0=0.001 x0=0.001 Length=0.001 units=km
New Line.5741375:RCS7017-1 phases=3 Bus1=224183856.1.2.3 Bus2=224183889.1.2.3 switch=y r1=0.001 x1=0.001 r0=0.001 x0=0.001 Length=0.001 units=km
New Line.5750899:PME6893-4 phases=3 Bus1=224182984.1.2.3 Bus2=224183001.1.2.3 switch=y r1=0.001 x1=0.001 r0=0.001 x0=0.001 Length=0.001 units=km
New Line.5750899:PME6893-1 phases=3 Bus1=224182984.1.2.3 Bus2=224183019.1.2.3 switch=y r1=0.001 x1=0.001 r0=0.001 x0=0.001 Length=0.001 units=km
New Line.5741367:J367A-1 phases=3 Bus1=224183592.1.2.3 Bus2=224183591.1.2.3 switch=y r1=0.001 x1=0.001 r0=0.001 x0=0.001 Length=0.001 units=km
New Line.5750914:PME6927-2 phases=3 Bus1=231193707.1.2.3 Bus2=231193734.1.2.3 switch=y r1=0.001 x1=0.001 r0=0.001 x0=0.001 Length=0.001 units=km
New Line.5750918:GS6928-2 phases=3 Bus1=231194041.1.2.3 Bus2=231194012.1.2.3 switch=y r1=0.001 x1=0.001 r0=0.001 x0=0.001 Length=0.001 units=km
New Line.5728554:GS6844-5 phases=3 Bus1=223366747.1.2.3 Bus2=223366797.1.2.3 switch=y r1=0.001 x1=0.001 r0=0.001 x0=0.001 Length=0.001 units=km
New Line.5741363:J363A-2 phases=3 Bus1=224181340.1.2.3 Bus2=224181339.1.2.3 switch=y r1=0.001 x1=0.001 r0=0.001 x0=0.001 Length=0.001 units=km
New Line.5711366:GS6874-3 phases=3 Bus1=224181766.1.2.3 Bus2=224181810.1.2.3 switch=y r1=0.001 x1=0.001 r0=0.001 x0=0.001 Length=0.001 units=km
New Line.5711366:GS6874-5 phases=3 Bus1=224181778.1.2.3 Bus2=224181828.1.2.3 switch=y r1=0.001 x1=0.001 r0=0.001 x0=0.001 Length=0.001 units=km
New Line.5750891:GS6891-4 phases=3 Bus1=224182825.1.2.3 Bus2=224182790.1.2.3 switch=y r1=0.001 x1=0.001 r0=0.001 x0=0.001 Length=0.001 units=km
New Line.5748441:PME6887-2 phases=3 Bus1=236685797.1.2.3 Bus2=236685771.1.2.3 switch=y r1=0.001 x1=0.001 r0=0.001 x0=0.001 Length=0.001 units=km
New Line.5745027:PME7115-1 phases=3 Bus1=240062583.1.2.3 Bus2=240062618.1.2.3 switch=y r1=0.001 x1=0.001 r0=0.001 x0=0.001 Length=0.001 units=km
New Line.5745024:PME7114-1 phases=3 Bus1=266405120.1.2.3 Bus2=266405103.1.2.3 switch=y r1=0.001 x1=0.001 r0=0.001 x0=0.001 Length=0.001 units=km
New Line.5745041:PME6935-2 phases=3 Bus1=223331448.1.2.3 Bus2=223331474.1.2.3 switch=y r1=0.001 x1=0.001 r0=0.001 x0=0.001 Length=0.001 units=km
New Line.5744960:P5744960-1 phases=3 Bus1=224183753.1.2.3 Bus2=224183754.1.2.3 switch=y r1=0.001 x1=0.001 r0=0.001 x0=0.001 Length=0.001 units=km
New Line.5741362:P5741362-B phases=3 Bus1=224181416.1.2.3 Bus2=224181415.1.2.3 switch=y r1=0.001 x1=0.001 r0=0.001 x0=0.001 Length=0.001 units=km
New Line.5741362:P5741362-T phases=3 Bus1=224181416.1.2.3 Bus2=224181424.1.2.3 switch=y r1=0.001 x1=0.001 r0=0.001 x0=0.001 Length=0.001 units=km
New Line.5750913:P5750913-1 phases=3 Bus1=236685545.1.2.3 Bus2=236685546.1.2.3 switch=y r1=0.001 x1=0.001 r0=0.001 x0=0.001 Length=0.001 units=km
New Line.5648847:GS6767-4 phases=3 Bus1=220106814.1.2.3 Bus2=220106779.1.2.3 switch=y r1=0.001 x1=0.001 r0=0.001 x0=0.001 Length=0.001 units=km
New Line.5648847:GS6767-2 phases=3 Bus1=220106767.1.2.3 Bus2=220106796.1.2.3 switch=y r1=0.001 x1=0.001 r0=0.001 x0=0.001 Length=0.001 units=km
New Line.5728556:P5728556-1 phases=3 Bus1=223369258.1.2.3 Bus2=223369259.1.2.3 switch=y r1=0.001 x1=0.001 r0=0.001 x0=0.001 Length=0.001 units=km
New Line.5750925:P5750925-1 phases=3 Bus1=224071695.1.2.3 Bus2=224071696.1.2.3 switch=y r1=0.001 x1=0.001 r0=0.001 x0=0.001 Length=0.001 units=km
New Line.5765774:P5765774-1 phases=3 Bus1=263861256.1.2.3 Bus2=263861257.1.2.3 switch=y r1=0.001 x1=0.001 r0=0.001 x0=0.001 Length=0.001 units=km
New Line.5648847:GS6767-1 phases=3 Bus1=220106766.1.2.3 Bus2=220106787.1.2.3 switch=y r1=0.001 x1=0.001 r0=0.001 x0=0.001 Length=0.001 units=km
New Line.5748444:P5748444-1 phases=3 Bus1=232838034.1.2.3 Bus2=232838035.1.2.3 switch=y r1=0.001 x1=0.001 r0=0.001 x0=0.001 Length=0.001 units=km
New Line.5750870:P5750870-A phases=3 Bus1=223945173.1.2.3 Bus2=223945157.1.2.3 switch=y r1=0.001 x1=0.001 r0=0.001 x0=0.001 Length=0.001 units=km
New Line.5750870:P5750870-B phases=3 Bus1=223945157.1.2.3 Bus2=223945156.1.2.3 switch=y r1=0.001 x1=0.001 r0=0.001 x0=0.001 Length=0.001 units=km
New Line.5750870:P5750870-T phases=3 Bus1=223945157.1.2.3 Bus2=223945165.1.2.3 switch=y r1=0.001 x1=0.001 r0=0.001 x0=0.001 Length=0.001 units=km
New Line.5750915:P5750915-1 phases=3 Bus1=236185787.1.2.3 Bus2=236185788.1.2.3 switch=y r1=0.001 x1=0.001 r0=0.001 x0=0.001 Length=0.001 units=km
New Line.5748443:P5748443-1 phases=3 Bus1=232838217.1.2.3 Bus2=232838218.1.2.3 switch=y r1=0.001 x1=0.001 r0=0.001 x0=0.001 Length=0.001 units=km
New Line.5750867:P5750867-1 phases=2 Bus1=224181504.1.3 Bus2=224181505.1.3 switch=y r1=0.001 x1=0.001 r0=0.001 x0=0.001 Length=0.001 units=km
New Line.5750916:P5750916-1 phases=3 Bus1=237041965.1.2.3 Bus2=237041966.1.2.3 switch=y r1=0.001 x1=0.001 r0=0.001 x0=0.001 Length=0.001 units=km
New Line.5748369:P5748369-1 phases=3 Bus1=223242939.1.2.3 Bus2=223242940.1.2.3 switch=y r1=0.001 x1=0.001 r0=0.001 x0=0.001 Length=0.001 units=km
New Line.5748366:P5748366-1 phases=3 Bus1=240062738.1.2.3 Bus2=240062739.1.2.3 switch=y r1=0.001 x1=0.001 r0=0.001 x0=0.001 Length=0.001 units=km
New Line.5745025:P5745025-1 phases=3 Bus1=266405230.1.2.3 Bus2=266405231.1.2.3 switch=y r1=0.001 x1=0.001 r0=0.001 x0=0.001 Length=0.001 units=km
New Line.5741374:P5741374-1 phases=3 Bus1=224183794.1.2.3 Bus2=224183795.1.2.3 switch=y r1=0.001 x1=0.001 r0=0.001 x0=0.001 Length=0.001 units=km
New Line.5748442:P5748442-1 phases=3 Bus1=236685914.1.2.3 Bus2=236685915.1.2.3 switch=y r1=0.001 x1=0.001 r0=0.001 x0=0.001 Length=0.001 units=km
New Line.5750868:P5750868-1 phases=3 Bus1=224181271.1.2.3 Bus2=224181272.1.2.3 switch=y r1=0.001 x1=0.001 r0=0.001 x0=0.001 Length=0.001 units=km
New Line.5741362:P5741362-A phases=3 Bus1=224181432.1.2.3 Bus2=224181416.1.2.3 switch=y r1=0.001 x1=0.001 r0=0.001 x0=0.001 Length=0.001 units=km
New Line.5750911:P5750911-1 phases=3 Bus1=236089916.1.2.3 Bus2=236089917.1.2.3 switch=y r1=0.001 x1=0.001 r0=0.001 x0=0.001 Length=0.001 units=km
New Line.5750873:P5750873-1 phases=3 Bus1=223369205.1.2.3 Bus2=223369206.1.2.3 switch=y r1=0.001 x1=0.001 r0=0.001 x0=0.001 Length=0.001 units=km
New Line.5047627:GS6769-4 phases=3 Bus1=218556059.1.2.3 Bus2=-777777218556059.1.2.3 switch=y r1=0.001 x1=0.001 r0=0.001 x0=0.001 Length=0.001 units=km enabled=false
New Line.5750920:P5750920-1 phases=3 Bus1=237041839.1.2.3 Bus2=237041840.1.2.3 switch=y r1=0.001 x1=0.001 r0=0.001 x0=0.001 Length=0.001 units=km
New Line.5748368:P5748368-1 phases=3 Bus1=231056035.1.2.3 Bus2=231056036.1.2.3 switch=y r1=0.001 x1=0.001 r0=0.001 x0=0.001 Length=0.001 units=km
New Line.5750921:P5750921-1 phases=3 Bus1=236208718.1.2.3 Bus2=236208719.1.2.3 switch=y r1=0.001 x1=0.001 r0=0.001 x0=0.001 Length=0.001 units=km
New Line.5750922:P5750922-1 phases=3 Bus1=236685388.1.2.3 Bus2=236685389.1.2.3 switch=y r1=0.001 x1=0.001 r0=0.001 x0=0.001 Length=0.001 units=km
New Line.5750874:P5750874-1 phases=3 Bus1=223369424.1.2.3 Bus2=223369425.1.2.3 switch=y r1=0.001 x1=0.001 r0=0.001 x0=0.001 Length=0.001 units=km
New Line.5750896:P5750896-1 phases=3 Bus1=224183127.1.2.3 Bus2=224183128.1.2.3 switch=y r1=0.001 x1=0.001 r0=0.001 x0=0.001 Length=0.001 units=km
New Line.5750894:P5750894-1 phases=3 Bus1=224183168.1.2.3 Bus2=224183169.1.2.3 switch=y r1=0.001 x1=0.001 r0=0.001 x0=0.001 Length=0.001 units=km
New Line.5750893:P5750893-1 phases=3 Bus1=224183209.1.2.3 Bus2=224183210.1.2.3 switch=y r1=0.001 x1=0.001 r0=0.001 x0=0.001 Length=0.001 units=km
New Line.GS6874-1$GS6874-2 phases=3 Bus1=224181760.1.2.3 Bus2=224181759.1.2.3 switch=y r1=0.001 x1=0.001 r0=0.001 x0=0.001 Length=0.001 units=km
New Line.212886367$212886376 phases=3 Bus1=212886349.1.2.3 Bus2=212886350.1.2.3 switch=y r1=0.001 x1=0.001 r0=0.001 x0=0.001 Length=0.001 units=km
New Line.223366085$223366095 phases=3 Bus1=223366056.1.2.3 Bus2=223366055.1.2.3 switch=y r1=0.001 x1=0.001 r0=0.001 x0=0.001 Length=0.001 units=km
New Line.GS6877-1$GS6877-2 phases=3 Bus1=224182651.1.2.3 Bus2=224182650.1.2.3 switch=y r1=0.001 x1=0.001 r0=0.001 x0=0.001 Length=0.001 units=km
New Line.GS6877-2$GS6877-3 phases=3 Bus1=224182651.1.2.3 Bus2=224182657.1.2.3 switch=y r1=0.001 x1=0.001 r0=0.001 x0=0.001 Length=0.001 units=km
New Line.5748441:PME6887-3 phases=3 Bus1=236685771.1.2.3 Bus2=236685779.1.2.3 switch=y r1=0.001 x1=0.001 r0=0.001 x0=0.001 Length=0.001 units=km enabled=false
New Line.5544017:GS6771-1 phases=3 Bus1=212886370.1.2.3 Bus2=212886349.1.2.3 switch=y r1=0.001 x1=0.001 r0=0.001 x0=0.001 Length=0.001 units=km
New Line.5544017:GS6771-2 phases=3 Bus1=212886350.1.2.3 Bus2=212886379.1.2.3 switch=y r1=0.001 x1=0.001 r0=0.001 x0=0.001 Length=0.001 units=km enabled=false
New Line.5728552:GS6842-1 phases=3 Bus1=223366055.1.2.3 Bus2=223366088.1.2.3 switch=y r1=0.001 x1=0.001 r0=0.001 x0=0.001 Length=0.001 units=km enabled=false
New Line.5748441:PME6887-4 phases=3 Bus1=236685770.1.2.3 Bus2=236685788.1.2.3 switch=y r1=0.001 x1=0.001 r0=0.001 x0=0.001 Length=0.001 units=km enabled=false
New Line.5745024:PME7114-2 phases=3 Bus1=266405102.1.2.3 Bus2=266405111.1.2.3 switch=y r1=0.001 x1=0.001 r0=0.001 x0=0.001 Length=0.001 units=km
New Line.5740742:GS6866-4 phases=3 Bus1=222233789.1.2.3 Bus2=222233830.1.2.3 switch=y r1=0.001 x1=0.001 r0=0.001 x0=0.001 Length=0.001 units=km enabled=false
New Line.5750914:PME6927-4 phases=3 Bus1=231193708.1.2.3 Bus2=231193725.1.2.3 switch=y r1=0.001 x1=0.001 r0=0.001 x0=0.001 Length=0.001 units=km
New Line.5728554:GS6844-4 phases=3 Bus1=223366741.1.2.3 Bus2=223366788.1.2.3 switch=y r1=0.001 x1=0.001 r0=0.001 x0=0.001 Length=0.001 units=km enabled=false
New Line.5750919:PME6929-3 phases=3 Bus1=231193854.1.2.3 Bus2=231193863.1.2.3 switch=y r1=0.001 x1=0.001 r0=0.001 x0=0.001 Length=0.001 units=km
New Line.5741375:RCS7017-2 phases=3 Bus1=224183857.1.2.3 Bus2=224183898.1.2.3 switch=y r1=0.001 x1=0.001 r0=0.001 x0=0.001 Length=0.001 units=km enabled=false
New Line.5750919:PME6929-4 phases=3 Bus1=231193855.1.2.3 Bus2=231193872.1.2.3 switch=y r1=0.001 x1=0.001 r0=0.001 x0=0.001 Length=0.001 units=km
New Line.5750919:PME6929-1 phases=3 Bus1=231193855.1.2.3 Bus2=231193890.1.2.3 switch=y r1=0.001 x1=0.001 r0=0.001 x0=0.001 Length=0.001 units=km
New Line.5745041:PME6935-4 phases=3 Bus1=223331447.1.2.3 Bus2=223331465.1.2.3 switch=y r1=0.001 x1=0.001 r0=0.001 x0=0.001 Length=0.001 units=km
New Line.5750914:PME6927-3 phases=3 Bus1=231193707.1.2.3 Bus2=231193716.1.2.3 switch=y r1=0.001 x1=0.001 r0=0.001 x0=0.001 Length=0.001 units=km
New Line.5745041:PME6935-3 phases=3 Bus1=223331448.1.2.3 Bus2=223331456.1.2.3 switch=y r1=0.001 x1=0.001 r0=0.001 x0=0.001 Length=0.001 units=km
New Line.5750900:PE6894-1 phases=3 Bus1=223367171.1.2.3 Bus2=-777777223367171.1.2.3 switch=y r1=0.001 x1=0.001 r0=0.001 x0=0.001 Length=0.001 units=km enabled=false
New Line.5711366:GS6874-6 phases=3 Bus1=224181784.1.2.3 Bus2=224181837.1.2.3 switch=y r1=0.001 x1=0.001 r0=0.001 x0=0.001 Length=0.001 units=km enabled=false
New Line.5544017:GS6771-3 phases=3 Bus1=212886356.1.2.3 Bus2=212886388.1.2.3 switch=y r1=0.001 x1=0.001 r0=0.001 x0=0.001 Length=0.001 units=km enabled=false
New Line.5648846:RCS6768-1 phases=3 Bus1=239120008.1.2.3 Bus2=239120041.1.2.3 switch=y r1=0.001 x1=0.001 r0=0.001 x0=0.001 Length=0.001 units=km enabled=false
New Line.5711366:GS6874-1 phases=3 Bus1=224181759.1.2.3 Bus2=224181792.1.2.3 switch=y r1=0.001 x1=0.001 r0=0.001 x0=0.001 Length=0.001 units=km enabled=false
New Line.5740742:GS6866-1 phases=3 Bus1=222233776.1.2.3 Bus2=222233803.1.2.3 switch=y r1=0.001 x1=0.001 r0=0.001 x0=0.001 Length=0.001 units=km enabled=false
New Line.5741361:GS6873-2 phases=3 Bus1=223369499.1.2.3 Bus2=223369540.1.2.3 switch=y r1=0.001 x1=0.001 r0=0.001 x0=0.001 Length=0.001 units=km enabled=false
New Line.5741361:GS6873-5 phases=3 Bus1=223369517.1.2.3 Bus2=223369567.1.2.3 switch=y r1=0.001 x1=0.001 r0=0.001 x0=0.001 Length=0.001 units=km enabled=false
New Line.5741375:RCS7017-4 phases=3 Bus1=224183869.1.2.3 Bus2=224183916.1.2.3 switch=y r1=0.001 x1=0.001 r0=0.001 x0=0.001 Length=0.001 units=km enabled=false
New Line.5740742:GS6866-5 phases=3 Bus1=222233795.1.2.3 Bus2=222233839.1.2.3 switch=y r1=0.001 x1=0.001 r0=0.001 x0=0.001 Length=0.001 units=km enabled=false
New Line.5744912:GS6948-4 phases=3 Bus1=241577793.1.2.3 Bus2=241577828.1.2.3 switch=y r1=0.001 x1=0.001 r0=0.001 x0=0.001 Length=0.001 units=km enabled=false
New Line.5740741:GS6877-3 phases=3 Bus1=224182657.1.2.3 Bus2=224182683.1.2.3 switch=y r1=0.001 x1=0.001 r0=0.001 x0=0.001 Length=0.001 units=km enabled=false
New Line.5745027:PME7115-3 phases=3 Bus1=240062582.1.2.3 Bus2=240062591.1.2.3 switch=y r1=0.001 x1=0.001 r0=0.001 x0=0.001 Length=0.001 units=km enabled=false
New Line.5745027:PME7115-4 phases=3 Bus1=240062583.1.2.3 Bus2=240062600.1.2.3 switch=y r1=0.001 x1=0.001 r0=0.001 x0=0.001 Length=0.001 units=km enabled=false
New Line.5728554:GS6844-6 phases=3 Bus1=223366753.1.2.3 Bus2=223366806.1.2.3 switch=y r1=0.001 x1=0.001 r0=0.001 x0=0.001 Length=0.001 units=km enabled=false
New Line.5648847:GS6767-3 phases=3 Bus1=220106773.1.2.3 Bus2=220106805.1.2.3 switch=y r1=0.001 x1=0.001 r0=0.001 x0=0.001 Length=0.001 units=km enabled=false

! Loads
New Load.5748444_0 Bus1=-999999232838035.1.2 phases=1 kV=0.069282 kW=0 kvar=0 model=1
New Load.5748444_1 Bus1=-999999232838035.2.3 phases=1 kV=0.069282 kW=0 kvar=0 model=1
New Load.5748444_2 Bus1=-999999232838035.3.1 phases=1 kV=0.069282 kW=0 kvar=0 model=1
New Load.5750911_0 Bus1=-999999236089917.1.0 phases=1 kV=0.159926 kW=0 kvar=0 model=1
New Load.5750911_1 Bus1=-999999236089917.2.0 phases=1 kV=0.159926 kW=0 kvar=0 model=1
New Load.5750911_2 Bus1=-999999236089917.3.0 phases=1 kV=0.159926 kW=0 kvar=0 model=1
New Load.5750868_0 Bus1=-999999224181272.1.0 phases=1 kV=0.159926 kW=0 kvar=0 model=1
New Load.5750868_1 Bus1=-999999224181272.2.0 phases=1 kV=0.159926 kW=0 kvar=0 model=1
New Load.5750868_2 Bus1=-999999224181272.3.0 phases=1 kV=0.159926 kW=0 kvar=0 model=1
New Load.5745043_0 Bus1=-999999223331614.1.0 phases=1 kV=0.159926 kW=0 kvar=0 model=1
New Load.5745043_1 Bus1=-999999223331614.2.0 phases=1 kV=0.159926 kW=0 kvar=0 model=1
New Load.5745043_2 Bus1=-999999223331614.3.0 phases=1 kV=0.159926 kW=0 kvar=0 model=1
New Load.5750873_0 Bus1=-999999223369206.1.0 phases=1 kV=0.159926 kW=0 kvar=0 model=1
New Load.5750873_1 Bus1=-999999223369206.2.0 phases=1 kV=0.159926 kW=0 kvar=0 model=1
New Load.5750873_2 Bus1=-999999223369206.3.0 phases=1 kV=0.159926 kW=0 kvar=0 model=1
New Load.5741362 Bus1=-999999224181424.2.0 phases=1 kV=0.069282 kW=0 kvar=0 model=1
New Load.5750913_0 Bus1=-999999236685546.1.0 phases=1 kV=0.159926 kW=0 kvar=0 model=1
New Load.5750913_1 Bus1=-999999236685546.2.0 phases=1 kV=0.159926 kW=0 kvar=0 model=1
New Load.5750913_2 Bus1=-999999236685546.3.0 phases=1 kV=0.159926 kW=0 kvar=0 model=1
New Load.5750874 Bus1=-999999223369425.1.0 phases=1 kV=0.069282 kW=0 kvar=0 model=1
New Load.5750896_0 Bus1=-999999224183128.1.0 phases=1 kV=0.159926 kW=0 kvar=0 model=1
New Load.5750896_1 Bus1=-999999224183128.2.0 phases=1 kV=0.159926 kW=0 kvar=0 model=1
New Load.5750896_2 Bus1=-999999224183128.3.0 phases=1 kV=0.159926 kW=0 kvar=0 model=1
New Load.5750870 Bus1=-999999223945165.2.0 phases=1 kV=0.159926 kW=0 kvar=0 model=1
New Load.5750912_0 Bus1=-999999239923080.1.0 phases=1 kV=0.159926 kW=0 kvar=0 model=1
New Load.5750912_1 Bus1=-999999239923080.2.0 phases=1 kV=0.159926 kW=0 kvar=0 model=1
New Load.5750912_2 Bus1=-999999239923080.3.0 phases=1 kV=0.159926 kW=0 kvar=0 model=1
New Load.5745025_0 Bus1=-999999266405231.1.0 phases=1 kV=0.159926 kW=0 kvar=0 model=1
New Load.5745025_1 Bus1=-999999266405231.2.0 phases=1 kV=0.159926 kW=0 kvar=0 model=1
New Load.5745025_2 Bus1=-999999266405231.3.0 phases=1 kV=0.159926 kW=0 kvar=0 model=1
New Load.5748368 Bus1=-999999231056036.3.0 phases=1 kV=0.159926 kW=0 kvar=0 model=1
New Load.5750921_0 Bus1=-999999236208719.1.0 phases=1 kV=0.159926 kW=0 kvar=0 model=1
New Load.5750921_1 Bus1=-999999236208719.2.0 phases=1 kV=0.159926 kW=0 kvar=0 model=1
New Load.5750921_2 Bus1=-999999236208719.3.0 phases=1 kV=0.159926 kW=0 kvar=0 model=1
New Load.5744960 Bus1=-999999224183754.1.0 phases=1 kV=0.159926 kW=0 kvar=0 model=1
New Load.5750915_0 Bus1=-999999236185788.1.0 phases=1 kV=0.159926 kW=0 kvar=0 model=1
New Load.5750915_1 Bus1=-999999236185788.2.0 phases=1 kV=0.159926 kW=0 kvar=0 model=1
New Load.5750915_2 Bus1=-999999236185788.3.0 phases=1 kV=0.159926 kW=0 kvar=0 model=1
New Load.5648847_0 Bus1=-999999220106796.1.2 phases=1 kV=0.069282 kW=0 kvar=0 model=1
New Load.5648847_1 Bus1=-999999220106796.2.3 phases=1 kV=0.069282 kW=0 kvar=0 model=1
New Load.5648847_2 Bus1=-999999220106796.3.1 phases=1 kV=0.069282 kW=0 kvar=0 model=1
New Load.5765774_0 Bus1=-999999263861257.1.0 phases=1 kV=0.159926 kW=0 kvar=0 model=1
New Load.5765774_1 Bus1=-999999263861257.2.0 phases=1 kV=0.159926 kW=0 kvar=0 model=1
New Load.5765774_2 Bus1=-999999263861257.3.0 phases=1 kV=0.159926 kW=0 kvar=0 model=1
New Load.5748369_0 Bus1=-999999223242940.1.0 phases=1 kV=0.159926 kW=0 kvar=0 model=1
New Load.5748369_1 Bus1=-999999223242940.2.0 phases=1 kV=0.159926 kW=0 kvar=0 model=1
New Load.5748369_2 Bus1=-999999223242940.3.0 phases=1 kV=0.159926 kW=0 kvar=0 model=1
New Load.5748366_0 Bus1=-999999240062739.1.0 phases=1 kV=0.159926 kW=0 kvar=0 model=1
New Load.5748366_1 Bus1=-999999240062739.2.0 phases=1 kV=0.159926 kW=0 kvar=0 model=1
New Load.5748366_2 Bus1=-999999240062739.3.0 phases=1 kV=0.159926 kW=0 kvar=0 model=1
New Load.5750916_0 Bus1=-999999237041966.1.0 phases=1 kV=0.159926 kW=0 kvar=0 model=1
New Load.5750916_1 Bus1=-999999237041966.2.0 phases=1 kV=0.159926 kW=0 kvar=0 model=1
New Load.5750916_2 Bus1=-999999237041966.3.0 phases=1 kV=0.159926 kW=0 kvar=0 model=1
New Load.5750867_0 Bus1=-999999224181505.1.0 phases=1 kV=0.069282 kW=0 kvar=0 model=1
New Load.5750867_1 Bus1=-999999224181505.2.0 phases=1 kV=0.069282 kW=0 kvar=0 model=1
New Load.5750922_0 Bus1=-999999236685389.1.0 phases=1 kV=0.159926 kW=0 kvar=0 model=1
New Load.5750922_1 Bus1=-999999236685389.2.0 phases=1 kV=0.159926 kW=0 kvar=0 model=1
New Load.5750922_2 Bus1=-999999236685389.3.0 phases=1 kV=0.159926 kW=0 kvar=0 model=1
New Load.5648846 Bus1=-999999220106485.3.0 phases=1 kV=0.069282 kW=0 kvar=0 model=1
New Load.5750925_0 Bus1=-999999224071696.1.0 phases=1 kV=0.159926 kW=0 kvar=0 model=1
New Load.5750925_1 Bus1=-999999224071696.2.0 phases=1 kV=0.159926 kW=0 kvar=0 model=1
New Load.5750925_2 Bus1=-999999224071696.3.0 phases=1 kV=0.159926 kW=0 kvar=0 model=1
New Load.5728556_0 Bus1=-999999223369259.1.0 phases=1 kV=0.159926 kW=0 kvar=0 model=1
New Load.5728556_1 Bus1=-999999223369259.2.0 phases=1 kV=0.159926 kW=0 kvar=0 model=1
New Load.5728556_2 Bus1=-999999223369259.3.0 phases=1 kV=0.159926 kW=0 kvar=0 model=1
New Load.5748443_0 Bus1=-999999232838218.1.2 phases=1 kV=0.069282 kW=0 kvar=0 model=1
New Load.5748443_1 Bus1=-999999232838218.2.3 phases=1 kV=0.069282 kW=0 kvar=0 model=1
New Load.5748443_2 Bus1=-999999232838218.3.1 phases=1 kV=0.069282 kW=0 kvar=0 model=1
New Load.5741374 Bus1=-999999224183795.3.0 phases=1 kV=0.069282 kW=0 kvar=0 model=1
New Load.5748442_0 Bus1=-999999236685915.1.2 phases=1 kV=0.069282 kW=0 kvar=0 model=1
New Load.5748442_1 Bus1=-999999236685915.2.3 phases=1 kV=0.069282 kW=0 kvar=0 model=1
New Load.5748442_2 Bus1=-999999236685915.3.1 phases=1 kV=0.069282 kW=0 kvar=0 model=1
New Load.5750920_0 Bus1=-999999237041840.1.0 phases=1 kV=0.159926 kW=0 kvar=0 model=1
New Load.5750920_1 Bus1=-999999237041840.2.0 phases=1 kV=0.159926 kW=0 kvar=0 model=1
New Load.5750920_2 Bus1=-999999237041840.3.0 phases=1 kV=0.159926 kW=0 kvar=0 model=1
New Load.5745044_0 Bus1=-999999223331589.1.0 phases=1 kV=0.159926 kW=0 kvar=0 model=1
New Load.5745044_1 Bus1=-999999223331589.2.0 phases=1 kV=0.159926 kW=0 kvar=0 model=1
New Load.5745044_2 Bus1=-999999223331589.3.0 phases=1 kV=0.159926 kW=0 kvar=0 model=1
New Load.5750894_0 Bus1=-999999224183169.1.0 phases=1 kV=0.159926 kW=0 kvar=0 model=1
New Load.5750894_1 Bus1=-999999224183169.2.0 phases=1 kV=0.159926 kW=0 kvar=0 model=1
New Load.5750894_2 Bus1=-999999224183169.3.0 phases=1 kV=0.159926 kW=0 kvar=0 model=1
New Load.5750893_0 Bus1=-999999224183210.1.0 phases=1 kV=0.159926 kW=0 kvar=0 model=1
New Load.5750893_1 Bus1=-999999224183210.2.0 phases=1 kV=0.159926 kW=0 kvar=0 model=1
New Load.5750893_2 Bus1=-999999224183210.3.0 phases=1 kV=0.159926 kW=0 kvar=0 model=1

! Generators
New Generator.NST-259409_PHOTOVOLTAIC_0 Bus1=-999999232838218.1.2 phases=1 kV=0.069282 kW=0 kvar=0 model=7
New Generator.NST-259409_PHOTOVOLTAIC_1 Bus1=-999999232838218.2.3 phases=1 kV=0.069282 kW=0 kvar=0 model=7
New Generator.NST-259409_PHOTOVOLTAIC_2 Bus1=-999999232838218.3.1 phases=1 kV=0.069282 kW=0 kvar=0 model=7

! Transformers
New Transformer.293588B4BC32EE34E0637F61810A7CE3_0_0 phases=1 windings=2 xhl=0.5 %R=0.353554 %imag=1e-06 %noloadloss=0
~ wdg=1 bus=220106485.3.0 kV=9.2376 kVA=1 conn=wye
~ wdg=2 bus=-999999220106485.3.0 kV=0.069282 kVA=1 conn=wye
New Transformer.293588B4ED86EE34E0637F61810A7CE3_1_0 phases=1 windings=2 xhl=0.5 %R=0.353554 %imag=1e-06 %noloadloss=0
~ wdg=1 bus=239923080.1.2 kV=16 kVA=166.667 conn=delta
~ wdg=2 bus=-999999239923080.1.0 kV=0.159926 kVA=166.667 conn=wye
New Transformer.293588B4ED86EE34E0637F61810A7CE3_1_1 phases=1 windings=2 xhl=0.5 %R=0.353554 %imag=1e-06 %noloadloss=0
~ wdg=1 bus=239923080.2.3 kV=16 kVA=166.667 conn=delta
~ wdg=2 bus=-999999239923080.2.0 kV=0.159926 kVA=166.667 conn=wye
New Transformer.293588B4ED86EE34E0637F61810A7CE3_1_2 phases=1 windings=2 xhl=0.5 %R=0.353554 %imag=1e-06 %noloadloss=0
~ wdg=1 bus=239923080.3.1 kV=16 kVA=166.667 conn=delta
~ wdg=2 bus=-999999239923080.3.0 kV=0.159926 kVA=166.667 conn=wye
New Transformer.293588B4C659EE34E0637F61810A7CE3_2_0 phases=1 windings=2 xhl=0.5 %R=0.353554 %imag=1e-06 %noloadloss=0
~ wdg=1 bus=224183754.1.0 kV=9.2376 kVA=75 conn=wye
~ wdg=2 bus=-999999224183754.1.0 kV=0.159926 kVA=75 conn=wye
New Transformer.293588B4C5B2EE34E0637F61810A7CE3_3_0 phases=1 windings=2 xhl=0.5 %R=0.353554 %imag=1e-06 %noloadloss=0
~ wdg=1 bus=223331614.1.2 kV=16 kVA=500 conn=delta
~ wdg=2 bus=-999999223331614.1.0 kV=0.159926 kVA=500 conn=wye
New Transformer.293588B4C5B2EE34E0637F61810A7CE3_3_1 phases=1 windings=2 xhl=0.5 %R=0.353554 %imag=1e-06 %noloadloss=0
~ wdg=1 bus=223331614.2.3 kV=16 kVA=500 conn=delta
~ wdg=2 bus=-999999223331614.2.0 kV=0.159926 kVA=500 conn=wye
New Transformer.293588B4C5B2EE34E0637F61810A7CE3_3_2 phases=1 windings=2 xhl=0.5 %R=0.353554 %imag=1e-06 %noloadloss=0
~ wdg=1 bus=223331614.3.1 kV=16 kVA=500 conn=delta
~ wdg=2 bus=-999999223331614.3.0 kV=0.159926 kVA=500 conn=wye
New Transformer.293588B4DCD8EE34E0637F61810A7CE3_4_0 phases=1 windings=2 xhl=0.5 %R=0.353554 %imag=1e-06 %noloadloss=0
~ wdg=1 bus=236089917.1.2 kV=16 kVA=166.667 conn=delta
~ wdg=2 bus=-999999236089917.1.0 kV=0.159926 kVA=166.667 conn=wye
New Transformer.293588B4DCD8EE34E0637F61810A7CE3_4_1 phases=1 windings=2 xhl=0.5 %R=0.353554 %imag=1e-06 %noloadloss=0
~ wdg=1 bus=236089917.2.3 kV=16 kVA=166.667 conn=delta
~ wdg=2 bus=-999999236089917.2.0 kV=0.159926 kVA=166.667 conn=wye
New Transformer.293588B4DCD8EE34E0637F61810A7CE3_4_2 phases=1 windings=2 xhl=0.5 %R=0.353554 %imag=1e-06 %noloadloss=0
~ wdg=1 bus=236089917.3.1 kV=16 kVA=166.667 conn=delta
~ wdg=2 bus=-999999236089917.3.0 kV=0.159926 kVA=166.667 conn=wye
New Transformer.293588B4C653EE34E0637F61810A7CE3_5_0 phases=1 windings=2 xhl=0.5 %R=0.353554 %imag=1e-06 %noloadloss=0
~ wdg=1 bus=224181272.1.2 kV=16 kVA=100 conn=delta
~ wdg=2 bus=-999999224181272.1.0 kV=0.159926 kVA=100 conn=wye
New Transformer.293588B4C653EE34E0637F61810A7CE3_5_1 phases=1 windings=2 xhl=0.5 %R=0.353554 %imag=1e-06 %noloadloss=0
~ wdg=1 bus=224181272.2.3 kV=16 kVA=100 conn=delta
~ wdg=2 bus=-999999224181272.2.0 kV=0.159926 kVA=100 conn=wye
New Transformer.293588B4C653EE34E0637F61810A7CE3_5_2 phases=1 windings=2 xhl=0.5 %R=0.353554 %imag=1e-06 %noloadloss=0
~ wdg=1 bus=224181272.3.1 kV=16 kVA=100 conn=delta
~ wdg=2 bus=-999999224181272.3.0 kV=0.159926 kVA=100 conn=wye
New Transformer.293588B4C615EE34E0637F61810A7CE3_6_0 phases=1 windings=2 xhl=0.5 %R=0.353554 %imag=1e-06 %noloadloss=0
~ wdg=1 bus=223369206.1.2 kV=16 kVA=100 conn=delta
~ wdg=2 bus=-999999223369206.1.0 kV=0.159926 kVA=100 conn=wye
New Transformer.293588B4C615EE34E0637F61810A7CE3_6_1 phases=1 windings=2 xhl=0.5 %R=0.353554 %imag=1e-06 %noloadloss=0
~ wdg=1 bus=223369206.2.3 kV=16 kVA=100 conn=delta
~ wdg=2 bus=-999999223369206.2.0 kV=0.159926 kVA=100 conn=wye
New Transformer.293588B4C615EE34E0637F61810A7CE3_6_2 phases=1 windings=2 xhl=0.5 %R=0.353554 %imag=1e-06 %noloadloss=0
~ wdg=1 bus=223369206.3.1 kV=16 kVA=100 conn=delta
~ wdg=2 bus=-999999223369206.3.0 kV=0.159926 kVA=100 conn=wye
New Transformer.293588B4C654EE34E0637F61810A7CE3_7_0 phases=1 windings=2 xhl=0.5 %R=0.353554 %imag=1e-06 %noloadloss=0
~ wdg=1 bus=224181424.2.0 kV=9.2376 kVA=50 conn=wye
~ wdg=2 bus=-999999224181424.2.0 kV=0.069282 kVA=50 conn=wye
New Transformer.293588B50196EE34E0637F61810A7CE3_8_0 phases=1 windings=2 xhl=0.5 %R=0.353554 %imag=1e-06 %noloadloss=0
~ wdg=1 bus=263861257.1.2 kV=16 kVA=250 conn=delta
~ wdg=2 bus=-999999263861257.1.0 kV=0.159926 kVA=250 conn=wye
New Transformer.293588B50196EE34E0637F61810A7CE3_8_1 phases=1 windings=2 xhl=0.5 %R=0.353554 %imag=1e-06 %noloadloss=0
~ wdg=1 bus=263861257.2.3 kV=16 kVA=250 conn=delta
~ wdg=2 bus=-999999263861257.2.0 kV=0.159926 kVA=250 conn=wye
New Transformer.293588B50196EE34E0637F61810A7CE3_8_2 phases=1 windings=2 xhl=0.5 %R=0.353554 %imag=1e-06 %noloadloss=0
~ wdg=1 bus=263861257.3.1 kV=16 kVA=250 conn=delta
~ wdg=2 bus=-999999263861257.3.0 kV=0.159926 kVA=250 conn=wye
New Transformer.293588B4D4C5EE34E0637F61810A7CE3_9_0 phases=1 windings=2 xhl=0.5 %R=0.353554 %imag=1e-06 %noloadloss=0
~ wdg=1 bus=236685546.1.2 kV=16 kVA=166.667 conn=delta
~ wdg=2 bus=-999999236685546.1.0 kV=0.159926 kVA=166.667 conn=wye
New Transformer.293588B4D4C5EE34E0637F61810A7CE3_9_1 phases=1 windings=2 xhl=0.5 %R=0.353554 %imag=1e-06 %noloadloss=0
~ wdg=1 bus=236685546.2.3 kV=16 kVA=166.667 conn=delta
~ wdg=2 bus=-999999236685546.2.0 kV=0.159926 kVA=166.667 conn=wye
New Transformer.293588B4D4C5EE34E0637F61810A7CE3_9_2 phases=1 windings=2 xhl=0.5 %R=0.353554 %imag=1e-06 %noloadloss=0
~ wdg=1 bus=236685546.3.1 kV=16 kVA=166.667 conn=delta
~ wdg=2 bus=-999999236685546.3.0 kV=0.159926 kVA=166.667 conn=wye
New Transformer.293588B4CC27EE34E0637F61810A7CE3_10_0 phases=1 windings=2 xhl=0.5 %R=0.353554 %imag=1e-06 %noloadloss=0
~ wdg=1 bus=224071696.1.2 kV=16 kVA=250 conn=delta
~ wdg=2 bus=-999999224071696.1.0 kV=0.159926 kVA=250 conn=wye
New Transformer.293588B4CC27EE34E0637F61810A7CE3_10_1 phases=1 windings=2 xhl=0.5 %R=0.353554 %imag=1e-06 %noloadloss=0
~ wdg=1 bus=224071696.2.3 kV=16 kVA=250 conn=delta
~ wdg=2 bus=-999999224071696.2.0 kV=0.159926 kVA=250 conn=wye
New Transformer.293588B4CC27EE34E0637F61810A7CE3_10_2 phases=1 windings=2 xhl=0.5 %R=0.353554 %imag=1e-06 %noloadloss=0
~ wdg=1 bus=224071696.3.1 kV=16 kVA=250 conn=delta
~ wdg=2 bus=-999999224071696.3.0 kV=0.159926 kVA=250 conn=wye
New Transformer.293588B4C616EE34E0637F61810A7CE3_11_0 phases=1 windings=2 xhl=0.5 %R=0.353554 %imag=1e-06 %noloadloss=0
~ wdg=1 bus=223369259.1.2 kV=16 kVA=50 conn=delta
~ wdg=2 bus=-999999223369259.1.0 kV=0.159926 kVA=50 conn=wye
New Transformer.293588B4C616EE34E0637F61810A7CE3_11_1 phases=1 windings=2 xhl=0.5 %R=0.353554 %imag=1e-06 %noloadloss=0
~ wdg=1 bus=223369259.2.3 kV=16 kVA=50 conn=delta
~ wdg=2 bus=-999999223369259.2.0 kV=0.159926 kVA=50 conn=wye
New Transformer.293588B4C616EE34E0637F61810A7CE3_11_2 phases=1 windings=2 xhl=0.5 %R=0.353554 %imag=1e-06 %noloadloss=0
~ wdg=1 bus=223369259.3.1 kV=16 kVA=50 conn=delta
~ wdg=2 bus=-999999223369259.3.0 kV=0.159926 kVA=50 conn=wye
New Transformer.293588B425EEEE34E0637F61810A7CE3_12_0 phases=1 windings=2 xhl=0.5 %R=0.353554 %imag=1e-06 %noloadloss=0
~ wdg=1 bus=232838035.1.2 kV=16 kVA=166.667 conn=delta
~ wdg=2 bus=-999999232838035.1.2 kV=0.069282 kVA=166.667 conn=delta
New Transformer.293588B425EEEE34E0637F61810A7CE3_12_1 phases=1 windings=2 xhl=0.5 %R=0.353554 %imag=1e-06 %noloadloss=0
~ wdg=1 bus=232838035.2.3 kV=16 kVA=166.667 conn=delta
~ wdg=2 bus=-999999232838035.2.3 kV=0.069282 kVA=166.667 conn=delta
New Transformer.293588B425EEEE34E0637F61810A7CE3_12_2 phases=1 windings=2 xhl=0.5 %R=0.353554 %imag=1e-06 %noloadloss=0
~ wdg=1 bus=232838035.3.1 kV=16 kVA=166.667 conn=delta
~ wdg=2 bus=-999999232838035.3.1 kV=0.069282 kVA=166.667 conn=delta
New Transformer.293588B34E50EE34E0637F61810A7CE3_13_0 phases=1 windings=2 xhl=0.5 %R=0.353554 %imag=1e-06 %noloadloss=0
~ wdg=1 bus=223945165.2.0 kV=9.2376 kVA=75 conn=wye
~ wdg=2 bus=-999999223945165.2.0 kV=0.159926 kVA=75 conn=wye
New Transformer.293588B4D85DEE34E0637F61810A7CE3_14_0 phases=1 windings=2 xhl=0.5 %R=0.353554 %imag=1e-06 %noloadloss=0
~ wdg=1 bus=232838218.1.2 kV=16 kVA=100 conn=delta
~ wdg=2 bus=-999999232838218.1.2 kV=0.069282 kVA=100 conn=delta
New Transformer.293588B4D85DEE34E0637F61810A7CE3_14_1 phases=1 windings=2 xhl=0.5 %R=0.353554 %imag=1e-06 %noloadloss=0
~ wdg=1 bus=232838218.2.3 kV=16 kVA=100 conn=delta
~ wdg=2 bus=-999999232838218.2.3 kV=0.069282 kVA=100 conn=delta
New Transformer.293588B4D85DEE34E0637F61810A7CE3_14_2 phases=1 windings=2 xhl=0.5 %R=0.353554 %imag=1e-06 %noloadloss=0
~ wdg=1 bus=232838218.3.1 kV=16 kVA=100 conn=delta
~ wdg=2 bus=-999999232838218.3.1 kV=0.069282 kVA=100 conn=delta
New Transformer.293588B4E071EE34E0637F61810A7CE3_15_0 phases=1 windings=2 xhl=0.5 %R=0.353554 %imag=1e-06 %noloadloss=0
~ wdg=1 bus=236185788.1.2 kV=16 kVA=166.667 conn=delta
~ wdg=2 bus=-999999236185788.1.0 kV=0.159926 kVA=166.667 conn=wye
New Transformer.293588B4E071EE34E0637F61810A7CE3_15_1 phases=1 windings=2 xhl=0.5 %R=0.353554 %imag=1e-06 %noloadloss=0
~ wdg=1 bus=236185788.2.3 kV=16 kVA=166.667 conn=delta
~ wdg=2 bus=-999999236185788.2.0 kV=0.159926 kVA=166.667 conn=wye
New Transformer.293588B4E071EE34E0637F61810A7CE3_15_2 phases=1 windings=2 xhl=0.5 %R=0.353554 %imag=1e-06 %noloadloss=0
~ wdg=1 bus=236185788.3.1 kV=16 kVA=166.667 conn=delta
~ wdg=2 bus=-999999236185788.3.0 kV=0.159926 kVA=166.667 conn=wye
New Transformer.293588B4D544EE34E0637F61810A7CE3_16_0 phases=1 windings=2 xhl=0.5 %R=0.353554 %imag=1e-06 %noloadloss=0
~ wdg=1 bus=237041966.1.2 kV=16 kVA=100 conn=delta
~ wdg=2 bus=-999999237041966.1.0 kV=0.159926 kVA=100 conn=wye
New Transformer.293588B4D544EE34E0637F61810A7CE3_16_1 phases=1 windings=2 xhl=0.5 %R=0.353554 %imag=1e-06 %noloadloss=0
~ wdg=1 bus=237041966.2.3 kV=16 kVA=100 conn=delta
~ wdg=2 bus=-999999237041966.2.0 kV=0.159926 kVA=100 conn=wye
New Transformer.293588B4D544EE34E0637F61810A7CE3_16_2 phases=1 windings=2 xhl=0.5 %R=0.353554 %imag=1e-06 %noloadloss=0
~ wdg=1 bus=237041966.3.1 kV=16 kVA=100 conn=delta
~ wdg=2 bus=-999999237041966.3.0 kV=0.159926 kVA=100 conn=wye
New Transformer.293588B2DA24EE34E0637F61810A7CE3_17_0 phases=1 windings=2 xhl=0.5 %R=0.353554 %imag=1e-06 %noloadloss=0
~ wdg=1 bus=223242940.1.2 kV=16 kVA=166.667 conn=delta
~ wdg=2 bus=-999999223242940.1.0 kV=0.159926 kVA=166.667 conn=wye
New Transformer.293588B2DA24EE34E0637F61810A7CE3_17_1 phases=1 windings=2 xhl=0.5 %R=0.353554 %imag=1e-06 %noloadloss=0
~ wdg=1 bus=223242940.2.3 kV=16 kVA=166.667 conn=delta
~ wdg=2 bus=-999999223242940.2.0 kV=0.159926 kVA=166.667 conn=wye
New Transformer.293588B2DA24EE34E0637F61810A7CE3_17_2 phases=1 windings=2 xhl=0.5 %R=0.353554 %imag=1e-06 %noloadloss=0
~ wdg=1 bus=223242940.3.1 kV=16 kVA=166.667 conn=delta
~ wdg=2 bus=-999999223242940.3.0 kV=0.159926 kVA=166.667 conn=wye
New Transformer.293588B23C49EE34E0637F61810A7CE3_18_0 phases=1 windings=2 xhl=0.5 %R=0.353554 %imag=1e-06 %noloadloss=0
~ wdg=1 bus=240062739.1.2 kV=16 kVA=333.333 conn=delta
~ wdg=2 bus=-999999240062739.1.0 kV=0.159926 kVA=333.333 conn=wye
New Transformer.293588B23C49EE34E0637F61810A7CE3_18_1 phases=1 windings=2 xhl=0.5 %R=0.353554 %imag=1e-06 %noloadloss=0
~ wdg=1 bus=240062739.2.3 kV=16 kVA=333.333 conn=delta
~ wdg=2 bus=-999999240062739.2.0 kV=0.159926 kVA=333.333 conn=wye
New Transformer.293588B23C49EE34E0637F61810A7CE3_18_2 phases=1 windings=2 xhl=0.5 %R=0.353554 %imag=1e-06 %noloadloss=0
~ wdg=1 bus=240062739.3.1 kV=16 kVA=333.333 conn=delta
~ wdg=2 bus=-999999240062739.3.0 kV=0.159926 kVA=333.333 conn=wye
New Transformer.293588B502A3EE34E0637F61810A7CE3_19_0 phases=1 windings=2 xhl=0.5 %R=0.353554 %imag=1e-06 %noloadloss=0
~ wdg=1 bus=266405231.1.2 kV=16 kVA=500 conn=delta
~ wdg=2 bus=-999999266405231.1.0 kV=0.159926 kVA=500 conn=wye
New Transformer.293588B502A3EE34E0637F61810A7CE3_19_1 phases=1 windings=2 xhl=0.5 %R=0.353554 %imag=1e-06 %noloadloss=0
~ wdg=1 bus=266405231.2.3 kV=16 kVA=500 conn=delta
~ wdg=2 bus=-999999266405231.2.0 kV=0.159926 kVA=500 conn=wye
New Transformer.293588B502A3EE34E0637F61810A7CE3_19_2 phases=1 windings=2 xhl=0.5 %R=0.353554 %imag=1e-06 %noloadloss=0
~ wdg=1 bus=266405231.3.1 kV=16 kVA=500 conn=delta
~ wdg=2 bus=-999999266405231.3.0 kV=0.159926 kVA=500 conn=wye
New Transformer.293588B4C65AEE34E0637F61810A7CE3_20_0 phases=1 windings=2 xhl=0.5 %R=0.353554 %imag=1e-06 %noloadloss=0
~ wdg=1 bus=224183795.3.0 kV=9.2376 kVA=50 conn=wye
~ wdg=2 bus=-999999224183795.3.0 kV=0.069282 kVA=50 conn=wye
New Transformer.293588B4D4C6EE34E0637F61810A7CE3_21_0 phases=1 windings=2 xhl=0.5 %R=0.353554 %imag=1e-06 %noloadloss=0
~ wdg=1 bus=236685915.1.2 kV=16 kVA=166.667 conn=delta
~ wdg=2 bus=-999999236685915.1.2 kV=0.069282 kVA=166.667 conn=delta
New Transformer.293588B4D4C6EE34E0637F61810A7CE3_21_1 phases=1 windings=2 xhl=0.5 %R=0.353554 %imag=1e-06 %noloadloss=0
~ wdg=1 bus=236685915.2.3 kV=16 kVA=166.667 conn=delta
~ wdg=2 bus=-999999236685915.2.3 kV=0.069282 kVA=166.667 conn=delta
New Transformer.293588B4D4C6EE34E0637F61810A7CE3_21_2 phases=1 windings=2 xhl=0.5 %R=0.353554 %imag=1e-06 %noloadloss=0
~ wdg=1 bus=236685915.3.1 kV=16 kVA=166.667 conn=delta
~ wdg=2 bus=-999999236685915.3.1 kV=0.069282 kVA=166.667 conn=delta
New Transformer.293588B4D543EE34E0637F61810A7CE3_22_0 phases=1 windings=2 xhl=0.5 %R=0.353554 %imag=1e-06 %noloadloss=0
~ wdg=1 bus=237041840.1.2 kV=16 kVA=250 conn=delta
~ wdg=2 bus=-999999237041840.1.0 kV=0.159926 kVA=250 conn=wye
New Transformer.293588B4D543EE34E0637F61810A7CE3_22_1 phases=1 windings=2 xhl=0.5 %R=0.353554 %imag=1e-06 %noloadloss=0
~ wdg=1 bus=237041840.2.3 kV=16 kVA=250 conn=delta
~ wdg=2 bus=-999999237041840.2.0 kV=0.159926 kVA=250 conn=wye
New Transformer.293588B4D543EE34E0637F61810A7CE3_22_2 phases=1 windings=2 xhl=0.5 %R=0.353554 %imag=1e-06 %noloadloss=0
~ wdg=1 bus=237041840.3.1 kV=16 kVA=250 conn=delta
~ wdg=2 bus=-999999237041840.3.0 kV=0.159926 kVA=250 conn=wye
New Transformer.293588B4CFF4EE34E0637F61810A7CE3_23_0 phases=1 windings=2 xhl=0.5 %R=0.353554 %imag=1e-06 %noloadloss=0
~ wdg=1 bus=231056036.3.0 kV=9.2376 kVA=75 conn=wye
~ wdg=2 bus=-999999231056036.3.0 kV=0.159926 kVA=75 conn=wye
New Transformer.293588B4D309EE34E0637F61810A7CE3_24_0 phases=1 windings=2 xhl=0.5 %R=0.353554 %imag=1e-06 %noloadloss=0
~ wdg=1 bus=236208719.1.2 kV=16 kVA=166.667 conn=delta
~ wdg=2 bus=-999999236208719.1.0 kV=0.159926 kVA=166.667 conn=wye
New Transformer.293588B4D309EE34E0637F61810A7CE3_24_1 phases=1 windings=2 xhl=0.5 %R=0.353554 %imag=1e-06 %noloadloss=0
~ wdg=1 bus=236208719.2.3 kV=16 kVA=166.667 conn=delta
~ wdg=2 bus=-999999236208719.2.0 kV=0.159926 kVA=166.667 conn=wye
New Transformer.293588B4D309EE34E0637F61810A7CE3_24_2 phases=1 windings=2 xhl=0.5 %R=0.353554 %imag=1e-06 %noloadloss=0
~ wdg=1 bus=236208719.3.1 kV=16 kVA=166.667 conn=delta
~ wdg=2 bus=-999999236208719.3.0 kV=0.159926 kVA=166.667 conn=wye
New Transformer.293588B4D4C4EE34E0637F61810A7CE3_25_0 phases=1 windings=2 xhl=0.5 %R=0.353554 %imag=1e-06 %noloadloss=0
~ wdg=1 bus=236685389.1.2 kV=16 kVA=250 conn=delta
~ wdg=2 bus=-999999236685389.1.0 kV=0.159926 kVA=250 conn=wye
New Transformer.293588B4D4C4EE34E0637F61810A7CE3_25_1 phases=1 windings=2 xhl=0.5 %R=0.353554 %imag=1e-06 %noloadloss=0
~ wdg=1 bus=236685389.2.3 kV=16 kVA=250 conn=delta
~ wdg=2 bus=-999999236685389.2.0 kV=0.159926 kVA=250 conn=wye
New Transformer.293588B4D4C4EE34E0637F61810A7CE3_25_2 phases=1 windings=2 xhl=0.5 %R=0.353554 %imag=1e-06 %noloadloss=0
~ wdg=1 bus=236685389.3.1 kV=16 kVA=250 conn=delta
~ wdg=2 bus=-999999236685389.3.0 kV=0.159926 kVA=250 conn=wye
New Transformer.293588B4C617EE34E0637F61810A7CE3_26_0 phases=1 windings=2 xhl=0.5 %R=0.353554 %imag=1e-06 %noloadloss=0
~ wdg=1 bus=223369425.1.0 kV=9.2376 kVA=75 conn=wye
~ wdg=2 bus=-999999223369425.1.0 kV=0.069282 kVA=75 conn=wye
New Transformer.293588B4C656EE34E0637F61810A7CE3_27_0 phases=1 windings=2 xhl=0.5 %R=0.353554 %imag=1e-06 %noloadloss=0
~ wdg=1 bus=224183128.1.2 kV=16 kVA=333.333 conn=delta
~ wdg=2 bus=-999999224183128.1.0 kV=0.159926 kVA=333.333 conn=wye
New Transformer.293588B4C656EE34E0637F61810A7CE3_27_1 phases=1 windings=2 xhl=0.5 %R=0.353554 %imag=1e-06 %noloadloss=0
~ wdg=1 bus=224183128.2.3 kV=16 kVA=333.333 conn=delta
~ wdg=2 bus=-999999224183128.2.0 kV=0.159926 kVA=333.333 conn=wye
New Transformer.293588B4C656EE34E0637F61810A7CE3_27_2 phases=1 windings=2 xhl=0.5 %R=0.353554 %imag=1e-06 %noloadloss=0
~ wdg=1 bus=224183128.3.1 kV=16 kVA=333.333 conn=delta
~ wdg=2 bus=-999999224183128.3.0 kV=0.159926 kVA=333.333 conn=wye
New Transformer.293588B4C5B1EE34E0637F61810A7CE3_28_0 phases=1 windings=2 xhl=0.5 %R=0.353554 %imag=1e-06 %noloadloss=0
~ wdg=1 bus=223331589.1.2 kV=16 kVA=833.333 conn=delta
~ wdg=2 bus=-999999223331589.1.0 kV=0.159926 kVA=833.333 conn=wye
New Transformer.293588B4C5B1EE34E0637F61810A7CE3_28_1 phases=1 windings=2 xhl=0.5 %R=0.353554 %imag=1e-06 %noloadloss=0
~ wdg=1 bus=223331589.2.3 kV=16 kVA=833.333 conn=delta
~ wdg=2 bus=-999999223331589.2.0 kV=0.159926 kVA=833.333 conn=wye
New Transformer.293588B4C5B1EE34E0637F61810A7CE3_28_2 phases=1 windings=2 xhl=0.5 %R=0.353554 %imag=1e-06 %noloadloss=0
~ wdg=1 bus=223331589.3.1 kV=16 kVA=833.333 conn=delta
~ wdg=2 bus=-999999223331589.3.0 kV=0.159926 kVA=833.333 conn=wye
New Transformer.293588B4C657EE34E0637F61810A7CE3_29_0 phases=1 windings=2 xhl=0.5 %R=0.353554 %imag=1e-06 %noloadloss=0
~ wdg=1 bus=224183169.1.2 kV=16 kVA=166.667 conn=delta
~ wdg=2 bus=-999999224183169.1.0 kV=0.159926 kVA=166.667 conn=wye
New Transformer.293588B4C657EE34E0637F61810A7CE3_29_1 phases=1 windings=2 xhl=0.5 %R=0.353554 %imag=1e-06 %noloadloss=0
~ wdg=1 bus=224183169.2.3 kV=16 kVA=166.667 conn=delta
~ wdg=2 bus=-999999224183169.2.0 kV=0.159926 kVA=166.667 conn=wye
New Transformer.293588B4C657EE34E0637F61810A7CE3_29_2 phases=1 windings=2 xhl=0.5 %R=0.353554 %imag=1e-06 %noloadloss=0
~ wdg=1 bus=224183169.3.1 kV=16 kVA=166.667 conn=delta
~ wdg=2 bus=-999999224183169.3.0 kV=0.159926 kVA=166.667 conn=wye
New Transformer.293588B4C658EE34E0637F61810A7CE3_30_0 phases=1 windings=2 xhl=0.5 %R=0.353554 %imag=1e-06 %noloadloss=0
~ wdg=1 bus=224183210.1.2 kV=16 kVA=100 conn=delta
~ wdg=2 bus=-999999224183210.1.0 kV=0.159926 kVA=100 conn=wye
New Transformer.293588B4C658EE34E0637F61810A7CE3_30_1 phases=1 windings=2 xhl=0.5 %R=0.353554 %imag=1e-06 %noloadloss=0
~ wdg=1 bus=224183210.2.3 kV=16 kVA=100 conn=delta
~ wdg=2 bus=-999999224183210.2.0 kV=0.159926 kVA=100 conn=wye
New Transformer.293588B4C658EE34E0637F61810A7CE3_30_2 phases=1 windings=2 xhl=0.5 %R=0.353554 %imag=1e-06 %noloadloss=0
~ wdg=1 bus=224183210.3.1 kV=16 kVA=100 conn=delta
~ wdg=2 bus=-999999224183210.3.0 kV=0.159926 kVA=100 conn=wye
New Transformer.293588B4BC33EE34E0637F61810A7CE3_31_0 phases=1 windings=2 xhl=0.5 %R=0.353554 %imag=1e-06 %noloadloss=0
~ wdg=1 bus=220106796.1.2 kV=16 kVA=25 conn=delta
~ wdg=2 bus=-999999220106796.1.2 kV=0.069282 kVA=25 conn=delta
New Transformer.293588B4BC33EE34E0637F61810A7CE3_31_1 phases=1 windings=2 xhl=0.5 %R=0.353554 %imag=1e-06 %noloadloss=0
~ wdg=1 bus=220106796.2.3 kV=16 kVA=25 conn=delta
~ wdg=2 bus=-999999220106796.2.3 kV=0.069282 kVA=25 conn=delta
New Transformer.293588B4BC33EE34E0637F61810A7CE3_31_2 phases=1 windings=2 xhl=0.5 %R=0.353554 %imag=1e-06 %noloadloss=0
~ wdg=1 bus=220106796.3.1 kV=16 kVA=25 conn=delta
~ wdg=2 bus=-999999220106796.3.1 kV=0.069282 kVA=25 conn=delta
New Transformer.293588B4C655EE34E0637F61810A7CE3_32_0 phases=1 windings=2 xhl=0.5 %R=0.353554 %imag=1e-06 %noloadloss=0
~ wdg=1 bus=224181505.1.0 kV=9.2376 kVA=12.5 conn=wye
~ wdg=2 bus=-999999224181505.1.0 kV=0.069282 kVA=12.5 conn=wye
New Transformer.293588B4C655EE34E0637F61810A7CE3_32_1 phases=1 windings=2 xhl=0.5 %R=0.353554 %imag=1e-06 %noloadloss=0
~ wdg=1 bus=224181505.2.0 kV=9.2376 kVA=12.5 conn=wye
~ wdg=2 bus=-999999224181505.2.0 kV=0.069282 kVA=12.5 conn=wye

Set voltagebases=[16.0 0.277 0.12]
CalcVoltageBases
Solve
