! OpenDSS script generated from multiconductor network
Clear

New Circuit.mc_network basekv=4.0 pu=1.000000 angle=0.00 frequency=60.0 phases=3 Mvasc3=15999.2 Mvasc1=5333.07
~ bus1=-8888882134746.1.2.3

! Line codes
New LineCode.500_CLP_3PH_4KV_3 nphases=3 units=km Rmatrix=[ 1e-05 | 0 1e-05 | 0 0 1e-05 ] Xmatrix=[ 1e-05 | 0 1e-05 | 0 0 1e-05 ] Cmatrix=[ 0 | 0 0 | 0 0 0 ]
New LineCode.4_CU_3PH_4_CU_N_4KV_4 nphases=4 units=km Rmatrix=[ 0.023875 | 0 0.023875 | 0 0 0.023875 | 0 0 0 0.023875 ] Xmatrix=[ 0.011814 | 0 0.011814 | 0 0 0.011814 | 0 0 0 0.011814 ] Cmatrix=[ 0 | 0 0 | 0 0 0 | 0 0 0 0 ]
New LineCode.336_ACSR_3PH_336_ACSR_N_4KV_4 nphases=4 units=km Rmatrix=[ 0.009708 | 0 0.009708 | 0 0 0.009708 | 0 0 0 0.009708 ] Xmatrix=[ 0.01936 | 0 0.01936 | 0 0 0.01936 | 0 0 0 0.01936 ] Cmatrix=[ 0 | 0 0 | 0 0 0 | 0 0 0 0 ]
New LineCode.6_CU_3PH_6_CU_N_4KV_4 nphases=4 units=km Rmatrix=[ 0.05671 | 0 0.05671 | 0 0 0.05671 | 0 0 0 0.05671 ] Xmatrix=[ 0.018315 | 0 0.018315 | 0 0 0.018315 | 0 0 0 0.018315 ] Cmatrix=[ 0 | 0 0 | 0 0 0 | 0 0 0 0 ]
New LineCode.4_ACSR_1PH_4_ACSR_N_4KV_2_N nphases=2 units=km Rmatrix=[ 0.075858 | 0 0.075858 ] Xmatrix=[ 0.025515 | 0 0.025515 ] Cmatrix=[ 0 | 0 0 ]
New LineCode.6_CU_1PH_6_CU_N_4KV_2_N nphases=2 units=km Rmatrix=[ 0.186571 | 0 0.186571 ] Xmatrix=[ 0.060254 | 0 0.060254 ] Cmatrix=[ 0 | 0 0 ]
New LineCode.4_CU_1PH_4_CU_N_4KV_2_N nphases=2 units=km Rmatrix=[ 0.026702 | 0 0.026702 ] Xmatrix=[ 0.013213 | 0 0.013213 ] Cmatrix=[ 0 | 0 0 ]
New LineCode.1/0_JCN_2PH_4KV_2 nphases=2 units=km Rmatrix=[ 0.063903 | 0 0.063903 ] Xmatrix=[ 0.019532 | 0 0.019532 ] Cmatrix=[ 0 | 0 0 ]
New LineCode.1/0_ACSR_3PH_1/0_ACSR_N_4KV_4 nphases=4 units=km Rmatrix=[ 0.023892 | 0 0.023892 | 0 0 0.023892 | 0 0 0 0.023892 ] Xmatrix=[ 0.017267 | 0 0.017267 | 0 0 0.017267 | 0 0 0 0.017267 ] Cmatrix=[ 0 | 0 0 | 0 0 0 | 0 0 0 0 ]
New LineCode.1/0_ACSR_1PH_1/0_ACSR_N_4KV_2_N nphases=2 units=km Rmatrix=[ 0.031214 | 0 0.031214 ] Xmatrix=[ 0.022558 | 0 0.022558 ] Cmatrix=[ 0 | 0 0 ]
New LineCode.6_ACSR_3PH_6_ACSR_N_4KV_4 nphases=4 units=km Rmatrix=[ 0.057392 | 0 0.057392 | 0 0 0.057392 | 0 0 0 0.057392 ] Xmatrix=[ 0.019304 | 0 0.019304 | 0 0 0.019304 | 0 0 0 0.019304 ] Cmatrix=[ 0 | 0 0 | 0 0 0 | 0 0 0 0 ]
New LineCode.2_CU_3PH_4KV_3 nphases=3 units=km Rmatrix=[ 1e-05 | 0 1e-05 | 0 0 1e-05 ] Xmatrix=[ 1e-05 | 0 1e-05 | 0 0 1e-05 ] Cmatrix=[ 0 | 0 0 | 0 0 0 ]
New LineCode.6_PILC_3PH_4KV_3 nphases=3 units=km Rmatrix=[ 1e-05 | 0 1e-05 | 0 0 1e-05 ] Xmatrix=[ 1e-05 | 0 1e-05 | 0 0 1e-05 ] Cmatrix=[ 0 | 0 0 | 0 0 0 ]
New LineCode.2/0_CU_3PH_2/0_CU_N_4KV_4 nphases=4 units=km Rmatrix=[ 0.08684 | 0 0.08684 | 0 0 0.08684 | 0 0 0 0.08684 ] Xmatrix=[ 0.120264 | 0 0.120264 | 0 0 0.120264 | 0 0 0 0.120264 ] Cmatrix=[ 0 | 0 0 | 0 0 0 | 0 0 0 0 ]
New LineCode.2_CU_3PH_2_CU_N_4KV_4 nphases=4 units=km Rmatrix=[ 0.039303 | 0 0.039303 | 0 0 0.039303 | 0 0 0 0.039303 ] Xmatrix=[ 0.02886 | 0 0.02886 | 0 0 0.02886 | 0 0 0 0.02886 ] Cmatrix=[ 0 | 0 0 | 0 0 0 | 0 0 0 0 ]
New LineCode.4_CU_2PH_4_CU_N_4KV_3_N nphases=3 units=km Rmatrix=[ 0.005923 | 0 0.005923 | 0 0 0.005923 ] Xmatrix=[ 0.002931 | 0 0.002931 | 0 0 0.002931 ] Cmatrix=[ 0 | 0 0 | 0 0 0 ]
New LineCode.6_CU_2PH_6_CU_N_4KV_3_N nphases=3 units=km Rmatrix=[ 0.062426 | 0 0.062426 | 0 0 0.062426 ] Xmatrix=[ 0.020161 | 0 0.020161 | 0 0 0.020161 ] Cmatrix=[ 0 | 0 0 | 0 0 0 ]
New LineCode.1/0_ACSR_2PH_1/0_ACSR_N_4KV_3_N nphases=3 units=km Rmatrix=[ 0.060291 | 0 0.060291 | 0 0 0.060291 ] Xmatrix=[ 0.019471 | 0 0.019471 | 0 0 0.019471 ] Cmatrix=[ 0 | 0 0 | 0 0 0 ]

! Lines
New Line.1269155EP1$00670 phases=3 Bus1=-8888882134746.1.2.3 Bus2=15164482.1.2.3 LineCode=500_CLP_3PH_4KV_3 Length=0.251952 units=km
New Line.1700074E$ND190327417 phases=4 Bus1=190327417.0.1.2.3 Bus2=95042105.0.1.2.3 LineCode=4_CU_3PH_4_CU_N_4KV_4 Length=0.068076 units=km
New Line.1541040E$PS1150 phases=4 Bus1=15162917.0.1.2.3 Bus2=166388679.0.1.2.3 LineCode=336_ACSR_3PH_336_ACSR_N_4KV_4 Length=0.052185 units=km
New Line.1700074E$1269153E phases=4 Bus1=95042105.0.1.2.3 Bus2=95042063.0.1.2.3 LineCode=4_CU_3PH_4_CU_N_4KV_4 Length=0.068589 units=km
New Line.4115860E$ND206705601 phases=4 Bus1=15163491.0.1.2.3 Bus2=206705601.0.1.2.3 LineCode=6_CU_3PH_6_CU_N_4KV_4 Length=0.01879 units=km
New Line.ND15165659$1204471E phases=2 Bus1=15165659.0.1 Bus2=15164608.0.1 LineCode=4_ACSR_1PH_4_ACSR_N_4KV_2_N Length=0.018775 units=km
New Line.ND15165999$528456H phases=2 Bus1=15165999.0.2 Bus2=15163223.0.2 LineCode=6_CU_1PH_6_CU_N_4KV_2_N Length=0.024353 units=km
New Line.ND15165999$711299E phases=2 Bus1=15165999.0.3 Bus2=15164182.0.3 LineCode=4_CU_1PH_4_CU_N_4KV_2_N Length=0.048177 units=km
New Line.ND15165755$4374221E phases=2 Bus1=15165755.0.1 Bus2=15164962.0.1 LineCode=6_CU_1PH_6_CU_N_4KV_2_N Length=0.08326 units=km
New Line.ND206705601$ND44770070 phases=4 Bus1=206705601.0.1.2.3 Bus2=44770070.0.1.2.3 LineCode=6_CU_3PH_6_CU_N_4KV_4 Length=0.169455 units=km
New Line.1265827E$ND201702104 phases=2 Bus1=201702104.0.3 Bus2=15163656.0.3 LineCode=4_ACSR_1PH_4_ACSR_N_4KV_2_N Length=0.074348 units=km
New Line.ND44770070$ND44770071 phases=4 Bus1=44770070.0.1.2.3 Bus2=44770071.0.1.2.3 LineCode=6_CU_3PH_6_CU_N_4KV_4 Length=0.087437 units=km
New Line.ND15165843$513357H phases=2 Bus1=15165843.0.1 Bus2=15163086.0.1 LineCode=4_ACSR_1PH_4_ACSR_N_4KV_2_N Length=0.112937 units=km
New Line.122206E$223279838 phases=2 Bus1=223279787.1.2 Bus2=223279840.1.2 LineCode=1/0_JCN_2PH_4KV_2 Length=0.09044 units=km
New Line.ND44770071$ND44770728 phases=4 Bus1=44770071.0.1.2.3 Bus2=44770728.0.1.2.3 LineCode=1/0_ACSR_3PH_1/0_ACSR_N_4KV_4 Length=0.045229 units=km
New Line.ND44770728$ND44770729 phases=4 Bus1=44770728.0.1.2.3 Bus2=44770729.0.1.2.3 LineCode=1/0_ACSR_3PH_1/0_ACSR_N_4KV_4 Length=0.044555 units=km
New Line.ND44770729$69785E phases=4 Bus1=44770729.0.1.2.3 Bus2=15164392.0.1.2.3 LineCode=1/0_ACSR_3PH_1/0_ACSR_N_4KV_4 Length=0.17314 units=km
New Line.223279838$P5650792-1 phases=2 Bus1=223279841.1.2 Bus2=223279749.1.2 LineCode=1/0_JCN_2PH_4KV_2 Length=0.002502 units=km
New Line.ND15165693$1791597E phases=4 Bus1=15165693.0.1.2.3 Bus2=15164103.0.1.2.3 LineCode=6_CU_3PH_6_CU_N_4KV_4 Length=0.054321 units=km
New Line.NULMP09$ND15165546 phases=2 Bus1=15165295.0.3 Bus2=15165546.0.3 LineCode=6_CU_1PH_6_CU_N_4KV_2_N Length=0.088626 units=km
New Line.ND15165546$507015H phases=2 Bus1=15165546.0.3 Bus2=15163706.0.3 LineCode=6_CU_1PH_6_CU_N_4KV_2_N Length=0.050046 units=km
New Line.813771E$ND15166061 phases=2 Bus1=15166061.0.2 Bus2=15163935.0.2 LineCode=1/0_ACSR_1PH_1/0_ACSR_N_4KV_2_N Length=0.088532 units=km
New Line.ND15165723$ND15165673 phases=4 Bus1=15165723.0.1.2.3 Bus2=15165673.0.1.2.3 LineCode=1/0_ACSR_3PH_1/0_ACSR_N_4KV_4 Length=0.155938 units=km
New Line.832014E$689575E phases=4 Bus1=15164473.0.1.2.3 Bus2=15163576.0.1.2.3 LineCode=6_ACSR_3PH_6_ACSR_N_4KV_4 Length=0.033715 units=km
New Line.1838293E$1836265E phases=3 Bus1=15163998.1.2.3 Bus2=15164028.1.2.3 LineCode=2_CU_3PH_4KV_3 Length=0.089824 units=km
New Line.711471EP1$1861238E phases=3 Bus1=15164512.1.2.3 Bus2=15163040.1.2.3 LineCode=2_CU_3PH_4KV_3 Length=0.082894 units=km
New Line.689575E$V5047684 phases=3 Bus1=15163577.1.2.3 Bus2=242003144.1.2.3 LineCode=6_PILC_3PH_4KV_3 Length=0.101462 units=km
New Line.1269155EP1$ND15165429 phases=4 Bus1=15164481.0.1.2.3 Bus2=15165429.0.1.2.3 LineCode=2/0_CU_3PH_2/0_CU_N_4KV_4 Length=0.290495 units=km
New Line.ND15165429$1204812E phases=4 Bus1=15165429.0.1.2.3 Bus2=15162888.0.1.2.3 LineCode=336_ACSR_3PH_336_ACSR_N_4KV_4 Length=0.07222 units=km
New Line.ND15165429$PD0046 phases=4 Bus1=15165429.0.1.2.3 Bus2=190327384.0.1.2.3 LineCode=4_CU_3PH_4_CU_N_4KV_4 Length=0.02712 units=km
New Line.1204812E$1204813E phases=4 Bus1=15162888.0.1.2.3 Bus2=15164860.0.1.2.3 LineCode=336_ACSR_3PH_336_ACSR_N_4KV_4 Length=0.044548 units=km
New Line.1204813E$1204815E phases=4 Bus1=15164860.0.1.2.3 Bus2=15163000.0.1.2.3 LineCode=336_ACSR_3PH_336_ACSR_N_4KV_4 Length=0.130402 units=km
New Line.ND190327417$PD0046 phases=4 Bus1=190327385.0.1.2.3 Bus2=190327417.0.1.2.3 LineCode=4_CU_3PH_4_CU_N_4KV_4 Length=0.045915 units=km
New Line.1204815E$1541040E phases=4 Bus1=15163000.0.1.2.3 Bus2=15162917.0.1.2.3 LineCode=336_ACSR_3PH_336_ACSR_N_4KV_4 Length=0.047773 units=km
New Line.4613311E$ND190327417 phases=4 Bus1=190327417.0.1.2.3 Bus2=94788710.0.1.2.3 LineCode=4_CU_3PH_4_CU_N_4KV_4 Length=0.06815 units=km
New Line.4613311E$4527104E phases=4 Bus1=94788710.0.1.2.3 Bus2=15162861.0.1.2.3 LineCode=4_CU_3PH_4_CU_N_4KV_4 Length=0.108711 units=km
New Line.2244474E$307483E phases=2 Bus1=135554345.0.2 Bus2=15163381.0.2 LineCode=4_ACSR_1PH_4_ACSR_N_4KV_2_N Length=0.060312 units=km
New Line.152551E$4115860E phases=4 Bus1=15163462.0.1.2.3 Bus2=15163491.0.1.2.3 LineCode=6_CU_3PH_6_CU_N_4KV_4 Length=0.032996 units=km
New Line.507015H$4030318E phases=2 Bus1=15163706.0.3 Bus2=15163731.0.3 LineCode=6_CU_1PH_6_CU_N_4KV_2_N Length=0.048104 units=km
New Line.122185E$4283522E phases=4 Bus1=15164128.0.1.2.3 Bus2=15164558.0.1.2.3 LineCode=4_CU_3PH_4_CU_N_4KV_4 Length=0.049981 units=km
New Line.813771E$4178314E phases=2 Bus1=15163935.0.2 Bus2=15164887.0.2 LineCode=1/0_ACSR_1PH_1/0_ACSR_N_4KV_2_N Length=0.094103 units=km
New Line.ND15165115$4403125E phases=4 Bus1=15165115.0.1.2.3 Bus2=15164987.0.1.2.3 LineCode=4_CU_3PH_4_CU_N_4KV_4 Length=0.04562 units=km
New Line.ND15165896$1195349E phases=4 Bus1=15165896.0.1.2.3 Bus2=160531497.0.1.2.3 LineCode=2_CU_3PH_2_CU_N_4KV_4 Length=0.046672 units=km
New Line.2244474E$2244475E phases=2 Bus1=135554345.0.2 Bus2=206449468.0.2 LineCode=4_ACSR_1PH_4_ACSR_N_4KV_2_N Length=0.057447 units=km
New Line.ND15165896$518716H phases=2 Bus1=15165896.0.1 Bus2=95153132.0.1 LineCode=1/0_ACSR_1PH_1/0_ACSR_N_4KV_2_N Length=0.059471 units=km
New Line.4527104E$293492E phases=4 Bus1=15162861.0.1.2.3 Bus2=140548757.0.1.2.3 LineCode=4_CU_3PH_4_CU_N_4KV_4 Length=0.066459 units=km
New Line.646612E$PS1150 phases=4 Bus1=166388680.0.1.2.3 Bus2=15162946.0.1.2.3 LineCode=336_ACSR_3PH_336_ACSR_N_4KV_4 Length=0.024924 units=km
New Line.293492E$ND15166021 phases=4 Bus1=140548757.0.1.2.3 Bus2=15166021.0.1.2.3 LineCode=4_CU_3PH_4_CU_N_4KV_4 Length=0.163868 units=km
New Line.ND15165526$646612E phases=4 Bus1=15162946.0.1.2.3 Bus2=15165526.0.1.2.3 LineCode=336_ACSR_3PH_336_ACSR_N_4KV_4 Length=0.045633 units=km
New Line.4030318E$507012H phases=2 Bus1=15163731.0.3 Bus2=15163806.0.3 LineCode=6_CU_1PH_6_CU_N_4KV_2_N Length=0.176365 units=km
New Line.1767102E$1766897E phases=2 Bus1=236710529.0.3 Bus2=15164286.0.3 LineCode=6_CU_1PH_6_CU_N_4KV_2_N Length=0.035631 units=km
New Line.518716H$677657E phases=2 Bus1=95153132.0.1 Bus2=15164340.0.1 LineCode=1/0_ACSR_1PH_1/0_ACSR_N_4KV_2_N Length=0.048786 units=km
New Line.1195349E$ND15165755 phases=4 Bus1=160531497.0.1.2.3 Bus2=15165755.0.1.2.3 LineCode=2_CU_3PH_2_CU_N_4KV_4 Length=0.001067 units=km
New Line.4403125E$ND15165999 phases=4 Bus1=15164987.0.1.2.3 Bus2=15165999.0.1.2.3 LineCode=4_CU_3PH_4_CU_N_4KV_4 Length=0.065448 units=km
New Line.4283522E$ND223279814 phases=4 Bus1=15164558.0.1.2.3 Bus2=223279814.0.1.2.3 LineCode=4_CU_3PH_4_CU_N_4KV_4 Length=0.037267 units=km
New Line.ND15166021$4528276E phases=4 Bus1=15166021.0.1.2.3 Bus2=95042228.0.1.2.3 LineCode=4_CU_3PH_4_CU_N_4KV_4 Length=0.139528 units=km
New Line.ND15165526$1204819E phases=4 Bus1=15165526.0.1.2.3 Bus2=15163029.0.1.2.3 LineCode=336_ACSR_3PH_336_ACSR_N_4KV_4 Length=0.137215 units=km
New Line.538630H$ND15165526 phases=4 Bus1=15165526.0.1.2.3 Bus2=15164733.0.1.2.3 LineCode=6_CU_3PH_6_CU_N_4KV_4 Length=0.037973 units=km
New Line.ND15165659$ND15165526 phases=4 Bus1=15165526.0.1.2.3 Bus2=15165659.0.1.2.3 LineCode=4_CU_3PH_4_CU_N_4KV_4 Length=0.110311 units=km
New Line.1204819E$69774E phases=4 Bus1=15163029.0.1.2.3 Bus2=15163987.0.1.2.3 LineCode=336_ACSR_3PH_336_ACSR_N_4KV_4 Length=0.040217 units=km
New Line.538630H$736814E phases=4 Bus1=15164733.0.1.2.3 Bus2=15164783.0.1.2.3 LineCode=6_CU_3PH_6_CU_N_4KV_4 Length=0.051669 units=km
New Line.ND15165659$789845E phases=4 Bus1=15165659.0.1.2.3 Bus2=15164808.0.1.2.3 LineCode=6_CU_3PH_6_CU_N_4KV_4 Length=0.058725 units=km
New Line.1204471E$1204472E phases=2 Bus1=15164608.0.1 Bus2=15164583.0.1 LineCode=4_ACSR_1PH_4_ACSR_N_4KV_2_N Length=0.045643 units=km
New Line.1766897E$532794H phases=2 Bus1=15164286.0.3 Bus2=136300965.0.3 LineCode=6_CU_1PH_6_CU_N_4KV_2_N Length=0.079608 units=km
New Line.507012H$507011H phases=2 Bus1=15163806.0.3 Bus2=15163756.0.3 LineCode=6_CU_1PH_6_CU_N_4KV_2_N Length=0.035858 units=km
New Line.ND15165755$PD0227 phases=4 Bus1=15165755.0.1.2.3 Bus2=15165227.0.1.2.3 LineCode=2_CU_3PH_2_CU_N_4KV_4 Length=0.040015 units=km
New Line.ND223279814$122206E phases=3 Bus1=223279814.0.1.2 Bus2=223279786.0.1.2 LineCode=4_CU_2PH_4_CU_N_4KV_3_N Length=0.006363 units=km
New Line.789845E$789846E phases=4 Bus1=15164808.0.1.2.3 Bus2=15164833.0.1.2.3 LineCode=6_CU_3PH_6_CU_N_4KV_4 Length=0.038188 units=km
New Line.69774E$1204821E phases=4 Bus1=15163987.0.1.2.3 Bus2=194279034.0.1.2.3 LineCode=336_ACSR_3PH_336_ACSR_N_4KV_4 Length=0.032116 units=km
New Line.1204821E$ND15165489 phases=4 Bus1=194279034.0.1.2.3 Bus2=15165489.0.1.2.3 LineCode=336_ACSR_3PH_336_ACSR_N_4KV_4 Length=0.07766 units=km
New Line.PD0078$ND15165489 phases=4 Bus1=15165489.0.1.2.3 Bus2=15165084.0.1.2.3 LineCode=4_CU_3PH_4_CU_N_4KV_4 Length=0.022377 units=km
New Line.PS0032$ND15165489 phases=4 Bus1=15165489.0.1.2.3 Bus2=15165131.0.1.2.3 LineCode=4_CU_3PH_4_CU_N_4KV_4 Length=0.028244 units=km
New Line.ND201702104$ND15165489 phases=4 Bus1=15165489.0.1.2.3 Bus2=201702104.0.1.2.3 LineCode=2_CU_3PH_2_CU_N_4KV_4 Length=0.038384 units=km
New Line.PS0045$ND201702104 phases=4 Bus1=201702104.0.1.2.3 Bus2=15165256.0.1.2.3 LineCode=2_CU_3PH_2_CU_N_4KV_4 Length=0.003931 units=km
New Line.PD0032$405748E phases=4 Bus1=15165132.0.1.2.3 Bus2=15163325.0.1.2.3 LineCode=4_CU_3PH_4_CU_N_4KV_4 Length=0.048857 units=km
New Line.PD0078$ND44772345 phases=4 Bus1=15165083.0.1.2.3 Bus2=44772345.0.1.2.3 LineCode=4_CU_3PH_4_CU_N_4KV_4 Length=0.034494 units=km
New Line.ND44772345$711436E phases=4 Bus1=44772345.0.1.2.3 Bus2=15163138.0.1.2.3 LineCode=4_CU_3PH_4_CU_N_4KV_4 Length=0.092568 units=km
New Line.405748E$70177E phases=4 Bus1=15163325.0.1.2.3 Bus2=15163354.0.1.2.3 LineCode=4_CU_3PH_4_CU_N_4KV_4 Length=0.039374 units=km
New Line.PS0045$ND201702091 phases=4 Bus1=15165255.0.1.2.3 Bus2=201702091.0.1.2.3 LineCode=2_CU_3PH_2_CU_N_4KV_4 Length=0.004315 units=km
New Line.70177E$1838293E phases=4 Bus1=15163354.0.1.2.3 Bus2=15163997.0.1.2.3 LineCode=4_CU_3PH_4_CU_N_4KV_4 Length=0.039539 units=km
New Line.711436E$ND15165641 phases=4 Bus1=15163138.0.1.2.3 Bus2=15165641.0.1.2.3 LineCode=4_CU_3PH_4_CU_N_4KV_4 Length=0.049711 units=km
New Line.ND201702091$ND15166397 phases=4 Bus1=201702091.0.1.2.3 Bus2=15166397.0.1.2.3 LineCode=2_CU_3PH_2_CU_N_4KV_4 Length=0.026701 units=km
New Line.ND15165641$711438E phases=4 Bus1=15165641.0.1.2.3 Bus2=15163196.0.1.2.3 LineCode=4_CU_3PH_4_CU_N_4KV_4 Length=0.038483 units=km
New Line.ND15165641$1047430E phases=2 Bus1=15165641.0.1 Bus2=15163960.0.1 LineCode=6_CU_1PH_6_CU_N_4KV_2_N Length=0.147854 units=km
New Line.ND15166397$1204825E phases=4 Bus1=15166397.0.1.2.3 Bus2=15164209.0.1.2.3 LineCode=2_CU_3PH_2_CU_N_4KV_4 Length=0.06562 units=km
New Line.4959484E$ND15165641 phases=3 Bus1=15165641.0.1.3 Bus2=242484489.0.1.3 LineCode=6_CU_2PH_6_CU_N_4KV_3_N Length=0.016487 units=km
New Line.711438E$711440E phases=4 Bus1=15163196.0.1.2.3 Bus2=15163167.0.1.2.3 LineCode=4_CU_3PH_4_CU_N_4KV_4 Length=0.094469 units=km
New Line.1204825E$1204826E phases=4 Bus1=15164209.0.1.2.3 Bus2=15163883.0.1.2.3 LineCode=2_CU_3PH_2_CU_N_4KV_4 Length=0.141952 units=km
New Line.528456H$4818272E phases=2 Bus1=15163223.0.2 Bus2=15163248.0.2 LineCode=6_CU_1PH_6_CU_N_4KV_2_N Length=0.125635 units=km
New Line.532794H$532792H phases=2 Bus1=136300965.0.3 Bus2=15163781.0.3 LineCode=6_CU_1PH_6_CU_N_4KV_2_N Length=0.062209 units=km
New Line.507011H$438173H phases=2 Bus1=15163756.0.3 Bus2=15164261.0.3 LineCode=6_CU_1PH_6_CU_N_4KV_2_N Length=0.057296 units=km
New Line.4374221E$4352132E phases=2 Bus1=15164962.0.1 Bus2=15164912.0.1 LineCode=6_CU_1PH_6_CU_N_4KV_2_N Length=0.076188 units=km
New Line.711440E$711471EP1 phases=4 Bus1=15163167.0.1.2.3 Bus2=15164511.0.1.2.3 LineCode=4_CU_3PH_4_CU_N_4KV_4 Length=0.059051 units=km
New Line.933174E$4959484E phases=3 Bus1=242484490.0.1.3 Bus2=15164633.0.1.3 LineCode=6_CU_2PH_6_CU_N_4KV_3_N Length=0.042196 units=km
New Line.1204826E$ND15165535 phases=4 Bus1=15163883.0.1.2.3 Bus2=15165535.0.1.2.3 LineCode=2_CU_3PH_2_CU_N_4KV_4 Length=0.061492 units=km
New Line.ND15165535$2144476E phases=2 Bus1=15165535.0.3 Bus2=15163856.0.3 LineCode=6_CU_1PH_6_CU_N_4KV_2_N Length=0.140031 units=km
New Line.ND15165535$4178635E phases=2 Bus1=15165535.0.1 Bus2=15163910.0.1 LineCode=4_ACSR_1PH_4_ACSR_N_4KV_2_N Length=0.136283 units=km
New Line.1836265E$1204548E phases=4 Bus1=15164027.0.1.2.3 Bus2=15164076.0.1.2.3 LineCode=2_CU_3PH_2_CU_N_4KV_4 Length=0.115417 units=km
New Line.ND15165535$ND15165602 phases=4 Bus1=15165535.0.1.2.3 Bus2=15165602.0.1.2.3 LineCode=2_CU_3PH_2_CU_N_4KV_4 Length=0.146007 units=km
New Line.933174E$ND15165843 phases=3 Bus1=15164633.0.1.3 Bus2=15165843.0.1.3 LineCode=1/0_ACSR_2PH_1/0_ACSR_N_4KV_3_N Length=0.0406 units=km
New Line.ND15165843$702722H phases=3 Bus1=15165843.0.1.3 Bus2=15163111.0.1.3 LineCode=1/0_ACSR_2PH_1/0_ACSR_N_4KV_3_N Length=0.02232 units=km
New Line.4818272E$1910981E phases=2 Bus1=15163248.0.2 Bus2=15164236.0.2 LineCode=6_CU_1PH_6_CU_N_4KV_2_N Length=0.08825 units=km
New Line.1910981E$ND15166014 phases=2 Bus1=15164236.0.2 Bus2=15166014.0.2 LineCode=6_CU_1PH_6_CU_N_4KV_2_N Length=0.065803 units=km
New Line.ND15166014$185303E phases=2 Bus1=15166014.0.2 Bus2=15163273.0.2 LineCode=6_CU_1PH_6_CU_N_4KV_2_N Length=0.047622 units=km
New Line.ND15166014$838065E phases=2 Bus1=15166014.0.2 Bus2=15163298.0.2 LineCode=6_CU_1PH_6_CU_N_4KV_2_N Length=0.041177 units=km
New Line.2144476E$NULMP09 phases=2 Bus1=15163856.0.3 Bus2=15165294.0.3 LineCode=6_CU_1PH_6_CU_N_4KV_2_N Length=0.092548 units=km
New Line.1204548E$ND15165693 phases=4 Bus1=15164076.0.1.2.3 Bus2=15165693.0.1.2.3 LineCode=2_CU_3PH_2_CU_N_4KV_4 Length=0.067052 units=km
New Line.ND15165602$ND196339849 phases=4 Bus1=15165602.0.1.2.3 Bus2=196339849.0.1.2.3 LineCode=2_CU_3PH_2_CU_N_4KV_4 Length=0.003441 units=km
New Line.ND15165693$4438881E phases=4 Bus1=15165693.0.1.2.3 Bus2=15163433.0.1.2.3 LineCode=6_CU_3PH_6_CU_N_4KV_4 Length=0.046884 units=km
New Line.ND196339849$1204830E phases=4 Bus1=196339849.0.1.2.3 Bus2=15164313.0.1.2.3 LineCode=2_CU_3PH_2_CU_N_4KV_4 Length=0.036613 units=km
New Line.702722H$4353621E phases=2 Bus1=15163111.0.1 Bus2=15164937.0.1 LineCode=1/0_ACSR_1PH_1/0_ACSR_N_4KV_2_N Length=0.045764 units=km
New Line.1861238E$528549H phases=4 Bus1=15163039.0.1.2.3 Bus2=15164155.0.1.2.3 LineCode=4_CU_3PH_4_CU_N_4KV_4 Length=0.042829 units=km
New Line.4438881E$ND15165749 phases=4 Bus1=15163433.0.1.2.3 Bus2=15165749.0.1.2.3 LineCode=6_CU_3PH_6_CU_N_4KV_4 Length=0.047608 units=km
New Line.1204830E$ND15166061 phases=4 Bus1=15164313.0.1.2.3 Bus2=15166061.0.1.2.3 LineCode=2_CU_3PH_2_CU_N_4KV_4 Length=0.039718 units=km
New Line.1791597E$4439622E phases=2 Bus1=15164103.0.2 Bus2=94228255.0.2 LineCode=4_ACSR_1PH_4_ACSR_N_4KV_2_N Length=0.049229 units=km
New Line.4439622E$2244474E phases=2 Bus1=94228255.0.2 Bus2=135554345.0.2 LineCode=4_ACSR_1PH_4_ACSR_N_4KV_2_N Length=0.045114 units=km
New Line.ND15165749$152551E phases=4 Bus1=15165749.0.1.2.3 Bus2=15163462.0.1.2.3 LineCode=6_CU_3PH_6_CU_N_4KV_4 Length=0.046211 units=km
New Line.ND15165546$513278H phases=2 Bus1=15165546.0.3 Bus2=15163831.0.3 LineCode=6_CU_1PH_6_CU_N_4KV_2_N Length=0.104408 units=km
New Line.122185E$ND15165749 phases=4 Bus1=15165749.0.1.2.3 Bus2=15164128.0.1.2.3 LineCode=4_CU_3PH_4_CU_N_4KV_4 Length=0.077425 units=km
New Line.69785E$ND15165500 phases=4 Bus1=15164392.0.1.2.3 Bus2=15165500.0.1.2.3 LineCode=1/0_ACSR_3PH_1/0_ACSR_N_4KV_4 Length=0.032233 units=km
New Line.838065E$ND15165741 phases=2 Bus1=15163298.0.2 Bus2=15165741.0.2 LineCode=6_CU_1PH_6_CU_N_4KV_2_N Length=0.052463 units=km
New Line.ND15165500$69786E phases=4 Bus1=15165500.0.1.2.3 Bus2=15164421.0.1.2.3 LineCode=1/0_ACSR_3PH_1/0_ACSR_N_4KV_4 Length=0.059437 units=km
New Line.ND15165741$832069E phases=2 Bus1=15165741.0.2 Bus2=15164708.0.2 LineCode=6_CU_1PH_6_CU_N_4KV_2_N Length=0.047616 units=km
New Line.69786E$ND15165723 phases=4 Bus1=15164421.0.1.2.3 Bus2=15165723.0.1.2.3 LineCode=1/0_ACSR_3PH_1/0_ACSR_N_4KV_4 Length=0.038684 units=km
New Line.528549H$ND15165115 phases=4 Bus1=15164155.0.1.2.3 Bus2=15165115.0.1.2.3 LineCode=4_CU_3PH_4_CU_N_4KV_4 Length=0.045642 units=km
New Line.ND15166061$ND15165896 phases=4 Bus1=15166061.0.1.2.3 Bus2=15165896.0.1.2.3 LineCode=2_CU_3PH_2_CU_N_4KV_4 Length=0.033047 units=km
New Line.ND15165546$1767102E phases=2 Bus1=15165546.0.3 Bus2=236710528.0.3 LineCode=6_CU_1PH_6_CU_N_4KV_2_N Length=0.048306 units=km
New Line.ND15165723$4701351E phases=2 Bus1=15165723.0.2 Bus2=15164365.0.2 LineCode=1/0_ACSR_1PH_1/0_ACSR_N_4KV_2_N Length=0.047756 units=km
New Line.4701351E$69505E phases=2 Bus1=15164365.0.2 Bus2=15163543.0.2 LineCode=1/0_ACSR_1PH_1/0_ACSR_N_4KV_2_N Length=0.101661 units=km
New Line.234752E$ND15165673 phases=4 Bus1=15165673.0.1.2.3 Bus2=15163606.0.1.2.3 LineCode=1/0_ACSR_3PH_1/0_ACSR_N_4KV_4 Length=0.047293 units=km
New Line.ND15165673$ND15165193 phases=4 Bus1=15165673.0.1.2.3 Bus2=15165193.0.1.2.3 LineCode=1/0_ACSR_3PH_1/0_ACSR_N_4KV_4 Length=0.031173 units=km
New Line.69505E$1238860E phases=2 Bus1=15163543.0.2 Bus2=15163518.0.2 LineCode=1/0_ACSR_1PH_1/0_ACSR_N_4KV_2_N Length=0.080919 units=km
New Line.ND15165193$ND15183620 phases=4 Bus1=15165193.0.1.2.3 Bus2=15183620.0.1.2.3 LineCode=6_CU_3PH_6_CU_N_4KV_4 Length=0.02751 units=km
New Line.234752E$ND70225810 phases=4 Bus1=15163606.0.1.2.3 Bus2=70225810.0.1.2.3 LineCode=1/0_ACSR_3PH_1/0_ACSR_N_4KV_4 Length=0.044262 units=km
New Line.ND15183620$1204462E phases=4 Bus1=15183620.0.1.2.3 Bus2=15163568.0.1.2.3 LineCode=6_CU_3PH_6_CU_N_4KV_4 Length=0.047926 units=km
New Line.ND70225810$679987H phases=4 Bus1=70225810.0.1.2.3 Bus2=15164758.0.1.2.3 LineCode=6_ACSR_3PH_6_ACSR_N_4KV_4 Length=0.010382 units=km
New Line.679987H$711500E phases=4 Bus1=15164758.0.1.2.3 Bus2=15163631.0.1.2.3 LineCode=6_ACSR_3PH_6_ACSR_N_4KV_4 Length=0.037245 units=km
New Line.1204462E$1085187E phases=4 Bus1=15163568.0.1.2.3 Bus2=15164448.0.1.2.3 LineCode=6_CU_3PH_6_CU_N_4KV_4 Length=0.187457 units=km
New Line.711500E$832014E phases=4 Bus1=15163631.0.1.2.3 Bus2=15164473.0.1.2.3 LineCode=6_ACSR_3PH_6_ACSR_N_4KV_4 Length=0.045936 units=km
New Line.4528276E$ND15164683 phases=4 Bus1=95042228.0.1.2.3 Bus2=-77777795042228.0.1.2.3 LineCode=4_CU_3PH_4_CU_N_4KV_4 Length=0.07063 units=km
New Line.736814E$ND179071047 phases=2 Bus1=15164783.0.1 Bus2=-77777715164783.0.1 LineCode=6_CU_1PH_6_CU_N_4KV_2_N Length=0.037793 units=km
New Line.1204472E$ND15165584 phases=2 Bus1=15164583.0.1 Bus2=-77777715164583.0.1 LineCode=4_ACSR_1PH_4_ACSR_N_4KV_2_N Length=0.041914 units=km
New Line.ND223279814$ND15183771 phases=4 Bus1=223279814.0.1.2.3 Bus2=-777777223279814.0.1.2.3 LineCode=4_CU_3PH_4_CU_N_4KV_4 Length=0.046147 units=km
New Line.711299E$ND15166080 phases=2 Bus1=15164182.0.3 Bus2=-77777715164182.0.3 LineCode=4_CU_1PH_4_CU_N_4KV_2_N Length=0.038364 units=km
New Line.532792H$ND15183763 phases=2 Bus1=15163781.0.3 Bus2=-77777715163781.0.3 LineCode=6_CU_1PH_6_CU_N_4KV_2_N Length=0.071439 units=km
New Line.438173H$ND15163681 phases=2 Bus1=15164261.0.3 Bus2=-77777715164261.0.3 LineCode=6_CU_1PH_6_CU_N_4KV_2_N Length=0.017929 units=km
New Line.ND15165693$ND15165974 phases=4 Bus1=15165693.0.1.2.3 Bus2=-77777715165693.0.1.2.3 LineCode=1/0_ACSR_3PH_1/0_ACSR_N_4KV_4 Length=0.016227 units=km
New Line.ND15165500$ND15165501 phases=4 Bus1=15165500.0.1.2.3 Bus2=-77777715165500.0.1.2.3 LineCode=1/0_ACSR_3PH_1/0_ACSR_N_4KV_4 Length=0.113685 units=km
New Line.ND70225810$ND70225820 phases=4 Bus1=70225810.0.1.2.3 Bus2=-77777770225810.0.1.2.3 LineCode=1/0_ACSR_3PH_1/0_ACSR_N_4KV_4 Length=0.030699 units=km
New Line.1085187E$ND212978419 phases=4 Bus1=15164448.0.1.2.3 Bus2=-77777715164448.0.1.2.3 LineCode=4_CU_3PH_4_CU_N_4KV_4 Length=0.025955 units=km

! Switches
New Line.4292532E:15162868 phases=3 Bus1=15162870.1.2.3 Bus2=15162871.1.2.3 switch=y r1=0.001 x1=0.001 r0=0.001 x0=0.001 Length=0.001 units=km
New Line.1204813E:15164840 phases=3 Bus1=15164842.1.2.3 Bus2=15164843.1.2.3 switch=y r1=0.001 x1=0.001 r0=0.001 x0=0.001 Length=0.001 units=km
New Line.1204815E:15162980 phases=3 Bus1=15162982.1.2.3 Bus2=15162983.1.2.3 switch=y r1=0.001 x1=0.001 r0=0.001 x0=0.001 Length=0.001 units=km
New Line.4827647E:15164135 phases=3 Bus1=15164137.1.2.3 Bus2=15164138.1.2.3 switch=y r1=0.001 x1=0.001 r0=0.001 x0=0.001 Length=0.001 units=km
New Line.4439622E:94228236 phases=1 Bus1=94228238.2 Bus2=94228239.2 switch=y r1=0.001 x1=0.001 r0=0.001 x0=0.001 Length=0.001 units=km
New Line.1541040E:15162897 phases=3 Bus1=15162899.1.2.3 Bus2=15162900.1.2.3 switch=y r1=0.001 x1=0.001 r0=0.001 x0=0.001 Length=0.001 units=km
New Line.4613311E:94788691 phases=3 Bus1=94788693.1.2.3 Bus2=94788694.1.2.3 switch=y r1=0.001 x1=0.001 r0=0.001 x0=0.001 Length=0.001 units=km
New Line.1700074E:95042086 phases=3 Bus1=95042088.1.2.3 Bus2=95042089.1.2.3 switch=y r1=0.001 x1=0.001 r0=0.001 x0=0.001 Length=0.001 units=km
New Line.4527104E:15162843 phases=3 Bus1=15162845.1.2.3 Bus2=15162846.1.2.3 switch=y r1=0.001 x1=0.001 r0=0.001 x0=0.001 Length=0.001 units=km
New Line.1269153E:95042042 phases=3 Bus1=95042044.1.2.3 Bus2=95042045.1.2.3 switch=y r1=0.001 x1=0.001 r0=0.001 x0=0.001 Length=0.001 units=km
New Line.293492E:140548738 phases=3 Bus1=140548740.1.2.3 Bus2=140548741.1.2.3 switch=y r1=0.001 x1=0.001 r0=0.001 x0=0.001 Length=0.001 units=km
New Line.2244474E:135554326 phases=1 Bus1=135554328.2 Bus2=135554329.2 switch=y r1=0.001 x1=0.001 r0=0.001 x0=0.001 Length=0.001 units=km
New Line.152551E:15163442 phases=3 Bus1=15163444.1.2.3 Bus2=15163445.1.2.3 switch=y r1=0.001 x1=0.001 r0=0.001 x0=0.001 Length=0.001 units=km
New Line.507015H:15163688 phases=1 Bus1=15163690.3 Bus2=15163691.3 switch=y r1=0.001 x1=0.001 r0=0.001 x0=0.001 Length=0.001 units=km
New Line.4841678E:15163813 phases=1 Bus1=15163815.3 Bus2=15163816.3 switch=y r1=0.001 x1=0.001 r0=0.001 x0=0.001 Length=0.001 units=km
New Line.813771E:15163917 phases=1 Bus1=15163919.2 Bus2=15163920.2 switch=y r1=0.001 x1=0.001 r0=0.001 x0=0.001 Length=0.001 units=km
New Line.122185E:15164110 phases=3 Bus1=15164112.1.2.3 Bus2=15164113.1.2.3 switch=y r1=0.001 x1=0.001 r0=0.001 x0=0.001 Length=0.001 units=km
New Line.646612E:15162926 phases=3 Bus1=15162928.1.2.3 Bus2=15162929.1.2.3 switch=y r1=0.001 x1=0.001 r0=0.001 x0=0.001 Length=0.001 units=km
New Line.4528276E:95042209 phases=3 Bus1=95042211.1.2.3 Bus2=95042212.1.2.3 switch=y r1=0.001 x1=0.001 r0=0.001 x0=0.001 Length=0.001 units=km
New Line.1204819E:15163009 phases=3 Bus1=15163011.1.2.3 Bus2=15163012.1.2.3 switch=y r1=0.001 x1=0.001 r0=0.001 x0=0.001 Length=0.001 units=km
New Line.538630H:15164715 phases=3 Bus1=15164717.1.2.3 Bus2=15164718.1.2.3 switch=y r1=0.001 x1=0.001 r0=0.001 x0=0.001 Length=0.001 units=km
New Line.307483E:15163363 phases=1 Bus1=15163365.2 Bus2=15163366.2 switch=y r1=0.001 x1=0.001 r0=0.001 x0=0.001 Length=0.001 units=km
New Line.4115860E:15163471 phases=3 Bus1=15163473.1.2.3 Bus2=15163474.1.2.3 switch=y r1=0.001 x1=0.001 r0=0.001 x0=0.001 Length=0.001 units=km
New Line.4030318E:15163713 phases=1 Bus1=15163715.3 Bus2=15163716.3 switch=y r1=0.001 x1=0.001 r0=0.001 x0=0.001 Length=0.001 units=km
New Line.4283522E:15164540 phases=3 Bus1=15164542.1.2.3 Bus2=15164543.1.2.3 switch=y r1=0.001 x1=0.001 r0=0.001 x0=0.001 Length=0.001 units=km
New Line.4178314E:15164869 phases=1 Bus1=15164871.2 Bus2=15164872.2 switch=y r1=0.001 x1=0.001 r0=0.001 x0=0.001 Length=0.001 units=km
New Line.4403125E:15164969 phases=3 Bus1=15164971.1.2.3 Bus2=15164972.1.2.3 switch=y r1=0.001 x1=0.001 r0=0.001 x0=0.001 Length=0.001 units=km
New Line.1195349E:160531478 phases=3 Bus1=160531480.1.2.3 Bus2=160531481.1.2.3 switch=y r1=0.001 x1=0.001 r0=0.001 x0=0.001 Length=0.001 units=km
New Line.2244475E:206449474 phases=1 Bus1=206449476.2 Bus2=206449477.2 switch=y r1=0.001 x1=0.001 r0=0.001 x0=0.001 Length=0.001 units=km
New Line.518716H:95153113 phases=1 Bus1=95153115.1 Bus2=95153116.1 switch=y r1=0.001 x1=0.001 r0=0.001 x0=0.001 Length=0.001 units=km
New Line.69774E:15163967 phases=3 Bus1=15163969.1.2.3 Bus2=15163970.1.2.3 switch=y r1=0.001 x1=0.001 r0=0.001 x0=0.001 Length=0.001 units=km
New Line.1204471E:15164590 phases=1 Bus1=15164592.1 Bus2=15164593.1 switch=y r1=0.001 x1=0.001 r0=0.001 x0=0.001 Length=0.001 units=km
New Line.736814E:15164765 phases=3 Bus1=15164767.1.2.3 Bus2=15164768.1.2.3 switch=y r1=0.001 x1=0.001 r0=0.001 x0=0.001 Length=0.001 units=km
New Line.789845E:15164790 phases=3 Bus1=15164792.1.2.3 Bus2=15164793.1.2.3 switch=y r1=0.001 x1=0.001 r0=0.001 x0=0.001 Length=0.001 units=km
New Line.1204472E:15164565 phases=1 Bus1=15164567.1 Bus2=15164568.1 switch=y r1=0.001 x1=0.001 r0=0.001 x0=0.001 Length=0.001 units=km
New Line.789846E:15164815 phases=3 Bus1=15164817.1.2.3 Bus2=15164818.1.2.3 switch=y r1=0.001 x1=0.001 r0=0.001 x0=0.001 Length=0.001 units=km
New Line.1204821E:194279015 phases=3 Bus1=194279017.1.2.3 Bus2=194279018.1.2.3 switch=y r1=0.001 x1=0.001 r0=0.001 x0=0.001 Length=0.001 units=km
New Line.1265827E:15163638 phases=1 Bus1=15163640.3 Bus2=15163641.3 switch=y r1=0.001 x1=0.001 r0=0.001 x0=0.001 Length=0.001 units=km
New Line.405748E:15163305 phases=3 Bus1=15163307.1.2.3 Bus2=15163308.1.2.3 switch=y r1=0.001 x1=0.001 r0=0.001 x0=0.001 Length=0.001 units=km
New Line.711436E:15163118 phases=3 Bus1=15163120.1.2.3 Bus2=15163121.1.2.3 switch=y r1=0.001 x1=0.001 r0=0.001 x0=0.001 Length=0.001 units=km
New Line.70177E:15163334 phases=3 Bus1=15163336.1.2.3 Bus2=15163337.1.2.3 switch=y r1=0.001 x1=0.001 r0=0.001 x0=0.001 Length=0.001 units=km
New Line.4828166E:15163788 phases=1 Bus1=15163790.3 Bus2=15163791.3 switch=y r1=0.001 x1=0.001 r0=0.001 x0=0.001 Length=0.001 units=km
New Line.1766897E:15164268 phases=1 Bus1=15164270.3 Bus2=15164271.3 switch=y r1=0.001 x1=0.001 r0=0.001 x0=0.001 Length=0.001 units=km
New Line.677657E:15164322 phases=1 Bus1=15164324.1 Bus2=15164325.1 switch=y r1=0.001 x1=0.001 r0=0.001 x0=0.001 Length=0.001 units=km
New Line.711438E:15163176 phases=3 Bus1=15163178.1.2.3 Bus2=15163179.1.2.3 switch=y r1=0.001 x1=0.001 r0=0.001 x0=0.001 Length=0.001 units=km
New Line.1047430E:15163942 phases=1 Bus1=15163944.1 Bus2=15163945.1 switch=y r1=0.001 x1=0.001 r0=0.001 x0=0.001 Length=0.001 units=km
New Line.1204825E:15164189 phases=3 Bus1=15164191.1.2.3 Bus2=15164192.1.2.3 switch=y r1=0.001 x1=0.001 r0=0.001 x0=0.001 Length=0.001 units=km
New Line.711440E:15163147 phases=3 Bus1=15163149.1.2.3 Bus2=15163150.1.2.3 switch=y r1=0.001 x1=0.001 r0=0.001 x0=0.001 Length=0.001 units=km
New Line.1204826E:15163863 phases=3 Bus1=15163865.1.2.3 Bus2=15163866.1.2.3 switch=y r1=0.001 x1=0.001 r0=0.001 x0=0.001 Length=0.001 units=km
New Line.532794H:136300946 phases=1 Bus1=136300948.3 Bus2=136300949.3 switch=y r1=0.001 x1=0.001 r0=0.001 x0=0.001 Length=0.001 units=km
New Line.528456H:15163205 phases=1 Bus1=15163207.2 Bus2=15163208.2 switch=y r1=0.001 x1=0.001 r0=0.001 x0=0.001 Length=0.001 units=km
New Line.4828180E:15163738 phases=1 Bus1=15163740.3 Bus2=15163741.3 switch=y r1=0.001 x1=0.001 r0=0.001 x0=0.001 Length=0.001 units=km
New Line.711299E:15164164 phases=1 Bus1=15164166.3 Bus2=15164167.3 switch=y r1=0.001 x1=0.001 r0=0.001 x0=0.001 Length=0.001 units=km
New Line.4374221E:15164944 phases=1 Bus1=15164946.1 Bus2=15164947.1 switch=y r1=0.001 x1=0.001 r0=0.001 x0=0.001 Length=0.001 units=km
New Line.4818272E:15163230 phases=1 Bus1=15163232.2 Bus2=15163233.2 switch=y r1=0.001 x1=0.001 r0=0.001 x0=0.001 Length=0.001 units=km
New Line.4815796E:15163763 phases=1 Bus1=15163765.3 Bus2=15163766.3 switch=y r1=0.001 x1=0.001 r0=0.001 x0=0.001 Length=0.001 units=km
New Line.4811203E:15164243 phases=1 Bus1=15164245.3 Bus2=15164246.3 switch=y r1=0.001 x1=0.001 r0=0.001 x0=0.001 Length=0.001 units=km
New Line.4352132E:15164894 phases=1 Bus1=15164896.1 Bus2=15164897.1 switch=y r1=0.001 x1=0.001 r0=0.001 x0=0.001 Length=0.001 units=km
New Line.1910981E:15164218 phases=1 Bus1=15164220.2 Bus2=15164221.2 switch=y r1=0.001 x1=0.001 r0=0.001 x0=0.001 Length=0.001 units=km
New Line.933174E:15164615 phases=2 Bus1=15164617.1.3 Bus2=15164618.1.3 switch=y r1=0.001 x1=0.001 r0=0.001 x0=0.001 Length=0.001 units=km
New Line.2144476E:15163838 phases=1 Bus1=15163840.3 Bus2=15163841.3 switch=y r1=0.001 x1=0.001 r0=0.001 x0=0.001 Length=0.001 units=km
New Line.4178635E:15163892 phases=1 Bus1=15163894.1 Bus2=15163895.1 switch=y r1=0.001 x1=0.001 r0=0.001 x0=0.001 Length=0.001 units=km
New Line.1204548E:15164056 phases=3 Bus1=15164058.1.2.3 Bus2=15164059.1.2.3 switch=y r1=0.001 x1=0.001 r0=0.001 x0=0.001 Length=0.001 units=km
New Line.513357H:15163068 phases=1 Bus1=15163070.1 Bus2=15163071.1 switch=y r1=0.001 x1=0.001 r0=0.001 x0=0.001 Length=0.001 units=km
New Line.4618852E:15163093 phases=2 Bus1=15163095.1.3 Bus2=15163096.1.3 switch=y r1=0.001 x1=0.001 r0=0.001 x0=0.001 Length=0.001 units=km
New Line.4438881E:15163413 phases=3 Bus1=15163415.1.2.3 Bus2=15163416.1.2.3 switch=y r1=0.001 x1=0.001 r0=0.001 x0=0.001 Length=0.001 units=km
New Line.1791597E:15164085 phases=3 Bus1=15164087.1.2.3 Bus2=15164088.1.2.3 switch=y r1=0.001 x1=0.001 r0=0.001 x0=0.001 Length=0.001 units=km
New Line.185303E:15163255 phases=1 Bus1=15163257.2 Bus2=15163258.2 switch=y r1=0.001 x1=0.001 r0=0.001 x0=0.001 Length=0.001 units=km
New Line.838065E:15163280 phases=1 Bus1=15163282.2 Bus2=15163283.2 switch=y r1=0.001 x1=0.001 r0=0.001 x0=0.001 Length=0.001 units=km
New Line.69785E:15164372 phases=3 Bus1=15164374.1.2.3 Bus2=15164375.1.2.3 switch=y r1=0.001 x1=0.001 r0=0.001 x0=0.001 Length=0.001 units=km
New Line.1204830E:15164293 phases=3 Bus1=15164295.1.2.3 Bus2=15164296.1.2.3 switch=y r1=0.001 x1=0.001 r0=0.001 x0=0.001 Length=0.001 units=km
New Line.4353621E:15164919 phases=1 Bus1=15164921.1 Bus2=15164922.1 switch=y r1=0.001 x1=0.001 r0=0.001 x0=0.001 Length=0.001 units=km
New Line.69786E:15164401 phases=3 Bus1=15164403.1.2.3 Bus2=15164404.1.2.3 switch=y r1=0.001 x1=0.001 r0=0.001 x0=0.001 Length=0.001 units=km
New Line.832069E:15164690 phases=1 Bus1=15164692.2 Bus2=15164693.2 switch=y r1=0.001 x1=0.001 r0=0.001 x0=0.001 Length=0.001 units=km
New Line.4701351E:15164347 phases=1 Bus1=15164349.2 Bus2=15164350.2 switch=y r1=0.001 x1=0.001 r0=0.001 x0=0.001 Length=0.001 units=km
New Line.69505E:15163525 phases=1 Bus1=15163527.2 Bus2=15163528.2 switch=y r1=0.001 x1=0.001 r0=0.001 x0=0.001 Length=0.001 units=km
New Line.234752E:15163588 phases=3 Bus1=15163590.1.2.3 Bus2=15163591.1.2.3 switch=y r1=0.001 x1=0.001 r0=0.001 x0=0.001 Length=0.001 units=km
New Line.1238860E:15163500 phases=1 Bus1=15163502.2 Bus2=15163503.2 switch=y r1=0.001 x1=0.001 r0=0.001 x0=0.001 Length=0.001 units=km
New Line.1204462E:15163550 phases=3 Bus1=15163552.1.2.3 Bus2=15163553.1.2.3 switch=y r1=0.001 x1=0.001 r0=0.001 x0=0.001 Length=0.001 units=km
New Line.4989424E:15164740 phases=3 Bus1=15164742.1.2.3 Bus2=15164743.1.2.3 switch=y r1=0.001 x1=0.001 r0=0.001 x0=0.001 Length=0.001 units=km
New Line.711500E:15163613 phases=3 Bus1=15163615.1.2.3 Bus2=15163616.1.2.3 switch=y r1=0.001 x1=0.001 r0=0.001 x0=0.001 Length=0.001 units=km
New Line.1085187E:15164430 phases=3 Bus1=15164432.1.2.3 Bus2=15164433.1.2.3 switch=y r1=0.001 x1=0.001 r0=0.001 x0=0.001 Length=0.001 units=km
New Line.832014E:15164455 phases=3 Bus1=15164457.1.2.3 Bus2=15164458.1.2.3 switch=y r1=0.001 x1=0.001 r0=0.001 x0=0.001 Length=0.001 units=km
New Line.223279838 phases=2 Bus1=223279840.1.2 Bus2=223279841.1.2 switch=y r1=0.001 x1=0.001 r0=0.001 x0=0.001 Length=0.001 units=km
New Line.1204811E:PS0046 phases=3 Bus1=190327384.1.2.3 Bus2=190327385.1.2.3 switch=y r1=0.001 x1=0.001 r0=0.001 x0=0.001 Length=0.001 units=km
New Line.1204817E:PS1150 phases=3 Bus1=166388679.1.2.3 Bus2=166388680.1.2.3 switch=y r1=0.001 x1=0.001 r0=0.001 x0=0.001 Length=0.001 units=km
New Line.1560505E:PD0078 phases=3 Bus1=15165084.1.2.3 Bus2=15165083.1.2.3 switch=y r1=0.001 x1=0.001 r0=0.001 x0=0.001 Length=0.001 units=km
New Line.70176E:PS0032 phases=3 Bus1=15165131.1.2.3 Bus2=15165132.1.2.3 switch=y r1=0.001 x1=0.001 r0=0.001 x0=0.001 Length=0.001 units=km
New Line.1204824E:PS0045 phases=3 Bus1=15165256.1.2.3 Bus2=15165255.1.2.3 switch=y r1=0.001 x1=0.001 r0=0.001 x0=0.001 Length=0.001 units=km
New Line.4959484E:4959484E phases=2 Bus1=242484489.1.3 Bus2=242484490.1.3 switch=y r1=0.001 x1=0.001 r0=0.001 x0=0.001 Length=0.001 units=km
New Line.1195348E:PD0227 phases=3 Bus1=15165227.1.2.3 Bus2=15165228.1.2.3 switch=y r1=0.001 x1=0.001 r0=0.001 x0=0.001 Length=0.001 units=km enabled=false
New Line.5650792:P5650792-1 phases=2 Bus1=223279749.1.2 Bus2=223279750.1.2 switch=y r1=0.001 x1=0.001 r0=0.001 x0=0.001 Length=0.001 units=km
New Line.4407404E:4407404EP1 phases=3 Bus1=15164482.1.2.3 Bus2=15164481.1.2.3 switch=y r1=0.001 x1=0.001 r0=0.001 x0=0.001 Length=0.001 units=km
New Line.1838293E:1838293E phases=3 Bus1=15163997.1.2.3 Bus2=15163998.1.2.3 switch=y r1=0.001 x1=0.001 r0=0.001 x0=0.001 Length=0.001 units=km
New Line.122206E:122206E phases=2 Bus1=223279786.1.2 Bus2=223279787.1.2 switch=y r1=0.001 x1=0.001 r0=0.001 x0=0.001 Length=0.001 units=km
New Line.1836265E:1836265E phases=3 Bus1=15164028.1.2.3 Bus2=15164027.1.2.3 switch=y r1=0.001 x1=0.001 r0=0.001 x0=0.001 Length=0.001 units=km
New Line.711471E:711471EP1 phases=3 Bus1=15164511.1.2.3 Bus2=15164512.1.2.3 switch=y r1=0.001 x1=0.001 r0=0.001 x0=0.001 Length=0.001 units=km
New Line.1861238E:1861238E phases=3 Bus1=15163040.1.2.3 Bus2=15163039.1.2.3 switch=y r1=0.001 x1=0.001 r0=0.001 x0=0.001 Length=0.001 units=km
New Line.689575E:689575E phases=3 Bus1=15163576.1.2.3 Bus2=15163577.1.2.3 switch=y r1=0.001 x1=0.001 r0=0.001 x0=0.001 Length=0.001 units=km
New Line.1047301E:BF45148 phases=1 Bus1=15165294.3 Bus2=15165295.3 switch=y r1=0.001 x1=0.001 r0=0.001 x0=0.001 Length=0.001 units=km
New Line.ARBORVITAE$LIDUMS_PD0227$PD0227 phases=3 Bus1=15165228.1.2.3 Bus2=-77777715165228.1.2.3 switch=y r1=0.001 x1=0.001 r0=0.001 x0=0.001 Length=0.001 units=km
New Line.CAB_4292532E:4292532E phases=3 Bus1=15162888.1.2.3 Bus2=15162870.1.2.3 switch=y r1=0.001 x1=0.001 r0=0.001 x0=0.001 Length=0.001 units=km
New Line.CAB_2244474E:2244474E phases=3 Bus1=135554345.1.2.3 Bus2=135554328.1.2.3 switch=y r1=0.001 x1=0.001 r0=0.001 x0=0.001 Length=0.001 units=km
New Line.CAB_507015H:507015H phases=3 Bus1=15163706.1.2.3 Bus2=15163690.1.2.3 switch=y r1=0.001 x1=0.001 r0=0.001 x0=0.001 Length=0.001 units=km
New Line.CAB_1204813E:1204813E phases=3 Bus1=15164860.1.2.3 Bus2=15164842.1.2.3 switch=y r1=0.001 x1=0.001 r0=0.001 x0=0.001 Length=0.001 units=km
New Line.CAB_1204815E:1204815E phases=3 Bus1=15163000.1.2.3 Bus2=15162982.1.2.3 switch=y r1=0.001 x1=0.001 r0=0.001 x0=0.001 Length=0.001 units=km
New Line.CAB_1541040E:1541040E phases=3 Bus1=15162917.1.2.3 Bus2=15162899.1.2.3 switch=y r1=0.001 x1=0.001 r0=0.001 x0=0.001 Length=0.001 units=km
New Line.CAB_152551E:152551E phases=3 Bus1=15163462.1.2.3 Bus2=15163444.1.2.3 switch=y r1=0.001 x1=0.001 r0=0.001 x0=0.001 Length=0.001 units=km
New Line.CAB_4841678E:4841678E phases=3 Bus1=15163831.1.2.3 Bus2=15163815.1.2.3 switch=y r1=0.001 x1=0.001 r0=0.001 x0=0.001 Length=0.001 units=km
New Line.CAB_813771E:813771E phases=3 Bus1=15163935.1.2.3 Bus2=15163919.1.2.3 switch=y r1=0.001 x1=0.001 r0=0.001 x0=0.001 Length=0.001 units=km
New Line.CAB_122185E:122185E phases=3 Bus1=15164128.1.2.3 Bus2=15164112.1.2.3 switch=y r1=0.001 x1=0.001 r0=0.001 x0=0.001 Length=0.001 units=km
New Line.CAB_4613311E:4613311E phases=3 Bus1=94788710.1.2.3 Bus2=94788693.1.2.3 switch=y r1=0.001 x1=0.001 r0=0.001 x0=0.001 Length=0.001 units=km
New Line.CAB_1700074E:1700074E phases=3 Bus1=95042105.1.2.3 Bus2=95042088.1.2.3 switch=y r1=0.001 x1=0.001 r0=0.001 x0=0.001 Length=0.001 units=km
New Line.CAB_4527104E:4527104E phases=3 Bus1=15162861.1.2.3 Bus2=15162845.1.2.3 switch=y r1=0.001 x1=0.001 r0=0.001 x0=0.001 Length=0.001 units=km
New Line.CAB_1269153E:1269153E phases=3 Bus1=95042063.1.2.3 Bus2=95042044.1.2.3 switch=y r1=0.001 x1=0.001 r0=0.001 x0=0.001 Length=0.001 units=km
New Line.CAB_293492E:293492E phases=3 Bus1=140548757.1.2.3 Bus2=140548740.1.2.3 switch=y r1=0.001 x1=0.001 r0=0.001 x0=0.001 Length=0.001 units=km
New Line.CAB_646612E:646612E phases=3 Bus1=15162946.1.2.3 Bus2=15162928.1.2.3 switch=y r1=0.001 x1=0.001 r0=0.001 x0=0.001 Length=0.001 units=km
New Line.CAB_2244475E:2244475E phases=3 Bus1=206449468.1.2.3 Bus2=206449476.1.2.3 switch=y r1=0.001 x1=0.001 r0=0.001 x0=0.001 Length=0.001 units=km
New Line.CAB_4528276E:4528276E phases=3 Bus1=95042228.1.2.3 Bus2=95042211.1.2.3 switch=y r1=0.001 x1=0.001 r0=0.001 x0=0.001 Length=0.001 units=km
New Line.CAB_69774E:69774E phases=3 Bus1=15163987.1.2.3 Bus2=15163969.1.2.3 switch=y r1=0.001 x1=0.001 r0=0.001 x0=0.001 Length=0.001 units=km
New Line.CAB_518716H:518716H phases=3 Bus1=95153132.1.2.3 Bus2=95153115.1.2.3 switch=y r1=0.001 x1=0.001 r0=0.001 x0=0.001 Length=0.001 units=km
New Line.CAB_1204821E:1204821E phases=3 Bus1=194279034.1.2.3 Bus2=194279017.1.2.3 switch=y r1=0.001 x1=0.001 r0=0.001 x0=0.001 Length=0.001 units=km
New Line.CAB_532794H:532794H phases=3 Bus1=136300965.1.2.3 Bus2=136300948.1.2.3 switch=y r1=0.001 x1=0.001 r0=0.001 x0=0.001 Length=0.001 units=km
New Line.CAB_4701351E:4701351E phases=3 Bus1=15164365.1.2.3 Bus2=15164349.1.2.3 switch=y r1=0.001 x1=0.001 r0=0.001 x0=0.001 Length=0.001 units=km
New Line.CAB_307483E:307483E phases=3 Bus1=15163381.1.2.3 Bus2=15163365.1.2.3 switch=y r1=0.001 x1=0.001 r0=0.001 x0=0.001 Length=0.001 units=km
New Line.CAB_4115860E:4115860E phases=3 Bus1=15163491.1.2.3 Bus2=15163473.1.2.3 switch=y r1=0.001 x1=0.001 r0=0.001 x0=0.001 Length=0.001 units=km
New Line.CAB_4030318E:4030318E phases=3 Bus1=15163731.1.2.3 Bus2=15163715.1.2.3 switch=y r1=0.001 x1=0.001 r0=0.001 x0=0.001 Length=0.001 units=km
New Line.CAB_4283522E:4283522E phases=3 Bus1=15164558.1.2.3 Bus2=15164542.1.2.3 switch=y r1=0.001 x1=0.001 r0=0.001 x0=0.001 Length=0.001 units=km
New Line.CAB_4178314E:4178314E phases=3 Bus1=15164887.1.2.3 Bus2=15164871.1.2.3 switch=y r1=0.001 x1=0.001 r0=0.001 x0=0.001 Length=0.001 units=km
New Line.CAB_4403125E:4403125E phases=3 Bus1=15164987.1.2.3 Bus2=15164971.1.2.3 switch=y r1=0.001 x1=0.001 r0=0.001 x0=0.001 Length=0.001 units=km
New Line.CAB_1195349E:1195349E phases=3 Bus1=160531497.1.2.3 Bus2=160531480.1.2.3 switch=y r1=0.001 x1=0.001 r0=0.001 x0=0.001 Length=0.001 units=km
New Line.CAB_1204819E:1204819E phases=3 Bus1=15163029.1.2.3 Bus2=15163011.1.2.3 switch=y r1=0.001 x1=0.001 r0=0.001 x0=0.001 Length=0.001 units=km
New Line.CAB_538630H:538630H phases=3 Bus1=15164733.1.2.3 Bus2=15164717.1.2.3 switch=y r1=0.001 x1=0.001 r0=0.001 x0=0.001 Length=0.001 units=km
New Line.CAB_1204471E:1204471E phases=3 Bus1=15164608.1.2.3 Bus2=15164592.1.2.3 switch=y r1=0.001 x1=0.001 r0=0.001 x0=0.001 Length=0.001 units=km
New Line.CAB_4828166E:4828166E phases=3 Bus1=15163806.1.2.3 Bus2=15163790.1.2.3 switch=y r1=0.001 x1=0.001 r0=0.001 x0=0.001 Length=0.001 units=km
New Line.CAB_1766897E:1766897E phases=3 Bus1=15164286.1.2.3 Bus2=15164270.1.2.3 switch=y r1=0.001 x1=0.001 r0=0.001 x0=0.001 Length=0.001 units=km
New Line.CAB_677657E:677657E phases=3 Bus1=15164340.1.2.3 Bus2=15164324.1.2.3 switch=y r1=0.001 x1=0.001 r0=0.001 x0=0.001 Length=0.001 units=km
New Line.CAB_736814E:736814E phases=3 Bus1=15164783.1.2.3 Bus2=15164767.1.2.3 switch=y r1=0.001 x1=0.001 r0=0.001 x0=0.001 Length=0.001 units=km
New Line.CAB_789845E:789845E phases=3 Bus1=15164808.1.2.3 Bus2=15164792.1.2.3 switch=y r1=0.001 x1=0.001 r0=0.001 x0=0.001 Length=0.001 units=km
New Line.CAB_1204472E:1204472E phases=3 Bus1=15164583.1.2.3 Bus2=15164567.1.2.3 switch=y r1=0.001 x1=0.001 r0=0.001 x0=0.001 Length=0.001 units=km
New Line.CAB_789846E:789846E phases=3 Bus1=15164833.1.2.3 Bus2=15164817.1.2.3 switch=y r1=0.001 x1=0.001 r0=0.001 x0=0.001 Length=0.001 units=km
New Line.CAB_1265827E:1265827E phases=3 Bus1=15163656.1.2.3 Bus2=15163640.1.2.3 switch=y r1=0.001 x1=0.001 r0=0.001 x0=0.001 Length=0.001 units=km
New Line.CAB_405748E:405748E phases=3 Bus1=15163325.1.2.3 Bus2=15163307.1.2.3 switch=y r1=0.001 x1=0.001 r0=0.001 x0=0.001 Length=0.001 units=km
New Line.CAB_711436E:711436E phases=3 Bus1=15163138.1.2.3 Bus2=15163120.1.2.3 switch=y r1=0.001 x1=0.001 r0=0.001 x0=0.001 Length=0.001 units=km
New Line.CAB_70177E:70177E phases=3 Bus1=15163354.1.2.3 Bus2=15163336.1.2.3 switch=y r1=0.001 x1=0.001 r0=0.001 x0=0.001 Length=0.001 units=km
New Line.CAB_711438E:711438E phases=3 Bus1=15163196.1.2.3 Bus2=15163178.1.2.3 switch=y r1=0.001 x1=0.001 r0=0.001 x0=0.001 Length=0.001 units=km
New Line.CAB_1047430E:1047430E phases=3 Bus1=15163960.1.2.3 Bus2=15163944.1.2.3 switch=y r1=0.001 x1=0.001 r0=0.001 x0=0.001 Length=0.001 units=km
New Line.CAB_1204825E:1204825E phases=3 Bus1=15164209.1.2.3 Bus2=15164191.1.2.3 switch=y r1=0.001 x1=0.001 r0=0.001 x0=0.001 Length=0.001 units=km
New Line.CAB_711440E:711440E phases=3 Bus1=15163167.1.2.3 Bus2=15163149.1.2.3 switch=y r1=0.001 x1=0.001 r0=0.001 x0=0.001 Length=0.001 units=km
New Line.CAB_528456H:528456H phases=3 Bus1=15163223.1.2.3 Bus2=15163207.1.2.3 switch=y r1=0.001 x1=0.001 r0=0.001 x0=0.001 Length=0.001 units=km
New Line.CAB_4828180E:4828180E phases=3 Bus1=15163756.1.2.3 Bus2=15163740.1.2.3 switch=y r1=0.001 x1=0.001 r0=0.001 x0=0.001 Length=0.001 units=km
New Line.CAB_711299E:711299E phases=3 Bus1=15164182.1.2.3 Bus2=15164166.1.2.3 switch=y r1=0.001 x1=0.001 r0=0.001 x0=0.001 Length=0.001 units=km
New Line.CAB_4374221E:4374221E phases=3 Bus1=15164962.1.2.3 Bus2=15164946.1.2.3 switch=y r1=0.001 x1=0.001 r0=0.001 x0=0.001 Length=0.001 units=km
New Line.CAB_1204826E:1204826E phases=3 Bus1=15163883.1.2.3 Bus2=15163865.1.2.3 switch=y r1=0.001 x1=0.001 r0=0.001 x0=0.001 Length=0.001 units=km
New Line.CAB_933174E:933174E phases=3 Bus1=15164633.1.2.3 Bus2=15164617.1.2.3 switch=y r1=0.001 x1=0.001 r0=0.001 x0=0.001 Length=0.001 units=km
New Line.CAB_4818272E:4818272E phases=3 Bus1=15163248.1.2.3 Bus2=15163232.1.2.3 switch=y r1=0.001 x1=0.001 r0=0.001 x0=0.001 Length=0.001 units=km
New Line.CAB_4815796E:4815796E phases=3 Bus1=15163781.1.2.3 Bus2=15163765.1.2.3 switch=y r1=0.001 x1=0.001 r0=0.001 x0=0.001 Length=0.001 units=km
New Line.CAB_4811203E:4811203E phases=3 Bus1=15164261.1.2.3 Bus2=15164245.1.2.3 switch=y r1=0.001 x1=0.001 r0=0.001 x0=0.001 Length=0.001 units=km
New Line.CAB_4352132E:4352132E phases=3 Bus1=15164912.1.2.3 Bus2=15164896.1.2.3 switch=y r1=0.001 x1=0.001 r0=0.001 x0=0.001 Length=0.001 units=km
New Line.CAB_1910981E:1910981E phases=3 Bus1=15164236.1.2.3 Bus2=15164220.1.2.3 switch=y r1=0.001 x1=0.001 r0=0.001 x0=0.001 Length=0.001 units=km
New Line.CAB_2144476E:2144476E phases=3 Bus1=15163856.1.2.3 Bus2=15163840.1.2.3 switch=y r1=0.001 x1=0.001 r0=0.001 x0=0.001 Length=0.001 units=km
New Line.CAB_4178635E:4178635E phases=3 Bus1=15163910.1.2.3 Bus2=15163894.1.2.3 switch=y r1=0.001 x1=0.001 r0=0.001 x0=0.001 Length=0.001 units=km
New Line.CAB_1204548E:1204548E phases=3 Bus1=15164076.1.2.3 Bus2=15164058.1.2.3 switch=y r1=0.001 x1=0.001 r0=0.001 x0=0.001 Length=0.001 units=km
New Line.CAB_513357H:513357H phases=3 Bus1=15163086.1.2.3 Bus2=15163070.1.2.3 switch=y r1=0.001 x1=0.001 r0=0.001 x0=0.001 Length=0.001 units=km
New Line.CAB_4618852E:4618852E phases=3 Bus1=15163111.1.2.3 Bus2=15163095.1.2.3 switch=y r1=0.001 x1=0.001 r0=0.001 x0=0.001 Length=0.001 units=km
New Line.CAB_4438881E:4438881E phases=3 Bus1=15163433.1.2.3 Bus2=15163415.1.2.3 switch=y r1=0.001 x1=0.001 r0=0.001 x0=0.001 Length=0.001 units=km
New Line.CAB_1791597E:1791597E phases=3 Bus1=15164103.1.2.3 Bus2=15164087.1.2.3 switch=y r1=0.001 x1=0.001 r0=0.001 x0=0.001 Length=0.001 units=km
New Line.CAB_1204830E:1204830E phases=3 Bus1=15164313.1.2.3 Bus2=15164295.1.2.3 switch=y r1=0.001 x1=0.001 r0=0.001 x0=0.001 Length=0.001 units=km
New Line.CAB_4353621E:4353621E phases=3 Bus1=15164937.1.2.3 Bus2=15164921.1.2.3 switch=y r1=0.001 x1=0.001 r0=0.001 x0=0.001 Length=0.001 units=km
New Line.CAB_4827647E:4827647E phases=3 Bus1=15164155.1.2.3 Bus2=15164137.1.2.3 switch=y r1=0.001 x1=0.001 r0=0.001 x0=0.001 Length=0.001 units=km
New Line.CAB_185303E:185303E phases=3 Bus1=15163273.1.2.3 Bus2=15163257.1.2.3 switch=y r1=0.001 x1=0.001 r0=0.001 x0=0.001 Length=0.001 units=km
New Line.CAB_838065E:838065E phases=3 Bus1=15163298.1.2.3 Bus2=15163282.1.2.3 switch=y r1=0.001 x1=0.001 r0=0.001 x0=0.001 Length=0.001 units=km
New Line.CAB_69785E:69785E phases=3 Bus1=15164392.1.2.3 Bus2=15164374.1.2.3 switch=y r1=0.001 x1=0.001 r0=0.001 x0=0.001 Length=0.001 units=km
New Line.CAB_69786E:69786E phases=3 Bus1=15164421.1.2.3 Bus2=15164403.1.2.3 switch=y r1=0.001 x1=0.001 r0=0.001 x0=0.001 Length=0.001 units=km
New Line.CAB_832069E:832069E phases=3 Bus1=15164708.1.2.3 Bus2=15164692.1.2.3 switch=y r1=0.001 x1=0.001 r0=0.001 x0=0.001 Length=0.001 units=km
New Line.CAB_4439622E:4439622E phases=3 Bus1=94228255.1.2.3 Bus2=94228238.1.2.3 switch=y r1=0.001 x1=0.001 r0=0.001 x0=0.001 Length=0.001 units=km
New Line.CAB_69505E:69505E phases=3 Bus1=15163543.1.2.3 Bus2=15163527.1.2.3 switch=y r1=0.001 x1=0.001 r0=0.001 x0=0.001 Length=0.001 units=km
New Line.CAB_234752E:234752E phases=3 Bus1=15163606.1.2.3 Bus2=15163590.1.2.3 switch=y r1=0.001 x1=0.001 r0=0.001 x0=0.001 Length=0.001 units=km
New Line.CAB_1238860E:1238860E phases=3 Bus1=15163518.1.2.3 Bus2=15163502.1.2.3 switch=y r1=0.001 x1=0.001 r0=0.001 x0=0.001 Length=0.001 units=km
New Line.CAB_1204462E:1204462E phases=3 Bus1=15163568.1.2.3 Bus2=15163552.1.2.3 switch=y r1=0.001 x1=0.001 r0=0.001 x0=0.001 Length=0.001 units=km
New Line.CAB_4989424E:4989424E phases=3 Bus1=15164758.1.2.3 Bus2=15164742.1.2.3 switch=y r1=0.001 x1=0.001 r0=0.001 x0=0.001 Length=0.001 units=km
New Line.CAB_711500E:711500E phases=3 Bus1=15163631.1.2.3 Bus2=15163615.1.2.3 switch=y r1=0.001 x1=0.001 r0=0.001 x0=0.001 Length=0.001 units=km
New Line.CAB_1085187E:1085187E phases=3 Bus1=15164448.1.2.3 Bus2=15164432.1.2.3 switch=y r1=0.001 x1=0.001 r0=0.001 x0=0.001 Length=0.001 units=km
New Line.CAB_832014E:832014E phases=3 Bus1=15164473.1.2.3 Bus2=15164457.1.2.3 switch=y r1=0.001 x1=0.001 r0=0.001 x0=0.001 Length=0.001 units=km
New Line.736865E:736865E phases=1 Bus1=236710528.3 Bus2=236710529.3 switch=y r1=0.001 x1=0.001 r0=0.001 x0=0.001 Length=0.001 units=km

! Loads
New Load.933174E Bus1=-99999915164618.3.0 phases=1 kV=0.069282 kW=0 kvar=0 model=1
New Load.4701351E Bus1=-99999915164350.2.0 phases=1 kV=0.069282 kW=0 kvar=0 model=1
New Load.1204825E Bus1=-99999915164192.1.0 phases=1 kV=0.069282 kW=0 kvar=0 model=1
New Load.711438E Bus1=-99999915163179.3.0 phases=1 kV=0.069282 kW=0 kvar=0 model=1
New Load.1047430E Bus1=-99999915163945.1.0 phases=1 kV=0.069282 kW=0 kvar=0 model=1
New Load.4841678E Bus1=-99999915163816.3.0 phases=1 kV=0.069282 kW=0 kvar=0 model=1
New Load.152551E Bus1=-99999915163445.1.0 phases=1 kV=0.069282 kW=0 kvar=0 model=1
New Load.122185E Bus1=-99999915164113.3.0 phases=1 kV=0.069282 kW=0 kvar=0 model=1
New Load.813771E Bus1=-99999915163920.2.0 phases=1 kV=0.069282 kW=0 kvar=0 model=1
New Load.507015H Bus1=-99999915163691.3.0 phases=1 kV=0.069282 kW=0 kvar=0 model=1
New Load.2244474E Bus1=-999999135554329.2.0 phases=1 kV=0.069282 kW=0 kvar=0 model=1
New Load.4815796E Bus1=-99999915163766.3.0 phases=1 kV=0.069282 kW=0 kvar=0 model=1
New Load.4818272E Bus1=-99999915163233.2.0 phases=1 kV=0.069282 kW=0 kvar=0 model=1
New Load.4352132E Bus1=-99999915164897.1.0 phases=1 kV=0.069282 kW=0 kvar=0 model=1
New Load.4811203E Bus1=-99999915164246.3.0 phases=1 kV=0.069282 kW=0 kvar=0 model=1
New Load.234752E Bus1=-99999915163591.1.0 phases=1 kV=0.069282 kW=0 kvar=0 model=1
New Load.69505E Bus1=-99999915163528.2.0 phases=1 kV=0.069282 kW=0 kvar=0 model=1
New Load.4292532E Bus1=-99999915162871.3.0 phases=1 kV=0.069282 kW=0 kvar=0 model=1
New Load.70177E Bus1=-99999915163337.2.0 phases=1 kV=0.069282 kW=0 kvar=0 model=1
New Load.711436E Bus1=-99999915163121.1.0 phases=1 kV=0.069282 kW=0 kvar=0 model=1
New Load.1204815E Bus1=-99999915162983.1.0 phases=1 kV=0.069282 kW=0 kvar=0 model=1
New Load.789846E Bus1=-99999915164818.1.0 phases=1 kV=0.069282 kW=0 kvar=0 model=1
New Load.1204472E Bus1=-99999915164568.1.0 phases=1 kV=0.069282 kW=0 kvar=0 model=1
New Load.1204821E Bus1=-999999194279018.2.0 phases=1 kV=0.069282 kW=0 kvar=0 model=1
New Load.838065E Bus1=-99999915163283.2.0 phases=1 kV=0.069282 kW=0 kvar=0 model=1
New Load.69785E Bus1=-99999915164375.3.0 phases=1 kV=0.069282 kW=0 kvar=0 model=1
New Load.185303E Bus1=-99999915163258.2.0 phases=1 kV=0.069282 kW=0 kvar=0 model=1
New Load.4989424E Bus1=-99999915164743.3.0 phases=1 kV=0.069282 kW=0 kvar=0 model=1
New Load.1204462E Bus1=-99999915163553.1.0 phases=1 kV=0.069282 kW=0 kvar=0 model=1
New Load.1265827E Bus1=-99999915163641.3.0 phases=1 kV=0.069282 kW=0 kvar=0 model=1
New Load.4438881E Bus1=-99999915163416.1.0 phases=1 kV=0.069282 kW=0 kvar=0 model=1
New Load.1791597E Bus1=-99999915164088.2.0 phases=1 kV=0.069282 kW=0 kvar=0 model=1
New Load.1204830E Bus1=-99999915164296.3.0 phases=1 kV=0.069282 kW=0 kvar=0 model=1
New Load.4353621E Bus1=-99999915164922.1.0 phases=1 kV=0.069282 kW=0 kvar=0 model=1
New Load.1910981E Bus1=-99999915164221.2.0 phases=1 kV=0.069282 kW=0 kvar=0 model=1
New Load.4618852E Bus1=-99999915163096.3.0 phases=1 kV=0.069282 kW=0 kvar=0 model=1
New Load.513357H Bus1=-99999915163071.1.0 phases=1 kV=0.069282 kW=0 kvar=0 model=1
New Load.293492E Bus1=-999999140548741.1.0 phases=1 kV=0.069282 kW=0 kvar=0 model=1
New Load.832069E Bus1=-99999915164693.2.0 phases=1 kV=0.069282 kW=0 kvar=0 model=1
New Load.69786E Bus1=-99999915164404.1.0 phases=1 kV=0.069282 kW=0 kvar=0 model=1
New Load.4178635E Bus1=-99999915163895.1.0 phases=1 kV=0.069282 kW=0 kvar=0 model=1
New Load.1204548E Bus1=-99999915164059.2.0 phases=1 kV=0.069282 kW=0 kvar=0 model=1
New Load.2144476E Bus1=-99999915163841.3.0 phases=1 kV=0.069282 kW=0 kvar=0 model=1
New Load.646612E Bus1=-99999915162929.1.0 phases=1 kV=0.069282 kW=0 kvar=0 model=1
New Load.4827647E Bus1=-99999915164138.2.0 phases=1 kV=0.069282 kW=0 kvar=0 model=1
New Load.4439622E Bus1=-99999994228239.2.0 phases=1 kV=0.069282 kW=0 kvar=0 model=1
New Load.405748E Bus1=-99999915163308.2.0 phases=1 kV=0.069282 kW=0 kvar=0 model=1
New Load.4828166E Bus1=-99999915163791.3.0 phases=1 kV=0.069282 kW=0 kvar=0 model=1
New Load.677657E Bus1=-99999915164325.1.0 phases=1 kV=0.069282 kW=0 kvar=0 model=1
New Load.1766897E Bus1=-99999915164271.3.0 phases=1 kV=0.069282 kW=0 kvar=0 model=1
New Load.711500E Bus1=-99999915163616.2.0 phases=1 kV=0.069282 kW=0 kvar=0 model=1
New Load.1085187E Bus1=-99999915164433.1.0 phases=1 kV=0.069282 kW=0 kvar=0 model=1
New Load.1204471E Bus1=-99999915164593.1.0 phases=1 kV=0.069282 kW=0 kvar=0 model=1
New Load.789845E Bus1=-99999915164793.1.0 phases=1 kV=0.138564 kW=0 kvar=0 model=1
New Load.736814E Bus1=-99999915164768.2.0 phases=1 kV=0.069282 kW=0 kvar=0 model=1
New Load.69774E Bus1=-99999915163970.3.0 phases=1 kV=0.069282 kW=0 kvar=0 model=1
New Load.4528276E Bus1=-99999995042212.1.0 phases=1 kV=0.069282 kW=0 kvar=0 model=1
New Load.2244475E Bus1=-999999206449477.2.0 phases=1 kV=0.069282 kW=0 kvar=0 model=1
New Load.5047684 Bus1=-999999242003144.1.0 phases=1 kV=0.069282 kW=0 kvar=0 model=1
New Load.4527104E Bus1=-99999915162846.3.0 phases=1 kV=0.069282 kW=0 kvar=0 model=1
New Load.1269153E_0 Bus1=-99999995042045.1.2 phases=1 kV=0.069282 kW=0 kvar=0 model=1
New Load.1269153E_1 Bus1=-99999995042045.2.3 phases=1 kV=0.069282 kW=0 kvar=0 model=1
New Load.1269153E_2 Bus1=-99999995042045.3.1 phases=1 kV=0.069282 kW=0 kvar=0 model=1
New Load.5650792_0 Bus1=-999999223279750.1.0 phases=1 kV=0.069282 kW=0 kvar=0 model=1
New Load.5650792_1 Bus1=-999999223279750.2.0 phases=1 kV=0.069282 kW=0 kvar=0 model=1
New Load.538630H Bus1=-99999915164718.3.0 phases=1 kV=0.069282 kW=0 kvar=0 model=1
New Load.1204819E Bus1=-99999915163012.1.0 phases=1 kV=0.069282 kW=0 kvar=0 model=1
New Load.4374221E Bus1=-99999915164947.1.0 phases=1 kV=0.069282 kW=0 kvar=0 model=1
New Load.4828180E Bus1=-99999915163741.3.0 phases=1 kV=0.069282 kW=0 kvar=0 model=1
New Load.711299E Bus1=-99999915164167.3.0 phases=1 kV=0.069282 kW=0 kvar=0 model=1
New Load.528456H Bus1=-99999915163208.2.0 phases=1 kV=0.069282 kW=0 kvar=0 model=1
New Load.532794H Bus1=-999999136300949.3.0 phases=1 kV=0.069282 kW=0 kvar=0 model=1
New Load.1238860E Bus1=-99999915163503.2.0 phases=1 kV=0.069282 kW=0 kvar=0 model=1
New Load.4030318E Bus1=-99999915163716.3.0 phases=1 kV=0.069282 kW=0 kvar=0 model=1
New Load.4115860E Bus1=-99999915163474.1.0 phases=1 kV=0.069282 kW=0 kvar=0 model=1
New Load.4178314E Bus1=-99999915164872.2.0 phases=1 kV=0.069282 kW=0 kvar=0 model=1
New Load.4283522E Bus1=-99999915164543.1.0 phases=1 kV=0.069282 kW=0 kvar=0 model=1
New Load.4403125E Bus1=-99999915164972.3.0 phases=1 kV=0.069282 kW=0 kvar=0 model=1
New Load.1195349E Bus1=-999999160531481.2.0 phases=1 kV=0.069282 kW=0 kvar=0 model=1
New Load.307483E Bus1=-99999915163366.2.0 phases=1 kV=0.069282 kW=0 kvar=0 model=1
New Load.518716H Bus1=-99999995153116.1.0 phases=1 kV=0.069282 kW=0 kvar=0 model=1
New Load.832014E Bus1=-99999915164458.2.0 phases=1 kV=0.069282 kW=0 kvar=0 model=1
New Load.1541040E_0 Bus1=-99999915162900.1.2 phases=1 kV=0.069282 kW=0 kvar=0 model=1
New Load.1541040E_1 Bus1=-99999915162900.2.3 phases=1 kV=0.069282 kW=0 kvar=0 model=1
New Load.1541040E_2 Bus1=-99999915162900.3.1 phases=1 kV=0.069282 kW=0 kvar=0 model=1
New Load.1700074E Bus1=-99999995042089.1.0 phases=1 kV=0.069282 kW=0 kvar=0 model=1
New Load.4613311E Bus1=-99999994788694.1.0 phases=1 kV=0.069282 kW=0 kvar=0 model=1
New Load.1204813E Bus1=-99999915164843.2.0 phases=1 kV=0.069282 kW=0 kvar=0 model=1
New Load.1204826E Bus1=-99999915163866.3.0 phases=1 kV=0.069282 kW=0 kvar=0 model=1
New Load.711440E Bus1=-99999915163150.2.0 phases=1 kV=0.069282 kW=0 kvar=0 model=1

! Generators
New Generator.SCE-113339_PHOTOVOLTAIC Bus1=-99999915163895.1.0 phases=1 kV=0.069282 kW=0 kvar=0 model=7
New Generator.SCE-114132_PHOTOVOLTAIC Bus1=-99999915163895.1.0 phases=1 kV=0.069282 kW=0 kvar=0 model=7
New Generator.NST-346879_PHOTOVOLTAIC Bus1=-99999915163895.1.0 phases=1 kV=0.069282 kW=0 kvar=0 model=7
New Generator.NST-357387_PHOTOVOLTAIC Bus1=-99999915164059.2.0 phases=1 kV=0.069282 kW=0 kvar=0 model=7
New Generator.NST-114200_PHOTOVOLTAIC Bus1=-99999915163841.3.0 phases=1 kV=0.069282 kW=0 kvar=0 model=7
New Generator.SBP-27728_PHOTOVOLTAIC Bus1=-99999915164693.2.0 phases=1 kV=0.069282 kW=0 kvar=0 model=7
New Generator.SBP-27728_BATTERY Bus1=-99999915164693.2.0 phases=1 kV=0.069282 kW=1.727 kvar=0 model=7
New Generator.SBP-52511_PHOTOVOLTAIC Bus1=-99999915164768.2.0 phases=1 kV=0.069282 kW=0 kvar=0 model=7
New Generator.SCE-21580_PHOTOVOLTAIC Bus1=-99999915164872.2.0 phases=1 kV=0.069282 kW=0 kvar=0 model=7
New Generator.500135365_PHOTOVOLTAIC Bus1=-99999915164543.1.0 phases=1 kV=0.069282 kW=0 kvar=0 model=7
New Generator.NST-204316_PHOTOVOLTAIC Bus1=-99999915163716.3.0 phases=1 kV=0.069282 kW=0 kvar=0 model=7
New Generator.NST-298911_PHOTOVOLTAIC Bus1=-99999915163716.3.0 phases=1 kV=0.069282 kW=0 kvar=0 model=7
New Generator.NST-05959_PHOTOVOLTAIC Bus1=-99999915163474.1.0 phases=1 kV=0.069282 kW=0 kvar=0 model=7
New Generator.NST-240400_PHOTOVOLTAIC Bus1=-99999915163071.1.0 phases=1 kV=0.069282 kW=0 kvar=0 model=7
New Generator.SBP-07711_PHOTOVOLTAIC Bus1=-99999915163071.1.0 phases=1 kV=0.069282 kW=0 kvar=0 model=7
New Generator.NST-25839_PHOTOVOLTAIC Bus1=-999999140548741.1.0 phases=1 kV=0.069282 kW=0 kvar=0 model=7
New Generator.NST-101853_PHOTOVOLTAIC Bus1=-99999915163150.2.0 phases=1 kV=0.069282 kW=0 kvar=0 model=7
New Generator.NST-20836_PHOTOVOLTAIC Bus1=-99999915163150.2.0 phases=1 kV=0.069282 kW=0 kvar=0 model=7
New Generator.SCE-59476_PHOTOVOLTAIC Bus1=-99999915163208.2.0 phases=1 kV=0.069282 kW=0 kvar=0 model=7
New Generator.NST-417215_PHOTOVOLTAIC Bus1=-99999915163741.3.0 phases=1 kV=0.069282 kW=0 kvar=0 model=7
New Generator.SCE-69894_PHOTOVOLTAIC Bus1=-99999915164138.2.0 phases=1 kV=0.069282 kW=0 kvar=0 model=7
New Generator.NST-472266_PHOTOVOLTAIC Bus1=-99999915164138.2.0 phases=1 kV=0.069282 kW=0 kvar=0 model=7
New Generator.NST-387220_PHOTOVOLTAIC Bus1=-99999915164138.2.0 phases=1 kV=0.069282 kW=0 kvar=0 model=7
New Generator.500676317_PHOTOVOLTAIC Bus1=-99999915163766.3.0 phases=1 kV=0.069282 kW=0 kvar=0 model=7
New Generator.500600407_PHOTOVOLTAIC Bus1=-99999915164246.3.0 phases=1 kV=0.069282 kW=0 kvar=0 model=7
New Generator.SBP-91878_BATTERY Bus1=-99999915164246.3.0 phases=1 kV=0.069282 kW=3.537 kvar=0 model=7
New Generator.SBP-91878_PHOTOVOLTAIC Bus1=-99999915164246.3.0 phases=1 kV=0.069282 kW=0 kvar=0 model=7
New Generator.SCE-50247_PHOTOVOLTAIC Bus1=-99999915164325.1.0 phases=1 kV=0.069282 kW=0 kvar=0 model=7
New Generator.NST-384073_PHOTOVOLTAIC Bus1=-99999915164325.1.0 phases=1 kV=0.069282 kW=0 kvar=0 model=7
New Generator.NST-17372_PHOTOVOLTAIC Bus1=-99999915164271.3.0 phases=1 kV=0.069282 kW=0 kvar=0 model=7

! Transformers
New Transformer.293588A47103EE34E0637F61810A7CE3_0_0 phases=1 windings=2 xhl=0.5 %R=0.353554 %imag=1e-06 %noloadloss=0
~ wdg=1 bus=15162871.3.0 kV=2.3094 kVA=50 conn=wye
~ wdg=2 bus=-99999915162871.3.0 kV=0.069282 kVA=50 conn=wye
New Transformer.293588A3FB20EE34E0637F61810A7CE3_1_0 phases=1 windings=2 xhl=0.5 %R=0.353554 %imag=1e-06 %noloadloss=0
~ wdg=1 bus=15163416.1.0 kV=2.3094 kVA=25 conn=wye
~ wdg=2 bus=-99999915163416.1.0 kV=0.069282 kVA=25 conn=wye
New Transformer.293588A8196CEE34E0637F61810A7CE3_2_0 phases=1 windings=2 xhl=0.5 %R=0.353554 %imag=1e-06 %noloadloss=0
~ wdg=1 bus=95042212.1.0 kV=2.3094 kVA=25 conn=wye
~ wdg=2 bus=-99999995042212.1.0 kV=0.069282 kVA=25 conn=wye
New Transformer.293588A47014EE34E0637F61810A7CE3_3_0 phases=1 windings=2 xhl=0.5 %R=0.353554 %imag=1e-06 %noloadloss=0
~ wdg=1 bus=15163970.3.0 kV=2.3094 kVA=75 conn=wye
~ wdg=2 bus=-99999915163970.3.0 kV=0.069282 kVA=75 conn=wye
New Transformer.293588A6C7EBEE34E0637F61810A7CE3_4_0 phases=1 windings=2 xhl=0.5 %R=0.353554 %imag=1e-06 %noloadloss=0
~ wdg=1 bus=194279018.2.0 kV=2.3094 kVA=37.5 conn=wye
~ wdg=2 bus=-999999194279018.2.0 kV=0.069282 kVA=37.5 conn=wye
New Transformer.293588A470CEEE34E0637F61810A7CE3_5_0 phases=1 windings=2 xhl=0.5 %R=0.353554 %imag=1e-06 %noloadloss=0
~ wdg=1 bus=15164843.2.0 kV=2.3094 kVA=37.5 conn=wye
~ wdg=2 bus=-99999915164843.2.0 kV=0.069282 kVA=37.5 conn=wye
New Transformer.293588A47106EE34E0637F61810A7CE3_6_0 phases=1 windings=2 xhl=0.5 %R=0.353554 %imag=1e-06 %noloadloss=0
~ wdg=1 bus=15162983.1.0 kV=2.3094 kVA=25 conn=wye
~ wdg=2 bus=-99999915162983.1.0 kV=0.069282 kVA=25 conn=wye
New Transformer.293588A8196BEE34E0637F61810A7CE3_7_0 phases=1 windings=2 xhl=0.5 %R=0.353554 %imag=1e-06 %noloadloss=0
~ wdg=1 bus=95042089.1.0 kV=2.3094 kVA=75 conn=wye
~ wdg=2 bus=-99999995042089.1.0 kV=0.069282 kVA=75 conn=wye
New Transformer.293588A81961EE34E0637F61810A7CE3_8_0 phases=1 windings=2 xhl=0.5 %R=0.353554 %imag=1e-06 %noloadloss=0
~ wdg=1 bus=94788694.1.0 kV=2.3094 kVA=37.5 conn=wye
~ wdg=2 bus=-99999994788694.1.0 kV=0.069282 kVA=37.5 conn=wye
New Transformer.293588A4701EEE34E0637F61810A7CE3_9_0 phases=1 windings=2 xhl=0.5 %R=0.353554 %imag=1e-06 %noloadloss=0
~ wdg=1 bus=15164296.3.0 kV=2.3094 kVA=37.5 conn=wye
~ wdg=2 bus=-99999915164296.3.0 kV=0.069282 kVA=37.5 conn=wye
New Transformer.293588A47102EE34E0637F61810A7CE3_10_0 phases=1 windings=2 xhl=0.5 %R=0.353554 %imag=1e-06 %noloadloss=0
~ wdg=1 bus=15162846.3.0 kV=2.3094 kVA=50 conn=wye
~ wdg=2 bus=-99999915162846.3.0 kV=0.069282 kVA=50 conn=wye
New Transformer.293588A54284EE34E0637F61810A7CE3_11_0 phases=1 windings=2 xhl=0.5 %R=0.353554 %imag=1e-06 %noloadloss=0
~ wdg=1 bus=140548741.1.0 kV=2.3094 kVA=25 conn=wye
~ wdg=2 bus=-999999140548741.1.0 kV=0.069282 kVA=25 conn=wye
New Transformer.293588A47105EE34E0637F61810A7CE3_12_0 phases=1 windings=2 xhl=0.5 %R=0.353554 %imag=1e-06 %noloadloss=0
~ wdg=1 bus=15162929.1.0 kV=2.3094 kVA=25 conn=wye
~ wdg=2 bus=-99999915162929.1.0 kV=0.069282 kVA=25 conn=wye
New Transformer.293588A47018EE34E0637F61810A7CE3_13_0 phases=1 windings=2 xhl=0.5 %R=0.353554 %imag=1e-06 %noloadloss=0
~ wdg=1 bus=15164138.2.0 kV=2.3094 kVA=50 conn=wye
~ wdg=2 bus=-99999915164138.2.0 kV=0.069282 kVA=50 conn=wye
New Transformer.293588A470C9EE34E0637F61810A7CE3_14_0 phases=1 windings=2 xhl=0.5 %R=0.353554 %imag=1e-06 %noloadloss=0
~ wdg=1 bus=15164718.3.0 kV=2.3094 kVA=50 conn=wye
~ wdg=2 bus=-99999915164718.3.0 kV=0.069282 kVA=50 conn=wye
New Transformer.293588A47107EE34E0637F61810A7CE3_15_0 phases=1 windings=2 xhl=0.5 %R=0.353554 %imag=1e-06 %noloadloss=0
~ wdg=1 bus=15163012.1.0 kV=2.3094 kVA=50 conn=wye
~ wdg=2 bus=-99999915163012.1.0 kV=0.069282 kVA=50 conn=wye
New Transformer.293588A470CCEE34E0637F61810A7CE3_16_0 phases=1 windings=2 xhl=0.5 %R=0.353554 %imag=1e-06 %noloadloss=0
~ wdg=1 bus=15164793.1.0 kV=2.3094 kVA=37.5 conn=wye
~ wdg=2 bus=-99999915164793.1.0 kV=0.138564 kVA=37.5 conn=wye
New Transformer.293588A470CBEE34E0637F61810A7CE3_17_0 phases=1 windings=2 xhl=0.5 %R=0.353554 %imag=1e-06 %noloadloss=0
~ wdg=1 bus=15164768.2.0 kV=2.3094 kVA=50 conn=wye
~ wdg=2 bus=-99999915164768.2.0 kV=0.069282 kVA=50 conn=wye
New Transformer.293588A470CDEE34E0637F61810A7CE3_18_0 phases=1 windings=2 xhl=0.5 %R=0.353554 %imag=1e-06 %noloadloss=0
~ wdg=1 bus=15164818.1.0 kV=2.3094 kVA=37.5 conn=wye
~ wdg=2 bus=-99999915164818.1.0 kV=0.069282 kVA=37.5 conn=wye
New Transformer.293588A3FB1DEE34E0637F61810A7CE3_19_0 phases=1 windings=2 xhl=0.5 %R=0.353554 %imag=1e-06 %noloadloss=0
~ wdg=1 bus=15163308.2.0 kV=2.3094 kVA=100 conn=wye
~ wdg=2 bus=-99999915163308.2.0 kV=0.069282 kVA=100 conn=wye
New Transformer.293588A3FB1EEE34E0637F61810A7CE3_20_0 phases=1 windings=2 xhl=0.5 %R=0.353554 %imag=1e-06 %noloadloss=0
~ wdg=1 bus=15163337.2.0 kV=2.3094 kVA=25 conn=wye
~ wdg=2 bus=-99999915163337.2.0 kV=0.069282 kVA=25 conn=wye
New Transformer.293588A3FB16EE34E0637F61810A7CE3_21_0 phases=1 windings=2 xhl=0.5 %R=0.353554 %imag=1e-06 %noloadloss=0
~ wdg=1 bus=15163121.1.0 kV=2.3094 kVA=25 conn=wye
~ wdg=2 bus=-99999915163121.1.0 kV=0.069282 kVA=25 conn=wye
New Transformer.293588A3FB21EE34E0637F61810A7CE3_22_0 phases=1 windings=2 xhl=0.5 %R=0.353554 %imag=1e-06 %noloadloss=0
~ wdg=1 bus=15163445.1.0 kV=2.3094 kVA=75 conn=wye
~ wdg=2 bus=-99999915163445.1.0 kV=0.069282 kVA=75 conn=wye
New Transformer.293588A47017EE34E0637F61810A7CE3_23_0 phases=1 windings=2 xhl=0.5 %R=0.353554 %imag=1e-06 %noloadloss=0
~ wdg=1 bus=15164113.3.0 kV=2.3094 kVA=25 conn=wye
~ wdg=2 bus=-99999915164113.3.0 kV=0.069282 kVA=25 conn=wye
New Transformer.293588A4701AEE34E0637F61810A7CE3_24_0 phases=1 windings=2 xhl=0.5 %R=0.353554 %imag=1e-06 %noloadloss=0
~ wdg=1 bus=15164192.1.0 kV=2.3094 kVA=50 conn=wye
~ wdg=2 bus=-99999915164192.1.0 kV=0.069282 kVA=50 conn=wye
New Transformer.293588A3FB18EE34E0637F61810A7CE3_25_0 phases=1 windings=2 xhl=0.5 %R=0.353554 %imag=1e-06 %noloadloss=0
~ wdg=1 bus=15163179.3.0 kV=2.3094 kVA=25 conn=wye
~ wdg=2 bus=-99999915163179.3.0 kV=0.069282 kVA=25 conn=wye
New Transformer.293588A3FB22EE34E0637F61810A7CE3_26_0 phases=1 windings=2 xhl=0.5 %R=0.353554 %imag=1e-06 %noloadloss=0
~ wdg=1 bus=15163474.1.0 kV=2.3094 kVA=50 conn=wye
~ wdg=2 bus=-99999915163474.1.0 kV=0.069282 kVA=50 conn=wye
New Transformer.293588A470C4EE34E0637F61810A7CE3_27_0 phases=1 windings=2 xhl=0.5 %R=0.353554 %imag=1e-06 %noloadloss=0
~ wdg=1 bus=15164543.1.0 kV=2.3094 kVA=50 conn=wye
~ wdg=2 bus=-99999915164543.1.0 kV=0.069282 kVA=50 conn=wye
New Transformer.293588A3FAE0EE34E0637F61810A7CE3_28_0 phases=1 windings=2 xhl=0.5 %R=0.353554 %imag=1e-06 %noloadloss=0
~ wdg=1 bus=15164972.3.0 kV=2.3094 kVA=25 conn=wye
~ wdg=2 bus=-99999915164972.3.0 kV=0.069282 kVA=25 conn=wye
New Transformer.293588A984DAEE34E0637F61810A7CE3_29_0 phases=1 windings=2 xhl=0.5 %R=0.353554 %imag=1e-06 %noloadloss=0
~ wdg=1 bus=160531481.2.0 kV=2.3094 kVA=25 conn=wye
~ wdg=2 bus=-999999160531481.2.0 kV=0.069282 kVA=25 conn=wye
New Transformer.293588A46FE5EE34E0637F61810A7CE3_30_0 phases=1 windings=2 xhl=0.5 %R=0.353554 %imag=1e-06 %noloadloss=0
~ wdg=1 bus=15163866.3.0 kV=2.3094 kVA=25 conn=wye
~ wdg=2 bus=-99999915163866.3.0 kV=0.069282 kVA=25 conn=wye
New Transformer.293588A3FB17EE34E0637F61810A7CE3_31_0 phases=1 windings=2 xhl=0.5 %R=0.353554 %imag=1e-06 %noloadloss=0
~ wdg=1 bus=15163150.2.0 kV=2.3094 kVA=25 conn=wye
~ wdg=2 bus=-99999915163150.2.0 kV=0.069282 kVA=25 conn=wye
New Transformer.293588A47015EE34E0637F61810A7CE3_32_0 phases=1 windings=2 xhl=0.5 %R=0.353554 %imag=1e-06 %noloadloss=0
~ wdg=1 bus=15164059.2.0 kV=2.3094 kVA=100 conn=wye
~ wdg=2 bus=-99999915164059.2.0 kV=0.069282 kVA=100 conn=wye
New Transformer.293588A47021EE34E0637F61810A7CE3_33_0 phases=1 windings=2 xhl=0.5 %R=0.353554 %imag=1e-06 %noloadloss=0
~ wdg=1 bus=15164375.3.0 kV=2.3094 kVA=25 conn=wye
~ wdg=2 bus=-99999915164375.3.0 kV=0.069282 kVA=25 conn=wye
New Transformer.293588A47022EE34E0637F61810A7CE3_34_0 phases=1 windings=2 xhl=0.5 %R=0.353554 %imag=1e-06 %noloadloss=0
~ wdg=1 bus=15164404.1.0 kV=2.3094 kVA=25 conn=wye
~ wdg=2 bus=-99999915164404.1.0 kV=0.069282 kVA=25 conn=wye
New Transformer.293588A46FDBEE34E0637F61810A7CE3_35_0 phases=1 windings=2 xhl=0.5 %R=0.353554 %imag=1e-06 %noloadloss=0
~ wdg=1 bus=15163591.1.0 kV=2.3094 kVA=37.5 conn=wye
~ wdg=2 bus=-99999915163591.1.0 kV=0.069282 kVA=37.5 conn=wye
New Transformer.293588A470CAEE34E0637F61810A7CE3_36_0 phases=1 windings=2 xhl=0.5 %R=0.353554 %imag=1e-06 %noloadloss=0
~ wdg=1 bus=15164743.3.0 kV=2.3094 kVA=75 conn=wye
~ wdg=2 bus=-99999915164743.3.0 kV=0.069282 kVA=75 conn=wye
New Transformer.293588A46FDAEE34E0637F61810A7CE3_37_0 phases=1 windings=2 xhl=0.5 %R=0.353554 %imag=1e-06 %noloadloss=0
~ wdg=1 bus=15163553.1.0 kV=2.3094 kVA=50 conn=wye
~ wdg=2 bus=-99999915163553.1.0 kV=0.069282 kVA=50 conn=wye
New Transformer.293588A46FDCEE34E0637F61810A7CE3_38_0 phases=1 windings=2 xhl=0.5 %R=0.353554 %imag=1e-06 %noloadloss=0
~ wdg=1 bus=15163616.2.0 kV=2.3094 kVA=25 conn=wye
~ wdg=2 bus=-99999915163616.2.0 kV=0.069282 kVA=25 conn=wye
New Transformer.293588A470C2EE34E0637F61810A7CE3_39_0 phases=1 windings=2 xhl=0.5 %R=0.353554 %imag=1e-06 %noloadloss=0
~ wdg=1 bus=15164433.1.0 kV=2.3094 kVA=100 conn=wye
~ wdg=2 bus=-99999915164433.1.0 kV=0.069282 kVA=100 conn=wye
New Transformer.293588A470C3EE34E0637F61810A7CE3_40_0 phases=1 windings=2 xhl=0.5 %R=0.353554 %imag=1e-06 %noloadloss=0
~ wdg=1 bus=15164458.2.0 kV=2.3094 kVA=37.5 conn=wye
~ wdg=2 bus=-99999915164458.2.0 kV=0.069282 kVA=37.5 conn=wye
New Transformer.293588A47109EE34E0637F61810A7CE3_41_0 phases=1 windings=2 xhl=0.5 %R=0.353554 %imag=1e-06 %noloadloss=0
~ wdg=1 bus=15163096.3.0 kV=2.3094 kVA=37.5 conn=wye
~ wdg=2 bus=-99999915163096.3.0 kV=0.069282 kVA=37.5 conn=wye
New Transformer.293588A47108EE34E0637F61810A7CE3_42_0 phases=1 windings=2 xhl=0.5 %R=0.353554 %imag=1e-06 %noloadloss=0
~ wdg=1 bus=15163071.1.0 kV=2.3094 kVA=37.5 conn=wye
~ wdg=2 bus=-99999915163071.1.0 kV=0.069282 kVA=37.5 conn=wye
New Transformer.293588A47016EE34E0637F61810A7CE3_43_0 phases=1 windings=2 xhl=0.5 %R=0.353554 %imag=1e-06 %noloadloss=0
~ wdg=1 bus=15164088.2.0 kV=2.3094 kVA=25 conn=wye
~ wdg=2 bus=-99999915164088.2.0 kV=0.069282 kVA=25 conn=wye
New Transformer.293588A46FDEEE34E0637F61810A7CE3_44_0 phases=1 windings=2 xhl=0.5 %R=0.353554 %imag=1e-06 %noloadloss=0
~ wdg=1 bus=15163691.3.0 kV=2.3094 kVA=25 conn=wye
~ wdg=2 bus=-99999915163691.3.0 kV=0.069282 kVA=25 conn=wye
New Transformer.293588A4D319EE34E0637F61810A7CE3_45_0 phases=1 windings=2 xhl=0.5 %R=0.353554 %imag=1e-06 %noloadloss=0
~ wdg=1 bus=135554329.2.0 kV=2.3094 kVA=37.5 conn=wye
~ wdg=2 bus=-999999135554329.2.0 kV=0.069282 kVA=37.5 conn=wye
New Transformer.293588A704F7EE34E0637F61810A7CE3_46_0 phases=1 windings=2 xhl=0.5 %R=0.353554 %imag=1e-06 %noloadloss=0
~ wdg=1 bus=95153116.1.0 kV=2.3094 kVA=37.5 conn=wye
~ wdg=2 bus=-99999995153116.1.0 kV=0.069282 kVA=37.5 conn=wye
New Transformer.293588A4D27CEE34E0637F61810A7CE3_47_0 phases=1 windings=2 xhl=0.5 %R=0.353554 %imag=1e-06 %noloadloss=0
~ wdg=1 bus=136300949.3.0 kV=2.3094 kVA=37.5 conn=wye
~ wdg=2 bus=-999999136300949.3.0 kV=0.069282 kVA=37.5 conn=wye
New Transformer.293588B4C77CEE34E0637F61810A7CE3_48_0 phases=1 windings=2 xhl=0.5 %R=0.353554 %imag=1e-06 %noloadloss=0
~ wdg=1 bus=223279750.1.0 kV=2.3094 kVA=25 conn=wye
~ wdg=2 bus=-999999223279750.1.0 kV=0.069282 kVA=25 conn=wye
New Transformer.293588B4C77CEE34E0637F61810A7CE3_48_1 phases=1 windings=2 xhl=0.5 %R=0.353554 %imag=1e-06 %noloadloss=0
~ wdg=1 bus=223279750.2.0 kV=2.3094 kVA=25 conn=wye
~ wdg=2 bus=-999999223279750.2.0 kV=0.069282 kVA=25 conn=wye
New Transformer.293588A47020EE34E0637F61810A7CE3_49_0 phases=1 windings=2 xhl=0.5 %R=0.353554 %imag=1e-06 %noloadloss=0
~ wdg=1 bus=15164350.2.0 kV=2.3094 kVA=37.5 conn=wye
~ wdg=2 bus=-99999915164350.2.0 kV=0.069282 kVA=37.5 conn=wye
New Transformer.293588A47104EE34E0637F61810A7CE3_50_0 phases=1 windings=2 xhl=0.5 %R=0.353554 %imag=1e-06 %noloadloss=0
~ wdg=1 bus=15162900.1.0 kV=2.3094 kVA=25 conn=wye
~ wdg=2 bus=-99999915162900.1.2 kV=0.069282 kVA=25 conn=delta
New Transformer.293588A47104EE34E0637F61810A7CE3_50_1 phases=1 windings=2 xhl=0.5 %R=0.353554 %imag=1e-06 %noloadloss=0
~ wdg=1 bus=15162900.2.0 kV=2.3094 kVA=25 conn=wye
~ wdg=2 bus=-99999915162900.2.3 kV=0.069282 kVA=25 conn=delta
New Transformer.293588A47104EE34E0637F61810A7CE3_50_2 phases=1 windings=2 xhl=0.5 %R=0.353554 %imag=1e-06 %noloadloss=0
~ wdg=1 bus=15162900.3.0 kV=2.3094 kVA=25 conn=wye
~ wdg=2 bus=-99999915162900.3.1 kV=0.069282 kVA=25 conn=delta
New Transformer.293588A3FADEEE34E0637F61810A7CE3_51_0 phases=1 windings=2 xhl=0.5 %R=0.353554 %imag=1e-06 %noloadloss=0
~ wdg=1 bus=15164922.1.0 kV=2.3094 kVA=37.5 conn=wye
~ wdg=2 bus=-99999915164922.1.0 kV=0.069282 kVA=37.5 conn=wye
New Transformer.293588A8196AEE34E0637F61810A7CE3_52_0 phases=1 windings=2 xhl=0.5 %R=0.353554 %imag=1e-06 %noloadloss=0
~ wdg=1 bus=95042045.1.0 kV=2.3094 kVA=50 conn=wye
~ wdg=2 bus=-99999995042045.1.2 kV=0.069282 kVA=50 conn=delta
New Transformer.293588A8196AEE34E0637F61810A7CE3_52_1 phases=1 windings=2 xhl=0.5 %R=0.353554 %imag=1e-06 %noloadloss=0
~ wdg=1 bus=95042045.2.0 kV=2.3094 kVA=50 conn=wye
~ wdg=2 bus=-99999995042045.2.3 kV=0.069282 kVA=50 conn=delta
New Transformer.293588A8196AEE34E0637F61810A7CE3_52_2 phases=1 windings=2 xhl=0.5 %R=0.353554 %imag=1e-06 %noloadloss=0
~ wdg=1 bus=95042045.3.0 kV=2.3094 kVA=50 conn=wye
~ wdg=2 bus=-99999995042045.3.1 kV=0.069282 kVA=50 conn=delta
New Transformer.293588A86B38EE34E0637F61810A7CE3_53_0 phases=1 windings=2 xhl=0.5 %R=0.353554 %imag=1e-06 %noloadloss=0
~ wdg=1 bus=94228239.2.0 kV=2.3094 kVA=25 conn=wye
~ wdg=2 bus=-99999994228239.2.0 kV=0.069282 kVA=25 conn=wye
New Transformer.293588A470C6EE34E0637F61810A7CE3_54_0 phases=1 windings=2 xhl=0.5 %R=0.353554 %imag=1e-06 %noloadloss=0
~ wdg=1 bus=15164593.1.0 kV=2.3094 kVA=25 conn=wye
~ wdg=2 bus=-99999915164593.1.0 kV=0.069282 kVA=25 conn=wye
New Transformer.293588A470C5EE34E0637F61810A7CE3_55_0 phases=1 windings=2 xhl=0.5 %R=0.353554 %imag=1e-06 %noloadloss=0
~ wdg=1 bus=15164568.1.0 kV=2.3094 kVA=25 conn=wye
~ wdg=2 bus=-99999915164568.1.0 kV=0.069282 kVA=25 conn=wye
New Transformer.293588A46FDDEE34E0637F61810A7CE3_56_0 phases=1 windings=2 xhl=0.5 %R=0.353554 %imag=1e-06 %noloadloss=0
~ wdg=1 bus=15163641.3.0 kV=2.3094 kVA=50 conn=wye
~ wdg=2 bus=-99999915163641.3.0 kV=0.069282 kVA=50 conn=wye
New Transformer.293588A46FE3EE34E0637F61810A7CE3_57_0 phases=1 windings=2 xhl=0.5 %R=0.353554 %imag=1e-06 %noloadloss=0
~ wdg=1 bus=15163816.3.0 kV=2.3094 kVA=50 conn=wye
~ wdg=2 bus=-99999915163816.3.0 kV=0.069282 kVA=50 conn=wye
New Transformer.293588A46FE7EE34E0637F61810A7CE3_58_0 phases=1 windings=2 xhl=0.5 %R=0.353554 %imag=1e-06 %noloadloss=0
~ wdg=1 bus=15163920.2.0 kV=2.3094 kVA=15 conn=wye
~ wdg=2 bus=-99999915163920.2.0 kV=0.069282 kVA=15 conn=wye
New Transformer.293588A46FE8EE34E0637F61810A7CE3_59_0 phases=1 windings=2 xhl=0.5 %R=0.353554 %imag=1e-06 %noloadloss=0
~ wdg=1 bus=15163945.1.0 kV=2.3094 kVA=37.5 conn=wye
~ wdg=2 bus=-99999915163945.1.0 kV=0.069282 kVA=37.5 conn=wye
New Transformer.293588A46FDFEE34E0637F61810A7CE3_60_0 phases=1 windings=2 xhl=0.5 %R=0.353554 %imag=1e-06 %noloadloss=0
~ wdg=1 bus=15163716.3.0 kV=2.3094 kVA=25 conn=wye
~ wdg=2 bus=-99999915163716.3.0 kV=0.069282 kVA=25 conn=wye
New Transformer.293588A470CFEE34E0637F61810A7CE3_61_0 phases=1 windings=2 xhl=0.5 %R=0.353554 %imag=1e-06 %noloadloss=0
~ wdg=1 bus=15164872.2.0 kV=2.3094 kVA=25 conn=wye
~ wdg=2 bus=-99999915164872.2.0 kV=0.069282 kVA=25 conn=wye
New Transformer.293588A3FB1FEE34E0637F61810A7CE3_62_0 phases=1 windings=2 xhl=0.5 %R=0.353554 %imag=1e-06 %noloadloss=0
~ wdg=1 bus=15163366.2.0 kV=2.3094 kVA=100 conn=wye
~ wdg=2 bus=-99999915163366.2.0 kV=0.069282 kVA=100 conn=wye
New Transformer.293588A46FE2EE34E0637F61810A7CE3_63_0 phases=1 windings=2 xhl=0.5 %R=0.353554 %imag=1e-06 %noloadloss=0
~ wdg=1 bus=15163791.3.0 kV=2.3094 kVA=37.5 conn=wye
~ wdg=2 bus=-99999915163791.3.0 kV=0.069282 kVA=37.5 conn=wye
New Transformer.293588A4701FEE34E0637F61810A7CE3_64_0 phases=1 windings=2 xhl=0.5 %R=0.353554 %imag=1e-06 %noloadloss=0
~ wdg=1 bus=15164325.1.0 kV=2.3094 kVA=37.5 conn=wye
~ wdg=2 bus=-99999915164325.1.0 kV=0.069282 kVA=37.5 conn=wye
New Transformer.293588A4701DEE34E0637F61810A7CE3_65_0 phases=1 windings=2 xhl=0.5 %R=0.353554 %imag=1e-06 %noloadloss=0
~ wdg=1 bus=15164271.3.0 kV=2.3094 kVA=25 conn=wye
~ wdg=2 bus=-99999915164271.3.0 kV=0.069282 kVA=25 conn=wye
New Transformer.293588A3FADFEE34E0637F61810A7CE3_66_0 phases=1 windings=2 xhl=0.5 %R=0.353554 %imag=1e-06 %noloadloss=0
~ wdg=1 bus=15164947.1.0 kV=2.3094 kVA=15 conn=wye
~ wdg=2 bus=-99999915164947.1.0 kV=0.069282 kVA=15 conn=wye
New Transformer.293588A46FE0EE34E0637F61810A7CE3_67_0 phases=1 windings=2 xhl=0.5 %R=0.353554 %imag=1e-06 %noloadloss=0
~ wdg=1 bus=15163741.3.0 kV=2.3094 kVA=100 conn=wye
~ wdg=2 bus=-99999915163741.3.0 kV=0.069282 kVA=100 conn=wye
New Transformer.293588A47019EE34E0637F61810A7CE3_68_0 phases=1 windings=2 xhl=0.5 %R=0.353554 %imag=1e-06 %noloadloss=0
~ wdg=1 bus=15164167.3.0 kV=2.3094 kVA=25 conn=wye
~ wdg=2 bus=-99999915164167.3.0 kV=0.069282 kVA=25 conn=wye
New Transformer.293588A3FB19EE34E0637F61810A7CE3_69_0 phases=1 windings=2 xhl=0.5 %R=0.353554 %imag=1e-06 %noloadloss=0
~ wdg=1 bus=15163208.2.0 kV=2.3094 kVA=25 conn=wye
~ wdg=2 bus=-99999915163208.2.0 kV=0.069282 kVA=25 conn=wye
New Transformer.293588A470C7EE34E0637F61810A7CE3_70_0 phases=1 windings=2 xhl=0.5 %R=0.353554 %imag=1e-06 %noloadloss=0
~ wdg=1 bus=15164618.3.0 kV=2.3094 kVA=37.5 conn=wye
~ wdg=2 bus=-99999915164618.3.0 kV=0.069282 kVA=37.5 conn=wye
New Transformer.293588A46FE6EE34E0637F61810A7CE3_71_0 phases=1 windings=2 xhl=0.5 %R=0.353554 %imag=1e-06 %noloadloss=0
~ wdg=1 bus=15163895.1.0 kV=2.3094 kVA=50 conn=wye
~ wdg=2 bus=-99999915163895.1.0 kV=0.069282 kVA=50 conn=wye
New Transformer.293588A46FE4EE34E0637F61810A7CE3_72_0 phases=1 windings=2 xhl=0.5 %R=0.353554 %imag=1e-06 %noloadloss=0
~ wdg=1 bus=15163841.3.0 kV=2.3094 kVA=15 conn=wye
~ wdg=2 bus=-99999915163841.3.0 kV=0.069282 kVA=15 conn=wye
New Transformer.293588A46FE1EE34E0637F61810A7CE3_73_0 phases=1 windings=2 xhl=0.5 %R=0.353554 %imag=1e-06 %noloadloss=0
~ wdg=1 bus=15163766.3.0 kV=2.3094 kVA=50 conn=wye
~ wdg=2 bus=-99999915163766.3.0 kV=0.069282 kVA=50 conn=wye
New Transformer.293588A3FB1AEE34E0637F61810A7CE3_74_0 phases=1 windings=2 xhl=0.5 %R=0.353554 %imag=1e-06 %noloadloss=0
~ wdg=1 bus=15163233.2.0 kV=2.3094 kVA=25 conn=wye
~ wdg=2 bus=-99999915163233.2.0 kV=0.069282 kVA=25 conn=wye
New Transformer.293588A3FADDEE34E0637F61810A7CE3_75_0 phases=1 windings=2 xhl=0.5 %R=0.353554 %imag=1e-06 %noloadloss=0
~ wdg=1 bus=15164897.1.0 kV=2.3094 kVA=25 conn=wye
~ wdg=2 bus=-99999915164897.1.0 kV=0.069282 kVA=25 conn=wye
New Transformer.293588A4701CEE34E0637F61810A7CE3_76_0 phases=1 windings=2 xhl=0.5 %R=0.353554 %imag=1e-06 %noloadloss=0
~ wdg=1 bus=15164246.3.0 kV=2.3094 kVA=25 conn=wye
~ wdg=2 bus=-99999915164246.3.0 kV=0.069282 kVA=25 conn=wye
New Transformer.293588A4701BEE34E0637F61810A7CE3_77_0 phases=1 windings=2 xhl=0.5 %R=0.353554 %imag=1e-06 %noloadloss=0
~ wdg=1 bus=15164221.2.0 kV=2.3094 kVA=25 conn=wye
~ wdg=2 bus=-99999915164221.2.0 kV=0.069282 kVA=25 conn=wye
New Transformer.293588A3FB1CEE34E0637F61810A7CE3_78_0 phases=1 windings=2 xhl=0.5 %R=0.353554 %imag=1e-06 %noloadloss=0
~ wdg=1 bus=15163283.2.0 kV=2.3094 kVA=37.5 conn=wye
~ wdg=2 bus=-99999915163283.2.0 kV=0.069282 kVA=37.5 conn=wye
New Transformer.293588A3FB1BEE34E0637F61810A7CE3_79_0 phases=1 windings=2 xhl=0.5 %R=0.353554 %imag=1e-06 %noloadloss=0
~ wdg=1 bus=15163258.2.0 kV=2.3094 kVA=37.5 conn=wye
~ wdg=2 bus=-99999915163258.2.0 kV=0.069282 kVA=37.5 conn=wye
New Transformer.293588A470C8EE34E0637F61810A7CE3_80_0 phases=1 windings=2 xhl=0.5 %R=0.353554 %imag=1e-06 %noloadloss=0
~ wdg=1 bus=15164693.2.0 kV=2.3094 kVA=25 conn=wye
~ wdg=2 bus=-99999915164693.2.0 kV=0.069282 kVA=25 conn=wye
New Transformer.293588A3FB24EE34E0637F61810A7CE3_81_0 phases=1 windings=2 xhl=0.5 %R=0.353554 %imag=1e-06 %noloadloss=0
~ wdg=1 bus=15163528.2.0 kV=2.3094 kVA=25 conn=wye
~ wdg=2 bus=-99999915163528.2.0 kV=0.069282 kVA=25 conn=wye
New Transformer.293588A3FB23EE34E0637F61810A7CE3_82_0 phases=1 windings=2 xhl=0.5 %R=0.353554 %imag=1e-06 %noloadloss=0
~ wdg=1 bus=15163503.2.0 kV=2.3094 kVA=25 conn=wye
~ wdg=2 bus=-99999915163503.2.0 kV=0.069282 kVA=25 conn=wye
New Transformer.293588A8948DEE34E0637F61810A7CE3_83_0 phases=1 windings=2 xhl=0.5 %R=0.353554 %imag=1e-06 %noloadloss=0
~ wdg=1 bus=206449477.2.0 kV=2.3094 kVA=75 conn=wye
~ wdg=2 bus=-999999206449477.2.0 kV=0.069282 kVA=75 conn=wye
New Transformer.293588B4F182EE34E0637F61810A7CE3_84_0 phases=1 windings=2 xhl=0.5 %R=0.353554 %imag=1e-06 %noloadloss=0
~ wdg=1 bus=242003144.1.0 kV=2.3094 kVA=75 conn=wye
~ wdg=2 bus=-999999242003144.1.0 kV=0.069282 kVA=75 conn=wye

Set voltagebases=[4.0 0.24 0.12]
CalcVoltageBases
Solve
