! OpenDSS script generated from multiconductor network
Clear

New Circuit.mc_network basekv=12.0 pu=1.000000 angle=0.00 frequency=60.0 phases=3 Mvasc3=143993 Mvasc1=47997.6
~ bus1=-8888882130058.1.2.3

! Line codes
New LineCode.1000_CLP_3PH_12KV_3 nphases=3 units=km Rmatrix=[ 0.018599 | 0 0.018599 | 0 0 0.018599 ] Xmatrix=[ 0.028153 | 0 0.028153 | 0 0 0.028153 ] Cmatrix=[ 0 | 0 0 | 0 0 0 ]
New LineCode.1000_JCN_3PH_12KV_3 nphases=3 units=km Rmatrix=[ 0.014768 | 0 0.014768 | 0 0 0.014768 ] Xmatrix=[ 0.022354 | 0 0.022354 | 0 0 0.022354 ] Cmatrix=[ 0 | 0 0 | 0 0 0 ]
New LineCode.1/0_CLP_3PH_12KV_3 nphases=3 units=km Rmatrix=[ 0.038112 | 0 0.038112 | 0 0 0.038112 ] Xmatrix=[ 0.011649 | 0 0.011649 | 0 0 0.011649 ] Cmatrix=[ 0 | 0 0 | 0 0 0 ]
New LineCode.1/0_JCN_3PH_12KV_3 nphases=3 units=km Rmatrix=[ 0.010083 | 0 0.010083 | 0 0 0.010083 ] Xmatrix=[ 0.003082 | 0 0.003082 | 0 0 0.003082 ] Cmatrix=[ 0 | 0 0 | 0 0 0 ]
New LineCode.2_CLP_3PH_12KV_3 nphases=3 units=km Rmatrix=[ 0.055919 | 0 0.055919 | 0 0 0.055919 ] Xmatrix=[ 0.011787 | 0 0.011787 | 0 0 0.011787 ] Cmatrix=[ 0 | 0 0 | 0 0 0 ]
New LineCode.1/0_JCN_2PH_12KV_2 nphases=2 units=km Rmatrix=[ 0.00073 | 0 0.00073 ] Xmatrix=[ 0.000223 | 0 0.000223 ] Cmatrix=[ 0 | 0 0 ]
New LineCode.2_JCN_3PH_12KV_3 nphases=3 units=km Rmatrix=[ 0.00164 | 0 0.00164 | 0 0 0.00164 ] Xmatrix=[ 0.000346 | 0 0.000346 | 0 0 0.000346 ] Cmatrix=[ 0 | 0 0 | 0 0 0 ]
New LineCode.350_AL_3PH_12KV_3 nphases=3 units=km Rmatrix=[ 0.030703 | 0 0.030703 | 0 0 0.030703 ] Xmatrix=[ 0.023328 | 0 0.023328 | 0 0 0.023328 ] Cmatrix=[ 0 | 0 0 | 0 0 0 ]
New LineCode.336_ACSR_3PH_12KV_3 nphases=3 units=km Rmatrix=[ 0.002945 | 0 0.002945 | 0 0 0.002945 ] Xmatrix=[ 0.006594 | 0 0.006594 | 0 0 0.006594 ] Cmatrix=[ 0 | 0 0 | 0 0 0 ]
New LineCode.2_ACSR_3PH_12KV_3 nphases=3 units=km Rmatrix=[ 0.003648 | 0 0.003648 | 0 0 0.003648 ] Xmatrix=[ 0.001961 | 0 0.001961 | 0 0 0.001961 ] Cmatrix=[ 0 | 0 0 | 0 0 0 ]

! Lines
New Line.RCS3276-3$J658-3P phases=3 Bus1=28293027.1.2.3 Bus2=52507441.1.2.3 LineCode=1000_CLP_3PH_12KV_3 Length=0.063833 units=km
New Line.GS2489-3$GS0935-1 phases=3 Bus1=210698581.1.2.3 Bus2=186585294.1.2.3 LineCode=1000_JCN_3PH_12KV_3 Length=0.510798 units=km
New Line.GS2489-4$ND223470251 phases=3 Bus1=186585303.1.2.3 Bus2=223470251.1.2.3 LineCode=1000_JCN_3PH_12KV_3 Length=0.019857 units=km
New Line.ND223470251$GS3993-4 phases=3 Bus1=223470251.1.2.3 Bus2=192913620.1.2.3 LineCode=1000_JCN_3PH_12KV_3 Length=0.605284 units=km
New Line.GS2359-2$GS2489-1 phases=3 Bus1=186585276.1.2.3 Bus2=223470064.1.2.3 LineCode=1000_JCN_3PH_12KV_3 Length=0.069107 units=km
New Line.ND223470251$28290696 phases=3 Bus1=223470251.1.2.3 Bus2=28290698.1.2.3 LineCode=1/0_CLP_3PH_12KV_3 Length=0.041966 units=km
New Line.28290696$P5187828-1 phases=3 Bus1=28290699.1.2.3 Bus2=158440467.1.2.3 LineCode=1/0_CLP_3PH_12KV_3 Length=0.001458 units=km
New Line.GS3993-3$ND202600836 phases=3 Bus1=192913611.1.2.3 Bus2=202600836.1.2.3 LineCode=1000_JCN_3PH_12KV_3 Length=0.015274 units=km
New Line.GS2359-3$ND223470403 phases=3 Bus1=223470073.1.2.3 Bus2=223470403.1.2.3 LineCode=1/0_JCN_3PH_12KV_3 Length=0.022911 units=km
New Line.GS2359-1$ND28321417 phases=3 Bus1=223470055.1.2.3 Bus2=28321417.1.2.3 LineCode=2_CLP_3PH_12KV_3 Length=0.176571 units=km
New Line.ND202600836$PME3954-2 phases=3 Bus1=202600836.1.2.3 Bus2=144720714.1.2.3 LineCode=1000_JCN_3PH_12KV_3 Length=0.12537 units=km
New Line.GS3993-2$GS6298-2 phases=3 Bus1=192913602.1.2.3 Bus2=179712814.1.2.3 LineCode=1000_JCN_3PH_12KV_3 Length=0.174541 units=km
New Line.GS7033-1$GS2359-4 phases=3 Bus1=223470082.1.2.3 Bus2=223470555.1.2.3 LineCode=1000_JCN_3PH_12KV_3 Length=0.253514 units=km
New Line.BS1685-T$ND223470403 phases=3 Bus1=223470403.1.2.3 Bus2=28289471.1.2.3 LineCode=1/0_JCN_3PH_12KV_3 Length=0.131842 units=km
New Line.BS1690-T$ND28321417 phases=3 Bus1=28321417.1.2.3 Bus2=28292198.1.2.3 LineCode=1/0_CLP_3PH_12KV_3 Length=0.016072 units=km
New Line.V5082031$ND223470403 phases=2 Bus1=223470403.1.3 Bus2=28320624.1.3 LineCode=1/0_JCN_2PH_12KV_2 Length=0.001039 units=km
New Line.ND28321417$ND28321304 phases=3 Bus1=28321417.1.2.3 Bus2=28321304.1.2.3 LineCode=2_CLP_3PH_12KV_3 Length=0.100286 units=km
New Line.V5081654$ND202600836 phases=3 Bus1=202600836.1.2.3 Bus2=40580316.1.2.3 LineCode=2_CLP_3PH_12KV_3 Length=0.000556 units=km
New Line.GS3993-1$ND181855674 phases=3 Bus1=192913593.1.2.3 Bus2=181855674.1.2.3 LineCode=1000_JCN_3PH_12KV_3 Length=0.258565 units=km
New Line.ND28321304$BS1691-T phases=3 Bus1=28321304.1.2.3 Bus2=28289125.1.2.3 LineCode=2_CLP_3PH_12KV_3 Length=0.024337 units=km
New Line.ND28321304$ND28321305 phases=3 Bus1=28321304.1.2.3 Bus2=28321305.1.2.3 LineCode=2_CLP_3PH_12KV_3 Length=0.093761 units=km
New Line.J658A-1P$GS0935-2 phases=3 Bus1=28293019.1.2.3 Bus2=210698590.1.2.3 LineCode=1000_JCN_3PH_12KV_3 Length=0.256431 units=km
New Line.ND181855674$V5640585 phases=2 Bus1=181855674.2.3 Bus2=181855657.2.3 LineCode=1/0_JCN_2PH_12KV_2 Length=0.000311 units=km
New Line.BS1692-T$ND28321305 phases=3 Bus1=28321305.1.2.3 Bus2=28289232.1.2.3 LineCode=2_CLP_3PH_12KV_3 Length=0.024808 units=km
New Line.BS1693-R$ND28321305 phases=3 Bus1=28321305.1.2.3 Bus2=28289322.1.2.3 LineCode=2_CLP_3PH_12KV_3 Length=0.049108 units=km
New Line.RCS6299-4$ND181855674 phases=3 Bus1=181855674.1.2.3 Bus2=28319502.1.2.3 LineCode=1000_JCN_3PH_12KV_3 Length=0.013521 units=km
New Line.PME3954-3$144721329 phases=3 Bus1=144720696.1.2.3 Bus2=144721332.1.2.3 LineCode=1/0_CLP_3PH_12KV_3 Length=0.004838 units=km
New Line.BS1690-R$148224200 phases=3 Bus1=28292190.1.2.3 Bus2=148224202.1.2.3 LineCode=2_JCN_3PH_12KV_3 Length=0.050824 units=km
New Line.P5083180-1$BS1690-L phases=3 Bus1=28292207.1.2.3 Bus2=149046516.1.2.3 LineCode=1/0_CLP_3PH_12KV_3 Length=0.027475 units=km
New Line.P5082029-A$BS1685-R phases=3 Bus1=28289454.1.2.3 Bus2=161222654.1.2.3 LineCode=1/0_CLP_3PH_12KV_3 Length=0.065005 units=km
New Line.96226752$BS1685-L phases=3 Bus1=28289463.1.2.3 Bus2=96226754.1.2.3 LineCode=2_CLP_3PH_12KV_3 Length=0.025571 units=km
New Line.BS1691-R$P5081771-1 phases=3 Bus1=28289108.1.2.3 Bus2=158440697.1.2.3 LineCode=2_CLP_3PH_12KV_3 Length=0.079028 units=km
New Line.PME3955-1$PME3954-1 phases=3 Bus1=144720723.1.2.3 Bus2=166441051.1.2.3 LineCode=1000_CLP_3PH_12KV_3 Length=0.45096 units=km
New Line.GS7033-2$BS1681-T phases=3 Bus1=223470564.1.2.3 Bus2=28289810.1.2.3 LineCode=1/0_JCN_3PH_12KV_3 Length=0.16278 units=km
New Line.BS1691-L$28289894 phases=3 Bus1=28289117.1.2.3 Bus2=28289896.1.2.3 LineCode=2_CLP_3PH_12KV_3 Length=0.086745 units=km
New Line.PME3954-4$V5081651 phases=3 Bus1=144720705.1.2.3 Bus2=40580191.1.2.3 LineCode=1000_CLP_3PH_12KV_3 Length=0.343199 units=km
New Line.P5593873-1$148224200 phases=3 Bus1=148224203.1.2.3 Bus2=148224149.1.2.3 LineCode=2_JCN_3PH_12KV_3 Length=0.001462 units=km
New Line.BS1692-R$P5124846-1 phases=3 Bus1=28289215.1.2.3 Bus2=158440902.1.2.3 LineCode=2_CLP_3PH_12KV_3 Length=0.053329 units=km
New Line.BS1692-L$P5122182-1 phases=3 Bus1=28289224.1.2.3 Bus2=158440952.1.2.3 LineCode=2_CLP_3PH_12KV_3 Length=0.149556 units=km
New Line.144721329$ND179712950 phases=3 Bus1=144721331.1.2.3 Bus2=179712950.1.2.3 LineCode=1/0_CLP_3PH_12KV_3 Length=0.006629 units=km
New Line.190273150$BS1693-T phases=3 Bus1=28289339.1.2.3 Bus2=190273152.1.2.3 LineCode=2_CLP_3PH_12KV_3 Length=0.087019 units=km
New Line.GS7033-3$ND223470777 phases=3 Bus1=223470573.1.2.3 Bus2=223470777.1.2.3 LineCode=1/0_JCN_3PH_12KV_3 Length=0.078307 units=km
New Line.V5081651$GS2467-1 phases=3 Bus1=40580191.1.2.3 Bus2=307162765.1.2.3 LineCode=1000_CLP_3PH_12KV_3 Length=0.218261 units=km
New Line.96226752$P5124984-1 phases=3 Bus1=96226755.1.2.3 Bus2=96226696.1.2.3 LineCode=2_CLP_3PH_12KV_3 Length=0.000892 units=km
New Line.P5353486-A$ND179712950 phases=3 Bus1=179712950.1.2.3 Bus2=144099069.1.2.3 LineCode=1/0_CLP_3PH_12KV_3 Length=0.010331 units=km
New Line.ND179712950$144721248 phases=3 Bus1=179712950.1.2.3 Bus2=144721250.1.2.3 LineCode=2_CLP_3PH_12KV_3 Length=0.082731 units=km
New Line.28289894$ND158440879 phases=3 Bus1=28289897.1.2.3 Bus2=158440879.1.2.3 LineCode=2_CLP_3PH_12KV_3 Length=0.001393 units=km
New Line.GS7033-4$GS7032-1 phases=3 Bus1=223470582.1.2.3 Bus2=223470849.1.2.3 LineCode=1000_JCN_3PH_12KV_3 Length=0.243108 units=km
New Line.ND223470777$28320758 phases=3 Bus1=223470777.1.2.3 Bus2=28320760.1.2.3 LineCode=1/0_CLP_3PH_12KV_3 Length=0.061361 units=km
New Line.28320768$ND223470777 phases=3 Bus1=223470777.1.2.3 Bus2=28320770.1.2.3 LineCode=1/0_CLP_3PH_12KV_3 Length=0.07455 units=km
New Line.P5082428-1$190273150 phases=3 Bus1=190273153.1.2.3 Bus2=135545755.1.2.3 LineCode=2_CLP_3PH_12KV_3 Length=0.049994 units=km
New Line.BS1681-L$P5082022-A phases=3 Bus1=28289793.1.2.3 Bus2=151999465.1.2.3 LineCode=1/0_CLP_3PH_12KV_3 Length=0.06115 units=km
New Line.BS1681-R$P5082377-1 phases=3 Bus1=28289802.1.2.3 Bus2=158440209.1.2.3 LineCode=1/0_CLP_3PH_12KV_3 Length=0.017572 units=km
New Line.ND158440879$P5082612-1 phases=3 Bus1=158440879.1.2.3 Bus2=158440811.1.2.3 LineCode=2_CLP_3PH_12KV_3 Length=0.002744 units=km
New Line.28320115$ND158440879 phases=3 Bus1=158440879.1.2.3 Bus2=28320117.1.2.3 LineCode=1/0_CLP_3PH_12KV_3 Length=0.030587 units=km
New Line.0113493$PME3955-4 phases=3 Bus1=166441033.1.2.3 Bus2=28320726.1.2.3 LineCode=1/0_CLP_3PH_12KV_3 Length=0.031129 units=km
New Line.144721248$P5385469-A phases=3 Bus1=144721251.1.2.3 Bus2=149724766.1.2.3 LineCode=2_CLP_3PH_12KV_3 Length=0.003172 units=km
New Line.28320768$P5082613-A phases=3 Bus1=28320771.1.2.3 Bus2=151999590.1.2.3 LineCode=1/0_CLP_3PH_12KV_3 Length=0.001246 units=km
New Line.28320758$P5082025-A phases=3 Bus1=28320761.1.2.3 Bus2=161222545.1.2.3 LineCode=1/0_CLP_3PH_12KV_3 Length=0.00082 units=km
New Line.166440954$PME3955-3 phases=3 Bus1=166441024.1.2.3 Bus2=166440957.1.2.3 LineCode=1/0_CLP_3PH_12KV_3 Length=0.001202 units=km
New Line.PME3955-2$ND28321385 phases=3 Bus1=166441042.1.2.3 Bus2=28321385.1.2.3 LineCode=1000_CLP_3PH_12KV_3 Length=0.077415 units=km
New Line.ND28321385$P5305790-1 phases=3 Bus1=28321385.1.2.3 Bus2=151999727.1.2.3 LineCode=1/0_CLP_3PH_12KV_3 Length=0.110882 units=km
New Line.28320115$P5491637-1 phases=3 Bus1=28320118.1.2.3 Bus2=158440756.1.2.3 LineCode=1/0_CLP_3PH_12KV_3 Length=0.002033 units=km
New Line.164538021$P5353486-B phases=3 Bus1=144099052.1.2.3 Bus2=164538023.1.2.3 LineCode=1/0_CLP_3PH_12KV_3 Length=0.214278 units=km
New Line.PME3649-2$ND28321385 phases=3 Bus1=28321385.1.2.3 Bus2=28291489.1.2.3 LineCode=1000_CLP_3PH_12KV_3 Length=0.202474 units=km
New Line.ND40580468$GS2467-2 phases=3 Bus1=307162774.1.2.3 Bus2=40580468.1.2.3 LineCode=1/0_CLP_3PH_12KV_3 Length=0.039551 units=km
New Line.166440954$166440981 phases=3 Bus1=166440956.1.2.3 Bus2=166440983.1.2.3 LineCode=1/0_CLP_3PH_12KV_3 Length=0.065804 units=km
New Line.GS7032-2$ND223471142 phases=3 Bus1=223470858.1.2.3 Bus2=223471142.1.2.3 LineCode=1/0_JCN_3PH_12KV_3 Length=0.084306 units=km
New Line.P5082022-B$P5372205-1 phases=3 Bus1=151999483.1.2.3 Bus2=28289745.1.2.3 LineCode=1/0_CLP_3PH_12KV_3 Length=0.007396 units=km
New Line.1834540E$GS2467-3 phases=3 Bus1=307162783.1.2.3 Bus2=40578468.1.2.3 LineCode=350_AL_3PH_12KV_3 Length=0.04751 units=km
New Line.ND40580468$40580231 phases=3 Bus1=40580468.1.2.3 Bus2=40580233.1.2.3 LineCode=1/0_CLP_3PH_12KV_3 Length=0.076604 units=km
New Line.40580241$ND40580468 phases=3 Bus1=40580468.1.2.3 Bus2=40580243.1.2.3 LineCode=1/0_CLP_3PH_12KV_3 Length=0.053081 units=km
New Line.144721279$P5385469-B phases=3 Bus1=149724749.1.2.3 Bus2=144721282.1.2.3 LineCode=2_CLP_3PH_12KV_3 Length=0.004102 units=km
New Line.P5204467-1$P5082613-B phases=3 Bus1=151999573.1.2.3 Bus2=151999677.1.2.3 LineCode=1/0_CLP_3PH_12KV_3 Length=0.004962 units=km
New Line.P5353487-A$164538021 phases=3 Bus1=164538024.1.2.3 Bus2=164537876.1.2.3 LineCode=1/0_CLP_3PH_12KV_3 Length=0.001879 units=km
New Line.P5082025-B$182993391 phases=3 Bus1=161222563.1.2.3 Bus2=182993394.1.2.3 LineCode=1/0_CLP_3PH_12KV_3 Length=0.007357 units=km
New Line.GS0695-2$ND223471142 phases=3 Bus1=223471142.1.2.3 Bus2=192823310.1.2.3 LineCode=1/0_JCN_3PH_12KV_3 Length=0.141194 units=km
New Line.219381776$ND223471142 phases=3 Bus1=223471142.1.2.3 Bus2=219381778.1.2.3 LineCode=2_CLP_3PH_12KV_3 Length=0.017508 units=km
New Line.ND221352031$GS2467-4 phases=3 Bus1=307162792.1.2.3 Bus2=221352031.1.2.3 LineCode=1000_CLP_3PH_12KV_3 Length=0.263658 units=km
New Line.GS7032-3$ND223470971 phases=3 Bus1=223470867.1.2.3 Bus2=223470971.1.2.3 LineCode=1/0_JCN_3PH_12KV_3 Length=0.135557 units=km
New Line.P5082750-1$40580241 phases=3 Bus1=40580244.1.2.3 Bus2=156636824.1.2.3 LineCode=1/0_CLP_3PH_12KV_3 Length=0.0026 units=km
New Line.40580231$P5143640-A phases=3 Bus1=40580234.1.2.3 Bus2=156637021.1.2.3 LineCode=1/0_CLP_3PH_12KV_3 Length=0.002113 units=km
New Line.166440981$ND158441050 phases=3 Bus1=166440984.1.2.3 Bus2=158441032.1.2.3 LineCode=1/0_CLP_3PH_12KV_3 Length=0.005047 units=km
New Line.GS7032-4$ND232689226 phases=3 Bus1=223470876.1.2.3 Bus2=232689226.1.2.3 LineCode=1000_JCN_3PH_12KV_3 Length=0.294839 units=km
New Line.ND221352031$GS4443-1 phases=3 Bus1=221352031.1.2.3 Bus2=54589937.1.2.3 LineCode=1000_CLP_3PH_12KV_3 Length=0.151874 units=km
New Line.63624155$ND223470971 phases=3 Bus1=223470971.1.2.3 Bus2=63624157.1.2.3 LineCode=1/0_CLP_3PH_12KV_3 Length=0.005736 units=km
New Line.63641495$ND223470971 phases=3 Bus1=223470971.1.2.3 Bus2=63641497.1.2.3 LineCode=2_CLP_3PH_12KV_3 Length=0.015466 units=km
New Line.144721304$144721279 phases=3 Bus1=144721281.1.2.3 Bus2=144721306.1.2.3 LineCode=2_CLP_3PH_12KV_3 Length=0.087359 units=km
New Line.182993391$P5086040-1 phases=3 Bus1=182993393.1.2.3 Bus2=158440577.1.2.3 LineCode=1/0_CLP_3PH_12KV_3 Length=0.014883 units=km
New Line.PME3649-4$P5305791-1 phases=3 Bus1=28291480.1.2.3 Bus2=158441068.1.2.3 LineCode=1/0_CLP_3PH_12KV_3 Length=0.085668 units=km
New Line.ND232689226$RCS2358-4 phases=3 Bus1=232689226.1.2.3 Bus2=181800725.1.2.3 LineCode=1000_JCN_3PH_12KV_3 Length=0.018308 units=km
New Line.PME3649-1$ND184209175 phases=3 Bus1=28291498.1.2.3 Bus2=184209175.1.2.3 LineCode=1000_CLP_3PH_12KV_3 Length=0.184197 units=km
New Line.P5082620-A$219381776 phases=3 Bus1=219381779.1.2.3 Bus2=219381682.1.2.3 LineCode=2_CLP_3PH_12KV_3 Length=0.004791 units=km
New Line.V5082016PT$ND232689226 phases=3 Bus1=232689226.1.2.3 Bus2=223663679.1.2.3 LineCode=1000_JCN_3PH_12KV_3 Length=0.000603 units=km
New Line.63641495$P5082621-1 phases=3 Bus1=63641498.1.2.3 Bus2=158441501.1.2.3 LineCode=2_CLP_3PH_12KV_3 Length=0.001787 units=km
New Line.164538048$P5353487-B phases=3 Bus1=164537894.1.2.3 Bus2=164538051.1.2.3 LineCode=1/0_JCN_3PH_12KV_3 Length=0.001797 units=km
New Line.ND184209175$ND184209190 phases=3 Bus1=184209175.1.2.3 Bus2=184209190.1.2.3 LineCode=1000_JCN_3PH_12KV_3 Length=0.007605 units=km
New Line.63624155$ND194713328 phases=3 Bus1=63624158.1.2.3 Bus2=194713328.1.2.3 LineCode=1/0_CLP_3PH_12KV_3 Length=0.000967 units=km
New Line.ND184209175$PME2177-2 phases=3 Bus1=184209175.1.2.3 Bus2=60509148.1.2.3 LineCode=1000_CLP_3PH_12KV_3 Length=0.11449 units=km
New Line.P5143640-B$P5143641-A phases=3 Bus1=156637004.1.2.3 Bus2=156636932.1.2.3 LineCode=1/0_CLP_3PH_12KV_3 Length=0.08341 units=km
New Line.ND194713328$P5082505-1 phases=3 Bus1=194713328.1.2.3 Bus2=158441556.1.2.3 LineCode=1/0_CLP_3PH_12KV_3 Length=0.004646 units=km
New Line.GS6300-2$ND184209190 phases=3 Bus1=184209190.1.2.3 Bus2=179713190.1.2.3 LineCode=1000_JCN_3PH_12KV_3 Length=0.21719 units=km
New Line.0225299$GS0695-1 phases=3 Bus1=192823318.1.2.3 Bus2=237649551.1.2.3 LineCode=1/0_JCN_3PH_12KV_3 Length=0.067027 units=km
New Line.PME2844-1$ND184209190 phases=3 Bus1=184209190.1.2.3 Bus2=28290817.1.2.3 LineCode=1000_CLP_3PH_12KV_3 Length=0.062444 units=km
New Line.63641413$ND194713328 phases=3 Bus1=194713328.1.2.3 Bus2=63641415.1.2.3 LineCode=1/0_CLP_3PH_12KV_3 Length=0.015603 units=km
New Line.P5530877-1$144721304 phases=3 Bus1=144721307.1.2.3 Bus2=95372503.1.2.3 LineCode=2_CLP_3PH_12KV_3 Length=0.008977 units=km
New Line.164538048$164538073 phases=3 Bus1=164538050.1.2.3 Bus2=164538075.1.2.3 LineCode=1/0_JCN_3PH_12KV_3 Length=0.065051 units=km
New Line.219381788$P5082620-B phases=3 Bus1=219381700.1.2.3 Bus2=219381791.1.2.3 LineCode=2_CLP_3PH_12KV_3 Length=0.003915 units=km
New Line.1838538E$BS4036-T phases=3 Bus1=40578511.1.2.3 Bus2=40578535.1.2.3 LineCode=2_CLP_3PH_12KV_3 Length=0.028113 units=km
New Line.63623991$GS0695-4 phases=3 Bus1=192823334.1.2.3 Bus2=63623993.1.2.3 LineCode=1/0_JCN_3PH_12KV_3 Length=0.070265 units=km
New Line.63641413$P5082020-1 phases=3 Bus1=63641416.1.2.3 Bus2=158441614.1.2.3 LineCode=1/0_CLP_3PH_12KV_3 Length=0.0061 units=km
New Line.1838536E$BS1250-T phases=3 Bus1=40578498.1.2.3 Bus2=40578699.1.2.3 LineCode=350_AL_3PH_12KV_3 Length=0.052648 units=km
New Line.P5143642-1$P5143641-B phases=3 Bus1=156636915.1.2.3 Bus2=156636874.1.2.3 LineCode=1/0_CLP_3PH_12KV_3 Length=0.121451 units=km
New Line.63623991$P5082018-1 phases=3 Bus1=63623994.1.2.3 Bus2=158441761.1.2.3 LineCode=1/0_JCN_3PH_12KV_3 Length=0.001707 units=km
New Line.P5632737-1$164538073 phases=3 Bus1=164538076.1.2.3 Bus2=164537966.1.2.3 LineCode=1/0_JCN_3PH_12KV_3 Length=0.001662 units=km
New Line.63624073$219381788 phases=3 Bus1=219381790.1.2.3 Bus2=63624075.1.2.3 LineCode=2_CLP_3PH_12KV_3 Length=0.021129 units=km
New Line.BS4036-L$PMH4582-1 phases=3 Bus1=40578544.1.2.3 Bus2=169141502.1.2.3 LineCode=2_CLP_3PH_12KV_3 Length=0.006588 units=km
New Line.BS4036-R$40580251 phases=3 Bus1=40578527.1.2.3 Bus2=40580253.1.2.3 LineCode=2_CLP_3PH_12KV_3 Length=0.073926 units=km
New Line.63624073$P5142276-1 phases=3 Bus1=63624076.1.2.3 Bus2=158441679.1.2.3 LineCode=2_CLP_3PH_12KV_3 Length=0.001265 units=km
New Line.BS1250-L$BS1882-T phases=3 Bus1=40578682.1.2.3 Bus2=40578806.1.2.3 LineCode=2_CLP_3PH_12KV_3 Length=0.035789 units=km
New Line.BS1250-R$FSE3984-1 phases=3 Bus1=40578691.1.2.3 Bus2=40579350.1.2.3 LineCode=350_AL_3PH_12KV_3 Length=0.135679 units=km
New Line.40580251$P5142765-1 phases=3 Bus1=40580254.1.2.3 Bus2=40578634.1.2.3 LineCode=2_CLP_3PH_12KV_3 Length=0.004254 units=km
New Line.ND156637137$FSE3984-1 phases=3 Bus1=40579351.1.2.3 Bus2=156637119.1.2.3 LineCode=350_AL_3PH_12KV_3 Length=0.007826 units=km
New Line.169141576$PMH4582-2 phases=3 Bus1=169141493.1.2.3 Bus2=169141579.1.2.3 LineCode=2_CLP_3PH_12KV_3 Length=0.002518 units=km
New Line.243437379$BS1882-L phases=3 Bus1=40578789.1.2.3 Bus2=243437381.1.2.3 LineCode=1/0_JCN_3PH_12KV_3 Length=0.166032 units=km
New Line.BS1882-R$PME5270-1 phases=3 Bus1=40578798.1.2.3 Bus2=40579925.1.2.3 LineCode=2_CLP_3PH_12KV_3 Length=0.014999 units=km
New Line.ND243437361$243437379 phases=3 Bus1=243437382.1.2.3 Bus2=243437361.1.2.3 LineCode=1/0_JCN_3PH_12KV_3 Length=0.006563 units=km
New Line.ND40579686$169141576 phases=3 Bus1=169141578.1.2.3 Bus2=40579664.1.2.3 LineCode=2_CLP_3PH_12KV_3 Length=0.012237 units=km
New Line.PME5270-1$40580416 phases=3 Bus1=40579926.1.2.3 Bus2=40580419.1.2.3 LineCode=2_CLP_3PH_12KV_3 Length=0.001613 units=km
New Line.ND243437361$243437406 phases=3 Bus1=243437361.1.2.3 Bus2=243437409.1.2.3 LineCode=1/0_JCN_3PH_12KV_3 Length=0.003836 units=km
New Line.243437456$ND243437361 phases=3 Bus1=243437361.1.2.3 Bus2=243437459.1.2.3 LineCode=1/0_CLP_3PH_12KV_3 Length=0.008044 units=km
New Line.40580416$40580426 phases=3 Bus1=40580418.1.2.3 Bus2=40580428.1.2.3 LineCode=2_CLP_3PH_12KV_3 Length=0.005548 units=km
New Line.P5082987-1$243437456 phases=3 Bus1=243437458.1.2.3 Bus2=156637155.1.2.3 LineCode=1/0_CLP_3PH_12KV_3 Length=0.09323 units=km
New Line.243437406$243437431 phases=3 Bus1=243437408.1.2.3 Bus2=243437433.1.2.3 LineCode=1/0_JCN_3PH_12KV_3 Length=0.011073 units=km
New Line.40580426$ND40579917 phases=3 Bus1=40580429.1.2.3 Bus2=40579895.1.2.3 LineCode=2_CLP_3PH_12KV_3 Length=0.005868 units=km
New Line.243437431$P5702152-1 phases=3 Bus1=243437434.1.2.3 Bus2=243437317.1.2.3 LineCode=1/0_JCN_3PH_12KV_3 Length=0.001204 units=km
New Line.1834540E$ND40580407 phases=3 Bus1=40578467.1.2.3 Bus2=40580407.1.2.3 LineCode=336_ACSR_3PH_12KV_3 Length=0.058909 units=km
New Line.ND40580407$ND40580541 phases=3 Bus1=40580407.1.2.3 Bus2=40580541.1.2.3 LineCode=336_ACSR_3PH_12KV_3 Length=0.04431 units=km
New Line.ND40580541$1838538E phases=3 Bus1=40580541.1.2.3 Bus2=40578510.1.2.3 LineCode=2_ACSR_3PH_12KV_3 Length=0.003666 units=km
New Line.ND40580541$1838537E phases=3 Bus1=40580541.1.2.3 Bus2=40579886.1.2.3 LineCode=336_ACSR_3PH_12KV_3 Length=0.060237 units=km
New Line.1838537E$1838536E phases=3 Bus1=40579886.1.2.3 Bus2=40578497.1.2.3 LineCode=336_ACSR_3PH_12KV_3 Length=0.01579 units=km
New Line.J658A-2P$00698 phases=3 Bus1=-8888882130058.1.2.3 Bus2=28293035.1.2.3 LineCode=1000_CLP_3PH_12KV_3 Length=0.620462 units=km

! Switches
New Line.5081654:GS3993-4 phases=3 Bus1=192913620.1.2.3 Bus2=192913585.1.2.3 switch=y r1=0.001 x1=0.001 r0=0.001 x0=0.001 Length=0.001 units=km
New Line.5082031:GS2359-2 phases=3 Bus1=223470064.1.2.3 Bus2=223470035.1.2.3 switch=y r1=0.001 x1=0.001 r0=0.001 x0=0.001 Length=0.001 units=km
New Line.5187828:P5187828-1 phases=3 Bus1=158440467.1.2.3 Bus2=158440468.1.2.3 switch=y r1=0.001 x1=0.001 r0=0.001 x0=0.001 Length=0.001 units=km
New Line.5081654:GS3993-3 phases=3 Bus1=192913579.1.2.3 Bus2=192913611.1.2.3 switch=y r1=0.001 x1=0.001 r0=0.001 x0=0.001 Length=0.001 units=km
New Line.5082031:GS2359-1 phases=3 Bus1=223470034.1.2.3 Bus2=223470055.1.2.3 switch=y r1=0.001 x1=0.001 r0=0.001 x0=0.001 Length=0.001 units=km
New Line.5082031:GS2359-3 phases=3 Bus1=223470041.1.2.3 Bus2=223470073.1.2.3 switch=y r1=0.001 x1=0.001 r0=0.001 x0=0.001 Length=0.001 units=km
New Line.5081654:GS3993-2 phases=3 Bus1=192913573.1.2.3 Bus2=192913602.1.2.3 switch=y r1=0.001 x1=0.001 r0=0.001 x0=0.001 Length=0.001 units=km
New Line.5082031:GS2359-4 phases=3 Bus1=223470047.1.2.3 Bus2=223470082.1.2.3 switch=y r1=0.001 x1=0.001 r0=0.001 x0=0.001 Length=0.001 units=km
New Line.5081654:GS3993-1 phases=3 Bus1=192913572.1.2.3 Bus2=192913593.1.2.3 switch=y r1=0.001 x1=0.001 r0=0.001 x0=0.001 Length=0.001 units=km
New Line.5082029:P5082029-A phases=3 Bus1=161222654.1.2.3 Bus2=161222655.1.2.3 switch=y r1=0.001 x1=0.001 r0=0.001 x0=0.001 Length=0.001 units=km
New Line.5081771:P5081771-1 phases=3 Bus1=158440697.1.2.3 Bus2=158440698.1.2.3 switch=y r1=0.001 x1=0.001 r0=0.001 x0=0.001 Length=0.001 units=km
New Line.5082029:P5082029-T phases=3 Bus1=161222655.1.2.3 Bus2=161222663.1.2.3 switch=y r1=0.001 x1=0.001 r0=0.001 x0=0.001 Length=0.001 units=km
New Line.5593873:P5593873-1 phases=3 Bus1=148224149.1.2.3 Bus2=148224150.1.2.3 switch=y r1=0.001 x1=0.001 r0=0.001 x0=0.001 Length=0.001 units=km
New Line.5124846:P5124846-1 phases=3 Bus1=158440902.1.2.3 Bus2=158440903.1.2.3 switch=y r1=0.001 x1=0.001 r0=0.001 x0=0.001 Length=0.001 units=km
New Line.5122182:P5122182-1 phases=3 Bus1=158440952.1.2.3 Bus2=158440953.1.2.3 switch=y r1=0.001 x1=0.001 r0=0.001 x0=0.001 Length=0.001 units=km
New Line.5124984:P5124984-1 phases=3 Bus1=96226696.1.2.3 Bus2=96226697.1.2.3 switch=y r1=0.001 x1=0.001 r0=0.001 x0=0.001 Length=0.001 units=km
New Line.5353486:P5353486-A phases=3 Bus1=144099069.1.2.3 Bus2=144099053.1.2.3 switch=y r1=0.001 x1=0.001 r0=0.001 x0=0.001 Length=0.001 units=km
New Line.5082428:P5082428-1 phases=3 Bus1=135545755.1.2.3 Bus2=135545756.1.2.3 switch=y r1=0.001 x1=0.001 r0=0.001 x0=0.001 Length=0.001 units=km
New Line.5353486:P5353486-B phases=3 Bus1=144099053.1.2.3 Bus2=144099052.1.2.3 switch=y r1=0.001 x1=0.001 r0=0.001 x0=0.001 Length=0.001 units=km
New Line.5353486:P5353486-T phases=3 Bus1=144099053.1.2.3 Bus2=144099061.1.2.3 switch=y r1=0.001 x1=0.001 r0=0.001 x0=0.001 Length=0.001 units=km
New Line.5082022:P5082022-A phases=3 Bus1=151999465.1.2.3 Bus2=151999466.1.2.3 switch=y r1=0.001 x1=0.001 r0=0.001 x0=0.001 Length=0.001 units=km
New Line.5082612:P5082612-1 phases=3 Bus1=158440811.1.2.3 Bus2=158440812.1.2.3 switch=y r1=0.001 x1=0.001 r0=0.001 x0=0.001 Length=0.001 units=km
New Line.5385469:P5385469-A phases=3 Bus1=149724766.1.2.3 Bus2=149724750.1.2.3 switch=y r1=0.001 x1=0.001 r0=0.001 x0=0.001 Length=0.001 units=km
New Line.5082022:P5082022-T phases=3 Bus1=151999466.1.2.3 Bus2=151999474.1.2.3 switch=y r1=0.001 x1=0.001 r0=0.001 x0=0.001 Length=0.001 units=km
New Line.5082022:P5082022-B phases=3 Bus1=151999466.1.2.3 Bus2=151999483.1.2.3 switch=y r1=0.001 x1=0.001 r0=0.001 x0=0.001 Length=0.001 units=km
New Line.5082613:P5082613-A phases=3 Bus1=151999590.1.2.3 Bus2=151999574.1.2.3 switch=y r1=0.001 x1=0.001 r0=0.001 x0=0.001 Length=0.001 units=km
New Line.5082025:P5082025-A phases=3 Bus1=161222545.1.2.3 Bus2=161222546.1.2.3 switch=y r1=0.001 x1=0.001 r0=0.001 x0=0.001 Length=0.001 units=km
New Line.5385469:P5385469-B phases=3 Bus1=149724750.1.2.3 Bus2=149724749.1.2.3 switch=y r1=0.001 x1=0.001 r0=0.001 x0=0.001 Length=0.001 units=km
New Line.5385469:P5385469-T phases=3 Bus1=149724750.1.2.3 Bus2=149724758.1.2.3 switch=y r1=0.001 x1=0.001 r0=0.001 x0=0.001 Length=0.001 units=km
New Line.5082613:P5082613-B phases=3 Bus1=151999574.1.2.3 Bus2=151999573.1.2.3 switch=y r1=0.001 x1=0.001 r0=0.001 x0=0.001 Length=0.001 units=km
New Line.5082613:P5082613-T phases=3 Bus1=151999574.1.2.3 Bus2=151999582.1.2.3 switch=y r1=0.001 x1=0.001 r0=0.001 x0=0.001 Length=0.001 units=km
New Line.5305790:P5305790-1 phases=3 Bus1=151999727.1.2.3 Bus2=151999728.1.2.3 switch=y r1=0.001 x1=0.001 r0=0.001 x0=0.001 Length=0.001 units=km
New Line.5491637:P5491637-1 phases=3 Bus1=158440756.1.2.3 Bus2=158440757.1.2.3 switch=y r1=0.001 x1=0.001 r0=0.001 x0=0.001 Length=0.001 units=km
New Line.5082025:P5082025-T phases=3 Bus1=161222546.1.2.3 Bus2=161222554.1.2.3 switch=y r1=0.001 x1=0.001 r0=0.001 x0=0.001 Length=0.001 units=km
New Line.5082025:P5082025-B phases=3 Bus1=161222546.1.2.3 Bus2=161222563.1.2.3 switch=y r1=0.001 x1=0.001 r0=0.001 x0=0.001 Length=0.001 units=km
New Line.5204467:P5204467-1 phases=3 Bus1=151999677.1.2.3 Bus2=151999678.1.2.3 switch=y r1=0.001 x1=0.001 r0=0.001 x0=0.001 Length=0.001 units=km
New Line.5353487:P5353487-A phases=3 Bus1=164537876.1.2.3 Bus2=164537877.1.2.3 switch=y r1=0.001 x1=0.001 r0=0.001 x0=0.001 Length=0.001 units=km
New Line.5082750:P5082750-1 phases=3 Bus1=156636824.1.2.3 Bus2=156636825.1.2.3 switch=y r1=0.001 x1=0.001 r0=0.001 x0=0.001 Length=0.001 units=km
New Line.5143640:P5143640-A phases=3 Bus1=156637021.1.2.3 Bus2=156637005.1.2.3 switch=y r1=0.001 x1=0.001 r0=0.001 x0=0.001 Length=0.001 units=km
New Line.5353487:P5353487-T phases=3 Bus1=164537877.1.2.3 Bus2=164537885.1.2.3 switch=y r1=0.001 x1=0.001 r0=0.001 x0=0.001 Length=0.001 units=km
New Line.5353487:P5353487-B phases=3 Bus1=164537877.1.2.3 Bus2=164537894.1.2.3 switch=y r1=0.001 x1=0.001 r0=0.001 x0=0.001 Length=0.001 units=km
New Line.5143640:P5143640-B phases=3 Bus1=156637005.1.2.3 Bus2=156637004.1.2.3 switch=y r1=0.001 x1=0.001 r0=0.001 x0=0.001 Length=0.001 units=km
New Line.5143640:P5143640-T phases=3 Bus1=156637005.1.2.3 Bus2=156637013.1.2.3 switch=y r1=0.001 x1=0.001 r0=0.001 x0=0.001 Length=0.001 units=km
New Line.5086040:P5086040-1 phases=3 Bus1=158440577.1.2.3 Bus2=158440578.1.2.3 switch=y r1=0.001 x1=0.001 r0=0.001 x0=0.001 Length=0.001 units=km
New Line.5305791:P5305791-1 phases=3 Bus1=158441068.1.2.3 Bus2=158441069.1.2.3 switch=y r1=0.001 x1=0.001 r0=0.001 x0=0.001 Length=0.001 units=km
New Line.5082620:P5082620-A phases=3 Bus1=219381682.1.2.3 Bus2=219381683.1.2.3 switch=y r1=0.001 x1=0.001 r0=0.001 x0=0.001 Length=0.001 units=km
New Line.5082621:P5082621-1 phases=3 Bus1=158441501.1.2.3 Bus2=158441502.1.2.3 switch=y r1=0.001 x1=0.001 r0=0.001 x0=0.001 Length=0.001 units=km
New Line.5082620:P5082620-T phases=3 Bus1=219381683.1.2.3 Bus2=219381691.1.2.3 switch=y r1=0.001 x1=0.001 r0=0.001 x0=0.001 Length=0.001 units=km
New Line.5082620:P5082620-B phases=3 Bus1=219381683.1.2.3 Bus2=219381700.1.2.3 switch=y r1=0.001 x1=0.001 r0=0.001 x0=0.001 Length=0.001 units=km
New Line.5143641:P5143641-A phases=3 Bus1=156636932.1.2.3 Bus2=156636916.1.2.3 switch=y r1=0.001 x1=0.001 r0=0.001 x0=0.001 Length=0.001 units=km
New Line.5082505:P5082505-1 phases=3 Bus1=158441556.1.2.3 Bus2=158441557.1.2.3 switch=y r1=0.001 x1=0.001 r0=0.001 x0=0.001 Length=0.001 units=km
New Line.5530877:P5530877-1 phases=3 Bus1=95372503.1.2.3 Bus2=95372504.1.2.3 switch=y r1=0.001 x1=0.001 r0=0.001 x0=0.001 Length=0.001 units=km
New Line.5143641:P5143641-B phases=3 Bus1=156636916.1.2.3 Bus2=156636915.1.2.3 switch=y r1=0.001 x1=0.001 r0=0.001 x0=0.001 Length=0.001 units=km
New Line.5143641:P5143641-T phases=3 Bus1=156636916.1.2.3 Bus2=156636924.1.2.3 switch=y r1=0.001 x1=0.001 r0=0.001 x0=0.001 Length=0.001 units=km
New Line.5082020:P5082020-1 phases=3 Bus1=158441614.1.2.3 Bus2=158441615.1.2.3 switch=y r1=0.001 x1=0.001 r0=0.001 x0=0.001 Length=0.001 units=km
New Line.5143642:P5143642-1 phases=3 Bus1=156636874.1.2.3 Bus2=156636875.1.2.3 switch=y r1=0.001 x1=0.001 r0=0.001 x0=0.001 Length=0.001 units=km
New Line.5082018:P5082018-1 phases=3 Bus1=158441761.1.2.3 Bus2=158441762.1.2.3 switch=y r1=0.001 x1=0.001 r0=0.001 x0=0.001 Length=0.001 units=km
New Line.5632737:P5632737-1 phases=3 Bus1=164537966.1.2.3 Bus2=164537967.1.2.3 switch=y r1=0.001 x1=0.001 r0=0.001 x0=0.001 Length=0.001 units=km
New Line.5081250:BS1250-L phases=3 Bus1=40578683.1.2.3 Bus2=40578682.1.2.3 switch=y r1=0.001 x1=0.001 r0=0.001 x0=0.001 Length=0.001 units=km
New Line.5081250:BS1250-R phases=3 Bus1=40578683.1.2.3 Bus2=40578691.1.2.3 switch=y r1=0.001 x1=0.001 r0=0.001 x0=0.001 Length=0.001 units=km
New Line.5439649:PME4582-1 phases=3 Bus1=169141502.1.2.3 Bus2=169141485.1.2.3 switch=y r1=0.001 x1=0.001 r0=0.001 x0=0.001 Length=0.001 units=km
New Line.5082986:BS1882-T phases=3 Bus1=40578806.1.2.3 Bus2=40578790.1.2.3 switch=y r1=0.001 x1=0.001 r0=0.001 x0=0.001 Length=0.001 units=km
New Line.5082986:BS1882-L phases=3 Bus1=40578790.1.2.3 Bus2=40578789.1.2.3 switch=y r1=0.001 x1=0.001 r0=0.001 x0=0.001 Length=0.001 units=km
New Line.5082986:BS1882-R phases=3 Bus1=40578790.1.2.3 Bus2=40578798.1.2.3 switch=y r1=0.001 x1=0.001 r0=0.001 x0=0.001 Length=0.001 units=km
New Line.5702152:P5702152-1 phases=3 Bus1=243437317.1.2.3 Bus2=243437318.1.2.3 switch=y r1=0.001 x1=0.001 r0=0.001 x0=0.001 Length=0.001 units=km
New Line.5142276:P5142276-1 phases=3 Bus1=158441679.1.2.3 Bus2=158441680.1.2.3 switch=y r1=0.001 x1=0.001 r0=0.001 x0=0.001 Length=0.001 units=km
New Line.5142765:P5142765-1 phases=3 Bus1=40578634.1.2.3 Bus2=40578635.1.2.3 switch=y r1=0.001 x1=0.001 r0=0.001 x0=0.001 Length=0.001 units=km
New Line.5082987:P5082987-1 phases=3 Bus1=156637155.1.2.3 Bus2=156637156.1.2.3 switch=y r1=0.001 x1=0.001 r0=0.001 x0=0.001 Length=0.001 units=km
New Line.1838537E:40579868 phases=3 Bus1=40579870.1.2.3 Bus2=40579871.1.2.3 switch=y r1=0.001 x1=0.001 r0=0.001 x0=0.001 Length=0.001 units=km
New Line.CAB_1838537E:1838537E phases=3 Bus1=40579886.1.2.3 Bus2=40579870.1.2.3 switch=y r1=0.001 x1=0.001 r0=0.001 x0=0.001 Length=0.001 units=km
New Line.5439649:PME4582-2 phases=3 Bus1=169141484.1.2.3 Bus2=169141493.1.2.3 switch=y r1=0.001 x1=0.001 r0=0.001 x0=0.001 Length=0.001 units=km
New Line.5510326:PME5270-1 phases=3 Bus1=40579925.1.2.3 Bus2=40579926.1.2.3 switch=y r1=0.001 x1=0.001 r0=0.001 x0=0.001 Length=0.001 units=km
New Line.5393984:FSE3984-1 phases=3 Bus1=40579350.1.2.3 Bus2=40579351.1.2.3 switch=y r1=0.001 x1=0.001 r0=0.001 x0=0.001 Length=0.001 units=km
New Line.28293016$28293032 phases=3 Bus1=28293036.1.2.3 Bus2=28293020.1.2.3 switch=y r1=0.001 x1=0.001 r0=0.001 x0=0.001 Length=0.001 units=km
New Line.28293032$28293024 phases=3 Bus1=28293036.1.2.3 Bus2=28293028.1.2.3 switch=y r1=0.001 x1=0.001 r0=0.001 x0=0.001 Length=0.001 units=km
New Line.210698578$210698587 phases=3 Bus1=210698567.1.2.3 Bus2=210698566.1.2.3 switch=y r1=0.001 x1=0.001 r0=0.001 x0=0.001 Length=0.001 units=km
New Line.210698587$210698596 phases=3 Bus1=210698567.1.2.3 Bus2=210698573.1.2.3 switch=y r1=0.001 x1=0.001 r0=0.001 x0=0.001 Length=0.001 units=km
New Line.186585282$186585291 phases=3 Bus1=186585262.1.2.3 Bus2=186585256.1.2.3 switch=y r1=0.001 x1=0.001 r0=0.001 x0=0.001 Length=0.001 units=km
New Line.186585291$186585300 phases=3 Bus1=186585262.1.2.3 Bus2=186585268.1.2.3 switch=y r1=0.001 x1=0.001 r0=0.001 x0=0.001 Length=0.001 units=km
New Line.186585273$186585282 phases=3 Bus1=186585256.1.2.3 Bus2=186585255.1.2.3 switch=y r1=0.001 x1=0.001 r0=0.001 x0=0.001 Length=0.001 units=km
New Line.28290696 phases=3 Bus1=28290698.1.2.3 Bus2=28290699.1.2.3 switch=y r1=0.001 x1=0.001 r0=0.001 x0=0.001 Length=0.001 units=km
New Line.192913608$192913617 phases=3 Bus1=192913585.1.2.3 Bus2=192913579.1.2.3 switch=y r1=0.001 x1=0.001 r0=0.001 x0=0.001 Length=0.001 units=km
New Line.223470052$223470061 phases=3 Bus1=223470035.1.2.3 Bus2=223470034.1.2.3 switch=y r1=0.001 x1=0.001 r0=0.001 x0=0.001 Length=0.001 units=km
New Line.223470061$GS2359-3 phases=3 Bus1=223470035.1.2.3 Bus2=223470041.1.2.3 switch=y r1=0.001 x1=0.001 r0=0.001 x0=0.001 Length=0.001 units=km
New Line.192913599$192913608 phases=3 Bus1=192913579.1.2.3 Bus2=192913573.1.2.3 switch=y r1=0.001 x1=0.001 r0=0.001 x0=0.001 Length=0.001 units=km
New Line.GS2359-3$223470079 phases=3 Bus1=223470041.1.2.3 Bus2=223470047.1.2.3 switch=y r1=0.001 x1=0.001 r0=0.001 x0=0.001 Length=0.001 units=km
New Line.192913590$192913599 phases=3 Bus1=192913573.1.2.3 Bus2=192913572.1.2.3 switch=y r1=0.001 x1=0.001 r0=0.001 x0=0.001 Length=0.001 units=km
New Line.PME3954-3$144720703 phases=3 Bus1=144720688.1.2.3 Bus2=144720689.1.2.3 switch=y r1=0.001 x1=0.001 r0=0.001 x0=0.001 Length=0.001 units=km
New Line.223470552$GS7033-2 phases=3 Bus1=223470534.1.2.3 Bus2=223470535.1.2.3 switch=y r1=0.001 x1=0.001 r0=0.001 x0=0.001 Length=0.001 units=km
New Line.GS7033-2$GS7033-3 phases=3 Bus1=223470535.1.2.3 Bus2=223470541.1.2.3 switch=y r1=0.001 x1=0.001 r0=0.001 x0=0.001 Length=0.001 units=km
New Line.144721329 phases=3 Bus1=144721332.1.2.3 Bus2=144721331.1.2.3 switch=y r1=0.001 x1=0.001 r0=0.001 x0=0.001 Length=0.001 units=km
New Line.148224200 phases=3 Bus1=148224202.1.2.3 Bus2=148224203.1.2.3 switch=y r1=0.001 x1=0.001 r0=0.001 x0=0.001 Length=0.001 units=km
New Line.GS7033-3$223470579 phases=3 Bus1=223470541.1.2.3 Bus2=223470547.1.2.3 switch=y r1=0.001 x1=0.001 r0=0.001 x0=0.001 Length=0.001 units=km
New Line.96226752 phases=3 Bus1=96226754.1.2.3 Bus2=96226755.1.2.3 switch=y r1=0.001 x1=0.001 r0=0.001 x0=0.001 Length=0.001 units=km
New Line.28289894 phases=3 Bus1=28289896.1.2.3 Bus2=28289897.1.2.3 switch=y r1=0.001 x1=0.001 r0=0.001 x0=0.001 Length=0.001 units=km
New Line.166441049$PME3955-3 phases=3 Bus1=166441015.1.2.3 Bus2=166441016.1.2.3 switch=y r1=0.001 x1=0.001 r0=0.001 x0=0.001 Length=0.001 units=km
New Line.190273150 phases=3 Bus1=190273152.1.2.3 Bus2=190273153.1.2.3 switch=y r1=0.001 x1=0.001 r0=0.001 x0=0.001 Length=0.001 units=km
New Line.144721248 phases=3 Bus1=144721250.1.2.3 Bus2=144721251.1.2.3 switch=y r1=0.001 x1=0.001 r0=0.001 x0=0.001 Length=0.001 units=km
New Line.28320758 phases=3 Bus1=28320760.1.2.3 Bus2=28320761.1.2.3 switch=y r1=0.001 x1=0.001 r0=0.001 x0=0.001 Length=0.001 units=km
New Line.28320768 phases=3 Bus1=28320770.1.2.3 Bus2=28320771.1.2.3 switch=y r1=0.001 x1=0.001 r0=0.001 x0=0.001 Length=0.001 units=km
New Line.307162762$GS2467-2 phases=3 Bus1=307162744.1.2.3 Bus2=307162745.1.2.3 switch=y r1=0.001 x1=0.001 r0=0.001 x0=0.001 Length=0.001 units=km
New Line.223470846$223470855 phases=3 Bus1=223470828.1.2.3 Bus2=223470829.1.2.3 switch=y r1=0.001 x1=0.001 r0=0.001 x0=0.001 Length=0.001 units=km
New Line.28320115 phases=3 Bus1=28320117.1.2.3 Bus2=28320118.1.2.3 switch=y r1=0.001 x1=0.001 r0=0.001 x0=0.001 Length=0.001 units=km
New Line.GS2467-2$307162780 phases=3 Bus1=307162745.1.2.3 Bus2=307162751.1.2.3 switch=y r1=0.001 x1=0.001 r0=0.001 x0=0.001 Length=0.001 units=km
New Line.166440954 phases=3 Bus1=166440957.1.2.3 Bus2=166440956.1.2.3 switch=y r1=0.001 x1=0.001 r0=0.001 x0=0.001 Length=0.001 units=km
New Line.223470855$GS7032-3 phases=3 Bus1=223470829.1.2.3 Bus2=223470835.1.2.3 switch=y r1=0.001 x1=0.001 r0=0.001 x0=0.001 Length=0.001 units=km
New Line.307162780$307162789 phases=3 Bus1=307162751.1.2.3 Bus2=307162757.1.2.3 switch=y r1=0.001 x1=0.001 r0=0.001 x0=0.001 Length=0.001 units=km
New Line.164538021 phases=3 Bus1=164538023.1.2.3 Bus2=164538024.1.2.3 switch=y r1=0.001 x1=0.001 r0=0.001 x0=0.001 Length=0.001 units=km
New Line.GS7032-3$223470873 phases=3 Bus1=223470835.1.2.3 Bus2=223470841.1.2.3 switch=y r1=0.001 x1=0.001 r0=0.001 x0=0.001 Length=0.001 units=km
New Line.166440981 phases=3 Bus1=166440983.1.2.3 Bus2=166440984.1.2.3 switch=y r1=0.001 x1=0.001 r0=0.001 x0=0.001 Length=0.001 units=km
New Line.40580231 phases=3 Bus1=40580233.1.2.3 Bus2=40580234.1.2.3 switch=y r1=0.001 x1=0.001 r0=0.001 x0=0.001 Length=0.001 units=km
New Line.40580241 phases=3 Bus1=40580243.1.2.3 Bus2=40580244.1.2.3 switch=y r1=0.001 x1=0.001 r0=0.001 x0=0.001 Length=0.001 units=km
New Line.144721279 phases=3 Bus1=144721282.1.2.3 Bus2=144721281.1.2.3 switch=y r1=0.001 x1=0.001 r0=0.001 x0=0.001 Length=0.001 units=km
New Line.182993391 phases=3 Bus1=182993394.1.2.3 Bus2=182993393.1.2.3 switch=y r1=0.001 x1=0.001 r0=0.001 x0=0.001 Length=0.001 units=km
New Line.219381776 phases=3 Bus1=219381778.1.2.3 Bus2=219381779.1.2.3 switch=y r1=0.001 x1=0.001 r0=0.001 x0=0.001 Length=0.001 units=km
New Line.158441039$P5353485 phases=3 Bus1=158441032.1.2.3 Bus2=158441033.1.2.3 switch=y r1=0.001 x1=0.001 r0=0.001 x0=0.001 Length=0.001 units=km
New Line.192823316$192823308 phases=3 Bus1=192823291.1.2.3 Bus2=192823290.1.2.3 switch=y r1=0.001 x1=0.001 r0=0.001 x0=0.001 Length=0.001 units=km
New Line.192823308$192823324 phases=3 Bus1=192823291.1.2.3 Bus2=192823297.1.2.3 switch=y r1=0.001 x1=0.001 r0=0.001 x0=0.001 Length=0.001 units=km
New Line.63624155 phases=3 Bus1=63624157.1.2.3 Bus2=63624158.1.2.3 switch=y r1=0.001 x1=0.001 r0=0.001 x0=0.001 Length=0.001 units=km
New Line.63641495 phases=3 Bus1=63641497.1.2.3 Bus2=63641498.1.2.3 switch=y r1=0.001 x1=0.001 r0=0.001 x0=0.001 Length=0.001 units=km
New Line.144721304 phases=3 Bus1=144721306.1.2.3 Bus2=144721307.1.2.3 switch=y r1=0.001 x1=0.001 r0=0.001 x0=0.001 Length=0.001 units=km
New Line.192823324$GS0695-4 phases=3 Bus1=192823297.1.2.3 Bus2=192823303.1.2.3 switch=y r1=0.001 x1=0.001 r0=0.001 x0=0.001 Length=0.001 units=km
New Line.164538048 phases=3 Bus1=164538051.1.2.3 Bus2=164538050.1.2.3 switch=y r1=0.001 x1=0.001 r0=0.001 x0=0.001 Length=0.001 units=km
New Line.63641413 phases=3 Bus1=63641415.1.2.3 Bus2=63641416.1.2.3 switch=y r1=0.001 x1=0.001 r0=0.001 x0=0.001 Length=0.001 units=km
New Line.164538073 phases=3 Bus1=164538075.1.2.3 Bus2=164538076.1.2.3 switch=y r1=0.001 x1=0.001 r0=0.001 x0=0.001 Length=0.001 units=km
New Line.219381788 phases=3 Bus1=219381791.1.2.3 Bus2=219381790.1.2.3 switch=y r1=0.001 x1=0.001 r0=0.001 x0=0.001 Length=0.001 units=km
New Line.63623991 phases=3 Bus1=63623993.1.2.3 Bus2=63623994.1.2.3 switch=y r1=0.001 x1=0.001 r0=0.001 x0=0.001 Length=0.001 units=km
New Line.63624073 phases=3 Bus1=63624075.1.2.3 Bus2=63624076.1.2.3 switch=y r1=0.001 x1=0.001 r0=0.001 x0=0.001 Length=0.001 units=km
New Line.40580251 phases=3 Bus1=40580253.1.2.3 Bus2=40580254.1.2.3 switch=y r1=0.001 x1=0.001 r0=0.001 x0=0.001 Length=0.001 units=km
New Line.PME4582-2$PME4582-1 phases=3 Bus1=169141485.1.2.3 Bus2=169141484.1.2.3 switch=y r1=0.001 x1=0.001 r0=0.001 x0=0.001 Length=0.001 units=km
New Line.156637126$P5393984 phases=3 Bus1=156637119.1.2.3 Bus2=156637120.1.2.3 switch=y r1=0.001 x1=0.001 r0=0.001 x0=0.001 Length=0.001 units=km
New Line.169141576 phases=3 Bus1=169141579.1.2.3 Bus2=169141578.1.2.3 switch=y r1=0.001 x1=0.001 r0=0.001 x0=0.001 Length=0.001 units=km
New Line.243437379 phases=3 Bus1=243437381.1.2.3 Bus2=243437382.1.2.3 switch=y r1=0.001 x1=0.001 r0=0.001 x0=0.001 Length=0.001 units=km
New Line.40579671$P5439648 phases=3 Bus1=40579664.1.2.3 Bus2=40579665.1.2.3 switch=y r1=0.001 x1=0.001 r0=0.001 x0=0.001 Length=0.001 units=km
New Line.40580416 phases=3 Bus1=40580419.1.2.3 Bus2=40580418.1.2.3 switch=y r1=0.001 x1=0.001 r0=0.001 x0=0.001 Length=0.001 units=km
New Line.243437406 phases=3 Bus1=243437409.1.2.3 Bus2=243437408.1.2.3 switch=y r1=0.001 x1=0.001 r0=0.001 x0=0.001 Length=0.001 units=km
New Line.243437456 phases=3 Bus1=243437459.1.2.3 Bus2=243437458.1.2.3 switch=y r1=0.001 x1=0.001 r0=0.001 x0=0.001 Length=0.001 units=km
New Line.40580426 phases=3 Bus1=40580428.1.2.3 Bus2=40580429.1.2.3 switch=y r1=0.001 x1=0.001 r0=0.001 x0=0.001 Length=0.001 units=km
New Line.243437431 phases=3 Bus1=243437433.1.2.3 Bus2=243437434.1.2.3 switch=y r1=0.001 x1=0.001 r0=0.001 x0=0.001 Length=0.001 units=km
New Line.40579902$P5510325 phases=3 Bus1=40579895.1.2.3 Bus2=40579896.1.2.3 switch=y r1=0.001 x1=0.001 r0=0.001 x0=0.001 Length=0.001 units=km
New Line.ARIES$ECLIPSE_GS0935-3$GS0935-3 phases=3 Bus1=210698599.1.2.3 Bus2=-777777210698599.1.2.3 switch=y r1=0.001 x1=0.001 r0=0.001 x0=0.001 Length=0.001 units=km
New Line.ARIES$ASTROLOGY_GS2489-2$GS2489-2 phases=3 Bus1=186585285.1.2.3 Bus2=-777777186585285.1.2.3 switch=y r1=0.001 x1=0.001 r0=0.001 x0=0.001 Length=0.001 units=km
New Line.ARIES$STARGAZER_BS1693-L$BS1693-L phases=3 Bus1=28289331.1.2.3 Bus2=-77777728289331.1.2.3 switch=y r1=0.001 x1=0.001 r0=0.001 x0=0.001 Length=0.001 units=km
New Line.ARIES$TAURUS_PME3649-3$PME3649-3 phases=3 Bus1=28291471.1.2.3 Bus2=-77777728291471.1.2.3 switch=y r1=0.001 x1=0.001 r0=0.001 x0=0.001 Length=0.001 units=km
New Line.5144658:J658-2 phases=3 Bus1=28293035.1.2.3 Bus2=28293036.1.2.3 switch=y r1=0.001 x1=0.001 r0=0.001 x0=0.001 Length=0.001 units=km
New Line.5144658:J658-1 phases=3 Bus1=28293020.1.2.3 Bus2=28293019.1.2.3 switch=y r1=0.001 x1=0.001 r0=0.001 x0=0.001 Length=0.001 units=km
New Line.5144658:J658-3 phases=3 Bus1=28293028.1.2.3 Bus2=28293027.1.2.3 switch=y r1=0.001 x1=0.001 r0=0.001 x0=0.001 Length=0.001 units=km
New Line.5122187:GS0935-2 phases=3 Bus1=210698590.1.2.3 Bus2=210698567.1.2.3 switch=y r1=0.001 x1=0.001 r0=0.001 x0=0.001 Length=0.001 units=km
New Line.5122187:GS0935-1 phases=3 Bus1=210698566.1.2.3 Bus2=210698581.1.2.3 switch=y r1=0.001 x1=0.001 r0=0.001 x0=0.001 Length=0.001 units=km
New Line.5081659:GS2489-3 phases=3 Bus1=186585294.1.2.3 Bus2=186585262.1.2.3 switch=y r1=0.001 x1=0.001 r0=0.001 x0=0.001 Length=0.001 units=km
New Line.5081659:GS2489-4 phases=3 Bus1=186585268.1.2.3 Bus2=186585303.1.2.3 switch=y r1=0.001 x1=0.001 r0=0.001 x0=0.001 Length=0.001 units=km
New Line.5081659:GS2489-1 phases=3 Bus1=186585255.1.2.3 Bus2=186585276.1.2.3 switch=y r1=0.001 x1=0.001 r0=0.001 x0=0.001 Length=0.001 units=km
New Line.5353484:PME3954-2 phases=3 Bus1=144720714.1.2.3 Bus2=144720688.1.2.3 switch=y r1=0.001 x1=0.001 r0=0.001 x0=0.001 Length=0.001 units=km
New Line.5581911:GS7033-1 phases=3 Bus1=223470555.1.2.3 Bus2=223470534.1.2.3 switch=y r1=0.001 x1=0.001 r0=0.001 x0=0.001 Length=0.001 units=km
New Line.5082027:BS1685-T phases=3 Bus1=28289471.1.2.3 Bus2=28289455.1.2.3 switch=y r1=0.001 x1=0.001 r0=0.001 x0=0.001 Length=0.001 units=km
New Line.5082032:BS1690-T phases=3 Bus1=28292198.1.2.3 Bus2=28292191.1.2.3 switch=y r1=0.001 x1=0.001 r0=0.001 x0=0.001 Length=0.001 units=km
New Line.5082033:BS1691-T phases=3 Bus1=28289125.1.2.3 Bus2=28289109.1.2.3 switch=y r1=0.001 x1=0.001 r0=0.001 x0=0.001 Length=0.001 units=km
New Line.5082027:BS1685-R phases=3 Bus1=28289455.1.2.3 Bus2=28289454.1.2.3 switch=y r1=0.001 x1=0.001 r0=0.001 x0=0.001 Length=0.001 units=km
New Line.5082027:BS1685-L phases=3 Bus1=28289455.1.2.3 Bus2=28289463.1.2.3 switch=y r1=0.001 x1=0.001 r0=0.001 x0=0.001 Length=0.001 units=km
New Line.5082032:BS1690-R phases=3 Bus1=28292191.1.2.3 Bus2=28292190.1.2.3 switch=y r1=0.001 x1=0.001 r0=0.001 x0=0.001 Length=0.001 units=km
New Line.5082032:BS1690-L phases=3 Bus1=28292191.1.2.3 Bus2=28292207.1.2.3 switch=y r1=0.001 x1=0.001 r0=0.001 x0=0.001 Length=0.001 units=km
New Line.5353484:PME3954-4 phases=3 Bus1=144720689.1.2.3 Bus2=144720705.1.2.3 switch=y r1=0.001 x1=0.001 r0=0.001 x0=0.001 Length=0.001 units=km
New Line.5353484:PME3954-1 phases=3 Bus1=144720689.1.2.3 Bus2=144720723.1.2.3 switch=y r1=0.001 x1=0.001 r0=0.001 x0=0.001 Length=0.001 units=km
New Line.5581911:GS7033-2 phases=3 Bus1=223470535.1.2.3 Bus2=223470564.1.2.3 switch=y r1=0.001 x1=0.001 r0=0.001 x0=0.001 Length=0.001 units=km
New Line.5082033:BS1691-R phases=3 Bus1=28289109.1.2.3 Bus2=28289108.1.2.3 switch=y r1=0.001 x1=0.001 r0=0.001 x0=0.001 Length=0.001 units=km
New Line.5082033:BS1691-L phases=3 Bus1=28289109.1.2.3 Bus2=28289117.1.2.3 switch=y r1=0.001 x1=0.001 r0=0.001 x0=0.001 Length=0.001 units=km
New Line.5082034:BS1692-T phases=3 Bus1=28289232.1.2.3 Bus2=28289216.1.2.3 switch=y r1=0.001 x1=0.001 r0=0.001 x0=0.001 Length=0.001 units=km
New Line.5083180:P5083180-1 phases=3 Bus1=149046516.1.2.3 Bus2=149046517.1.2.3 switch=y r1=0.001 x1=0.001 r0=0.001 x0=0.001 Length=0.001 units=km
New Line.5581911:GS7033-3 phases=3 Bus1=223470541.1.2.3 Bus2=223470573.1.2.3 switch=y r1=0.001 x1=0.001 r0=0.001 x0=0.001 Length=0.001 units=km
New Line.5082034:BS1692-R phases=3 Bus1=28289216.1.2.3 Bus2=28289215.1.2.3 switch=y r1=0.001 x1=0.001 r0=0.001 x0=0.001 Length=0.001 units=km
New Line.5082034:BS1692-L phases=3 Bus1=28289216.1.2.3 Bus2=28289224.1.2.3 switch=y r1=0.001 x1=0.001 r0=0.001 x0=0.001 Length=0.001 units=km
New Line.5082035:BS1693-T phases=3 Bus1=28289323.1.2.3 Bus2=28289339.1.2.3 switch=y r1=0.001 x1=0.001 r0=0.001 x0=0.001 Length=0.001 units=km
New Line.5334831:PME3955-1 phases=3 Bus1=166441051.1.2.3 Bus2=166441015.1.2.3 switch=y r1=0.001 x1=0.001 r0=0.001 x0=0.001 Length=0.001 units=km
New Line.5581911:GS7033-4 phases=3 Bus1=223470547.1.2.3 Bus2=223470582.1.2.3 switch=y r1=0.001 x1=0.001 r0=0.001 x0=0.001 Length=0.001 units=km
New Line.5082021:BS1681-T phases=3 Bus1=28289810.1.2.3 Bus2=28289794.1.2.3 switch=y r1=0.001 x1=0.001 r0=0.001 x0=0.001 Length=0.001 units=km
New Line.5334831:PME3955-4 phases=3 Bus1=166441015.1.2.3 Bus2=166441033.1.2.3 switch=y r1=0.001 x1=0.001 r0=0.001 x0=0.001 Length=0.001 units=km
New Line.5082021:BS1681-L phases=3 Bus1=28289794.1.2.3 Bus2=28289793.1.2.3 switch=y r1=0.001 x1=0.001 r0=0.001 x0=0.001 Length=0.001 units=km
New Line.5082021:BS1681-R phases=3 Bus1=28289794.1.2.3 Bus2=28289802.1.2.3 switch=y r1=0.001 x1=0.001 r0=0.001 x0=0.001 Length=0.001 units=km
New Line.5081650:GS2467-1 phases=3 Bus1=307162765.1.2.3 Bus2=307162744.1.2.3 switch=y r1=0.001 x1=0.001 r0=0.001 x0=0.001 Length=0.001 units=km
New Line.5334831:PME3955-2 phases=3 Bus1=166441016.1.2.3 Bus2=166441042.1.2.3 switch=y r1=0.001 x1=0.001 r0=0.001 x0=0.001 Length=0.001 units=km
New Line.5881910:GS7032-1 phases=3 Bus1=223470849.1.2.3 Bus2=223470828.1.2.3 switch=y r1=0.001 x1=0.001 r0=0.001 x0=0.001 Length=0.001 units=km
New Line.5082377:P5082377-1 phases=3 Bus1=158440209.1.2.3 Bus2=158440210.1.2.3 switch=y r1=0.001 x1=0.001 r0=0.001 x0=0.001 Length=0.001 units=km
New Line.5081650:GS2467-2 phases=3 Bus1=307162745.1.2.3 Bus2=307162774.1.2.3 switch=y r1=0.001 x1=0.001 r0=0.001 x0=0.001 Length=0.001 units=km
New Line.5881910:GS7032-2 phases=3 Bus1=223470829.1.2.3 Bus2=223470858.1.2.3 switch=y r1=0.001 x1=0.001 r0=0.001 x0=0.001 Length=0.001 units=km
New Line.5081650:GS2467-3 phases=3 Bus1=307162751.1.2.3 Bus2=307162783.1.2.3 switch=y r1=0.001 x1=0.001 r0=0.001 x0=0.001 Length=0.001 units=km
New Line.5881910:GS7032-3 phases=3 Bus1=223470835.1.2.3 Bus2=223470867.1.2.3 switch=y r1=0.001 x1=0.001 r0=0.001 x0=0.001 Length=0.001 units=km
New Line.5305792:PME3649-2 phases=3 Bus1=28291489.1.2.3 Bus2=28291462.1.2.3 switch=y r1=0.001 x1=0.001 r0=0.001 x0=0.001 Length=0.001 units=km
New Line.5081650:GS2467-4 phases=3 Bus1=307162757.1.2.3 Bus2=307162792.1.2.3 switch=y r1=0.001 x1=0.001 r0=0.001 x0=0.001 Length=0.001 units=km
New Line.5881910:GS7032-4 phases=3 Bus1=223470841.1.2.3 Bus2=223470876.1.2.3 switch=y r1=0.001 x1=0.001 r0=0.001 x0=0.001 Length=0.001 units=km
New Line.5372205:P5372205-1 phases=3 Bus1=28289745.1.2.3 Bus2=28289746.1.2.3 switch=y r1=0.001 x1=0.001 r0=0.001 x0=0.001 Length=0.001 units=km
New Line.5628774:GS0695-2 phases=3 Bus1=192823310.1.2.3 Bus2=192823291.1.2.3 switch=y r1=0.001 x1=0.001 r0=0.001 x0=0.001 Length=0.001 units=km
New Line.5305792:PME3649-4 phases=3 Bus1=28291463.1.2.3 Bus2=28291480.1.2.3 switch=y r1=0.001 x1=0.001 r0=0.001 x0=0.001 Length=0.001 units=km
New Line.5305792:PME3649-1 phases=3 Bus1=28291463.1.2.3 Bus2=28291498.1.2.3 switch=y r1=0.001 x1=0.001 r0=0.001 x0=0.001 Length=0.001 units=km
New Line.5628774:GS0695-1 phases=3 Bus1=192823290.1.2.3 Bus2=192823318.1.2.3 switch=y r1=0.001 x1=0.001 r0=0.001 x0=0.001 Length=0.001 units=km
New Line.5628774:GS0695-4 phases=3 Bus1=192823303.1.2.3 Bus2=192823334.1.2.3 switch=y r1=0.001 x1=0.001 r0=0.001 x0=0.001 Length=0.001 units=km
New Line.1834540E:1834540E phases=3 Bus1=40578468.1.2.3 Bus2=40578467.1.2.3 switch=y r1=0.001 x1=0.001 r0=0.001 x0=0.001 Length=0.001 units=km
New Line.1838538E:1838538E phases=3 Bus1=40578510.1.2.3 Bus2=40578511.1.2.3 switch=y r1=0.001 x1=0.001 r0=0.001 x0=0.001 Length=0.001 units=km
New Line.1838536E:1838536E phases=3 Bus1=40578497.1.2.3 Bus2=40578498.1.2.3 switch=y r1=0.001 x1=0.001 r0=0.001 x0=0.001 Length=0.001 units=km
New Line.5357977:BS4036-T phases=3 Bus1=40578535.1.2.3 Bus2=40578528.1.2.3 switch=y r1=0.001 x1=0.001 r0=0.001 x0=0.001 Length=0.001 units=km
New Line.5357977:BS4036-R phases=3 Bus1=40578528.1.2.3 Bus2=40578527.1.2.3 switch=y r1=0.001 x1=0.001 r0=0.001 x0=0.001 Length=0.001 units=km
New Line.5357977:BS4036-L phases=3 Bus1=40578528.1.2.3 Bus2=40578544.1.2.3 switch=y r1=0.001 x1=0.001 r0=0.001 x0=0.001 Length=0.001 units=km
New Line.5081250:BS1250-T phases=3 Bus1=40578699.1.2.3 Bus2=40578683.1.2.3 switch=y r1=0.001 x1=0.001 r0=0.001 x0=0.001 Length=0.001 units=km
New Line.5628774:GS0695-3 phases=3 Bus1=192823297.1.2.3 Bus2=192823326.1.2.3 switch=y r1=0.001 x1=0.001 r0=0.001 x0=0.001 Length=0.001 units=km enabled=false
New Line.PME3649-3$PME3649-4 phases=3 Bus1=28291462.1.2.3 Bus2=28291463.1.2.3 switch=y r1=0.001 x1=0.001 r0=0.001 x0=0.001 Length=0.001 units=km
New Line.5122187:GS0935-3 phases=3 Bus1=210698573.1.2.3 Bus2=210698599.1.2.3 switch=y r1=0.001 x1=0.001 r0=0.001 x0=0.001 Length=0.001 units=km enabled=false
New Line.5081659:GS2489-2 phases=3 Bus1=186585256.1.2.3 Bus2=186585285.1.2.3 switch=y r1=0.001 x1=0.001 r0=0.001 x0=0.001 Length=0.001 units=km enabled=false
New Line.5353484:PME3954-3 phases=3 Bus1=144720688.1.2.3 Bus2=144720696.1.2.3 switch=y r1=0.001 x1=0.001 r0=0.001 x0=0.001 Length=0.001 units=km
New Line.5082035:BS1693-R phases=3 Bus1=28289322.1.2.3 Bus2=28289323.1.2.3 switch=y r1=0.001 x1=0.001 r0=0.001 x0=0.001 Length=0.001 units=km
New Line.5082035:BS1693-L phases=3 Bus1=28289323.1.2.3 Bus2=28289331.1.2.3 switch=y r1=0.001 x1=0.001 r0=0.001 x0=0.001 Length=0.001 units=km enabled=false
New Line.5334831:PME3955-3 phases=3 Bus1=166441016.1.2.3 Bus2=166441024.1.2.3 switch=y r1=0.001 x1=0.001 r0=0.001 x0=0.001 Length=0.001 units=km
New Line.5305792:PME3649-3 phases=3 Bus1=28291462.1.2.3 Bus2=28291471.1.2.3 switch=y r1=0.001 x1=0.001 r0=0.001 x0=0.001 Length=0.001 units=km enabled=false
New Line.5082029:P5082029-B phases=3 Bus1=161222655.1.2.3 Bus2=161222672.1.2.3 switch=y r1=0.001 x1=0.001 r0=0.001 x0=0.001 Length=0.001 units=km enabled=false
New Line.5144658:RCS3276-3 phases=3 Bus1=52507441.1.2.3 Bus2=-77777752507441.1.2.3 switch=y r1=0.001 x1=0.001 r0=0.001 x0=0.001 Length=0.001 units=km enabled=false
New Line.5651213:GS6298-2 phases=3 Bus1=179712814.1.2.3 Bus2=-777777179712814.1.2.3 switch=y r1=0.001 x1=0.001 r0=0.001 x0=0.001 Length=0.001 units=km enabled=false
New Line.5640585:RCS6299-4 phases=3 Bus1=28319502.1.2.3 Bus2=-77777728319502.1.2.3 switch=y r1=0.001 x1=0.001 r0=0.001 x0=0.001 Length=0.001 units=km enabled=false
New Line.5188315:PME2177-2 phases=3 Bus1=60509148.1.2.3 Bus2=-77777760509148.1.2.3 switch=y r1=0.001 x1=0.001 r0=0.001 x0=0.001 Length=0.001 units=km enabled=false
New Line.5640582:GS6300-2 phases=3 Bus1=179713190.1.2.3 Bus2=-777777179713190.1.2.3 switch=y r1=0.001 x1=0.001 r0=0.001 x0=0.001 Length=0.001 units=km enabled=false
New Line.5188390:PME2844-1 phases=3 Bus1=28290817.1.2.3 Bus2=-77777728290817.1.2.3 switch=y r1=0.001 x1=0.001 r0=0.001 x0=0.001 Length=0.001 units=km enabled=false
New Line.5081647:GS4443-1 phases=3 Bus1=54589937.1.2.3 Bus2=-77777754589937.1.2.3 switch=y r1=0.001 x1=0.001 r0=0.001 x0=0.001 Length=0.001 units=km enabled=false
New Line.5082016:RCS2358-4 phases=3 Bus1=181800725.1.2.3 Bus2=-777777181800725.1.2.3 switch=y r1=0.001 x1=0.001 r0=0.001 x0=0.001 Length=0.001 units=km enabled=false

! Loads
New Load.5439648_0 Bus1=-99999940579665.1.0 phases=1 kV=0.159926 kW=0 kvar=0 model=1
New Load.5439648_1 Bus1=-99999940579665.2.0 phases=1 kV=0.159926 kW=0 kvar=0 model=1
New Load.5439648_2 Bus1=-99999940579665.3.0 phases=1 kV=0.159926 kW=0 kvar=0 model=1
New Load.5143641_0 Bus1=-999999156636924.1.0 phases=1 kV=0.159926 kW=0 kvar=0 model=1
New Load.5143641_1 Bus1=-999999156636924.2.0 phases=1 kV=0.159926 kW=0 kvar=0 model=1
New Load.5143641_2 Bus1=-999999156636924.3.0 phases=1 kV=0.159926 kW=0 kvar=0 model=1
New Load.5082025_0 Bus1=-999999161222554.1.2 phases=1 kV=0.069282 kW=0 kvar=0 model=1
New Load.5082025_1 Bus1=-999999161222554.2.3 phases=1 kV=0.069282 kW=0 kvar=0 model=1
New Load.5082025_2 Bus1=-999999161222554.3.1 phases=1 kV=0.069282 kW=0 kvar=0 model=1
New Load.5385469_0 Bus1=-999999149724758.1.0 phases=1 kV=0.069282 kW=0 kvar=0 model=1
New Load.5385469_1 Bus1=-999999149724758.2.0 phases=1 kV=0.069282 kW=0 kvar=0 model=1
New Load.5385469_2 Bus1=-999999149724758.3.0 phases=1 kV=0.069282 kW=0 kvar=0 model=1
New Load.5082613_0 Bus1=-999999151999582.1.2 phases=1 kV=0.069282 kW=0 kvar=0 model=1
New Load.5082613_1 Bus1=-999999151999582.2.3 phases=1 kV=0.069282 kW=0 kvar=0 model=1
New Load.5082613_2 Bus1=-999999151999582.3.1 phases=1 kV=0.069282 kW=0 kvar=0 model=1
New Load.5305790_0 Bus1=-999999151999728.1.0 phases=1 kV=0.159926 kW=0 kvar=0 model=1
New Load.5305790_1 Bus1=-999999151999728.2.0 phases=1 kV=0.159926 kW=0 kvar=0 model=1
New Load.5305790_2 Bus1=-999999151999728.3.0 phases=1 kV=0.159926 kW=0 kvar=0 model=1
New Load.5491637_0 Bus1=-999999158440757.1.0 phases=1 kV=0.159926 kW=0 kvar=0 model=1
New Load.5491637_1 Bus1=-999999158440757.2.0 phases=1 kV=0.159926 kW=0 kvar=0 model=1
New Load.5491637_2 Bus1=-999999158440757.3.0 phases=1 kV=0.159926 kW=0 kvar=0 model=1
New Load.5142276_0 Bus1=-999999158441680.1.0 phases=1 kV=0.159926 kW=0 kvar=0 model=1
New Load.5142276_1 Bus1=-999999158441680.2.0 phases=1 kV=0.159926 kW=0 kvar=0 model=1
New Load.5142276_2 Bus1=-999999158441680.3.0 phases=1 kV=0.159926 kW=0 kvar=0 model=1
New Load.5124846 Bus1=-999999158440903.2.0 phases=1 kV=0.069282 kW=0 kvar=0 model=1
New Load.5593873_0 Bus1=-999999148224150.1.0 phases=1 kV=0.159926 kW=0 kvar=0 model=1
New Load.5593873_1 Bus1=-999999148224150.2.0 phases=1 kV=0.159926 kW=0 kvar=0 model=1
New Load.5593873_2 Bus1=-999999148224150.3.0 phases=1 kV=0.159926 kW=0 kvar=0 model=1
New Load.5124984_0 Bus1=-99999996226697.1.0 phases=1 kV=0.069282 kW=0 kvar=0 model=1
New Load.5124984_1 Bus1=-99999996226697.2.0 phases=1 kV=0.069282 kW=0 kvar=0 model=1
New Load.5124984_2 Bus1=-99999996226697.3.0 phases=1 kV=0.069282 kW=0 kvar=0 model=1
New Load.5122182_0 Bus1=-999999158440953.1.0 phases=1 kV=0.069282 kW=0 kvar=0 model=1
New Load.5122182_1 Bus1=-999999158440953.2.0 phases=1 kV=0.069282 kW=0 kvar=0 model=1
New Load.5122182_2 Bus1=-999999158440953.3.0 phases=1 kV=0.069282 kW=0 kvar=0 model=1
New Load.5082020_0 Bus1=-999999158441615.1.0 phases=1 kV=0.069282 kW=0 kvar=0 model=1
New Load.5082020_1 Bus1=-999999158441615.2.0 phases=1 kV=0.069282 kW=0 kvar=0 model=1
New Load.5082020_2 Bus1=-999999158441615.3.0 phases=1 kV=0.069282 kW=0 kvar=0 model=1
New Load.5353485_0 Bus1=-999999158441033.1.0 phases=1 kV=0.159926 kW=0 kvar=0 model=1
New Load.5353485_1 Bus1=-999999158441033.2.0 phases=1 kV=0.159926 kW=0 kvar=0 model=1
New Load.5353485_2 Bus1=-999999158441033.3.0 phases=1 kV=0.159926 kW=0 kvar=0 model=1
New Load.5082016 Bus1=-999999223663679.1.0 phases=1 kV=0.069282 kW=0 kvar=0 model=1
New Load.5353487 Bus1=-999999164537885.3.0 phases=1 kV=0.069282 kW=0 kvar=0 model=1
New Load.5082750_0 Bus1=-999999156636825.1.0 phases=1 kV=0.159926 kW=0 kvar=0 model=1
New Load.5082750_1 Bus1=-999999156636825.2.0 phases=1 kV=0.159926 kW=0 kvar=0 model=1
New Load.5082750_2 Bus1=-999999156636825.3.0 phases=1 kV=0.159926 kW=0 kvar=0 model=1
New Load.5510325_0 Bus1=-99999940579896.1.0 phases=1 kV=0.159926 kW=0 kvar=0 model=1
New Load.5510325_1 Bus1=-99999940579896.2.0 phases=1 kV=0.159926 kW=0 kvar=0 model=1
New Load.5510325_2 Bus1=-99999940579896.3.0 phases=1 kV=0.159926 kW=0 kvar=0 model=1
New Load.5082987_0 Bus1=-999999156637156.1.0 phases=1 kV=0.159926 kW=0 kvar=0 model=1
New Load.5082987_1 Bus1=-999999156637156.2.0 phases=1 kV=0.159926 kW=0 kvar=0 model=1
New Load.5082987_2 Bus1=-999999156637156.3.0 phases=1 kV=0.159926 kW=0 kvar=0 model=1
New Load.5143640_0 Bus1=-999999156637013.1.0 phases=1 kV=0.159926 kW=0 kvar=0 model=1
New Load.5143640_1 Bus1=-999999156637013.2.0 phases=1 kV=0.159926 kW=0 kvar=0 model=1
New Load.5143640_2 Bus1=-999999156637013.3.0 phases=1 kV=0.159926 kW=0 kvar=0 model=1
New Load.5305791_0 Bus1=-999999158441069.1.0 phases=1 kV=0.159926 kW=0 kvar=0 model=1
New Load.5305791_1 Bus1=-999999158441069.2.0 phases=1 kV=0.159926 kW=0 kvar=0 model=1
New Load.5305791_2 Bus1=-999999158441069.3.0 phases=1 kV=0.159926 kW=0 kvar=0 model=1
New Load.5086040_0 Bus1=-999999158440578.1.0 phases=1 kV=0.159926 kW=0 kvar=0 model=1
New Load.5086040_1 Bus1=-999999158440578.2.0 phases=1 kV=0.159926 kW=0 kvar=0 model=1
New Load.5086040_2 Bus1=-999999158440578.3.0 phases=1 kV=0.159926 kW=0 kvar=0 model=1
New Load.5081654 Bus1=-99999940580316.1.0 phases=1 kV=0.069282 kW=0 kvar=0 model=1
New Load.5082031_0 Bus1=-99999928320624.1.0 phases=1 kV=0.138564 kW=0 kvar=0 model=1
New Load.5082031_1 Bus1=-99999928320624.2.0 phases=1 kV=0.138564 kW=0 kvar=0 model=1
New Load.5530877 Bus1=-99999995372504.3.0 phases=1 kV=0.069282 kW=0 kvar=0 model=1
New Load.1838537E_0 Bus1=-99999940579871.1.0 phases=1 kV=0.069282 kW=0 kvar=0 model=1
New Load.1838537E_1 Bus1=-99999940579871.2.0 phases=1 kV=0.069282 kW=0 kvar=0 model=1
New Load.5082505_0 Bus1=-999999158441557.1.0 phases=1 kV=0.159926 kW=0 kvar=0 model=1
New Load.5082505_1 Bus1=-999999158441557.2.0 phases=1 kV=0.159926 kW=0 kvar=0 model=1
New Load.5082505_2 Bus1=-999999158441557.3.0 phases=1 kV=0.159926 kW=0 kvar=0 model=1
New Load.5372205_0 Bus1=-99999928289746.1.0 phases=1 kV=0.159926 kW=0 kvar=0 model=1
New Load.5372205_1 Bus1=-99999928289746.2.0 phases=1 kV=0.159926 kW=0 kvar=0 model=1
New Load.5372205_2 Bus1=-99999928289746.3.0 phases=1 kV=0.159926 kW=0 kvar=0 model=1
New Load.5204467_0 Bus1=-999999151999678.1.0 phases=1 kV=0.159926 kW=0 kvar=0 model=1
New Load.5204467_1 Bus1=-999999151999678.2.0 phases=1 kV=0.159926 kW=0 kvar=0 model=1
New Load.5204467_2 Bus1=-999999151999678.3.0 phases=1 kV=0.159926 kW=0 kvar=0 model=1
New Load.5187828_0 Bus1=-999999158440468.1.0 phases=1 kV=0.159926 kW=0 kvar=0 model=1
New Load.5187828_1 Bus1=-999999158440468.2.0 phases=1 kV=0.159926 kW=0 kvar=0 model=1
New Load.5187828_2 Bus1=-999999158440468.3.0 phases=1 kV=0.159926 kW=0 kvar=0 model=1
New Load.5640585_0 Bus1=-999999181855657.1.0 phases=1 kV=0.069282 kW=0 kvar=0 model=1
New Load.5640585_1 Bus1=-999999181855657.2.0 phases=1 kV=0.069282 kW=0 kvar=0 model=1
New Load.5393984_0 Bus1=-999999156637120.1.0 phases=1 kV=0.159926 kW=0 kvar=0 model=1
New Load.5393984_1 Bus1=-999999156637120.2.0 phases=1 kV=0.159926 kW=0 kvar=0 model=1
New Load.5393984_2 Bus1=-999999156637120.3.0 phases=1 kV=0.159926 kW=0 kvar=0 model=1
New Load.5081651 Bus1=-99999940580191.1.0 phases=1 kV=0.069282 kW=0 kvar=0 model=1
New Load.5083180_0 Bus1=-999999149046517.1.0 phases=1 kV=0.159926 kW=0 kvar=0 model=1
New Load.5083180_1 Bus1=-999999149046517.2.0 phases=1 kV=0.159926 kW=0 kvar=0 model=1
New Load.5083180_2 Bus1=-999999149046517.3.0 phases=1 kV=0.159926 kW=0 kvar=0 model=1
New Load.5082428_0 Bus1=-999999135545756.1.0 phases=1 kV=0.069282 kW=0 kvar=0 model=1
New Load.5082428_1 Bus1=-999999135545756.2.0 phases=1 kV=0.069282 kW=0 kvar=0 model=1
New Load.5082428_2 Bus1=-999999135545756.3.0 phases=1 kV=0.069282 kW=0 kvar=0 model=1
New Load.5353486_0 Bus1=-999999144099061.1.0 phases=1 kV=0.069282 kW=0 kvar=0 model=1
New Load.5353486_1 Bus1=-999999144099061.2.0 phases=1 kV=0.069282 kW=0 kvar=0 model=1
New Load.5353486_2 Bus1=-999999144099061.3.0 phases=1 kV=0.069282 kW=0 kvar=0 model=1
New Load.5082612_0 Bus1=-999999158440812.1.0 phases=1 kV=0.159926 kW=0 kvar=0 model=1
New Load.5082612_1 Bus1=-999999158440812.2.0 phases=1 kV=0.159926 kW=0 kvar=0 model=1
New Load.5082612_2 Bus1=-999999158440812.3.0 phases=1 kV=0.159926 kW=0 kvar=0 model=1
New Load.5082377_0 Bus1=-999999158440210.1.2 phases=1 kV=0.069282 kW=0 kvar=0 model=1
New Load.5082377_1 Bus1=-999999158440210.2.3 phases=1 kV=0.069282 kW=0 kvar=0 model=1
New Load.5082377_2 Bus1=-999999158440210.3.1 phases=1 kV=0.069282 kW=0 kvar=0 model=1
New Load.5142765_0 Bus1=-99999940578635.1.0 phases=1 kV=0.159926 kW=0 kvar=0 model=1
New Load.5142765_1 Bus1=-99999940578635.2.0 phases=1 kV=0.159926 kW=0 kvar=0 model=1
New Load.5142765_2 Bus1=-99999940578635.3.0 phases=1 kV=0.159926 kW=0 kvar=0 model=1
New Load.5082029_0 Bus1=-999999161222663.1.0 phases=1 kV=0.069282 kW=0 kvar=0 model=1
New Load.5082029_1 Bus1=-999999161222663.2.0 phases=1 kV=0.069282 kW=0 kvar=0 model=1
New Load.5082029_2 Bus1=-999999161222663.3.0 phases=1 kV=0.069282 kW=0 kvar=0 model=1
New Load.5081771_0 Bus1=-999999158440698.1.0 phases=1 kV=0.069282 kW=0 kvar=0 model=1
New Load.5081771_1 Bus1=-999999158440698.2.0 phases=1 kV=0.069282 kW=0 kvar=0 model=1
New Load.5081771_2 Bus1=-999999158440698.3.0 phases=1 kV=0.069282 kW=0 kvar=0 model=1
New Load.5702152_0 Bus1=-999999243437318.1.0 phases=1 kV=0.159926 kW=0 kvar=0 model=1
New Load.5702152_1 Bus1=-999999243437318.2.0 phases=1 kV=0.159926 kW=0 kvar=0 model=1
New Load.5702152_2 Bus1=-999999243437318.3.0 phases=1 kV=0.159926 kW=0 kvar=0 model=1
New Load.5082620 Bus1=-999999219381691.3.0 phases=1 kV=0.069282 kW=0 kvar=0 model=1
New Load.5082621_0 Bus1=-999999158441502.1.0 phases=1 kV=0.069282 kW=0 kvar=0 model=1
New Load.5082621_1 Bus1=-999999158441502.2.0 phases=1 kV=0.069282 kW=0 kvar=0 model=1
New Load.5082621_2 Bus1=-999999158441502.3.0 phases=1 kV=0.069282 kW=0 kvar=0 model=1
New Load.5143642_0 Bus1=-999999156636875.1.0 phases=1 kV=0.159926 kW=0 kvar=0 model=1
New Load.5143642_1 Bus1=-999999156636875.2.0 phases=1 kV=0.159926 kW=0 kvar=0 model=1
New Load.5143642_2 Bus1=-999999156636875.3.0 phases=1 kV=0.159926 kW=0 kvar=0 model=1
New Load.5632737 Bus1=-999999164537967.1.0 phases=1 kV=0.069282 kW=0 kvar=0 model=1
New Load.5082018_0 Bus1=-999999158441762.1.2 phases=1 kV=0.069282 kW=0 kvar=0 model=1
New Load.5082018_1 Bus1=-999999158441762.2.3 phases=1 kV=0.069282 kW=0 kvar=0 model=1
New Load.5082018_2 Bus1=-999999158441762.3.1 phases=1 kV=0.069282 kW=0 kvar=0 model=1
New Load.5082022_0 Bus1=-999999151999474.1.0 phases=1 kV=0.069282 kW=0 kvar=0 model=1
New Load.5082022_1 Bus1=-999999151999474.2.0 phases=1 kV=0.069282 kW=0 kvar=0 model=1
New Load.5082022_2 Bus1=-999999151999474.3.0 phases=1 kV=0.069282 kW=0 kvar=0 model=1

! Generators
New Generator.500063346_PHOTOVOLTAIC_0 Bus1=-999999161222663.1.0 phases=1 kV=0.069282 kW=0 kvar=0 model=7
New Generator.500063346_PHOTOVOLTAIC_1 Bus1=-999999161222663.2.0 phases=1 kV=0.069282 kW=0 kvar=0 model=7
New Generator.500063346_PHOTOVOLTAIC_2 Bus1=-999999161222663.3.0 phases=1 kV=0.069282 kW=0 kvar=0 model=7
New Generator.NST-492376_PHOTOVOLTAIC_0 Bus1=-999999158440698.1.0 phases=1 kV=0.069282 kW=0 kvar=0 model=7
New Generator.NST-492376_PHOTOVOLTAIC_1 Bus1=-999999158440698.2.0 phases=1 kV=0.069282 kW=0 kvar=0 model=7
New Generator.NST-492376_PHOTOVOLTAIC_2 Bus1=-999999158440698.3.0 phases=1 kV=0.069282 kW=0 kvar=0 model=7
New Generator.NST-483533_PHOTOVOLTAIC_0 Bus1=-999999161222554.1.2 phases=1 kV=0.069282 kW=0 kvar=0 model=7
New Generator.NST-483533_PHOTOVOLTAIC_1 Bus1=-999999161222554.2.3 phases=1 kV=0.069282 kW=0 kvar=0 model=7
New Generator.NST-483533_PHOTOVOLTAIC_2 Bus1=-999999161222554.3.1 phases=1 kV=0.069282 kW=0 kvar=0 model=7
New Generator.NST-88402_PHOTOVOLTAIC_0 Bus1=-999999151999582.1.2 phases=1 kV=0.069282 kW=0 kvar=0 model=7
New Generator.NST-88402_PHOTOVOLTAIC_1 Bus1=-999999151999582.2.3 phases=1 kV=0.069282 kW=0 kvar=0 model=7
New Generator.NST-88402_PHOTOVOLTAIC_2 Bus1=-999999151999582.3.1 phases=1 kV=0.069282 kW=0 kvar=0 model=7
New Generator.NST-132837_PHOTOVOLTAIC_0 Bus1=-999999158441502.1.0 phases=1 kV=0.069282 kW=0 kvar=0 model=7
New Generator.NST-132837_PHOTOVOLTAIC_1 Bus1=-999999158441502.2.0 phases=1 kV=0.069282 kW=0 kvar=0 model=7
New Generator.NST-132837_PHOTOVOLTAIC_2 Bus1=-999999158441502.3.0 phases=1 kV=0.069282 kW=0 kvar=0 model=7
New Generator.500058559_PHOTOVOLTAIC_0 Bus1=-999999158441762.1.2 phases=1 kV=0.069282 kW=0 kvar=0 model=7
New Generator.500058559_PHOTOVOLTAIC_1 Bus1=-999999158441762.2.3 phases=1 kV=0.069282 kW=0 kvar=0 model=7
New Generator.500058559_PHOTOVOLTAIC_2 Bus1=-999999158441762.3.1 phases=1 kV=0.069282 kW=0 kvar=0 model=7
New Generator.500058621_PHOTOVOLTAIC_0 Bus1=-999999158441762.1.2 phases=1 kV=0.069282 kW=0 kvar=0 model=7
New Generator.500058621_PHOTOVOLTAIC_1 Bus1=-999999158441762.2.3 phases=1 kV=0.069282 kW=0 kvar=0 model=7
New Generator.500058621_PHOTOVOLTAIC_2 Bus1=-999999158441762.3.1 phases=1 kV=0.069282 kW=0 kvar=0 model=7

! Transformers
New Transformer.293588B40D96EE34E0637F61810A7CE3_0_0 phases=1 windings=2 xhl=0.5 %R=0.353554 %imag=1e-06 %noloadloss=0
~ wdg=1 bus=149046517.1.2 kV=12 kVA=166.667 conn=delta
~ wdg=2 bus=-999999149046517.1.0 kV=0.159926 kVA=166.667 conn=wye
New Transformer.293588B40D96EE34E0637F61810A7CE3_0_1 phases=1 windings=2 xhl=0.5 %R=0.353554 %imag=1e-06 %noloadloss=0
~ wdg=1 bus=149046517.2.3 kV=12 kVA=166.667 conn=delta
~ wdg=2 bus=-999999149046517.2.0 kV=0.159926 kVA=166.667 conn=wye
New Transformer.293588B40D96EE34E0637F61810A7CE3_0_2 phases=1 windings=2 xhl=0.5 %R=0.353554 %imag=1e-06 %noloadloss=0
~ wdg=1 bus=149046517.3.1 kV=12 kVA=166.667 conn=delta
~ wdg=2 bus=-999999149046517.3.0 kV=0.159926 kVA=166.667 conn=wye
New Transformer.293588B42ACDEE34E0637F61810A7CE3_1_0 phases=1 windings=2 xhl=0.5 %R=0.353554 %imag=1e-06 %noloadloss=0
~ wdg=1 bus=158440210.1.2 kV=12 kVA=100 conn=delta
~ wdg=2 bus=-999999158440210.1.2 kV=0.069282 kVA=100 conn=delta
New Transformer.293588B42ACDEE34E0637F61810A7CE3_1_1 phases=1 windings=2 xhl=0.5 %R=0.353554 %imag=1e-06 %noloadloss=0
~ wdg=1 bus=158440210.2.3 kV=12 kVA=100 conn=delta
~ wdg=2 bus=-999999158440210.2.3 kV=0.069282 kVA=100 conn=delta
New Transformer.293588B42ACDEE34E0637F61810A7CE3_1_2 phases=1 windings=2 xhl=0.5 %R=0.353554 %imag=1e-06 %noloadloss=0
~ wdg=1 bus=158440210.3.1 kV=12 kVA=100 conn=delta
~ wdg=2 bus=-999999158440210.3.1 kV=0.069282 kVA=100 conn=delta
New Transformer.293588B42ACEEE34E0637F61810A7CE3_2_0 phases=1 windings=2 xhl=0.5 %R=0.353554 %imag=1e-06 %noloadloss=0
~ wdg=1 bus=158440468.1.2 kV=12 kVA=166.667 conn=delta
~ wdg=2 bus=-999999158440468.1.0 kV=0.159926 kVA=166.667 conn=wye
New Transformer.293588B42ACEEE34E0637F61810A7CE3_2_1 phases=1 windings=2 xhl=0.5 %R=0.353554 %imag=1e-06 %noloadloss=0
~ wdg=1 bus=158440468.2.3 kV=12 kVA=166.667 conn=delta
~ wdg=2 bus=-999999158440468.2.0 kV=0.159926 kVA=166.667 conn=wye
New Transformer.293588B42ACEEE34E0637F61810A7CE3_2_2 phases=1 windings=2 xhl=0.5 %R=0.353554 %imag=1e-06 %noloadloss=0
~ wdg=1 bus=158440468.3.1 kV=12 kVA=166.667 conn=delta
~ wdg=2 bus=-999999158440468.3.0 kV=0.159926 kVA=166.667 conn=wye
New Transformer.293588B1F2E9EE34E0637F61810A7CE3_3_0 phases=1 windings=2 xhl=0.5 %R=0.353554 %imag=1e-06 %noloadloss=0
~ wdg=1 bus=40580316.1.0 kV=6.9282 kVA=25 conn=wye
~ wdg=2 bus=-99999940580316.1.0 kV=0.069282 kVA=25 conn=wye
New Transformer.293588B1F2E8EE34E0637F61810A7CE3_4_0 phases=1 windings=2 xhl=0.5 %R=0.353554 %imag=1e-06 %noloadloss=0
~ wdg=1 bus=40580191.1.0 kV=6.9282 kVA=25 conn=wye
~ wdg=2 bus=-99999940580191.1.0 kV=0.069282 kVA=25 conn=wye
New Transformer.293588B435F6EE34E0637F61810A7CE3_5_0 phases=1 windings=2 xhl=0.5 %R=0.353554 %imag=1e-06 %noloadloss=0
~ wdg=1 bus=161222663.1.2 kV=12 kVA=166.667 conn=delta
~ wdg=2 bus=-999999161222663.1.0 kV=0.069282 kVA=166.667 conn=wye
New Transformer.293588B435F6EE34E0637F61810A7CE3_5_1 phases=1 windings=2 xhl=0.5 %R=0.353554 %imag=1e-06 %noloadloss=0
~ wdg=1 bus=161222663.2.3 kV=12 kVA=166.667 conn=delta
~ wdg=2 bus=-999999161222663.2.0 kV=0.069282 kVA=166.667 conn=wye
New Transformer.293588B435F6EE34E0637F61810A7CE3_5_2 phases=1 windings=2 xhl=0.5 %R=0.353554 %imag=1e-06 %noloadloss=0
~ wdg=1 bus=161222663.3.1 kV=12 kVA=166.667 conn=delta
~ wdg=2 bus=-999999161222663.3.0 kV=0.069282 kVA=166.667 conn=wye
New Transformer.293588B42AD0EE34E0637F61810A7CE3_6_0 phases=1 windings=2 xhl=0.5 %R=0.353554 %imag=1e-06 %noloadloss=0
~ wdg=1 bus=158440698.1.2 kV=12 kVA=166.667 conn=delta
~ wdg=2 bus=-999999158440698.1.0 kV=0.069282 kVA=166.667 conn=wye
New Transformer.293588B42AD0EE34E0637F61810A7CE3_6_1 phases=1 windings=2 xhl=0.5 %R=0.353554 %imag=1e-06 %noloadloss=0
~ wdg=1 bus=158440698.2.3 kV=12 kVA=166.667 conn=delta
~ wdg=2 bus=-999999158440698.2.0 kV=0.069282 kVA=166.667 conn=wye
New Transformer.293588B42AD0EE34E0637F61810A7CE3_6_2 phases=1 windings=2 xhl=0.5 %R=0.353554 %imag=1e-06 %noloadloss=0
~ wdg=1 bus=158440698.3.1 kV=12 kVA=166.667 conn=delta
~ wdg=2 bus=-999999158440698.3.0 kV=0.069282 kVA=166.667 conn=wye
New Transformer.293588B42BACEE34E0637F61810A7CE3_7_0 phases=1 windings=2 xhl=0.5 %R=0.353554 %imag=1e-06 %noloadloss=0
~ wdg=1 bus=158440903.2.0 kV=6.9282 kVA=75 conn=wye
~ wdg=2 bus=-999999158440903.2.0 kV=0.069282 kVA=75 conn=wye
New Transformer.293588B3F86DEE34E0637F61810A7CE3_8_0 phases=1 windings=2 xhl=0.5 %R=0.353554 %imag=1e-06 %noloadloss=0
~ wdg=1 bus=148224150.1.2 kV=12 kVA=75 conn=delta
~ wdg=2 bus=-999999148224150.1.0 kV=0.159926 kVA=75 conn=wye
New Transformer.293588B3F86DEE34E0637F61810A7CE3_8_1 phases=1 windings=2 xhl=0.5 %R=0.353554 %imag=1e-06 %noloadloss=0
~ wdg=1 bus=148224150.2.3 kV=12 kVA=75 conn=delta
~ wdg=2 bus=-999999148224150.2.0 kV=0.159926 kVA=75 conn=wye
New Transformer.293588B3F86DEE34E0637F61810A7CE3_8_2 phases=1 windings=2 xhl=0.5 %R=0.353554 %imag=1e-06 %noloadloss=0
~ wdg=1 bus=148224150.3.1 kV=12 kVA=75 conn=delta
~ wdg=2 bus=-999999148224150.3.0 kV=0.159926 kVA=75 conn=wye
New Transformer.293588B38768EE34E0637F61810A7CE3_9_0 phases=1 windings=2 xhl=0.5 %R=0.353554 %imag=1e-06 %noloadloss=0
~ wdg=1 bus=96226697.1.2 kV=12 kVA=50 conn=delta
~ wdg=2 bus=-99999996226697.1.0 kV=0.069282 kVA=50 conn=wye
New Transformer.293588B38768EE34E0637F61810A7CE3_9_1 phases=1 windings=2 xhl=0.5 %R=0.353554 %imag=1e-06 %noloadloss=0
~ wdg=1 bus=96226697.2.3 kV=12 kVA=50 conn=delta
~ wdg=2 bus=-99999996226697.2.0 kV=0.069282 kVA=50 conn=wye
New Transformer.293588B38768EE34E0637F61810A7CE3_9_2 phases=1 windings=2 xhl=0.5 %R=0.353554 %imag=1e-06 %noloadloss=0
~ wdg=1 bus=96226697.3.1 kV=12 kVA=50 conn=delta
~ wdg=2 bus=-99999996226697.3.0 kV=0.069282 kVA=50 conn=wye
New Transformer.293588B42BADEE34E0637F61810A7CE3_10_0 phases=1 windings=2 xhl=0.5 %R=0.353554 %imag=1e-06 %noloadloss=0
~ wdg=1 bus=158440953.1.2 kV=12 kVA=166.667 conn=delta
~ wdg=2 bus=-999999158440953.1.0 kV=0.069282 kVA=166.667 conn=wye
New Transformer.293588B42BADEE34E0637F61810A7CE3_10_1 phases=1 windings=2 xhl=0.5 %R=0.353554 %imag=1e-06 %noloadloss=0
~ wdg=1 bus=158440953.2.3 kV=12 kVA=166.667 conn=delta
~ wdg=2 bus=-999999158440953.2.0 kV=0.069282 kVA=166.667 conn=wye
New Transformer.293588B42BADEE34E0637F61810A7CE3_10_2 phases=1 windings=2 xhl=0.5 %R=0.353554 %imag=1e-06 %noloadloss=0
~ wdg=1 bus=158440953.3.1 kV=12 kVA=166.667 conn=delta
~ wdg=2 bus=-999999158440953.3.0 kV=0.069282 kVA=166.667 conn=wye
New Transformer.293588B3E48DEE34E0637F61810A7CE3_11_0 phases=1 windings=2 xhl=0.5 %R=0.353554 %imag=1e-06 %noloadloss=0
~ wdg=1 bus=135545756.1.2 kV=12 kVA=50 conn=delta
~ wdg=2 bus=-999999135545756.1.0 kV=0.069282 kVA=50 conn=wye
New Transformer.293588B3E48DEE34E0637F61810A7CE3_11_1 phases=1 windings=2 xhl=0.5 %R=0.353554 %imag=1e-06 %noloadloss=0
~ wdg=1 bus=135545756.2.3 kV=12 kVA=50 conn=delta
~ wdg=2 bus=-999999135545756.2.0 kV=0.069282 kVA=50 conn=wye
New Transformer.293588B3E48DEE34E0637F61810A7CE3_11_2 phases=1 windings=2 xhl=0.5 %R=0.353554 %imag=1e-06 %noloadloss=0
~ wdg=1 bus=135545756.3.1 kV=12 kVA=50 conn=delta
~ wdg=2 bus=-999999135545756.3.0 kV=0.069282 kVA=50 conn=wye
New Transformer.293588B3F456EE34E0637F61810A7CE3_12_0 phases=1 windings=2 xhl=0.5 %R=0.353554 %imag=1e-06 %noloadloss=0
~ wdg=1 bus=144099061.1.2 kV=12 kVA=100 conn=delta
~ wdg=2 bus=-999999144099061.1.0 kV=0.069282 kVA=100 conn=wye
New Transformer.293588B3F456EE34E0637F61810A7CE3_12_1 phases=1 windings=2 xhl=0.5 %R=0.353554 %imag=1e-06 %noloadloss=0
~ wdg=1 bus=144099061.2.3 kV=12 kVA=100 conn=delta
~ wdg=2 bus=-999999144099061.2.0 kV=0.069282 kVA=100 conn=wye
New Transformer.293588B3F456EE34E0637F61810A7CE3_12_2 phases=1 windings=2 xhl=0.5 %R=0.353554 %imag=1e-06 %noloadloss=0
~ wdg=1 bus=144099061.3.1 kV=12 kVA=100 conn=delta
~ wdg=2 bus=-999999144099061.3.0 kV=0.069282 kVA=100 conn=wye
New Transformer.293588B42BABEE34E0637F61810A7CE3_13_0 phases=1 windings=2 xhl=0.5 %R=0.353554 %imag=1e-06 %noloadloss=0
~ wdg=1 bus=158440812.1.2 kV=12 kVA=250 conn=delta
~ wdg=2 bus=-999999158440812.1.0 kV=0.159926 kVA=250 conn=wye
New Transformer.293588B42BABEE34E0637F61810A7CE3_13_1 phases=1 windings=2 xhl=0.5 %R=0.353554 %imag=1e-06 %noloadloss=0
~ wdg=1 bus=158440812.2.3 kV=12 kVA=250 conn=delta
~ wdg=2 bus=-999999158440812.2.0 kV=0.159926 kVA=250 conn=wye
New Transformer.293588B42BABEE34E0637F61810A7CE3_13_2 phases=1 windings=2 xhl=0.5 %R=0.353554 %imag=1e-06 %noloadloss=0
~ wdg=1 bus=158440812.3.1 kV=12 kVA=250 conn=delta
~ wdg=2 bus=-999999158440812.3.0 kV=0.159926 kVA=250 conn=wye
New Transformer.293588B41961EE34E0637F61810A7CE3_14_0 phases=1 windings=2 xhl=0.5 %R=0.353554 %imag=1e-06 %noloadloss=0
~ wdg=1 bus=151999474.1.2 kV=12 kVA=166.667 conn=delta
~ wdg=2 bus=-999999151999474.1.0 kV=0.069282 kVA=166.667 conn=wye
New Transformer.293588B41961EE34E0637F61810A7CE3_14_1 phases=1 windings=2 xhl=0.5 %R=0.353554 %imag=1e-06 %noloadloss=0
~ wdg=1 bus=151999474.2.3 kV=12 kVA=166.667 conn=delta
~ wdg=2 bus=-999999151999474.2.0 kV=0.069282 kVA=166.667 conn=wye
New Transformer.293588B41961EE34E0637F61810A7CE3_14_2 phases=1 windings=2 xhl=0.5 %R=0.353554 %imag=1e-06 %noloadloss=0
~ wdg=1 bus=151999474.3.1 kV=12 kVA=166.667 conn=delta
~ wdg=2 bus=-999999151999474.3.0 kV=0.069282 kVA=166.667 conn=wye
New Transformer.293588B435F5EE34E0637F61810A7CE3_15_0 phases=1 windings=2 xhl=0.5 %R=0.353554 %imag=1e-06 %noloadloss=0
~ wdg=1 bus=161222554.1.2 kV=12 kVA=50 conn=delta
~ wdg=2 bus=-999999161222554.1.2 kV=0.069282 kVA=50 conn=delta
New Transformer.293588B435F5EE34E0637F61810A7CE3_15_1 phases=1 windings=2 xhl=0.5 %R=0.353554 %imag=1e-06 %noloadloss=0
~ wdg=1 bus=161222554.2.3 kV=12 kVA=50 conn=delta
~ wdg=2 bus=-999999161222554.2.3 kV=0.069282 kVA=50 conn=delta
New Transformer.293588B435F5EE34E0637F61810A7CE3_15_2 phases=1 windings=2 xhl=0.5 %R=0.353554 %imag=1e-06 %noloadloss=0
~ wdg=1 bus=161222554.3.1 kV=12 kVA=50 conn=delta
~ wdg=2 bus=-999999161222554.3.1 kV=0.069282 kVA=50 conn=delta
New Transformer.293588B40855EE34E0637F61810A7CE3_16_0 phases=1 windings=2 xhl=0.5 %R=0.353554 %imag=1e-06 %noloadloss=0
~ wdg=1 bus=149724758.1.2 kV=12 kVA=50 conn=delta
~ wdg=2 bus=-999999149724758.1.0 kV=0.069282 kVA=50 conn=wye
New Transformer.293588B40855EE34E0637F61810A7CE3_16_1 phases=1 windings=2 xhl=0.5 %R=0.353554 %imag=1e-06 %noloadloss=0
~ wdg=1 bus=149724758.2.3 kV=12 kVA=50 conn=delta
~ wdg=2 bus=-999999149724758.2.0 kV=0.069282 kVA=50 conn=wye
New Transformer.293588B40855EE34E0637F61810A7CE3_16_2 phases=1 windings=2 xhl=0.5 %R=0.353554 %imag=1e-06 %noloadloss=0
~ wdg=1 bus=149724758.3.1 kV=12 kVA=50 conn=delta
~ wdg=2 bus=-999999149724758.3.0 kV=0.069282 kVA=50 conn=wye
New Transformer.293588B41962EE34E0637F61810A7CE3_17_0 phases=1 windings=2 xhl=0.5 %R=0.353554 %imag=1e-06 %noloadloss=0
~ wdg=1 bus=151999582.1.2 kV=12 kVA=166.667 conn=delta
~ wdg=2 bus=-999999151999582.1.2 kV=0.069282 kVA=166.667 conn=delta
New Transformer.293588B41962EE34E0637F61810A7CE3_17_1 phases=1 windings=2 xhl=0.5 %R=0.353554 %imag=1e-06 %noloadloss=0
~ wdg=1 bus=151999582.2.3 kV=12 kVA=166.667 conn=delta
~ wdg=2 bus=-999999151999582.2.3 kV=0.069282 kVA=166.667 conn=delta
New Transformer.293588B41962EE34E0637F61810A7CE3_17_2 phases=1 windings=2 xhl=0.5 %R=0.353554 %imag=1e-06 %noloadloss=0
~ wdg=1 bus=151999582.3.1 kV=12 kVA=166.667 conn=delta
~ wdg=2 bus=-999999151999582.3.1 kV=0.069282 kVA=166.667 conn=delta
New Transformer.293588B14656EE34E0637F61810A7CE3_18_0 phases=1 windings=2 xhl=0.5 %R=0.353554 %imag=1e-06 %noloadloss=0
~ wdg=1 bus=28289746.1.2 kV=12 kVA=100 conn=delta
~ wdg=2 bus=-99999928289746.1.0 kV=0.159926 kVA=100 conn=wye
New Transformer.293588B14656EE34E0637F61810A7CE3_18_1 phases=1 windings=2 xhl=0.5 %R=0.353554 %imag=1e-06 %noloadloss=0
~ wdg=1 bus=28289746.2.3 kV=12 kVA=100 conn=delta
~ wdg=2 bus=-99999928289746.2.0 kV=0.159926 kVA=100 conn=wye
New Transformer.293588B14656EE34E0637F61810A7CE3_18_2 phases=1 windings=2 xhl=0.5 %R=0.353554 %imag=1e-06 %noloadloss=0
~ wdg=1 bus=28289746.3.1 kV=12 kVA=100 conn=delta
~ wdg=2 bus=-99999928289746.3.0 kV=0.159926 kVA=100 conn=wye
New Transformer.293588B4F9B1EE34E0637F61810A7CE3_19_0 phases=1 windings=2 xhl=0.5 %R=0.353554 %imag=1e-06 %noloadloss=0
~ wdg=1 bus=243437318.1.2 kV=12 kVA=100 conn=delta
~ wdg=2 bus=-999999243437318.1.0 kV=0.159926 kVA=100 conn=wye
New Transformer.293588B4F9B1EE34E0637F61810A7CE3_19_1 phases=1 windings=2 xhl=0.5 %R=0.353554 %imag=1e-06 %noloadloss=0
~ wdg=1 bus=243437318.2.3 kV=12 kVA=100 conn=delta
~ wdg=2 bus=-999999243437318.2.0 kV=0.159926 kVA=100 conn=wye
New Transformer.293588B4F9B1EE34E0637F61810A7CE3_19_2 phases=1 windings=2 xhl=0.5 %R=0.353554 %imag=1e-06 %noloadloss=0
~ wdg=1 bus=243437318.3.1 kV=12 kVA=100 conn=delta
~ wdg=2 bus=-999999243437318.3.0 kV=0.159926 kVA=100 conn=wye
New Transformer.293588B41964EE34E0637F61810A7CE3_20_0 phases=1 windings=2 xhl=0.5 %R=0.353554 %imag=1e-06 %noloadloss=0
~ wdg=1 bus=151999728.1.2 kV=12 kVA=166.667 conn=delta
~ wdg=2 bus=-999999151999728.1.0 kV=0.159926 kVA=166.667 conn=wye
New Transformer.293588B41964EE34E0637F61810A7CE3_20_1 phases=1 windings=2 xhl=0.5 %R=0.353554 %imag=1e-06 %noloadloss=0
~ wdg=1 bus=151999728.2.3 kV=12 kVA=166.667 conn=delta
~ wdg=2 bus=-999999151999728.2.0 kV=0.159926 kVA=166.667 conn=wye
New Transformer.293588B41964EE34E0637F61810A7CE3_20_2 phases=1 windings=2 xhl=0.5 %R=0.353554 %imag=1e-06 %noloadloss=0
~ wdg=1 bus=151999728.3.1 kV=12 kVA=166.667 conn=delta
~ wdg=2 bus=-999999151999728.3.0 kV=0.159926 kVA=166.667 conn=wye
New Transformer.293588B42BAAEE34E0637F61810A7CE3_21_0 phases=1 windings=2 xhl=0.5 %R=0.353554 %imag=1e-06 %noloadloss=0
~ wdg=1 bus=158440757.1.2 kV=12 kVA=333.333 conn=delta
~ wdg=2 bus=-999999158440757.1.0 kV=0.159926 kVA=333.333 conn=wye
New Transformer.293588B42BAAEE34E0637F61810A7CE3_21_1 phases=1 windings=2 xhl=0.5 %R=0.353554 %imag=1e-06 %noloadloss=0
~ wdg=1 bus=158440757.2.3 kV=12 kVA=333.333 conn=delta
~ wdg=2 bus=-999999158440757.2.0 kV=0.159926 kVA=333.333 conn=wye
New Transformer.293588B42BAAEE34E0637F61810A7CE3_21_2 phases=1 windings=2 xhl=0.5 %R=0.353554 %imag=1e-06 %noloadloss=0
~ wdg=1 bus=158440757.3.1 kV=12 kVA=333.333 conn=delta
~ wdg=2 bus=-999999158440757.3.0 kV=0.159926 kVA=333.333 conn=wye
New Transformer.293588B41963EE34E0637F61810A7CE3_22_0 phases=1 windings=2 xhl=0.5 %R=0.353554 %imag=1e-06 %noloadloss=0
~ wdg=1 bus=151999678.1.2 kV=12 kVA=100 conn=delta
~ wdg=2 bus=-999999151999678.1.0 kV=0.159926 kVA=100 conn=wye
New Transformer.293588B41963EE34E0637F61810A7CE3_22_1 phases=1 windings=2 xhl=0.5 %R=0.353554 %imag=1e-06 %noloadloss=0
~ wdg=1 bus=151999678.2.3 kV=12 kVA=100 conn=delta
~ wdg=2 bus=-999999151999678.2.0 kV=0.159926 kVA=100 conn=wye
New Transformer.293588B41963EE34E0637F61810A7CE3_22_2 phases=1 windings=2 xhl=0.5 %R=0.353554 %imag=1e-06 %noloadloss=0
~ wdg=1 bus=151999678.3.1 kV=12 kVA=100 conn=delta
~ wdg=2 bus=-999999151999678.3.0 kV=0.159926 kVA=100 conn=wye
New Transformer.293588B42BAEEE34E0637F61810A7CE3_23_0 phases=1 windings=2 xhl=0.5 %R=0.353554 %imag=1e-06 %noloadloss=0
~ wdg=1 bus=158441033.1.2 kV=12 kVA=833.333 conn=delta
~ wdg=2 bus=-999999158441033.1.0 kV=0.159926 kVA=833.333 conn=wye
New Transformer.293588B42BAEEE34E0637F61810A7CE3_23_1 phases=1 windings=2 xhl=0.5 %R=0.353554 %imag=1e-06 %noloadloss=0
~ wdg=1 bus=158441033.2.3 kV=12 kVA=833.333 conn=delta
~ wdg=2 bus=-999999158441033.2.0 kV=0.159926 kVA=833.333 conn=wye
New Transformer.293588B42BAEEE34E0637F61810A7CE3_23_2 phases=1 windings=2 xhl=0.5 %R=0.353554 %imag=1e-06 %noloadloss=0
~ wdg=1 bus=158441033.3.1 kV=12 kVA=833.333 conn=delta
~ wdg=2 bus=-999999158441033.3.0 kV=0.159926 kVA=833.333 conn=wye
New Transformer.293588B4C8ACEE34E0637F61810A7CE3_24_0 phases=1 windings=2 xhl=0.5 %R=0.353554 %imag=1e-06 %noloadloss=0
~ wdg=1 bus=223663679.1.0 kV=6.9282 kVA=25 conn=wye
~ wdg=2 bus=-999999223663679.1.0 kV=0.069282 kVA=25 conn=wye
New Transformer.293588B43E83EE34E0637F61810A7CE3_25_0 phases=1 windings=2 xhl=0.5 %R=0.353554 %imag=1e-06 %noloadloss=0
~ wdg=1 bus=164537885.3.0 kV=6.9282 kVA=75 conn=wye
~ wdg=2 bus=-999999164537885.3.0 kV=0.069282 kVA=75 conn=wye
New Transformer.293588B43842EE34E0637F61810A7CE3_26_0 phases=1 windings=2 xhl=0.5 %R=0.353554 %imag=1e-06 %noloadloss=0
~ wdg=1 bus=156636825.1.2 kV=12 kVA=166.667 conn=delta
~ wdg=2 bus=-999999156636825.1.0 kV=0.159926 kVA=166.667 conn=wye
New Transformer.293588B43842EE34E0637F61810A7CE3_26_1 phases=1 windings=2 xhl=0.5 %R=0.353554 %imag=1e-06 %noloadloss=0
~ wdg=1 bus=156636825.2.3 kV=12 kVA=166.667 conn=delta
~ wdg=2 bus=-999999156636825.2.0 kV=0.159926 kVA=166.667 conn=wye
New Transformer.293588B43842EE34E0637F61810A7CE3_26_2 phases=1 windings=2 xhl=0.5 %R=0.353554 %imag=1e-06 %noloadloss=0
~ wdg=1 bus=156636825.3.1 kV=12 kVA=166.667 conn=delta
~ wdg=2 bus=-999999156636825.3.0 kV=0.159926 kVA=166.667 conn=wye
New Transformer.293588B43845EE34E0637F61810A7CE3_27_0 phases=1 windings=2 xhl=0.5 %R=0.353554 %imag=1e-06 %noloadloss=0
~ wdg=1 bus=156637013.1.2 kV=12 kVA=166.667 conn=delta
~ wdg=2 bus=-999999156637013.1.0 kV=0.159926 kVA=166.667 conn=wye
New Transformer.293588B43845EE34E0637F61810A7CE3_27_1 phases=1 windings=2 xhl=0.5 %R=0.353554 %imag=1e-06 %noloadloss=0
~ wdg=1 bus=156637013.2.3 kV=12 kVA=166.667 conn=delta
~ wdg=2 bus=-999999156637013.2.0 kV=0.159926 kVA=166.667 conn=wye
New Transformer.293588B43845EE34E0637F61810A7CE3_27_2 phases=1 windings=2 xhl=0.5 %R=0.353554 %imag=1e-06 %noloadloss=0
~ wdg=1 bus=156637013.3.1 kV=12 kVA=166.667 conn=delta
~ wdg=2 bus=-999999156637013.3.0 kV=0.159926 kVA=166.667 conn=wye
New Transformer.293588B42BAFEE34E0637F61810A7CE3_28_0 phases=1 windings=2 xhl=0.5 %R=0.353554 %imag=1e-06 %noloadloss=0
~ wdg=1 bus=158441069.1.2 kV=12 kVA=250 conn=delta
~ wdg=2 bus=-999999158441069.1.0 kV=0.159926 kVA=250 conn=wye
New Transformer.293588B42BAFEE34E0637F61810A7CE3_28_1 phases=1 windings=2 xhl=0.5 %R=0.353554 %imag=1e-06 %noloadloss=0
~ wdg=1 bus=158441069.2.3 kV=12 kVA=250 conn=delta
~ wdg=2 bus=-999999158441069.2.0 kV=0.159926 kVA=250 conn=wye
New Transformer.293588B42BAFEE34E0637F61810A7CE3_28_2 phases=1 windings=2 xhl=0.5 %R=0.353554 %imag=1e-06 %noloadloss=0
~ wdg=1 bus=158441069.3.1 kV=12 kVA=250 conn=delta
~ wdg=2 bus=-999999158441069.3.0 kV=0.159926 kVA=250 conn=wye
New Transformer.293588B42ACFEE34E0637F61810A7CE3_29_0 phases=1 windings=2 xhl=0.5 %R=0.353554 %imag=1e-06 %noloadloss=0
~ wdg=1 bus=158440578.1.2 kV=12 kVA=166.667 conn=delta
~ wdg=2 bus=-999999158440578.1.0 kV=0.159926 kVA=166.667 conn=wye
New Transformer.293588B42ACFEE34E0637F61810A7CE3_29_1 phases=1 windings=2 xhl=0.5 %R=0.353554 %imag=1e-06 %noloadloss=0
~ wdg=1 bus=158440578.2.3 kV=12 kVA=166.667 conn=delta
~ wdg=2 bus=-999999158440578.2.0 kV=0.159926 kVA=166.667 conn=wye
New Transformer.293588B42ACFEE34E0637F61810A7CE3_29_2 phases=1 windings=2 xhl=0.5 %R=0.353554 %imag=1e-06 %noloadloss=0
~ wdg=1 bus=158440578.3.1 kV=12 kVA=166.667 conn=delta
~ wdg=2 bus=-999999158440578.3.0 kV=0.159926 kVA=166.667 conn=wye
New Transformer.293588B4C2A8EE34E0637F61810A7CE3_30_0 phases=1 windings=2 xhl=0.5 %R=0.353554 %imag=1e-06 %noloadloss=0
~ wdg=1 bus=219381691.3.0 kV=6.9282 kVA=75 conn=wye
~ wdg=2 bus=-999999219381691.3.0 kV=0.069282 kVA=75 conn=wye
New Transformer.293588B42BB4EE34E0637F61810A7CE3_31_0 phases=1 windings=2 xhl=0.5 %R=0.353554 %imag=1e-06 %noloadloss=0
~ wdg=1 bus=158441502.1.2 kV=12 kVA=100 conn=delta
~ wdg=2 bus=-999999158441502.1.0 kV=0.069282 kVA=100 conn=wye
New Transformer.293588B42BB4EE34E0637F61810A7CE3_31_1 phases=1 windings=2 xhl=0.5 %R=0.353554 %imag=1e-06 %noloadloss=0
~ wdg=1 bus=158441502.2.3 kV=12 kVA=100 conn=delta
~ wdg=2 bus=-999999158441502.2.0 kV=0.069282 kVA=100 conn=wye
New Transformer.293588B42BB4EE34E0637F61810A7CE3_31_2 phases=1 windings=2 xhl=0.5 %R=0.353554 %imag=1e-06 %noloadloss=0
~ wdg=1 bus=158441502.3.1 kV=12 kVA=100 conn=delta
~ wdg=2 bus=-999999158441502.3.0 kV=0.069282 kVA=100 conn=wye
New Transformer.293588B3939EEE34E0637F61810A7CE3_32_0 phases=1 windings=2 xhl=0.5 %R=0.353554 %imag=1e-06 %noloadloss=0
~ wdg=1 bus=95372504.3.0 kV=6.9282 kVA=75 conn=wye
~ wdg=2 bus=-99999995372504.3.0 kV=0.069282 kVA=75 conn=wye
New Transformer.293588A60AD1EE34E0637F61810A7CE3_33_0 phases=1 windings=2 xhl=0.5 %R=0.353554 %imag=1e-06 %noloadloss=0
~ wdg=1 bus=40579871.1.0 kV=6.9282 kVA=12.5 conn=wye
~ wdg=2 bus=-99999940579871.1.0 kV=0.069282 kVA=12.5 conn=wye
New Transformer.293588A60AD1EE34E0637F61810A7CE3_33_1 phases=1 windings=2 xhl=0.5 %R=0.353554 %imag=1e-06 %noloadloss=0
~ wdg=1 bus=40579871.2.0 kV=6.9282 kVA=12.5 conn=wye
~ wdg=2 bus=-99999940579871.2.0 kV=0.069282 kVA=12.5 conn=wye
New Transformer.293588B42BB5EE34E0637F61810A7CE3_34_0 phases=1 windings=2 xhl=0.5 %R=0.353554 %imag=1e-06 %noloadloss=0
~ wdg=1 bus=158441557.1.2 kV=12 kVA=166.667 conn=delta
~ wdg=2 bus=-999999158441557.1.0 kV=0.159926 kVA=166.667 conn=wye
New Transformer.293588B42BB5EE34E0637F61810A7CE3_34_1 phases=1 windings=2 xhl=0.5 %R=0.353554 %imag=1e-06 %noloadloss=0
~ wdg=1 bus=158441557.2.3 kV=12 kVA=166.667 conn=delta
~ wdg=2 bus=-999999158441557.2.0 kV=0.159926 kVA=166.667 conn=wye
New Transformer.293588B42BB5EE34E0637F61810A7CE3_34_2 phases=1 windings=2 xhl=0.5 %R=0.353554 %imag=1e-06 %noloadloss=0
~ wdg=1 bus=158441557.3.1 kV=12 kVA=166.667 conn=delta
~ wdg=2 bus=-999999158441557.3.0 kV=0.159926 kVA=166.667 conn=wye
New Transformer.293588B43844EE34E0637F61810A7CE3_35_0 phases=1 windings=2 xhl=0.5 %R=0.353554 %imag=1e-06 %noloadloss=0
~ wdg=1 bus=156636924.1.2 kV=12 kVA=166.667 conn=delta
~ wdg=2 bus=-999999156636924.1.0 kV=0.159926 kVA=166.667 conn=wye
New Transformer.293588B43844EE34E0637F61810A7CE3_35_1 phases=1 windings=2 xhl=0.5 %R=0.353554 %imag=1e-06 %noloadloss=0
~ wdg=1 bus=156636924.2.3 kV=12 kVA=166.667 conn=delta
~ wdg=2 bus=-999999156636924.2.0 kV=0.159926 kVA=166.667 conn=wye
New Transformer.293588B43844EE34E0637F61810A7CE3_35_2 phases=1 windings=2 xhl=0.5 %R=0.353554 %imag=1e-06 %noloadloss=0
~ wdg=1 bus=156636924.3.1 kV=12 kVA=166.667 conn=delta
~ wdg=2 bus=-999999156636924.3.0 kV=0.159926 kVA=166.667 conn=wye
New Transformer.293588B42BB6EE34E0637F61810A7CE3_36_0 phases=1 windings=2 xhl=0.5 %R=0.353554 %imag=1e-06 %noloadloss=0
~ wdg=1 bus=158441615.1.2 kV=12 kVA=100 conn=delta
~ wdg=2 bus=-999999158441615.1.0 kV=0.069282 kVA=100 conn=wye
New Transformer.293588B42BB6EE34E0637F61810A7CE3_36_1 phases=1 windings=2 xhl=0.5 %R=0.353554 %imag=1e-06 %noloadloss=0
~ wdg=1 bus=158441615.2.3 kV=12 kVA=100 conn=delta
~ wdg=2 bus=-999999158441615.2.0 kV=0.069282 kVA=100 conn=wye
New Transformer.293588B42BB6EE34E0637F61810A7CE3_36_2 phases=1 windings=2 xhl=0.5 %R=0.353554 %imag=1e-06 %noloadloss=0
~ wdg=1 bus=158441615.3.1 kV=12 kVA=100 conn=delta
~ wdg=2 bus=-999999158441615.3.0 kV=0.069282 kVA=100 conn=wye
New Transformer.293588B43843EE34E0637F61810A7CE3_37_0 phases=1 windings=2 xhl=0.5 %R=0.353554 %imag=1e-06 %noloadloss=0
~ wdg=1 bus=156636875.1.2 kV=12 kVA=100 conn=delta
~ wdg=2 bus=-999999156636875.1.0 kV=0.159926 kVA=100 conn=wye
New Transformer.293588B43843EE34E0637F61810A7CE3_37_1 phases=1 windings=2 xhl=0.5 %R=0.353554 %imag=1e-06 %noloadloss=0
~ wdg=1 bus=156636875.2.3 kV=12 kVA=100 conn=delta
~ wdg=2 bus=-999999156636875.2.0 kV=0.159926 kVA=100 conn=wye
New Transformer.293588B43843EE34E0637F61810A7CE3_37_2 phases=1 windings=2 xhl=0.5 %R=0.353554 %imag=1e-06 %noloadloss=0
~ wdg=1 bus=156636875.3.1 kV=12 kVA=100 conn=delta
~ wdg=2 bus=-999999156636875.3.0 kV=0.159926 kVA=100 conn=wye
New Transformer.293588B43E84EE34E0637F61810A7CE3_38_0 phases=1 windings=2 xhl=0.5 %R=0.353554 %imag=1e-06 %noloadloss=0
~ wdg=1 bus=164537967.1.0 kV=6.9282 kVA=75 conn=wye
~ wdg=2 bus=-999999164537967.1.0 kV=0.069282 kVA=75 conn=wye
New Transformer.293588B42C94EE34E0637F61810A7CE3_39_0 phases=1 windings=2 xhl=0.5 %R=0.353554 %imag=1e-06 %noloadloss=0
~ wdg=1 bus=158441762.1.2 kV=12 kVA=100 conn=delta
~ wdg=2 bus=-999999158441762.1.2 kV=0.069282 kVA=100 conn=delta
New Transformer.293588B42C94EE34E0637F61810A7CE3_39_1 phases=1 windings=2 xhl=0.5 %R=0.353554 %imag=1e-06 %noloadloss=0
~ wdg=1 bus=158441762.2.3 kV=12 kVA=100 conn=delta
~ wdg=2 bus=-999999158441762.2.3 kV=0.069282 kVA=100 conn=delta
New Transformer.293588B42C94EE34E0637F61810A7CE3_39_2 phases=1 windings=2 xhl=0.5 %R=0.353554 %imag=1e-06 %noloadloss=0
~ wdg=1 bus=158441762.3.1 kV=12 kVA=100 conn=delta
~ wdg=2 bus=-999999158441762.3.1 kV=0.069282 kVA=100 conn=delta
New Transformer.293588B42BB7EE34E0637F61810A7CE3_40_0 phases=1 windings=2 xhl=0.5 %R=0.353554 %imag=1e-06 %noloadloss=0
~ wdg=1 bus=158441680.1.2 kV=12 kVA=50 conn=delta
~ wdg=2 bus=-999999158441680.1.0 kV=0.159926 kVA=50 conn=wye
New Transformer.293588B42BB7EE34E0637F61810A7CE3_40_1 phases=1 windings=2 xhl=0.5 %R=0.353554 %imag=1e-06 %noloadloss=0
~ wdg=1 bus=158441680.2.3 kV=12 kVA=50 conn=delta
~ wdg=2 bus=-999999158441680.2.0 kV=0.159926 kVA=50 conn=wye
New Transformer.293588B42BB7EE34E0637F61810A7CE3_40_2 phases=1 windings=2 xhl=0.5 %R=0.353554 %imag=1e-06 %noloadloss=0
~ wdg=1 bus=158441680.3.1 kV=12 kVA=50 conn=delta
~ wdg=2 bus=-999999158441680.3.0 kV=0.159926 kVA=50 conn=wye
New Transformer.293588B1F2E5EE34E0637F61810A7CE3_41_0 phases=1 windings=2 xhl=0.5 %R=0.353554 %imag=1e-06 %noloadloss=0
~ wdg=1 bus=40578635.1.2 kV=12 kVA=166.667 conn=delta
~ wdg=2 bus=-99999940578635.1.0 kV=0.159926 kVA=166.667 conn=wye
New Transformer.293588B1F2E5EE34E0637F61810A7CE3_41_1 phases=1 windings=2 xhl=0.5 %R=0.353554 %imag=1e-06 %noloadloss=0
~ wdg=1 bus=40578635.2.3 kV=12 kVA=166.667 conn=delta
~ wdg=2 bus=-99999940578635.2.0 kV=0.159926 kVA=166.667 conn=wye
New Transformer.293588B1F2E5EE34E0637F61810A7CE3_41_2 phases=1 windings=2 xhl=0.5 %R=0.353554 %imag=1e-06 %noloadloss=0
~ wdg=1 bus=40578635.3.1 kV=12 kVA=166.667 conn=delta
~ wdg=2 bus=-99999940578635.3.0 kV=0.159926 kVA=166.667 conn=wye
New Transformer.293588B43846EE34E0637F61810A7CE3_42_0 phases=1 windings=2 xhl=0.5 %R=0.353554 %imag=1e-06 %noloadloss=0
~ wdg=1 bus=156637120.1.2 kV=12 kVA=500 conn=delta
~ wdg=2 bus=-999999156637120.1.0 kV=0.159926 kVA=500 conn=wye
New Transformer.293588B43846EE34E0637F61810A7CE3_42_1 phases=1 windings=2 xhl=0.5 %R=0.353554 %imag=1e-06 %noloadloss=0
~ wdg=1 bus=156637120.2.3 kV=12 kVA=500 conn=delta
~ wdg=2 bus=-999999156637120.2.0 kV=0.159926 kVA=500 conn=wye
New Transformer.293588B43846EE34E0637F61810A7CE3_42_2 phases=1 windings=2 xhl=0.5 %R=0.353554 %imag=1e-06 %noloadloss=0
~ wdg=1 bus=156637120.3.1 kV=12 kVA=500 conn=delta
~ wdg=2 bus=-999999156637120.3.0 kV=0.159926 kVA=500 conn=wye
New Transformer.293588B1F2E6EE34E0637F61810A7CE3_43_0 phases=1 windings=2 xhl=0.5 %R=0.353554 %imag=1e-06 %noloadloss=0
~ wdg=1 bus=40579665.1.2 kV=12 kVA=500 conn=delta
~ wdg=2 bus=-99999940579665.1.0 kV=0.159926 kVA=500 conn=wye
New Transformer.293588B1F2E6EE34E0637F61810A7CE3_43_1 phases=1 windings=2 xhl=0.5 %R=0.353554 %imag=1e-06 %noloadloss=0
~ wdg=1 bus=40579665.2.3 kV=12 kVA=500 conn=delta
~ wdg=2 bus=-99999940579665.2.0 kV=0.159926 kVA=500 conn=wye
New Transformer.293588B1F2E6EE34E0637F61810A7CE3_43_2 phases=1 windings=2 xhl=0.5 %R=0.353554 %imag=1e-06 %noloadloss=0
~ wdg=1 bus=40579665.3.1 kV=12 kVA=500 conn=delta
~ wdg=2 bus=-99999940579665.3.0 kV=0.159926 kVA=500 conn=wye
New Transformer.293588B43847EE34E0637F61810A7CE3_44_0 phases=1 windings=2 xhl=0.5 %R=0.353554 %imag=1e-06 %noloadloss=0
~ wdg=1 bus=156637156.1.2 kV=12 kVA=166.667 conn=delta
~ wdg=2 bus=-999999156637156.1.0 kV=0.159926 kVA=166.667 conn=wye
New Transformer.293588B43847EE34E0637F61810A7CE3_44_1 phases=1 windings=2 xhl=0.5 %R=0.353554 %imag=1e-06 %noloadloss=0
~ wdg=1 bus=156637156.2.3 kV=12 kVA=166.667 conn=delta
~ wdg=2 bus=-999999156637156.2.0 kV=0.159926 kVA=166.667 conn=wye
New Transformer.293588B43847EE34E0637F61810A7CE3_44_2 phases=1 windings=2 xhl=0.5 %R=0.353554 %imag=1e-06 %noloadloss=0
~ wdg=1 bus=156637156.3.1 kV=12 kVA=166.667 conn=delta
~ wdg=2 bus=-999999156637156.3.0 kV=0.159926 kVA=166.667 conn=wye
New Transformer.293588B1F2E7EE34E0637F61810A7CE3_45_0 phases=1 windings=2 xhl=0.5 %R=0.353554 %imag=1e-06 %noloadloss=0
~ wdg=1 bus=40579896.1.2 kV=12 kVA=500 conn=delta
~ wdg=2 bus=-99999940579896.1.0 kV=0.159926 kVA=500 conn=wye
New Transformer.293588B1F2E7EE34E0637F61810A7CE3_45_1 phases=1 windings=2 xhl=0.5 %R=0.353554 %imag=1e-06 %noloadloss=0
~ wdg=1 bus=40579896.2.3 kV=12 kVA=500 conn=delta
~ wdg=2 bus=-99999940579896.2.0 kV=0.159926 kVA=500 conn=wye
New Transformer.293588B1F2E7EE34E0637F61810A7CE3_45_2 phases=1 windings=2 xhl=0.5 %R=0.353554 %imag=1e-06 %noloadloss=0
~ wdg=1 bus=40579896.3.1 kV=12 kVA=500 conn=delta
~ wdg=2 bus=-99999940579896.3.0 kV=0.159926 kVA=500 conn=wye
New Transformer.293588B46F68EE34E0637F61810A7CE3_46_0 phases=1 windings=2 xhl=0.5 %R=0.353554 %imag=1e-06 %noloadloss=0
~ wdg=1 bus=181855657.1.0 kV=6.9282 kVA=0.75 conn=wye
~ wdg=2 bus=-999999181855657.1.0 kV=0.069282 kVA=0.75 conn=wye
New Transformer.293588B46F68EE34E0637F61810A7CE3_46_1 phases=1 windings=2 xhl=0.5 %R=0.353554 %imag=1e-06 %noloadloss=0
~ wdg=1 bus=181855657.2.0 kV=6.9282 kVA=0.75 conn=wye
~ wdg=2 bus=-999999181855657.2.0 kV=0.069282 kVA=0.75 conn=wye
New Transformer.293588B14440EE34E0637F61810A7CE3_47_0 phases=1 windings=2 xhl=0.5 %R=0.353554 %imag=1e-06 %noloadloss=0
~ wdg=1 bus=28320624.1.0 kV=6.9282 kVA=12.5 conn=wye
~ wdg=2 bus=-99999928320624.1.0 kV=0.138564 kVA=12.5 conn=wye
New Transformer.293588B14440EE34E0637F61810A7CE3_47_1 phases=1 windings=2 xhl=0.5 %R=0.353554 %imag=1e-06 %noloadloss=0
~ wdg=1 bus=28320624.2.0 kV=6.9282 kVA=12.5 conn=wye
~ wdg=2 bus=-99999928320624.2.0 kV=0.138564 kVA=12.5 conn=wye

Set voltagebases=[12.0 0.277 0.24 0.12]
CalcVoltageBases
Solve
