! OpenDSS script generated from multiconductor network
Clear

New Circuit.mc_network basekv=4.0 pu=1.000000 angle=0.00 frequency=60.0 phases=3 Mvasc3=15999.2 Mvasc1=5333.07
~ bus1=-8888882182618.1.2.3

! Line codes
New LineCode.1000_JCN_3PH_4KV_3 nphases=3 units=km Rmatrix=[ 0.008422 | 0 0.008422 | 0 0 0.008422 ] Xmatrix=[ 0.012748 | 0 0.012748 | 0 0 0.012748 ] Cmatrix=[ 0 | 0 0 | 0 0 0 ]
New LineCode.2/0_CU_3PH_2/0_CU_N_4KV_4 nphases=4 units=km Rmatrix=[ 0.028989 | 0 0.028989 | 0 0 0.028989 | 0 0 0 0.028989 ] Xmatrix=[ 0.040147 | 0 0.040147 | 0 0 0.040147 | 0 0 0 0.040147 ] Cmatrix=[ 0 | 0 0 | 0 0 0 | 0 0 0 0 ]
New LineCode.350_CLP_3PH_4KV_3 nphases=3 units=km Rmatrix=[ 0.028572 | 0 0.028572 | 0 0 0.028572 ] Xmatrix=[ 0.021709 | 0 0.021709 | 0 0 0.021709 ] Cmatrix=[ 0 | 0 0 | 0 0 0 ]
New LineCode.6_CU_1PH_6_CU_N_4KV_2_N nphases=2 units=km Rmatrix=[ 0.176364 | 0 0.176364 ] Xmatrix=[ 0.056958 | 0 0.056958 ] Cmatrix=[ 0 | 0 0 ]
New LineCode.1/0_ACSR_3PH_1/0_ACSR_N_4KV_4 nphases=4 units=km Rmatrix=[ 0.039335 | 0 0.039335 | 0 0 0.039335 | 0 0 0 0.039335 ] Xmatrix=[ 0.028427 | 0 0.028427 | 0 0 0.028427 | 0 0 0 0.028427 ] Cmatrix=[ 0 | 0 0 | 0 0 0 | 0 0 0 0 ]
New LineCode.350_JCN_3PH_4KV_3 nphases=3 units=km Rmatrix=[ 0.036961 | 0 0.036961 | 0 0 0.036961 ] Xmatrix=[ 0.028083 | 0 0.028083 | 0 0 0.028083 ] Cmatrix=[ 0 | 0 0 | 0 0 0 ]
New LineCode.350_AL_3PH_4KV_3 nphases=3 units=km Rmatrix=[ 0.011477 | 0 0.011477 | 0 0 0.011477 ] Xmatrix=[ 0.00872 | 0 0.00872 | 0 0 0.00872 ] Cmatrix=[ 0 | 0 0 | 0 0 0 ]
New LineCode.4_ACSR_1PH_4_ACSR_N_4KV_2_N nphases=2 units=km Rmatrix=[ 0.108476 | 0 0.108476 ] Xmatrix=[ 0.036487 | 0 0.036487 ] Cmatrix=[ 0 | 0 0 ]
New LineCode.500_EPR_3PH_4KV_3 nphases=3 units=km Rmatrix=[ 1e-05 | 0 1e-05 | 0 0 1e-05 ] Xmatrix=[ 1e-05 | 0 1e-05 | 0 0 1e-05 ] Cmatrix=[ 0 | 0 0 | 0 0 0 ]
New LineCode.4_CU_1PH_4_CU_N_4KV_2_N nphases=2 units=km Rmatrix=[ 0.095102 | 0 0.095102 ] Xmatrix=[ 0.047058 | 0 0.047058 ] Cmatrix=[ 0 | 0 0 ]
New LineCode.336_ACSR_3PH_336_ACSR_N_4KV_4 nphases=4 units=km Rmatrix=[ 0.005894 | 0 0.005894 | 0 0 0.005894 | 0 0 0 0.005894 ] Xmatrix=[ 0.011754 | 0 0.011754 | 0 0 0.011754 | 0 0 0 0.011754 ] Cmatrix=[ 0 | 0 0 | 0 0 0 | 0 0 0 0 ]
New LineCode.2_CU_3PH_2_CU_N_4KV_4 nphases=4 units=km Rmatrix=[ 0.00987 | 0 0.00987 | 0 0 0.00987 | 0 0 0 0.00987 ] Xmatrix=[ 0.007247 | 0 0.007247 | 0 0 0.007247 | 0 0 0 0.007247 ] Cmatrix=[ 0 | 0 0 | 0 0 0 | 0 0 0 0 ]
New LineCode.6_CU_3PH_6_CU_N_4KV_4 nphases=4 units=km Rmatrix=[ 0.002855 | 0 0.002855 | 0 0 0.002855 | 0 0 0 0.002855 ] Xmatrix=[ 0.000922 | 0 0.000922 | 0 0 0.000922 | 0 0 0 0.000922 ] Cmatrix=[ 0 | 0 0 | 0 0 0 | 0 0 0 0 ]
New LineCode.6_CU_1PH_6_CU_N_4KV_4 nphases=4 units=km Rmatrix=[ 0.176364 | 0 0.176364 | 0 0 0.176364 | 0 0 0 0.176364 ] Xmatrix=[ 0.056958 | 0 0.056958 | 0 0 0.056958 | 0 0 0 0.056958 ] Cmatrix=[ 0 | 0 0 | 0 0 0 | 0 0 0 0 ]
New LineCode.4_ACSR_2PH_4_ACSR_N_4KV_3_N nphases=3 units=km Rmatrix=[ 0.101309 | 0 0.101309 | 0 0 0.101309 ] Xmatrix=[ 0.034076 | 0 0.034076 | 0 0 0.034076 ] Cmatrix=[ 0 | 0 0 | 0 0 0 ]
New LineCode.6_CU_1PH_6_CU_N_4KV_3_N nphases=3 units=km Rmatrix=[ 0.176364 | 0 0.176364 | 0 0 0.176364 ] Xmatrix=[ 0.056958 | 0 0.056958 | 0 0 0.056958 ] Cmatrix=[ 0 | 0 0 | 0 0 0 ]
New LineCode.4_CU_3PH_4_CU_N_4KV_4 nphases=4 units=km Rmatrix=[ 0.010643 | 0 0.010643 | 0 0 0.010643 | 0 0 0 0.010643 ] Xmatrix=[ 0.005266 | 0 0.005266 | 0 0 0.005266 | 0 0 0 0.005266 ] Cmatrix=[ 0 | 0 0 | 0 0 0 | 0 0 0 0 ]
New LineCode.1/0_ACSR_2PH_1/0_ACSR_N_4KV_3_N nphases=3 units=km Rmatrix=[ 0.017661 | 0 0.017661 | 0 0 0.017661 ] Xmatrix=[ 0.012763 | 0 0.012763 | 0 0 0.012763 ] Cmatrix=[ 0 | 0 0 | 0 0 0 ]
New LineCode.6_CU_2PH_6_CU_N_4KV_3_N nphases=3 units=km Rmatrix=[ 0.080997 | 0 0.080997 | 0 0 0.080997 ] Xmatrix=[ 0.026158 | 0 0.026158 | 0 0 0.026158 ] Cmatrix=[ 0 | 0 0 | 0 0 0 ]
New LineCode.1/0_ACSR_1PH_1/0_ACSR_N_4KV_2_N nphases=2 units=km Rmatrix=[ 0.066091 | 0 0.066091 ] Xmatrix=[ 0.047763 | 0 0.047763 ] Cmatrix=[ 0 | 0 0 ]

! Lines
New Line.1204806E$1204808EPH phases=3 Bus1=12341581.1.2.3 Bus2=12341641.1.2.3 LineCode=1000_JCN_3PH_4KV_3 Length=0.099501 units=km
New Line.1204808EPH$ND12401793 phases=4 Bus1=12341640.0.1.2.3 Bus2=12401793.0.1.2.3 LineCode=2/0_CU_3PH_2/0_CU_N_4KV_4 Length=0.80005 units=km
New Line.1195345E$GS0002-4 phases=3 Bus1=12341875.1.2.3 Bus2=137661905.1.2.3 LineCode=350_CLP_3PH_4KV_3 Length=0.128681 units=km
New Line.1238999E$1238997E phases=2 Bus1=12343192.0.1 Bus2=12343092.0.1 LineCode=6_CU_1PH_6_CU_N_4KV_2_N Length=0.080532 units=km
New Line.4280825E$298990E phases=2 Bus1=12344413.0.3 Bus2=12343246.0.3 LineCode=6_CU_1PH_6_CU_N_4KV_2_N Length=0.15909 units=km
New Line.ND12344996$507005H phases=4 Bus1=12344996.0.1.2.3 Bus2=12343921.0.1.2.3 LineCode=1/0_ACSR_3PH_1/0_ACSR_N_4KV_4 Length=0.070123 units=km
New Line.GS0002-2$559774EPH phases=3 Bus1=137661881.1.2.3 Bus2=12342005.1.2.3 LineCode=350_JCN_3PH_4KV_3 Length=0.166446 units=km
New Line.1336046E$1336043E phases=2 Bus1=12341737.0.1 Bus2=12341762.0.1 LineCode=6_CU_1PH_6_CU_N_4KV_2_N Length=0.118762 units=km
New Line.GS0002-1$4531813EPH phases=3 Bus1=137661889.1.2.3 Bus2=12343930.1.2.3 LineCode=350_AL_3PH_4KV_3 Length=0.021207 units=km
New Line.ND12401436$4429218E phases=2 Bus1=12401436.0.2 Bus2=12342263.0.2 LineCode=6_CU_1PH_6_CU_N_4KV_2_N Length=0.075526 units=km
New Line.ND12401436$679948H phases=2 Bus1=12401436.0.2 Bus2=12342313.0.2 LineCode=6_CU_1PH_6_CU_N_4KV_2_N Length=0.020371 units=km
New Line.465794H$465795H phases=2 Bus1=12342538.0.3 Bus2=12342463.0.3 LineCode=4_ACSR_1PH_4_ACSR_N_4KV_2_N Length=0.058662 units=km
New Line.ND12345181$4377542E phases=2 Bus1=12345181.0.1 Bus2=12343496.0.1 LineCode=6_CU_1PH_6_CU_N_4KV_2_N Length=0.09141 units=km
New Line.513322H$513296H phases=2 Bus1=12342738.0.3 Bus2=12344055.0.3 LineCode=6_CU_1PH_6_CU_N_4KV_2_N Length=0.088665 units=km
New Line.759903E$ND207660633 phases=2 Bus1=207660633.0.3 Bus2=12341971.0.3 LineCode=6_CU_1PH_6_CU_N_4KV_2_N Length=0.144243 units=km
New Line.448561E$521158E phases=2 Bus1=12343546.0.1 Bus2=12343521.0.1 LineCode=6_CU_1PH_6_CU_N_4KV_2_N Length=0.096722 units=km
New Line.10453$1204804E phases=3 Bus1=-666666250105005.1.2.3 Bus2=12341611.1.2.3 LineCode=500_EPR_3PH_4KV_3 Length=0.189046 units=km
New Line.1191529E$1191530E phases=2 Bus1=12342438.0.2 Bus2=12401477.0.2 LineCode=4_ACSR_1PH_4_ACSR_N_4KV_2_N Length=0.041159 units=km
New Line.440869E$1861235E phases=2 Bus1=12344209.0.2 Bus2=12343846.0.2 LineCode=4_CU_1PH_4_CU_N_4KV_2_N Length=0.076411 units=km
New Line.4280824E$ND210565000 phases=2 Bus1=210565000.0.2 Bus2=12344388.0.2 LineCode=6_CU_1PH_6_CU_N_4KV_2_N Length=0.046639 units=km
New Line.330019E$4178622E phases=2 Bus1=12342863.0.3 Bus2=164728642.0.3 LineCode=6_CU_1PH_6_CU_N_4KV_2_N Length=0.077904 units=km
New Line.4178622E$330022E phases=2 Bus1=164728642.0.3 Bus2=12342763.0.3 LineCode=6_CU_1PH_6_CU_N_4KV_2_N Length=0.036515 units=km
New Line.ND12344976$421822H phases=2 Bus1=12344976.0.2 Bus2=12343042.0.2 LineCode=6_CU_1PH_6_CU_N_4KV_2_N Length=0.075886 units=km
New Line.4352127E$618291E phases=4 Bus1=12344234.0.1.2.3 Bus2=145002346.0.1.2.3 LineCode=1/0_ACSR_3PH_1/0_ACSR_N_4KV_4 Length=0.116527 units=km
New Line.618291E$618290E phases=4 Bus1=145002346.0.1.2.3 Bus2=12342238.0.1.2.3 LineCode=1/0_ACSR_3PH_1/0_ACSR_N_4KV_4 Length=0.068911 units=km
New Line.421819H$421820H phases=2 Bus1=12342992.0.1 Bus2=12342788.0.1 LineCode=6_CU_1PH_6_CU_N_4KV_2_N Length=0.036569 units=km
New Line.103485H$ND12345071 phases=2 Bus1=12343396.0.2 Bus2=-77777712343396.0.2 LineCode=6_CU_1PH_6_CU_N_4KV_2_N Length=0.038225 units=km
New Line.513311H$ND12402041 phases=2 Bus1=12342638.0.3 Bus2=-77777712342638.0.3 LineCode=4_ACSR_1PH_4_ACSR_N_4KV_2_N Length=0.040184 units=km
New Line.559770E$ND12401663 phases=2 Bus1=12342388.0.2 Bus2=-77777712342388.0.2 LineCode=6_CU_1PH_6_CU_N_4KV_2_N Length=0.04571 units=km
New Line.1204804E$1204806E phases=4 Bus1=12341610.0.1.2.3 Bus2=12341580.0.1.2.3 LineCode=2/0_CU_3PH_2/0_CU_N_4KV_4 Length=0.096974 units=km
New Line.ND12401793$ND12401794 phases=4 Bus1=12401793.0.1.2.3 Bus2=12401794.0.1.2.3 LineCode=336_ACSR_3PH_336_ACSR_N_4KV_4 Length=0.370517 units=km
New Line.ND243155169$ND12401794 phases=4 Bus1=12401794.0.1.2.3 Bus2=243155169.0.1.2.3 LineCode=336_ACSR_3PH_336_ACSR_N_4KV_4 Length=0.018963 units=km
New Line.PD0011$ND243155169 phases=4 Bus1=243155169.0.1.2.3 Bus2=12344790.0.1.2.3 LineCode=336_ACSR_3PH_336_ACSR_N_4KV_4 Length=0.003634 units=km
New Line.PD0011$ND138370964 phases=4 Bus1=12344791.0.1.2.3 Bus2=138370964.0.1.2.3 LineCode=336_ACSR_3PH_336_ACSR_N_4KV_4 Length=0.018963 units=km
New Line.UK_10453_1$1195345E phases=4 Bus1=138370964.0.1.2.3 Bus2=12341874.0.1.2.3 LineCode=336_ACSR_3PH_336_ACSR_N_4KV_4 Length=0.087172 units=km
New Line.UK_10453_1$ND12401446 phases=4 Bus1=138370964.0.1.2.3 Bus2=12401446.0.1.2.3 LineCode=2_CU_3PH_2_CU_N_4KV_4 Length=0.007358 units=km
New Line.ND12401446$ND138370983 phases=4 Bus1=12401446.0.1.2.3 Bus2=138370983.0.1.2.3 LineCode=2_CU_3PH_2_CU_N_4KV_4 Length=0.016423 units=km
New Line.ND138370983$1195347E phases=4 Bus1=138370983.0.1.2.3 Bus2=12341789.0.1.2.3 LineCode=2_CU_3PH_2_CU_N_4KV_4 Length=0.018963 units=km
New Line.PS0016$ND138370983 phases=4 Bus1=138370983.0.1.2.3 Bus2=12344480.0.1.2.3 LineCode=1/0_ACSR_3PH_1/0_ACSR_N_4KV_4 Length=0.039958 units=km
New Line.ND12401397$968794E phases=4 Bus1=12401397.0.1.2.3 Bus2=12343167.0.1.2.3 LineCode=6_CU_3PH_6_CU_N_4KV_4 Length=0.043634 units=km
New Line.ND12401589$BF44424 phases=2 Bus1=12401589.0.1 Bus2=12344656.0.1 LineCode=6_CU_1PH_6_CU_N_4KV_2_N Length=0.016713 units=km
New Line.ND12401397$1239000E phases=2 Bus1=12401397.0.1 Bus2=138041817.0.1 LineCode=6_CU_1PH_6_CU_N_4KV_2_N Length=0.043634 units=km
New Line.ND12401589$ND201496237 phases=4 Bus1=12401589.0.1.2.3 Bus2=201496237.0.1.2.3 LineCode=336_ACSR_3PH_336_ACSR_N_4KV_4 Length=0.035829 units=km
New Line.ND12401367$1195347E phases=4 Bus1=12341789.0.1.2.3 Bus2=12401367.0.1.2.3 LineCode=2_CU_3PH_2_CU_N_4KV_4 Length=0.028329 units=km
New Line.ND12401367$ND12401368 phases=4 Bus1=12401367.0.1.2.3 Bus2=12401368.0.1.2.3 LineCode=2_CU_3PH_2_CU_N_4KV_4 Length=0.028329 units=km
New Line.PD0016$ND12401942 phases=4 Bus1=12344481.0.1.2.3 Bus2=12401942.0.1.2.3 LineCode=1/0_ACSR_3PH_1/0_ACSR_N_4KV_4 Length=0.019508 units=km
New Line.1336050E$ND12401368 phases=2 Bus1=12401368.0.1 Bus2=12344159.0.1 LineCode=6_CU_1PH_6_CU_N_4KV_2_N Length=0.050065 units=km
New Line.ND12401942$ND12344965 phases=4 Bus1=12401942.0.1.2.3 Bus2=12344965.0.1.2.3 LineCode=1/0_ACSR_3PH_1/0_ACSR_N_4KV_4 Length=0.047214 units=km
New Line.ND12401368$PD0227 phases=4 Bus1=12401368.0.1.2.3 Bus2=15165228.0.1.2.3 LineCode=2_CU_3PH_2_CU_N_4KV_4 Length=0.023122 units=km
New Line.ND12401942$ND211445155 phases=4 Bus1=12401942.0.1.2.3 Bus2=211445155.0.1.2.3 LineCode=6_CU_3PH_6_CU_N_4KV_4 Length=0.090266 units=km
New Line.1336050E$1336048E phases=2 Bus1=12344159.0.1 Bus2=12341712.0.1 LineCode=6_CU_1PH_6_CU_N_4KV_2_N Length=0.077294 units=km
New Line.ND211445155$683175E phases=4 Bus1=211445155.0.1.2.3 Bus2=12341841.0.1.2.3 LineCode=6_CU_3PH_6_CU_N_4KV_4 Length=0.060974 units=km
New Line.ND12344965$4706946E phases=4 Bus1=12344965.0.1.2.3 Bus2=12341921.0.1.2.3 LineCode=6_CU_3PH_6_CU_N_4KV_4 Length=0.050415 units=km
New Line.ND12344965$1195345E phases=4 Bus1=12344965.0.1.2.3 Bus2=12344309.0.1.2.3 LineCode=1/0_ACSR_3PH_1/0_ACSR_N_4KV_4 Length=0.047214 units=km
New Line.968794E$2083941E phases=4 Bus1=12343167.0.1.2.3 Bus2=12343142.0.1.2.3 LineCode=6_CU_3PH_6_CU_N_4KV_4 Length=0.029318 units=km
New Line.1239000E$1238999E phases=2 Bus1=138041817.0.1 Bus2=12343192.0.1 LineCode=6_CU_1PH_6_CU_N_4KV_2_N Length=0.04432 units=km
New Line.ND201496237$4280825E phases=2 Bus1=201496237.0.3 Bus2=12344413.0.3 LineCode=6_CU_1PH_6_CU_N_4KV_2_N Length=0.128882 units=km
New Line.618290E$ND12344996 phases=4 Bus1=12342238.0.1.2.3 Bus2=12344996.0.1.2.3 LineCode=1/0_ACSR_3PH_1/0_ACSR_N_4KV_4 Length=0.011451 units=km
New Line.ND201496237$ND12402574 phases=4 Bus1=201496237.0.1.2.3 Bus2=12402574.0.1.2.3 LineCode=336_ACSR_3PH_336_ACSR_N_4KV_4 Length=0.064377 units=km
New Line.2083941E$4178482E phases=4 Bus1=12343142.0.1.2.3 Bus2=12343117.0.1.2.3 LineCode=6_CU_3PH_6_CU_N_4KV_4 Length=0.001922 units=km
New Line.BF44424$307405E phases=2 Bus1=12344655.0.1 Bus2=12343471.0.1 LineCode=6_CU_1PH_6_CU_N_4KV_2_N Length=0.092167 units=km
New Line.ND12402574$393148E phases=4 Bus1=12402574.0.1.2.3 Bus2=12344107.0.1.2.3 LineCode=336_ACSR_3PH_336_ACSR_N_4KV_4 Length=0.031683 units=km
New Line.ND12344996$BF44425 phases=2 Bus1=12344996.0.2 Bus2=12344520.0.2 LineCode=4_ACSR_1PH_4_ACSR_N_4KV_2_N Length=0.09337 units=km
New Line.ND12344996$ND12402010 phases=4 Bus1=12344996.0.1.2.3 Bus2=12402010.0.1.2.3 LineCode=6_CU_3PH_6_CU_N_4KV_4 Length=0.096415 units=km
New Line.ND12402010$465791H phases=4 Bus1=12402010.0.1.2.3 Bus2=12342488.0.1.2.3 LineCode=6_CU_1PH_6_CU_N_4KV_4 Length=0.02337 units=km
New Line.ND12402010$4178303E phases=3 Bus1=12402010.0.2.3 Bus2=12344080.0.2.3 LineCode=4_ACSR_2PH_4_ACSR_N_4KV_3_N Length=0.073094 units=km
New Line.307405E$680019H phases=2 Bus1=12343471.0.1 Bus2=12344438.0.1 LineCode=6_CU_1PH_6_CU_N_4KV_2_N Length=0.042132 units=km
New Line.ND12402010$ND12401890 phases=2 Bus1=12402010.0.3 Bus2=12401890.0.3 LineCode=6_CU_1PH_6_CU_N_4KV_2_N Length=0.102144 units=km
New Line.393148E$ND12402003 phases=4 Bus1=12344107.0.1.2.3 Bus2=12402003.0.1.2.3 LineCode=336_ACSR_3PH_336_ACSR_N_4KV_4 Length=0.04232 units=km
New Line.507005H$4489404E phases=4 Bus1=12343921.0.1.2.3 Bus2=176359023.0.1.2.3 LineCode=1/0_ACSR_3PH_1/0_ACSR_N_4KV_4 Length=0.149073 units=km
New Line.4489404E$507002H phases=4 Bus1=176359023.0.1.2.3 Bus2=12342288.0.1.2.3 LineCode=1/0_ACSR_3PH_1/0_ACSR_N_4KV_4 Length=0.086042 units=km
New Line.465791H$465792H phases=4 Bus1=12342488.0.1.2.3 Bus2=12342513.0.1.2.3 LineCode=6_CU_1PH_6_CU_N_4KV_4 Length=0.046266 units=km
New Line.ND12401890$513316H phases=2 Bus1=12401890.0.3 Bus2=12342563.0.3 LineCode=4_ACSR_1PH_4_ACSR_N_4KV_2_N Length=0.031991 units=km
New Line.4178303E$507022H phases=3 Bus1=12344080.0.2.3 Bus2=12342663.0.2.3 LineCode=4_ACSR_2PH_4_ACSR_N_4KV_3_N Length=0.091384 units=km
New Line.ND12401890$513318H phases=2 Bus1=12401890.0.3 Bus2=12342713.0.3 LineCode=6_CU_1PH_6_CU_N_4KV_2_N Length=0.017932 units=km
New Line.1336048E$1336046E phases=2 Bus1=12341712.0.1 Bus2=12341737.0.1 LineCode=6_CU_1PH_6_CU_N_4KV_2_N Length=0.068339 units=km
New Line.683175E$1099193E phases=3 Bus1=12341841.0.1.3 Bus2=12344005.0.1.3 LineCode=6_CU_1PH_6_CU_N_4KV_3_N Length=0.039089 units=km
New Line.4706946E$4352133E phases=4 Bus1=12341921.0.1.2.3 Bus2=12344259.0.1.2.3 LineCode=6_CU_3PH_6_CU_N_4KV_4 Length=0.04376 units=km
New Line.1195345E$ND240840347 phases=4 Bus1=12344309.0.1.2.3 Bus2=240840347.0.1.2.3 LineCode=1/0_ACSR_3PH_1/0_ACSR_N_4KV_4 Length=0.045083 units=km
New Line.1099193E$261100E phases=3 Bus1=12344005.0.1.3 Bus2=12341816.0.1.3 LineCode=6_CU_1PH_6_CU_N_4KV_3_N Length=0.182903 units=km
New Line.ND240840347$1191658E phases=4 Bus1=240840347.0.1.2.3 Bus2=12344030.0.1.2.3 LineCode=4_CU_3PH_4_CU_N_4KV_4 Length=0.090219 units=km
New Line.4352133E$4352134E phases=4 Bus1=12344259.0.1.2.3 Bus2=12344284.0.1.2.3 LineCode=6_CU_3PH_6_CU_N_4KV_4 Length=0.0457 units=km
New Line.1336043E$4702225E phases=2 Bus1=12341762.0.1 Bus2=12341687.0.1 LineCode=6_CU_1PH_6_CU_N_4KV_2_N Length=0.032096 units=km
New Line.261100E$103525H phases=3 Bus1=12341816.0.1.3 Bus2=237712651.0.1.3 LineCode=1/0_ACSR_2PH_1/0_ACSR_N_4KV_3_N Length=0.02751 units=km
New Line.559774EPH$ND243155146 phases=4 Bus1=12342004.0.1.2.3 Bus2=243155146.0.1.2.3 LineCode=1/0_ACSR_3PH_1/0_ACSR_N_4KV_4 Length=0.005233 units=km
New Line.1191658E$1191658EIS phases=4 Bus1=12344030.0.1.2.3 Bus2=244298837.0.1.2.3 LineCode=4_CU_3PH_4_CU_N_4KV_4 Length=0.038442 units=km
New Line.ND243155146$559775E phases=4 Bus1=243155146.0.1.2.3 Bus2=12342053.0.1.2.3 LineCode=1/0_ACSR_3PH_1/0_ACSR_N_4KV_4 Length=0.046726 units=km
New Line.4702225E$969148E phases=2 Bus1=12341687.0.1 Bus2=12344184.0.1 LineCode=6_CU_1PH_6_CU_N_4KV_2_N Length=0.130172 units=km
New Line.4531813EPH$ND201496148 phases=4 Bus1=12343929.0.1.2.3 Bus2=201496148.0.1.2.3 LineCode=336_ACSR_3PH_336_ACSR_N_4KV_4 Length=0.002507 units=km
New Line.1191658EIS$405741E phases=4 Bus1=244298836.0.1.2.3 Bus2=12341866.0.1.2.3 LineCode=4_CU_3PH_4_CU_N_4KV_4 Length=0.011351 units=km
New Line.969148E$1055944E phases=2 Bus1=12344184.0.1 Bus2=12344134.0.1 LineCode=6_CU_1PH_6_CU_N_4KV_2_N Length=0.118409 units=km
New Line.559775E$618289E phases=4 Bus1=12342053.0.1.2.3 Bus2=137713802.0.1.2.3 LineCode=1/0_ACSR_3PH_1/0_ACSR_N_4KV_4 Length=0.02894 units=km
New Line.ND201496148$ND201496183 phases=4 Bus1=201496148.0.1.2.3 Bus2=201496183.0.1.2.3 LineCode=336_ACSR_3PH_336_ACSR_N_4KV_4 Length=0.013796 units=km
New Line.618289E$618287E phases=4 Bus1=137713802.0.1.2.3 Bus2=12342111.0.1.2.3 LineCode=1/0_ACSR_3PH_1/0_ACSR_N_4KV_4 Length=0.055487 units=km
New Line.329982E$ND201496183 phases=2 Bus1=201496183.0.3 Bus2=12342813.0.3 LineCode=6_CU_1PH_6_CU_N_4KV_2_N Length=0.11462 units=km
New Line.405741E$440864E phases=4 Bus1=12341866.0.1.2.3 Bus2=12343571.0.1.2.3 LineCode=4_CU_3PH_4_CU_N_4KV_4 Length=0.026173 units=km
New Line.ND201496183$490275H phases=4 Bus1=201496183.0.1.2.3 Bus2=12344336.0.1.2.3 LineCode=336_ACSR_3PH_336_ACSR_N_4KV_4 Length=0.039119 units=km
New Line.329982E$1264605E phases=2 Bus1=12342813.0.3 Bus2=12342838.0.3 LineCode=6_CU_1PH_6_CU_N_4KV_2_N Length=0.070402 units=km
New Line.440864E$440866E phases=2 Bus1=12343571.0.2 Bus2=12343871.0.2 LineCode=4_CU_1PH_4_CU_N_4KV_2_N Length=0.090838 units=km
New Line.490275H$ND12345165 phases=4 Bus1=12344336.0.1.2.3 Bus2=12345165.0.1.2.3 LineCode=336_ACSR_3PH_336_ACSR_N_4KV_4 Length=0.101692 units=km
New Line.618287E$ND210564885 phases=4 Bus1=12342111.0.1.2.3 Bus2=210564885.0.1.2.3 LineCode=1/0_ACSR_3PH_1/0_ACSR_N_4KV_4 Length=0.148814 units=km
New Line.518417H$ND12402003 phases=2 Bus1=12402003.0.3 Bus2=12343821.0.3 LineCode=6_CU_1PH_6_CU_N_4KV_2_N Length=0.070507 units=km
New Line.BF44425$ND12401436 phases=2 Bus1=12344519.0.2 Bus2=12401436.0.2 LineCode=4_ACSR_1PH_4_ACSR_N_4KV_2_N Length=0.064188 units=km
New Line.680019H$423101E phases=2 Bus1=12344438.0.1 Bus2=235814976.0.1 LineCode=6_CU_1PH_6_CU_N_4KV_2_N Length=0.278376 units=km
New Line.ND12402003$ND236351691 phases=4 Bus1=12402003.0.1.2.3 Bus2=236351691.0.1.2.3 LineCode=336_ACSR_3PH_336_ACSR_N_4KV_4 Length=0.021052 units=km
New Line.507002H$1378573E phases=4 Bus1=12342288.0.1.2.3 Bus2=12341946.0.1.2.3 LineCode=1/0_ACSR_3PH_1/0_ACSR_N_4KV_4 Length=0.100597 units=km
New Line.465792H$465794H phases=4 Bus1=12342513.0.1.2.3 Bus2=12342538.0.1.2.3 LineCode=6_CU_3PH_6_CU_N_4KV_4 Length=0.081061 units=km
New Line.513316H$513314H phases=2 Bus1=12342563.0.3 Bus2=12342588.0.3 LineCode=4_ACSR_1PH_4_ACSR_N_4KV_2_N Length=0.070396 units=km
New Line.507022H$507024H phases=3 Bus1=12342663.0.2.3 Bus2=12342688.0.2.3 LineCode=4_ACSR_2PH_4_ACSR_N_4KV_3_N Length=0.065758 units=km
New Line.513318H$513322H phases=2 Bus1=12342713.0.3 Bus2=12342738.0.3 LineCode=6_CU_1PH_6_CU_N_4KV_2_N Length=0.130733 units=km
New Line.518417H$518419H phases=2 Bus1=12343821.0.3 Bus2=12343296.0.3 LineCode=6_CU_1PH_6_CU_N_4KV_2_N Length=0.14872 units=km
New Line.871362E$ND236351691 phases=4 Bus1=236351691.0.1.2.3 Bus2=12344465.0.1.2.3 LineCode=336_ACSR_3PH_336_ACSR_N_4KV_4 Length=0.046971 units=km
New Line.423101E$ND12345181 phases=2 Bus1=235814976.0.1 Bus2=12345181.0.1 LineCode=6_CU_1PH_6_CU_N_4KV_2_N Length=0.066078 units=km
New Line.ND12401436$ND12401771 phases=2 Bus1=12401436.0.2 Bus2=12401771.0.2 LineCode=4_ACSR_1PH_4_ACSR_N_4KV_2_N Length=0.094992 units=km
New Line.ND12401771$1191529E phases=2 Bus1=12401771.0.2 Bus2=12342438.0.2 LineCode=4_ACSR_1PH_4_ACSR_N_4KV_2_N Length=0.140365 units=km
New Line.1264605E$330019E phases=2 Bus1=12342838.0.3 Bus2=12342863.0.3 LineCode=6_CU_1PH_6_CU_N_4KV_2_N Length=0.035681 units=km
New Line.ND12345165$418947H phases=4 Bus1=12345165.0.1.2.3 Bus2=12342890.0.1.2.3 LineCode=336_ACSR_3PH_336_ACSR_N_4KV_4 Length=0.041104 units=km
New Line.421814H$ND12345165 phases=2 Bus1=12345165.0.1 Bus2=12342917.0.1 LineCode=6_CU_1PH_6_CU_N_4KV_2_N Length=0.075927 units=km
New Line.513280H$ND12345165 phases=3 Bus1=12345165.0.1.2 Bus2=12343346.0.1.2 LineCode=6_CU_2PH_6_CU_N_4KV_3_N Length=0.075961 units=km
New Line.440866E$440869E phases=2 Bus1=12343871.0.2 Bus2=12344209.0.2 LineCode=4_CU_1PH_4_CU_N_4KV_2_N Length=0.101766 units=km
New Line.ND210565000$ND210564885 phases=4 Bus1=210564885.0.1.2.3 Bus2=210565000.0.1.2.3 LineCode=1/0_ACSR_3PH_1/0_ACSR_N_4KV_4 Length=0.061479 units=km
New Line.618295E$ND210565000 phases=4 Bus1=210565000.0.1.2.3 Bus2=12342188.0.1.2.3 LineCode=1/0_ACSR_3PH_1/0_ACSR_N_4KV_4 Length=0.049493 units=km
New Line.513314H$513312H phases=2 Bus1=12342588.0.3 Bus2=12342613.0.3 LineCode=4_ACSR_1PH_4_ACSR_N_4KV_2_N Length=0.080452 units=km
New Line.518419H$518421H phases=2 Bus1=12343296.0.3 Bus2=12343271.0.3 LineCode=6_CU_1PH_6_CU_N_4KV_2_N Length=0.133737 units=km
New Line.ND12345181$448561E phases=2 Bus1=12345181.0.1 Bus2=12343546.0.1 LineCode=6_CU_1PH_6_CU_N_4KV_2_N Length=0.064046 units=km
New Line.679948H$4573082E phases=2 Bus1=12342313.0.2 Bus2=12343596.0.2 LineCode=6_CU_1PH_6_CU_N_4KV_2_N Length=0.085451 units=km
New Line.1378573E$ND207660633 phases=2 Bus1=12341946.0.3 Bus2=207660633.0.3 LineCode=1/0_ACSR_1PH_1/0_ACSR_N_4KV_2_N Length=0.103285 units=km
New Line.871362E$PS0159 phases=4 Bus1=12344465.0.1.2.3 Bus2=59899123.0.1.2.3 LineCode=336_ACSR_3PH_336_ACSR_N_4KV_4 Length=0.158265 units=km
New Line.ND12401771$4428028E phases=2 Bus1=12401771.0.2 Bus2=96627099.0.2 LineCode=6_CU_1PH_6_CU_N_4KV_2_N Length=0.037998 units=km
New Line.4573082E$431474H phases=2 Bus1=12343596.0.2 Bus2=12342338.0.2 LineCode=6_CU_1PH_6_CU_N_4KV_2_N Length=0.067859 units=km
New Line.4428028E$559769E phases=2 Bus1=96627099.0.2 Bus2=12342413.0.2 LineCode=6_CU_1PH_6_CU_N_4KV_2_N Length=0.04571 units=km
New Line.513312H$513311H phases=2 Bus1=12342613.0.3 Bus2=12342638.0.3 LineCode=4_ACSR_1PH_4_ACSR_N_4KV_2_N Length=0.040228 units=km
New Line.559769E$559770E phases=2 Bus1=12342413.0.2 Bus2=12342388.0.2 LineCode=6_CU_1PH_6_CU_N_4KV_2_N Length=0.045713 units=km
New Line.431474H$4558156E phases=2 Bus1=12342338.0.2 Bus2=12343896.0.2 LineCode=6_CU_1PH_6_CU_N_4KV_2_N Length=0.051482 units=km
New Line.421814H$4561351E phases=2 Bus1=12342917.0.1 Bus2=12342942.0.1 LineCode=6_CU_1PH_6_CU_N_4KV_2_N Length=0.042132 units=km
New Line.513280H$513282H phases=3 Bus1=12343346.0.1.2 Bus2=12343371.0.1.2 LineCode=6_CU_2PH_6_CU_N_4KV_3_N Length=0.08045 units=km
New Line.418947H$ND12344976 phases=4 Bus1=12342890.0.1.2.3 Bus2=12344976.0.1.2.3 LineCode=336_ACSR_3PH_336_ACSR_N_4KV_4 Length=0.058834 units=km
New Line.4280824E$2380535E phases=2 Bus1=12344388.0.2 Bus2=12342138.0.2 LineCode=6_CU_1PH_6_CU_N_4KV_2_N Length=0.129347 units=km
New Line.906845E$ND12344976 phases=2 Bus1=12344976.0.2 Bus2=12343421.0.2 LineCode=6_CU_1PH_6_CU_N_4KV_2_N Length=0.054232 units=km
New Line.618295E$4280823E phases=4 Bus1=12342188.0.1.2.3 Bus2=12344363.0.1.2.3 LineCode=1/0_ACSR_3PH_1/0_ACSR_N_4KV_4 Length=0.047616 units=km
New Line.ND12344976$ND12344977 phases=4 Bus1=12344976.0.1.2.3 Bus2=12344977.0.1.2.3 LineCode=336_ACSR_3PH_336_ACSR_N_4KV_4 Length=0.035373 units=km
New Line.4561351E$ND12345101 phases=2 Bus1=12342942.0.1 Bus2=12345101.0.1 LineCode=6_CU_1PH_6_CU_N_4KV_2_N Length=0.067043 units=km
New Line.513282H$4829067E phases=3 Bus1=12343371.0.1.2 Bus2=237503244.0.1.2 LineCode=6_CU_2PH_6_CU_N_4KV_3_N Length=0.165991 units=km
New Line.2380535E$4429217E phases=2 Bus1=12342138.0.2 Bus2=12342163.0.2 LineCode=6_CU_1PH_6_CU_N_4KV_2_N Length=0.045666 units=km
New Line.ND12345101$421817H phases=2 Bus1=12345101.0.1 Bus2=12342967.0.1 LineCode=6_CU_1PH_6_CU_N_4KV_2_N Length=0.0193 units=km
New Line.ND12345101$813767E phases=2 Bus1=12345101.0.1 Bus2=12343017.0.1 LineCode=6_CU_1PH_6_CU_N_4KV_2_N Length=0.142818 units=km
New Line.300770E$ND12344977 phases=4 Bus1=12344977.0.1.2.3 Bus2=12343067.0.1.2.3 LineCode=6_CU_3PH_6_CU_N_4KV_4 Length=0.091921 units=km
New Line.ND12344977$1297857E phases=4 Bus1=12344977.0.1.2.3 Bus2=12343219.0.1.2.3 LineCode=336_ACSR_3PH_336_ACSR_N_4KV_4 Length=0.038788 units=km
New Line.4829067E$513286H phases=3 Bus1=237503244.0.1.2 Bus2=12343321.0.1.2 LineCode=6_CU_2PH_6_CU_N_4KV_3_N Length=0.073068 units=km
New Line.906845E$103486H phases=2 Bus1=12343421.0.2 Bus2=12343446.0.2 LineCode=6_CU_1PH_6_CU_N_4KV_2_N Length=0.107269 units=km
New Line.4280823E$4352127E phases=4 Bus1=12344363.0.1.2.3 Bus2=12344234.0.1.2.3 LineCode=1/0_ACSR_3PH_1/0_ACSR_N_4KV_4 Length=0.043806 units=km
New Line.421817H$421819H phases=2 Bus1=12342967.0.1 Bus2=12342992.0.1 LineCode=6_CU_1PH_6_CU_N_4KV_2_N Length=0.071235 units=km
New Line.103486H$103485H phases=2 Bus1=12343446.0.2 Bus2=12343396.0.2 LineCode=6_CU_1PH_6_CU_N_4KV_2_N Length=0.129811 units=km
New Line.300770E$ND12401397 phases=4 Bus1=12343067.0.1.2.3 Bus2=12401397.0.1.2.3 LineCode=6_CU_3PH_6_CU_N_4KV_4 Length=0.1105 units=km
New Line.1297857E$ND12401589 phases=4 Bus1=12343219.0.1.2.3 Bus2=12401589.0.1.2.3 LineCode=336_ACSR_3PH_336_ACSR_N_4KV_4 Length=0.025235 units=km
New Line.1238997E$ND12401861 phases=2 Bus1=12343092.0.1 Bus2=-77777712343092.0.1 LineCode=6_CU_1PH_6_CU_N_4KV_2_N Length=0.034642 units=km
New Line.ND236351691$ND236351675 phases=4 Bus1=236351691.0.1.2.3 Bus2=-777777236351691.0.1.2.3 LineCode=336_ACSR_3PH_336_ACSR_N_4KV_4 Length=0.060201 units=km
New Line.1861235E$ND12344989 phases=2 Bus1=12343846.0.2 Bus2=-77777712343846.0.2 LineCode=4_CU_1PH_4_CU_N_4KV_2_N Length=0.007208 units=km
New Line.813767E$ND180191762 phases=2 Bus1=12343017.0.1 Bus2=-77777712343017.0.1 LineCode=6_CU_1PH_6_CU_N_4KV_2_N Length=0.087095 units=km
New Line.4429217E$ND12402210 phases=2 Bus1=12342163.0.2 Bus2=-77777712342163.0.2 LineCode=6_CU_1PH_6_CU_N_4KV_2_N Length=0.038038 units=km

! Switches
New Line.LIDUMS$HARDY_GS0002-3$GS0002-3 phases=3 Bus1=137661897.1.2.3 Bus2=-777777137661897.1.2.3 switch=y r1=0.001 x1=0.001 r0=0.001 x0=0.001 Length=0.001 units=km
New Line.LIDUMS$ARBORVITAE_PD0227$PD0227 phases=3 Bus1=15165227.1.2.3 Bus2=-77777715165227.1.2.3 switch=y r1=0.001 x1=0.001 r0=0.001 x0=0.001 Length=0.001 units=km
New Line.LIDUMS$JAVA_PS0159$PS0159 phases=3 Bus1=59899122.1.2.3 Bus2=-77777759899122.1.2.3 switch=y r1=0.001 x1=0.001 r0=0.001 x0=0.001 Length=0.001 units=km
New Line.137661895$137661903 phases=3 Bus1=137661874.1.2.3 Bus2=137661868.1.2.3 switch=y r1=0.001 x1=0.001 r0=0.001 x0=0.001 Length=0.001 units=km
New Line.137661879$137661895 phases=3 Bus1=137661868.1.2.3 Bus2=137661862.1.2.3 switch=y r1=0.001 x1=0.001 r0=0.001 x0=0.001 Length=0.001 units=km
New Line.1195346E:PS0016 phases=3 Bus1=12344480.1.2.3 Bus2=12344481.1.2.3 switch=y r1=0.001 x1=0.001 r0=0.001 x0=0.001 Length=0.001 units=km
New Line.1195347E:PD0011 phases=3 Bus1=12344790.1.2.3 Bus2=12344791.1.2.3 switch=y r1=0.001 x1=0.001 r0=0.001 x0=0.001 Length=0.001 units=km
New Line.5047884:GS0002-4 phases=3 Bus1=137661905.1.2.3 Bus2=137661874.1.2.3 switch=y r1=0.001 x1=0.001 r0=0.001 x0=0.001 Length=0.001 units=km
New Line.5047884:GS0002-1 phases=3 Bus1=137661861.1.2.3 Bus2=137661889.1.2.3 switch=y r1=0.001 x1=0.001 r0=0.001 x0=0.001 Length=0.001 units=km
New Line.1204804E:1204804E phases=3 Bus1=12341611.1.2.3 Bus2=12341610.1.2.3 switch=y r1=0.001 x1=0.001 r0=0.001 x0=0.001 Length=0.001 units=km
New Line.1204806E:1204806E phases=3 Bus1=12341580.1.2.3 Bus2=12341581.1.2.3 switch=y r1=0.001 x1=0.001 r0=0.001 x0=0.001 Length=0.001 units=km
New Line.1204808E:1204808EPH phases=3 Bus1=12341641.1.2.3 Bus2=12341640.1.2.3 switch=y r1=0.001 x1=0.001 r0=0.001 x0=0.001 Length=0.001 units=km
New Line.1195345:1195345E phases=3 Bus1=12341874.1.2.3 Bus2=12341875.1.2.3 switch=y r1=0.001 x1=0.001 r0=0.001 x0=0.001 Length=0.001 units=km
New Line.559774E:559774EPH phases=3 Bus1=12342005.1.2.3 Bus2=12342004.1.2.3 switch=y r1=0.001 x1=0.001 r0=0.001 x0=0.001 Length=0.001 units=km
New Line.4531813E:4531813EPH phases=3 Bus1=12343930.1.2.3 Bus2=12343929.1.2.3 switch=y r1=0.001 x1=0.001 r0=0.001 x0=0.001 Length=0.001 units=km
New Line.CAB_618291E:618291E phases=3 Bus1=145002346.1.2.3 Bus2=145002329.1.2.3 switch=y r1=0.001 x1=0.001 r0=0.001 x0=0.001 Length=0.001 units=km
New Line.CAB_968794E:968794E phases=3 Bus1=12343167.1.2.3 Bus2=12343151.1.2.3 switch=y r1=0.001 x1=0.001 r0=0.001 x0=0.001 Length=0.001 units=km
New Line.CAB_2083941E:2083941E phases=3 Bus1=12343142.1.2.3 Bus2=12343126.1.2.3 switch=y r1=0.001 x1=0.001 r0=0.001 x0=0.001 Length=0.001 units=km
New Line.CAB_4280825E:4280825E phases=3 Bus1=12344413.1.2.3 Bus2=12344397.1.2.3 switch=y r1=0.001 x1=0.001 r0=0.001 x0=0.001 Length=0.001 units=km
New Line.CAB_4178482E:4178482E phases=3 Bus1=12343117.1.2.3 Bus2=12343101.1.2.3 switch=y r1=0.001 x1=0.001 r0=0.001 x0=0.001 Length=0.001 units=km
New Line.CAB_507005H:507005H phases=3 Bus1=12343921.1.2.3 Bus2=12343905.1.2.3 switch=y r1=0.001 x1=0.001 r0=0.001 x0=0.001 Length=0.001 units=km
New Line.CAB_1336043E:1336043E phases=3 Bus1=12341762.1.2.3 Bus2=12341746.1.2.3 switch=y r1=0.001 x1=0.001 r0=0.001 x0=0.001 Length=0.001 units=km
New Line.CAB_103525H:103525H phases=3 Bus1=237712651.1.2.3 Bus2=237712661.1.2.3 switch=y r1=0.001 x1=0.001 r0=0.001 x0=0.001 Length=0.001 units=km
New Line.CAB_405741E:405741E phases=3 Bus1=12341866.1.2.3 Bus2=12341850.1.2.3 switch=y r1=0.001 x1=0.001 r0=0.001 x0=0.001 Length=0.001 units=km
New Line.CAB_1055944E:1055944E phases=3 Bus1=12344134.1.2.3 Bus2=12344118.1.2.3 switch=y r1=0.001 x1=0.001 r0=0.001 x0=0.001 Length=0.001 units=km
New Line.CAB_490275H:490275H phases=3 Bus1=12344336.1.2.3 Bus2=12344318.1.2.3 switch=y r1=0.001 x1=0.001 r0=0.001 x0=0.001 Length=0.001 units=km
New Line.CAB_423101E:423101E phases=3 Bus1=235814976.1.2.3 Bus2=235814959.1.2.3 switch=y r1=0.001 x1=0.001 r0=0.001 x0=0.001 Length=0.001 units=km
New Line.CAB_679948H:679948H phases=3 Bus1=12342313.1.2.3 Bus2=12342297.1.2.3 switch=y r1=0.001 x1=0.001 r0=0.001 x0=0.001 Length=0.001 units=km
New Line.CAB_418947H:418947H phases=3 Bus1=12342890.1.2.3 Bus2=12342872.1.2.3 switch=y r1=0.001 x1=0.001 r0=0.001 x0=0.001 Length=0.001 units=km
New Line.CAB_513322H:513322H phases=3 Bus1=12342738.1.2.3 Bus2=12342722.1.2.3 switch=y r1=0.001 x1=0.001 r0=0.001 x0=0.001 Length=0.001 units=km
New Line.CAB_4429217E:4429217E phases=3 Bus1=12342163.1.2.3 Bus2=12342147.1.2.3 switch=y r1=0.001 x1=0.001 r0=0.001 x0=0.001 Length=0.001 units=km
New Line.CAB_513286H:513286H phases=3 Bus1=12343321.1.2.3 Bus2=12343305.1.2.3 switch=y r1=0.001 x1=0.001 r0=0.001 x0=0.001 Length=0.001 units=km
New Line.CAB_1195347E:1195347E phases=3 Bus1=12341789.1.2.3 Bus2=12341771.1.2.3 switch=y r1=0.001 x1=0.001 r0=0.001 x0=0.001 Length=0.001 units=km
New Line.CAB_421819H:421819H phases=3 Bus1=12342992.1.2.3 Bus2=12342976.1.2.3 switch=y r1=0.001 x1=0.001 r0=0.001 x0=0.001 Length=0.001 units=km
New Line.CAB_103485H:103485H phases=3 Bus1=12343396.1.2.3 Bus2=12343380.1.2.3 switch=y r1=0.001 x1=0.001 r0=0.001 x0=0.001 Length=0.001 units=km
New Line.CAB_618290E:618290E phases=3 Bus1=12342238.1.2.3 Bus2=12342222.1.2.3 switch=y r1=0.001 x1=0.001 r0=0.001 x0=0.001 Length=0.001 units=km
New Line.CAB_421820H:421820H phases=3 Bus1=12342788.1.2.3 Bus2=12342772.1.2.3 switch=y r1=0.001 x1=0.001 r0=0.001 x0=0.001 Length=0.001 units=km
New Line.CAB_1336050E:1336050E phases=3 Bus1=12344159.1.2.3 Bus2=12344143.1.2.3 switch=y r1=0.001 x1=0.001 r0=0.001 x0=0.001 Length=0.001 units=km
New Line.CAB_1239000E:1239000E phases=3 Bus1=138041817.1.2.3 Bus2=138041800.1.2.3 switch=y r1=0.001 x1=0.001 r0=0.001 x0=0.001 Length=0.001 units=km
New Line.CAB_1238999E:1238999E phases=3 Bus1=12343192.1.2.3 Bus2=12343176.1.2.3 switch=y r1=0.001 x1=0.001 r0=0.001 x0=0.001 Length=0.001 units=km
New Line.CAB_1238997E:1238997E phases=3 Bus1=12343092.1.2.3 Bus2=12343076.1.2.3 switch=y r1=0.001 x1=0.001 r0=0.001 x0=0.001 Length=0.001 units=km
New Line.CAB_298990E:298990E phases=3 Bus1=12343246.1.2.3 Bus2=12343230.1.2.3 switch=y r1=0.001 x1=0.001 r0=0.001 x0=0.001 Length=0.001 units=km
New Line.CAB_307405E:307405E phases=3 Bus1=12343471.1.2.3 Bus2=12343455.1.2.3 switch=y r1=0.001 x1=0.001 r0=0.001 x0=0.001 Length=0.001 units=km
New Line.CAB_393148E:393148E phases=3 Bus1=12344107.1.2.3 Bus2=12344089.1.2.3 switch=y r1=0.001 x1=0.001 r0=0.001 x0=0.001 Length=0.001 units=km
New Line.CAB_465791H:465791H phases=3 Bus1=12342488.1.2.3 Bus2=12342472.1.2.3 switch=y r1=0.001 x1=0.001 r0=0.001 x0=0.001 Length=0.001 units=km
New Line.CAB_1336048E:1336048E phases=3 Bus1=12341712.1.2.3 Bus2=12341696.1.2.3 switch=y r1=0.001 x1=0.001 r0=0.001 x0=0.001 Length=0.001 units=km
New Line.CAB_683175E:683175E phases=3 Bus1=12341841.1.2.3 Bus2=12341825.1.2.3 switch=y r1=0.001 x1=0.001 r0=0.001 x0=0.001 Length=0.001 units=km
New Line.CAB_4706946E:4706946E phases=3 Bus1=12341921.1.2.3 Bus2=12341905.1.2.3 switch=y r1=0.001 x1=0.001 r0=0.001 x0=0.001 Length=0.001 units=km
New Line.CAB_1195345E:1195345E phases=3 Bus1=12344309.1.2.3 Bus2=12344293.1.2.3 switch=y r1=0.001 x1=0.001 r0=0.001 x0=0.001 Length=0.001 units=km
New Line.CAB_1336046E:1336046E phases=3 Bus1=12341737.1.2.3 Bus2=12341721.1.2.3 switch=y r1=0.001 x1=0.001 r0=0.001 x0=0.001 Length=0.001 units=km
New Line.CAB_1099193E:1099193E phases=3 Bus1=12344005.1.2.3 Bus2=12343989.1.2.3 switch=y r1=0.001 x1=0.001 r0=0.001 x0=0.001 Length=0.001 units=km
New Line.CAB_4352133E:4352133E phases=3 Bus1=12344259.1.2.3 Bus2=12344243.1.2.3 switch=y r1=0.001 x1=0.001 r0=0.001 x0=0.001 Length=0.001 units=km
New Line.CAB_261100E:261100E phases=3 Bus1=12341816.1.2.3 Bus2=12341800.1.2.3 switch=y r1=0.001 x1=0.001 r0=0.001 x0=0.001 Length=0.001 units=km
New Line.CAB_1191658E:1191658E phases=3 Bus1=12344030.1.2.3 Bus2=12344014.1.2.3 switch=y r1=0.001 x1=0.001 r0=0.001 x0=0.001 Length=0.001 units=km
New Line.CAB_4352134E:4352134E phases=3 Bus1=12344284.1.2.3 Bus2=12344268.1.2.3 switch=y r1=0.001 x1=0.001 r0=0.001 x0=0.001 Length=0.001 units=km
New Line.CAB_4702225E:4702225E phases=3 Bus1=12341687.1.2.3 Bus2=12341671.1.2.3 switch=y r1=0.001 x1=0.001 r0=0.001 x0=0.001 Length=0.001 units=km
New Line.CAB_559775E:559775E phases=3 Bus1=12342053.1.2.3 Bus2=12342035.1.2.3 switch=y r1=0.001 x1=0.001 r0=0.001 x0=0.001 Length=0.001 units=km
New Line.CAB_969148E:969148E phases=3 Bus1=12344184.1.2.3 Bus2=12344168.1.2.3 switch=y r1=0.001 x1=0.001 r0=0.001 x0=0.001 Length=0.001 units=km
New Line.CAB_618289E:618289E phases=3 Bus1=137713802.1.2.3 Bus2=137713785.1.2.3 switch=y r1=0.001 x1=0.001 r0=0.001 x0=0.001 Length=0.001 units=km
New Line.CAB_618287E:618287E phases=3 Bus1=12342111.1.2.3 Bus2=12342093.1.2.3 switch=y r1=0.001 x1=0.001 r0=0.001 x0=0.001 Length=0.001 units=km
New Line.CAB_329982E:329982E phases=3 Bus1=12342813.1.2.3 Bus2=12342797.1.2.3 switch=y r1=0.001 x1=0.001 r0=0.001 x0=0.001 Length=0.001 units=km
New Line.CAB_440864E:440864E phases=3 Bus1=12343571.1.2.3 Bus2=12343555.1.2.3 switch=y r1=0.001 x1=0.001 r0=0.001 x0=0.001 Length=0.001 units=km
New Line.CAB_4178303E:4178303E phases=3 Bus1=12344080.1.2.3 Bus2=12344064.1.2.3 switch=y r1=0.001 x1=0.001 r0=0.001 x0=0.001 Length=0.001 units=km
New Line.CAB_680019H:680019H phases=3 Bus1=12344438.1.2.3 Bus2=12344422.1.2.3 switch=y r1=0.001 x1=0.001 r0=0.001 x0=0.001 Length=0.001 units=km
New Line.CAB_4489404E:4489404E phases=3 Bus1=176359023.1.2.3 Bus2=176359006.1.2.3 switch=y r1=0.001 x1=0.001 r0=0.001 x0=0.001 Length=0.001 units=km
New Line.CAB_507002H:507002H phases=3 Bus1=12342288.1.2.3 Bus2=12342272.1.2.3 switch=y r1=0.001 x1=0.001 r0=0.001 x0=0.001 Length=0.001 units=km
New Line.CAB_465792H:465792H phases=3 Bus1=12342513.1.2.3 Bus2=12342497.1.2.3 switch=y r1=0.001 x1=0.001 r0=0.001 x0=0.001 Length=0.001 units=km
New Line.CAB_513316H:513316H phases=3 Bus1=12342563.1.2.3 Bus2=12342547.1.2.3 switch=y r1=0.001 x1=0.001 r0=0.001 x0=0.001 Length=0.001 units=km
New Line.CAB_507022H:507022H phases=3 Bus1=12342663.1.2.3 Bus2=12342647.1.2.3 switch=y r1=0.001 x1=0.001 r0=0.001 x0=0.001 Length=0.001 units=km
New Line.CAB_4857431E:4857431E phases=3 Bus1=12342713.1.2.3 Bus2=12342697.1.2.3 switch=y r1=0.001 x1=0.001 r0=0.001 x0=0.001 Length=0.001 units=km
New Line.CAB_518417H:518417H phases=3 Bus1=12343821.1.2.3 Bus2=12343805.1.2.3 switch=y r1=0.001 x1=0.001 r0=0.001 x0=0.001 Length=0.001 units=km
New Line.CAB_1378573E:1378573E phases=3 Bus1=12341946.1.2.3 Bus2=12341930.1.2.3 switch=y r1=0.001 x1=0.001 r0=0.001 x0=0.001 Length=0.001 units=km
New Line.CAB_4429218E:4429218E phases=3 Bus1=12342263.1.2.3 Bus2=12342247.1.2.3 switch=y r1=0.001 x1=0.001 r0=0.001 x0=0.001 Length=0.001 units=km
New Line.CAB_1264605E:1264605E phases=3 Bus1=12342838.1.2.3 Bus2=12342822.1.2.3 switch=y r1=0.001 x1=0.001 r0=0.001 x0=0.001 Length=0.001 units=km
New Line.CAB_440866E:440866E phases=3 Bus1=12343871.1.2.3 Bus2=12343855.1.2.3 switch=y r1=0.001 x1=0.001 r0=0.001 x0=0.001 Length=0.001 units=km
New Line.CAB_330019E:330019E phases=3 Bus1=12342863.1.2.3 Bus2=12342847.1.2.3 switch=y r1=0.001 x1=0.001 r0=0.001 x0=0.001 Length=0.001 units=km
New Line.CAB_421814H:421814H phases=3 Bus1=12342917.1.2.3 Bus2=12342901.1.2.3 switch=y r1=0.001 x1=0.001 r0=0.001 x0=0.001 Length=0.001 units=km
New Line.CAB_465794H:465794H phases=3 Bus1=12342538.1.2.3 Bus2=12342522.1.2.3 switch=y r1=0.001 x1=0.001 r0=0.001 x0=0.001 Length=0.001 units=km
New Line.CAB_4986823E:4986823E phases=3 Bus1=12342588.1.2.3 Bus2=12342572.1.2.3 switch=y r1=0.001 x1=0.001 r0=0.001 x0=0.001 Length=0.001 units=km
New Line.CAB_4914233E:4914233E phases=3 Bus1=12342688.1.2.3 Bus2=12342672.1.2.3 switch=y r1=0.001 x1=0.001 r0=0.001 x0=0.001 Length=0.001 units=km
New Line.CAB_518419H:518419H phases=3 Bus1=12343296.1.2.3 Bus2=12343280.1.2.3 switch=y r1=0.001 x1=0.001 r0=0.001 x0=0.001 Length=0.001 units=km
New Line.CAB_871362E:871362E phases=3 Bus1=12344465.1.2.3 Bus2=12344447.1.2.3 switch=y r1=0.001 x1=0.001 r0=0.001 x0=0.001 Length=0.001 units=km
New Line.CAB_1191529E:1191529E phases=3 Bus1=12342438.1.2.3 Bus2=12342422.1.2.3 switch=y r1=0.001 x1=0.001 r0=0.001 x0=0.001 Length=0.001 units=km
New Line.CAB_4836057E:4836057E phases=3 Bus1=12342463.1.2.3 Bus2=12342447.1.2.3 switch=y r1=0.001 x1=0.001 r0=0.001 x0=0.001 Length=0.001 units=km
New Line.CAB_4830139E:4830139E phases=3 Bus1=12342613.1.2.3 Bus2=12342597.1.2.3 switch=y r1=0.001 x1=0.001 r0=0.001 x0=0.001 Length=0.001 units=km
New Line.CAB_518421H:518421H phases=3 Bus1=12343271.1.2.3 Bus2=12343255.1.2.3 switch=y r1=0.001 x1=0.001 r0=0.001 x0=0.001 Length=0.001 units=km
New Line.CAB_4377542E:4377542E phases=3 Bus1=12343496.1.2.3 Bus2=12343480.1.2.3 switch=y r1=0.001 x1=0.001 r0=0.001 x0=0.001 Length=0.001 units=km
New Line.CAB_448561E:448561E phases=3 Bus1=12343546.1.2.3 Bus2=12343530.1.2.3 switch=y r1=0.001 x1=0.001 r0=0.001 x0=0.001 Length=0.001 units=km
New Line.CAB_4573082E:4573082E phases=3 Bus1=12343596.1.2.3 Bus2=12343580.1.2.3 switch=y r1=0.001 x1=0.001 r0=0.001 x0=0.001 Length=0.001 units=km
New Line.CAB_513296H:513296H phases=3 Bus1=12344055.1.2.3 Bus2=12344039.1.2.3 switch=y r1=0.001 x1=0.001 r0=0.001 x0=0.001 Length=0.001 units=km
New Line.CAB_4428028E:4428028E phases=3 Bus1=96627099.1.2.3 Bus2=96627082.1.2.3 switch=y r1=0.001 x1=0.001 r0=0.001 x0=0.001 Length=0.001 units=km
New Line.CAB_759903E:759903E phases=3 Bus1=12341971.1.2.3 Bus2=12341955.1.2.3 switch=y r1=0.001 x1=0.001 r0=0.001 x0=0.001 Length=0.001 units=km
New Line.CAB_431474H:431474H phases=3 Bus1=12342338.1.2.3 Bus2=12342322.1.2.3 switch=y r1=0.001 x1=0.001 r0=0.001 x0=0.001 Length=0.001 units=km
New Line.CAB_559769E:559769E phases=3 Bus1=12342413.1.2.3 Bus2=12342397.1.2.3 switch=y r1=0.001 x1=0.001 r0=0.001 x0=0.001 Length=0.001 units=km
New Line.CAB_513311H:513311H phases=3 Bus1=12342638.1.2.3 Bus2=12342622.1.2.3 switch=y r1=0.001 x1=0.001 r0=0.001 x0=0.001 Length=0.001 units=km
New Line.CAB_521158E:521158E phases=3 Bus1=12343521.1.2.3 Bus2=12343505.1.2.3 switch=y r1=0.001 x1=0.001 r0=0.001 x0=0.001 Length=0.001 units=km
New Line.CAB_1191530E:1191530E phases=3 Bus1=12401477.1.2.3 Bus2=160854378.1.2.3 switch=y r1=0.001 x1=0.001 r0=0.001 x0=0.001 Length=0.001 units=km
New Line.CAB_559770E:559770E phases=3 Bus1=12342388.1.2.3 Bus2=12342372.1.2.3 switch=y r1=0.001 x1=0.001 r0=0.001 x0=0.001 Length=0.001 units=km
New Line.CAB_513280H:513280H phases=3 Bus1=12343346.1.2.3 Bus2=12343330.1.2.3 switch=y r1=0.001 x1=0.001 r0=0.001 x0=0.001 Length=0.001 units=km
New Line.CAB_440869E:440869E phases=3 Bus1=12344209.1.2.3 Bus2=12344193.1.2.3 switch=y r1=0.001 x1=0.001 r0=0.001 x0=0.001 Length=0.001 units=km
New Line.CAB_618295E:618295E phases=3 Bus1=12342188.1.2.3 Bus2=12342172.1.2.3 switch=y r1=0.001 x1=0.001 r0=0.001 x0=0.001 Length=0.001 units=km
New Line.CAB_4561351E:4561351E phases=3 Bus1=12342942.1.2.3 Bus2=12342926.1.2.3 switch=y r1=0.001 x1=0.001 r0=0.001 x0=0.001 Length=0.001 units=km
New Line.CAB_513282H:513282H phases=3 Bus1=12343371.1.2.3 Bus2=12343355.1.2.3 switch=y r1=0.001 x1=0.001 r0=0.001 x0=0.001 Length=0.001 units=km
New Line.CAB_1861235E:1861235E phases=3 Bus1=12343846.1.2.3 Bus2=12343830.1.2.3 switch=y r1=0.001 x1=0.001 r0=0.001 x0=0.001 Length=0.001 units=km
New Line.CAB_4280824E:4280824E phases=3 Bus1=12344388.1.2.3 Bus2=12344372.1.2.3 switch=y r1=0.001 x1=0.001 r0=0.001 x0=0.001 Length=0.001 units=km
New Line.CAB_4178622E:4178622E phases=3 Bus1=164728642.1.2.3 Bus2=164728625.1.2.3 switch=y r1=0.001 x1=0.001 r0=0.001 x0=0.001 Length=0.001 units=km
New Line.CAB_2380535E:2380535E phases=3 Bus1=12342138.1.2.3 Bus2=12342122.1.2.3 switch=y r1=0.001 x1=0.001 r0=0.001 x0=0.001 Length=0.001 units=km
New Line.CAB_330022E:330022E phases=3 Bus1=12342763.1.2.3 Bus2=12342747.1.2.3 switch=y r1=0.001 x1=0.001 r0=0.001 x0=0.001 Length=0.001 units=km
New Line.CAB_421822H:421822H phases=3 Bus1=12343042.1.2.3 Bus2=12343026.1.2.3 switch=y r1=0.001 x1=0.001 r0=0.001 x0=0.001 Length=0.001 units=km
New Line.CAB_906845E:906845E phases=3 Bus1=12343421.1.2.3 Bus2=12343405.1.2.3 switch=y r1=0.001 x1=0.001 r0=0.001 x0=0.001 Length=0.001 units=km
New Line.CAB_4280823E:4280823E phases=3 Bus1=12344363.1.2.3 Bus2=12344347.1.2.3 switch=y r1=0.001 x1=0.001 r0=0.001 x0=0.001 Length=0.001 units=km
New Line.CAB_4829067E:4829067E phases=3 Bus1=237503244.1.2.3 Bus2=237503227.1.2.3 switch=y r1=0.001 x1=0.001 r0=0.001 x0=0.001 Length=0.001 units=km
New Line.CAB_421817H:421817H phases=3 Bus1=12342967.1.2.3 Bus2=12342951.1.2.3 switch=y r1=0.001 x1=0.001 r0=0.001 x0=0.001 Length=0.001 units=km
New Line.CAB_813767E:813767E phases=3 Bus1=12343017.1.2.3 Bus2=12343001.1.2.3 switch=y r1=0.001 x1=0.001 r0=0.001 x0=0.001 Length=0.001 units=km
New Line.CAB_300770E:300770E phases=3 Bus1=12343067.1.2.3 Bus2=12343051.1.2.3 switch=y r1=0.001 x1=0.001 r0=0.001 x0=0.001 Length=0.001 units=km
New Line.CAB_1297857E:1297857E phases=3 Bus1=12343219.1.2.3 Bus2=12343201.1.2.3 switch=y r1=0.001 x1=0.001 r0=0.001 x0=0.001 Length=0.001 units=km
New Line.CAB_4558156E:4558156E phases=3 Bus1=12343896.1.2.3 Bus2=12343880.1.2.3 switch=y r1=0.001 x1=0.001 r0=0.001 x0=0.001 Length=0.001 units=km
New Line.CAB_103486H:103486H phases=3 Bus1=12343446.1.2.3 Bus2=12343430.1.2.3 switch=y r1=0.001 x1=0.001 r0=0.001 x0=0.001 Length=0.001 units=km
New Line.CAB_4352127E:4352127E phases=3 Bus1=12344234.1.2.3 Bus2=12344218.1.2.3 switch=y r1=0.001 x1=0.001 r0=0.001 x0=0.001 Length=0.001 units=km
New Line.421817H:12342949 phases=1 Bus1=12342951.1 Bus2=12342952.1 switch=y r1=0.001 x1=0.001 r0=0.001 x0=0.001 Length=0.001 units=km
New Line.813767E:12342999 phases=1 Bus1=12343001.1 Bus2=12343002.1 switch=y r1=0.001 x1=0.001 r0=0.001 x0=0.001 Length=0.001 units=km
New Line.300770E:12343049 phases=3 Bus1=12343051.1.2.3 Bus2=12343052.1.2.3 switch=y r1=0.001 x1=0.001 r0=0.001 x0=0.001 Length=0.001 units=km
New Line.1297857E:12343199 phases=3 Bus1=12343201.1.2.3 Bus2=12343202.1.2.3 switch=y r1=0.001 x1=0.001 r0=0.001 x0=0.001 Length=0.001 units=km
New Line.513286H:12343303 phases=2 Bus1=12343305.1.2 Bus2=12343306.1.2 switch=y r1=0.001 x1=0.001 r0=0.001 x0=0.001 Length=0.001 units=km
New Line.103486H:12343428 phases=1 Bus1=12343430.2 Bus2=12343431.2 switch=y r1=0.001 x1=0.001 r0=0.001 x0=0.001 Length=0.001 units=km
New Line.4352127E:12344216 phases=3 Bus1=12344218.1.2.3 Bus2=12344219.1.2.3 switch=y r1=0.001 x1=0.001 r0=0.001 x0=0.001 Length=0.001 units=km
New Line.1195347E:12341769 phases=3 Bus1=12341771.1.2.3 Bus2=12341772.1.2.3 switch=y r1=0.001 x1=0.001 r0=0.001 x0=0.001 Length=0.001 units=km
New Line.421819H:12342974 phases=1 Bus1=12342976.1 Bus2=12342977.1 switch=y r1=0.001 x1=0.001 r0=0.001 x0=0.001 Length=0.001 units=km
New Line.103485H:12343378 phases=1 Bus1=12343380.2 Bus2=12343381.2 switch=y r1=0.001 x1=0.001 r0=0.001 x0=0.001 Length=0.001 units=km
New Line.618291E:145002327 phases=3 Bus1=145002329.1.2.3 Bus2=145002330.1.2.3 switch=y r1=0.001 x1=0.001 r0=0.001 x0=0.001 Length=0.001 units=km
New Line.618290E:12342220 phases=3 Bus1=12342222.1.2.3 Bus2=12342223.1.2.3 switch=y r1=0.001 x1=0.001 r0=0.001 x0=0.001 Length=0.001 units=km
New Line.421820H:12342770 phases=1 Bus1=12342772.1 Bus2=12342773.1 switch=y r1=0.001 x1=0.001 r0=0.001 x0=0.001 Length=0.001 units=km
New Line.968794E:12343149 phases=3 Bus1=12343151.1.2.3 Bus2=12343152.1.2.3 switch=y r1=0.001 x1=0.001 r0=0.001 x0=0.001 Length=0.001 units=km
New Line.1239000E:138041798 phases=1 Bus1=138041800.1 Bus2=138041801.1 switch=y r1=0.001 x1=0.001 r0=0.001 x0=0.001 Length=0.001 units=km
New Line.2083941E:12343124 phases=3 Bus1=12343126.1.2.3 Bus2=12343127.1.2.3 switch=y r1=0.001 x1=0.001 r0=0.001 x0=0.001 Length=0.001 units=km
New Line.1238999E:12343174 phases=1 Bus1=12343176.1 Bus2=12343177.1 switch=y r1=0.001 x1=0.001 r0=0.001 x0=0.001 Length=0.001 units=km
New Line.4280825E:12344395 phases=1 Bus1=12344397.3 Bus2=12344398.3 switch=y r1=0.001 x1=0.001 r0=0.001 x0=0.001 Length=0.001 units=km
New Line.1238997E:12343074 phases=1 Bus1=12343076.1 Bus2=12343077.1 switch=y r1=0.001 x1=0.001 r0=0.001 x0=0.001 Length=0.001 units=km
New Line.4178482E:12343099 phases=3 Bus1=12343101.1.2.3 Bus2=12343102.1.2.3 switch=y r1=0.001 x1=0.001 r0=0.001 x0=0.001 Length=0.001 units=km
New Line.298990E:12343228 phases=1 Bus1=12343230.3 Bus2=12343231.3 switch=y r1=0.001 x1=0.001 r0=0.001 x0=0.001 Length=0.001 units=km
New Line.307405E:12343453 phases=1 Bus1=12343455.1 Bus2=12343456.1 switch=y r1=0.001 x1=0.001 r0=0.001 x0=0.001 Length=0.001 units=km
New Line.1336050E:12344141 phases=1 Bus1=12344143.1 Bus2=12344144.1 switch=y r1=0.001 x1=0.001 r0=0.001 x0=0.001 Length=0.001 units=km
New Line.1336048E:12341694 phases=1 Bus1=12341696.1 Bus2=12341697.1 switch=y r1=0.001 x1=0.001 r0=0.001 x0=0.001 Length=0.001 units=km
New Line.683175E:12341823 phases=3 Bus1=12341825.1.2.3 Bus2=12341826.1.2.3 switch=y r1=0.001 x1=0.001 r0=0.001 x0=0.001 Length=0.001 units=km
New Line.4706946E:12341903 phases=3 Bus1=12341905.1.2.3 Bus2=12341906.1.2.3 switch=y r1=0.001 x1=0.001 r0=0.001 x0=0.001 Length=0.001 units=km
New Line.1195345E:12344291 phases=3 Bus1=12344293.1.2.3 Bus2=12344294.1.2.3 switch=y r1=0.001 x1=0.001 r0=0.001 x0=0.001 Length=0.001 units=km
New Line.1336046E:12341719 phases=1 Bus1=12341721.1 Bus2=12341722.1 switch=y r1=0.001 x1=0.001 r0=0.001 x0=0.001 Length=0.001 units=km
New Line.1099193E:12343987 phases=2 Bus1=12343989.1.3 Bus2=12343990.1.3 switch=y r1=0.001 x1=0.001 r0=0.001 x0=0.001 Length=0.001 units=km
New Line.4352133E:12344241 phases=3 Bus1=12344243.1.2.3 Bus2=12344244.1.2.3 switch=y r1=0.001 x1=0.001 r0=0.001 x0=0.001 Length=0.001 units=km
New Line.1336043E:12341744 phases=1 Bus1=12341746.1 Bus2=12341747.1 switch=y r1=0.001 x1=0.001 r0=0.001 x0=0.001 Length=0.001 units=km
New Line.261100E:12341798 phases=2 Bus1=12341800.1.3 Bus2=12341801.1.3 switch=y r1=0.001 x1=0.001 r0=0.001 x0=0.001 Length=0.001 units=km
New Line.1191658E:12344012 phases=3 Bus1=12344014.1.2.3 Bus2=12344015.1.2.3 switch=y r1=0.001 x1=0.001 r0=0.001 x0=0.001 Length=0.001 units=km
New Line.4352134E:12344266 phases=3 Bus1=12344268.1.2.3 Bus2=12344269.1.2.3 switch=y r1=0.001 x1=0.001 r0=0.001 x0=0.001 Length=0.001 units=km
New Line.4702225E:12341669 phases=1 Bus1=12341671.1 Bus2=12341672.1 switch=y r1=0.001 x1=0.001 r0=0.001 x0=0.001 Length=0.001 units=km
New Line.103525H:237712659 phases=2 Bus1=237712661.1.3 Bus2=237712662.1.3 switch=y r1=0.001 x1=0.001 r0=0.001 x0=0.001 Length=0.001 units=km
New Line.559775E:12342033 phases=3 Bus1=12342035.1.2.3 Bus2=12342036.1.2.3 switch=y r1=0.001 x1=0.001 r0=0.001 x0=0.001 Length=0.001 units=km
New Line.969148E:12344166 phases=1 Bus1=12344168.1 Bus2=12344169.1 switch=y r1=0.001 x1=0.001 r0=0.001 x0=0.001 Length=0.001 units=km
New Line.405741E:12341848 phases=3 Bus1=12341850.1.2.3 Bus2=12341851.1.2.3 switch=y r1=0.001 x1=0.001 r0=0.001 x0=0.001 Length=0.001 units=km
New Line.1055944E:12344116 phases=1 Bus1=12344118.1 Bus2=12344119.1 switch=y r1=0.001 x1=0.001 r0=0.001 x0=0.001 Length=0.001 units=km
New Line.618289E:137713783 phases=3 Bus1=137713785.1.2.3 Bus2=137713786.1.2.3 switch=y r1=0.001 x1=0.001 r0=0.001 x0=0.001 Length=0.001 units=km
New Line.507005H:12343903 phases=3 Bus1=12343905.1.2.3 Bus2=12343906.1.2.3 switch=y r1=0.001 x1=0.001 r0=0.001 x0=0.001 Length=0.001 units=km
New Line.393148E:12344087 phases=3 Bus1=12344089.1.2.3 Bus2=12344090.1.2.3 switch=y r1=0.001 x1=0.001 r0=0.001 x0=0.001 Length=0.001 units=km
New Line.465791H:12342470 phases=3 Bus1=12342472.1.2.3 Bus2=12342473.1.2.3 switch=y r1=0.001 x1=0.001 r0=0.001 x0=0.001 Length=0.001 units=km
New Line.4178303E:12344062 phases=2 Bus1=12344064.2.3 Bus2=12344065.2.3 switch=y r1=0.001 x1=0.001 r0=0.001 x0=0.001 Length=0.001 units=km
New Line.680019H:12344420 phases=1 Bus1=12344422.1 Bus2=12344423.1 switch=y r1=0.001 x1=0.001 r0=0.001 x0=0.001 Length=0.001 units=km
New Line.4489404E:176359004 phases=3 Bus1=176359006.1.2.3 Bus2=176359007.1.2.3 switch=y r1=0.001 x1=0.001 r0=0.001 x0=0.001 Length=0.001 units=km
New Line.507002H:12342270 phases=3 Bus1=12342272.1.2.3 Bus2=12342273.1.2.3 switch=y r1=0.001 x1=0.001 r0=0.001 x0=0.001 Length=0.001 units=km
New Line.618287E:12342091 phases=3 Bus1=12342093.1.2.3 Bus2=12342094.1.2.3 switch=y r1=0.001 x1=0.001 r0=0.001 x0=0.001 Length=0.001 units=km
New Line.329982E:12342795 phases=1 Bus1=12342797.3 Bus2=12342798.3 switch=y r1=0.001 x1=0.001 r0=0.001 x0=0.001 Length=0.001 units=km
New Line.440864E:12343553 phases=3 Bus1=12343555.1.2.3 Bus2=12343556.1.2.3 switch=y r1=0.001 x1=0.001 r0=0.001 x0=0.001 Length=0.001 units=km
New Line.490275H:12344316 phases=3 Bus1=12344318.1.2.3 Bus2=12344319.1.2.3 switch=y r1=0.001 x1=0.001 r0=0.001 x0=0.001 Length=0.001 units=km
New Line.1264605E:12342820 phases=1 Bus1=12342822.3 Bus2=12342823.3 switch=y r1=0.001 x1=0.001 r0=0.001 x0=0.001 Length=0.001 units=km
New Line.465792H:12342495 phases=3 Bus1=12342497.1.2.3 Bus2=12342498.1.2.3 switch=y r1=0.001 x1=0.001 r0=0.001 x0=0.001 Length=0.001 units=km
New Line.513316H:12342545 phases=1 Bus1=12342547.3 Bus2=12342548.3 switch=y r1=0.001 x1=0.001 r0=0.001 x0=0.001 Length=0.001 units=km
New Line.507022H:12342645 phases=2 Bus1=12342647.2.3 Bus2=12342648.2.3 switch=y r1=0.001 x1=0.001 r0=0.001 x0=0.001 Length=0.001 units=km
New Line.4857431E:12342695 phases=1 Bus1=12342697.3 Bus2=12342698.3 switch=y r1=0.001 x1=0.001 r0=0.001 x0=0.001 Length=0.001 units=km
New Line.518417H:12343803 phases=1 Bus1=12343805.3 Bus2=12343806.3 switch=y r1=0.001 x1=0.001 r0=0.001 x0=0.001 Length=0.001 units=km
New Line.423101E:235814957 phases=1 Bus1=235814959.1 Bus2=235814960.1 switch=y r1=0.001 x1=0.001 r0=0.001 x0=0.001 Length=0.001 units=km
New Line.1378573E:12341928 phases=3 Bus1=12341930.1.2.3 Bus2=12341931.1.2.3 switch=y r1=0.001 x1=0.001 r0=0.001 x0=0.001 Length=0.001 units=km
New Line.4429218E:12342245 phases=1 Bus1=12342247.2 Bus2=12342248.2 switch=y r1=0.001 x1=0.001 r0=0.001 x0=0.001 Length=0.001 units=km
New Line.679948H:12342295 phases=1 Bus1=12342297.2 Bus2=12342298.2 switch=y r1=0.001 x1=0.001 r0=0.001 x0=0.001 Length=0.001 units=km
New Line.465794H:12342520 phases=3 Bus1=12342522.1.2.3 Bus2=12342523.1.2.3 switch=y r1=0.001 x1=0.001 r0=0.001 x0=0.001 Length=0.001 units=km
New Line.4986823E:12342570 phases=1 Bus1=12342572.3 Bus2=12342573.3 switch=y r1=0.001 x1=0.001 r0=0.001 x0=0.001 Length=0.001 units=km
New Line.4914233E:12342670 phases=2 Bus1=12342672.2.3 Bus2=12342673.2.3 switch=y r1=0.001 x1=0.001 r0=0.001 x0=0.001 Length=0.001 units=km
New Line.513322H:12342720 phases=1 Bus1=12342722.3 Bus2=12342723.3 switch=y r1=0.001 x1=0.001 r0=0.001 x0=0.001 Length=0.001 units=km
New Line.518419H:12343278 phases=1 Bus1=12343280.3 Bus2=12343281.3 switch=y r1=0.001 x1=0.001 r0=0.001 x0=0.001 Length=0.001 units=km
New Line.871362E:12344445 phases=3 Bus1=12344447.1.2.3 Bus2=12344448.1.2.3 switch=y r1=0.001 x1=0.001 r0=0.001 x0=0.001 Length=0.001 units=km
New Line.1191529E:12342420 phases=1 Bus1=12342422.2 Bus2=12342423.2 switch=y r1=0.001 x1=0.001 r0=0.001 x0=0.001 Length=0.001 units=km
New Line.4836057E:12342445 phases=1 Bus1=12342447.3 Bus2=12342448.3 switch=y r1=0.001 x1=0.001 r0=0.001 x0=0.001 Length=0.001 units=km
New Line.4830139E:12342595 phases=1 Bus1=12342597.3 Bus2=12342598.3 switch=y r1=0.001 x1=0.001 r0=0.001 x0=0.001 Length=0.001 units=km
New Line.518421H:12343253 phases=1 Bus1=12343255.3 Bus2=12343256.3 switch=y r1=0.001 x1=0.001 r0=0.001 x0=0.001 Length=0.001 units=km
New Line.4377542E:12343478 phases=1 Bus1=12343480.1 Bus2=12343481.1 switch=y r1=0.001 x1=0.001 r0=0.001 x0=0.001 Length=0.001 units=km
New Line.448561E:12343528 phases=1 Bus1=12343530.1 Bus2=12343531.1 switch=y r1=0.001 x1=0.001 r0=0.001 x0=0.001 Length=0.001 units=km
New Line.4573082E:12343578 phases=1 Bus1=12343580.2 Bus2=12343581.2 switch=y r1=0.001 x1=0.001 r0=0.001 x0=0.001 Length=0.001 units=km
New Line.513296H:12344037 phases=1 Bus1=12344039.3 Bus2=12344040.3 switch=y r1=0.001 x1=0.001 r0=0.001 x0=0.001 Length=0.001 units=km
New Line.4428028E:96627080 phases=1 Bus1=96627082.2 Bus2=96627083.2 switch=y r1=0.001 x1=0.001 r0=0.001 x0=0.001 Length=0.001 units=km
New Line.759903E:12341953 phases=1 Bus1=12341955.3 Bus2=12341956.3 switch=y r1=0.001 x1=0.001 r0=0.001 x0=0.001 Length=0.001 units=km
New Line.431474H:12342320 phases=1 Bus1=12342322.2 Bus2=12342323.2 switch=y r1=0.001 x1=0.001 r0=0.001 x0=0.001 Length=0.001 units=km
New Line.559769E:12342395 phases=1 Bus1=12342397.2 Bus2=12342398.2 switch=y r1=0.001 x1=0.001 r0=0.001 x0=0.001 Length=0.001 units=km
New Line.513311H:12342620 phases=1 Bus1=12342622.3 Bus2=12342623.3 switch=y r1=0.001 x1=0.001 r0=0.001 x0=0.001 Length=0.001 units=km
New Line.521158E:12343503 phases=1 Bus1=12343505.1 Bus2=12343506.1 switch=y r1=0.001 x1=0.001 r0=0.001 x0=0.001 Length=0.001 units=km
New Line.440866E:12343853 phases=1 Bus1=12343855.2 Bus2=12343856.2 switch=y r1=0.001 x1=0.001 r0=0.001 x0=0.001 Length=0.001 units=km
New Line.330019E:12342845 phases=1 Bus1=12342847.3 Bus2=12342848.3 switch=y r1=0.001 x1=0.001 r0=0.001 x0=0.001 Length=0.001 units=km
New Line.418947H:12342870 phases=3 Bus1=12342872.1.2.3 Bus2=12342873.1.2.3 switch=y r1=0.001 x1=0.001 r0=0.001 x0=0.001 Length=0.001 units=km
New Line.421814H:12342899 phases=1 Bus1=12342901.1 Bus2=12342902.1 switch=y r1=0.001 x1=0.001 r0=0.001 x0=0.001 Length=0.001 units=km
New Line.513280H:12343328 phases=2 Bus1=12343330.1.2 Bus2=12343331.1.2 switch=y r1=0.001 x1=0.001 r0=0.001 x0=0.001 Length=0.001 units=km
New Line.440869E:12344191 phases=1 Bus1=12344193.2 Bus2=12344194.2 switch=y r1=0.001 x1=0.001 r0=0.001 x0=0.001 Length=0.001 units=km
New Line.618295E:12342170 phases=3 Bus1=12342172.1.2.3 Bus2=12342173.1.2.3 switch=y r1=0.001 x1=0.001 r0=0.001 x0=0.001 Length=0.001 units=km
New Line.4561351E:12342924 phases=1 Bus1=12342926.1 Bus2=12342927.1 switch=y r1=0.001 x1=0.001 r0=0.001 x0=0.001 Length=0.001 units=km
New Line.513282H:12343353 phases=2 Bus1=12343355.1.2 Bus2=12343356.1.2 switch=y r1=0.001 x1=0.001 r0=0.001 x0=0.001 Length=0.001 units=km
New Line.1861235E:12343828 phases=1 Bus1=12343830.2 Bus2=12343831.2 switch=y r1=0.001 x1=0.001 r0=0.001 x0=0.001 Length=0.001 units=km
New Line.4280824E:12344370 phases=1 Bus1=12344372.2 Bus2=12344373.2 switch=y r1=0.001 x1=0.001 r0=0.001 x0=0.001 Length=0.001 units=km
New Line.4178622E:164728623 phases=1 Bus1=164728625.3 Bus2=164728626.3 switch=y r1=0.001 x1=0.001 r0=0.001 x0=0.001 Length=0.001 units=km
New Line.2380535E:12342120 phases=1 Bus1=12342122.2 Bus2=12342123.2 switch=y r1=0.001 x1=0.001 r0=0.001 x0=0.001 Length=0.001 units=km
New Line.330022E:12342745 phases=1 Bus1=12342747.3 Bus2=12342748.3 switch=y r1=0.001 x1=0.001 r0=0.001 x0=0.001 Length=0.001 units=km
New Line.421822H:12343024 phases=1 Bus1=12343026.2 Bus2=12343027.2 switch=y r1=0.001 x1=0.001 r0=0.001 x0=0.001 Length=0.001 units=km
New Line.1191530E:160854376 phases=1 Bus1=160854378.2 Bus2=160854379.2 switch=y r1=0.001 x1=0.001 r0=0.001 x0=0.001 Length=0.001 units=km
New Line.559770E:12342370 phases=1 Bus1=12342372.2 Bus2=12342373.2 switch=y r1=0.001 x1=0.001 r0=0.001 x0=0.001 Length=0.001 units=km
New Line.4558156E:12343878 phases=1 Bus1=12343880.2 Bus2=12343881.2 switch=y r1=0.001 x1=0.001 r0=0.001 x0=0.001 Length=0.001 units=km
New Line.906845E:12343403 phases=1 Bus1=12343405.2 Bus2=12343406.2 switch=y r1=0.001 x1=0.001 r0=0.001 x0=0.001 Length=0.001 units=km
New Line.4280823E:12344345 phases=3 Bus1=12344347.1.2.3 Bus2=12344348.1.2.3 switch=y r1=0.001 x1=0.001 r0=0.001 x0=0.001 Length=0.001 units=km
New Line.4829067E:237503225 phases=2 Bus1=237503227.1.2 Bus2=237503228.1.2 switch=y r1=0.001 x1=0.001 r0=0.001 x0=0.001 Length=0.001 units=km
New Line.4429217E:12342145 phases=1 Bus1=12342147.2 Bus2=12342148.2 switch=y r1=0.001 x1=0.001 r0=0.001 x0=0.001 Length=0.001 units=km
New Line.152797E:BF44424 phases=1 Bus1=12344656.1 Bus2=12344655.1 switch=y r1=0.001 x1=0.001 r0=0.001 x0=0.001 Length=0.001 units=km
New Line.4937556E:BF44425 phases=1 Bus1=12344520.2 Bus2=12344519.2 switch=y r1=0.001 x1=0.001 r0=0.001 x0=0.001 Length=0.001 units=km
New Line.137661887$137661879 phases=3 Bus1=137661862.1.2.3 Bus2=137661861.1.2.3 switch=y r1=0.001 x1=0.001 r0=0.001 x0=0.001 Length=0.001 units=km
New Line.1195348E:PD0227 phases=3 Bus1=15165228.1.2.3 Bus2=15165227.1.2.3 switch=y r1=0.001 x1=0.001 r0=0.001 x0=0.001 Length=0.001 units=km enabled=false
New Line.646665E:PS0159 phases=3 Bus1=59899123.1.2.3 Bus2=59899122.1.2.3 switch=y r1=0.001 x1=0.001 r0=0.001 x0=0.001 Length=0.001 units=km enabled=false
New Line.5047884:GS0002-3 phases=3 Bus1=137661868.1.2.3 Bus2=137661897.1.2.3 switch=y r1=0.001 x1=0.001 r0=0.001 x0=0.001 Length=0.001 units=km enabled=false
New Line.5047884:GS0002-2 phases=3 Bus1=137661862.1.2.3 Bus2=137661881.1.2.3 switch=y r1=0.001 x1=0.001 r0=0.001 x0=0.001 Length=0.001 units=km
New Line.1191658E:1191658EIS phases=3 Bus1=244298837.1.2.3 Bus2=244298836.1.2.3 switch=y r1=0.001 x1=0.001 r0=0.001 x0=0.001 Length=0.001 units=km
! Loads
New Load.103486H Bus1=-99999912343431.2.0 phases=1 kV=0.069282 kW=0 kvar=0 model=1
New Load.813767E Bus1=-99999912343002.1.0 phases=1 kV=0.069282 kW=0 kvar=0 model=1
New Load.421817H Bus1=-99999912342952.1.0 phases=1 kV=0.069282 kW=0 kvar=0 model=1
New Load.1297857E Bus1=-99999912343202.1.0 phases=1 kV=0.069282 kW=0 kvar=0 model=1
New Load.300770E Bus1=-99999912343052.3.0 phases=1 kV=0.069282 kW=0 kvar=0 model=1
New Load.4352127E Bus1=-99999912344219.1.0 phases=1 kV=0.069282 kW=0 kvar=0 model=1
New Load.4429217E Bus1=-99999912342148.2.0 phases=1 kV=0.069282 kW=0 kvar=0 model=1
New Load.513286H Bus1=-99999912343306.3.0 phases=1 kV=0.069282 kW=0 kvar=0 model=1
New Load.969148E Bus1=-99999912344169.1.0 phases=1 kV=0.069282 kW=0 kvar=0 model=1
New Load.559775E Bus1=-99999912342036.3.0 phases=1 kV=0.069282 kW=0 kvar=0 model=1
New Load.1239000E Bus1=-999999138041801.1.0 phases=1 kV=0.069282 kW=0 kvar=0 model=1
New Load.421820H Bus1=-99999912342773.1.0 phases=1 kV=0.069282 kW=0 kvar=0 model=1
New Load.618290E Bus1=-99999912342223.3.0 phases=1 kV=0.069282 kW=0 kvar=0 model=1
New Load.968794E Bus1=-99999912343152.2.0 phases=1 kV=0.069282 kW=0 kvar=0 model=1
New Load.1238999E Bus1=-99999912343177.1.0 phases=1 kV=0.069282 kW=0 kvar=0 model=1
New Load.2083941E_0 Bus1=-99999912343127.1.2 phases=1 kV=0.069282 kW=0 kvar=0 model=1
New Load.2083941E_1 Bus1=-99999912343127.2.3 phases=1 kV=0.069282 kW=0 kvar=0 model=1
New Load.2083941E_2 Bus1=-99999912343127.3.1 phases=1 kV=0.069282 kW=0 kvar=0 model=1
New Load.4280825E Bus1=-99999912344398.3.0 phases=1 kV=0.069282 kW=0 kvar=0 model=1
New Load.680019H Bus1=-99999912344423.1.0 phases=1 kV=0.069282 kW=0 kvar=0 model=1
New Load.4178303E Bus1=-99999912344065.3.0 phases=1 kV=0.069282 kW=0 kvar=0 model=1
New Load.4489404E Bus1=-999999176359007.2.0 phases=1 kV=0.069282 kW=0 kvar=0 model=1
New Load.465791H Bus1=-99999912342473.1.0 phases=1 kV=0.069282 kW=0 kvar=0 model=1
New Load.1195347E Bus1=-99999912341772.2.0 phases=1 kV=0.069282 kW=0 kvar=0 model=1
New Load.103525H Bus1=-999999237712662.1.0 phases=1 kV=0.069282 kW=0 kvar=0 model=1
New Load.4702225E Bus1=-99999912341672.1.0 phases=1 kV=0.069282 kW=0 kvar=0 model=1
New Load.431474H Bus1=-99999912342323.2.0 phases=1 kV=0.069282 kW=0 kvar=0 model=1
New Load.559769E Bus1=-99999912342398.2.0 phases=1 kV=0.069282 kW=0 kvar=0 model=1
New Load.513311H Bus1=-99999912342623.3.0 phases=1 kV=0.069282 kW=0 kvar=0 model=1
New Load.1191530E Bus1=-999999160854379.2.0 phases=1 kV=0.069282 kW=0 kvar=0 model=1
New Load.521158E Bus1=-99999912343506.1.0 phases=1 kV=0.069282 kW=0 kvar=0 model=1
New Load.759903E Bus1=-99999912341956.3.0 phases=1 kV=0.069282 kW=0 kvar=0 model=1
New Load.4706946E Bus1=-99999912341906.3.0 phases=1 kV=0.069282 kW=0 kvar=0 model=1
New Load.1336048E Bus1=-99999912341697.1.0 phases=1 kV=0.069282 kW=0 kvar=0 model=1
New Load.683175E Bus1=-99999912341826.1.0 phases=1 kV=0.069282 kW=0 kvar=0 model=1
New Load.1195345E Bus1=-99999912344294.3.0 phases=1 kV=0.069282 kW=0 kvar=0 model=1
New Load.421819H Bus1=-99999912342977.1.0 phases=1 kV=0.069282 kW=0 kvar=0 model=1
New Load.103485H Bus1=-99999912343381.2.0 phases=1 kV=0.069282 kW=0 kvar=0 model=1
New Load.618291E Bus1=-999999145002330.3.0 phases=1 kV=0.069282 kW=0 kvar=0 model=1
New Load.1099193E Bus1=-99999912343990.1.0 phases=1 kV=0.069282 kW=0 kvar=0 model=1
New Load.4352133E Bus1=-99999912344244.3.0 phases=1 kV=0.069282 kW=0 kvar=0 model=1
New Load.1336046E Bus1=-99999912341722.1.0 phases=1 kV=0.069282 kW=0 kvar=0 model=1
New Load.329982E Bus1=-99999912342798.3.0 phases=1 kV=0.069282 kW=0 kvar=0 model=1
New Load.440864E_0 Bus1=-99999912343556.1.2 phases=1 kV=0.069282 kW=0 kvar=0 model=1
New Load.440864E_1 Bus1=-99999912343556.2.3 phases=1 kV=0.069282 kW=0 kvar=0 model=1
New Load.440864E_2 Bus1=-99999912343556.3.1 phases=1 kV=0.069282 kW=0 kvar=0 model=1
New Load.618287E Bus1=-99999912342094.1.0 phases=1 kV=0.069282 kW=0 kvar=0 model=1
New Load.490275H Bus1=-99999912344319.2.0 phases=1 kV=0.069282 kW=0 kvar=0 model=1
New Load.518419H Bus1=-99999912343281.1.0 phases=1 kV=0.069282 kW=0 kvar=0 model=1
New Load.4429218E Bus1=-99999912342248.2.0 phases=1 kV=0.069282 kW=0 kvar=0 model=1
New Load.871362E Bus1=-99999912344448.3.0 phases=1 kV=0.069282 kW=0 kvar=0 model=1
New Load.465794H Bus1=-99999912342523.1.0 phases=1 kV=0.069282 kW=0 kvar=0 model=1
New Load.4914233E Bus1=-99999912342673.3.0 phases=1 kV=0.069282 kW=0 kvar=0 model=1
New Load.4986823E Bus1=-99999912342573.3.0 phases=1 kV=0.069282 kW=0 kvar=0 model=1
New Load.1378573E Bus1=-99999912341931.2.0 phases=1 kV=0.069282 kW=0 kvar=0 model=1
New Load.679948H Bus1=-99999912342298.2.0 phases=1 kV=0.069282 kW=0 kvar=0 model=1
New Load.513322H Bus1=-99999912342723.3.0 phases=1 kV=0.069282 kW=0 kvar=0 model=1
New Load.1238997E Bus1=-99999912343077.1.0 phases=1 kV=0.069282 kW=0 kvar=0 model=1
New Load.298990E Bus1=-99999912343231.3.0 phases=1 kV=0.069282 kW=0 kvar=0 model=1
New Load.393148E Bus1=-99999912344090.3.0 phases=1 kV=0.069282 kW=0 kvar=0 model=1
New Load.307405E Bus1=-99999912343456.1.0 phases=1 kV=0.069282 kW=0 kvar=0 model=1
New Load.618289E Bus1=-999999137713786.1.0 phases=1 kV=0.069282 kW=0 kvar=0 model=1
New Load.507005H Bus1=-99999912343906.2.0 phases=1 kV=0.069282 kW=0 kvar=0 model=1
New Load.4178482E_0 Bus1=-99999912343102.1.2 phases=1 kV=0.069282 kW=0 kvar=0 model=1
New Load.4178482E_1 Bus1=-99999912343102.2.3 phases=1 kV=0.069282 kW=0 kvar=0 model=1
New Load.4178482E_2 Bus1=-99999912343102.3.1 phases=1 kV=0.069282 kW=0 kvar=0 model=1
New Load.405741E Bus1=-99999912341851.3.0 phases=1 kV=0.069282 kW=0 kvar=0 model=1
New Load.1055944E Bus1=-99999912344119.1.0 phases=1 kV=0.069282 kW=0 kvar=0 model=1
New Load.559770E Bus1=-99999912342373.2.0 phases=1 kV=0.069282 kW=0 kvar=0 model=1
New Load.4558156E Bus1=-99999912343881.2.0 phases=1 kV=0.069282 kW=0 kvar=0 model=1
New Load.1191529E Bus1=-99999912342423.2.0 phases=1 kV=0.069282 kW=0 kvar=0 model=1
New Load.4830139E Bus1=-99999912342598.3.0 phases=1 kV=0.069282 kW=0 kvar=0 model=1
New Load.4836057E Bus1=-99999912342448.3.0 phases=1 kV=0.069282 kW=0 kvar=0 model=1
New Load.448561E Bus1=-99999912343531.1.0 phases=1 kV=0.069282 kW=0 kvar=0 model=1
New Load.513296H Bus1=-99999912344040.3.0 phases=1 kV=0.069282 kW=0 kvar=0 model=1
New Load.4377542E Bus1=-99999912343481.1.0 phases=1 kV=0.069282 kW=0 kvar=0 model=1
New Load.4428028E Bus1=-99999996627083.2.0 phases=1 kV=0.069282 kW=0 kvar=0 model=1
New Load.4573082E Bus1=-99999912343581.2.0 phases=1 kV=0.069282 kW=0 kvar=0 model=1
New Load.518421H Bus1=-99999912343256.1.0 phases=1 kV=0.069282 kW=0 kvar=0 model=1
New Load.1264605E Bus1=-99999912342823.3.0 phases=1 kV=0.069282 kW=0 kvar=0 model=1
New Load.440866E Bus1=-99999912343856.2.0 phases=1 kV=0.069282 kW=0 kvar=0 model=1
New Load.618295E Bus1=-99999912342173.3.0 phases=1 kV=0.069282 kW=0 kvar=0 model=1
New Load.1861235E Bus1=-99999912343831.2.0 phases=1 kV=0.069282 kW=0 kvar=0 model=1
New Load.513282H Bus1=-99999912343356.2.0 phases=1 kV=0.069282 kW=0 kvar=0 model=1
New Load.4561351E Bus1=-99999912342927.1.0 phases=1 kV=0.069282 kW=0 kvar=0 model=1
New Load.4280824E Bus1=-99999912344373.2.0 phases=1 kV=0.069282 kW=0 kvar=0 model=1
New Load.4178622E Bus1=-999999164728626.3.0 phases=1 kV=0.069282 kW=0 kvar=0 model=1
New Load.261100E Bus1=-99999912341801.2.0 phases=1 kV=0.069282 kW=0 kvar=0 model=1
New Load.4352134E_0 Bus1=-99999912344269.1.2 phases=1 kV=0.069282 kW=0 kvar=0 model=1
New Load.4352134E_1 Bus1=-99999912344269.2.3 phases=1 kV=0.069282 kW=0 kvar=0 model=1
New Load.4352134E_2 Bus1=-99999912344269.3.1 phases=1 kV=0.069282 kW=0 kvar=0 model=1
New Load.1191658E_0 Bus1=-99999912344015.1.2 phases=1 kV=0.069282 kW=0 kvar=0 model=1
New Load.1191658E_1 Bus1=-99999912344015.2.3 phases=1 kV=0.069282 kW=0 kvar=0 model=1
New Load.1191658E_2 Bus1=-99999912344015.3.1 phases=1 kV=0.069282 kW=0 kvar=0 model=1
New Load.1336043E Bus1=-99999912341747.1.0 phases=1 kV=0.069282 kW=0 kvar=0 model=1
New Load.421814H Bus1=-99999912342902.1.0 phases=1 kV=0.069282 kW=0 kvar=0 model=1
New Load.440869E Bus1=-99999912344194.2.0 phases=1 kV=0.069282 kW=0 kvar=0 model=1
New Load.513280H Bus1=-99999912343331.2.0 phases=1 kV=0.069282 kW=0 kvar=0 model=1
New Load.330019E Bus1=-99999912342848.3.0 phases=1 kV=0.069282 kW=0 kvar=0 model=1
New Load.513316H Bus1=-99999912342548.3.0 phases=1 kV=0.069282 kW=0 kvar=0 model=1
New Load.465792H Bus1=-99999912342498.3.0 phases=1 kV=0.069282 kW=0 kvar=0 model=1
New Load.507022H Bus1=-99999912342648.2.0 phases=1 kV=0.069282 kW=0 kvar=0 model=1
New Load.518417H Bus1=-99999912343806.1.0 phases=1 kV=0.069282 kW=0 kvar=0 model=1
New Load.507002H Bus1=-99999912342273.2.0 phases=1 kV=0.069282 kW=0 kvar=0 model=1
New Load.4857431E Bus1=-99999912342698.3.0 phases=1 kV=0.069282 kW=0 kvar=0 model=1
New Load.4280823E Bus1=-99999912344348.3.0 phases=1 kV=0.069282 kW=0 kvar=0 model=1
New Load.421822H Bus1=-99999912343027.2.0 phases=1 kV=0.069282 kW=0 kvar=0 model=1
New Load.906845E Bus1=-99999912343406.2.0 phases=1 kV=0.069282 kW=0 kvar=0 model=1
New Load.4829067E Bus1=-999999237503228.2.0 phases=1 kV=0.069282 kW=0 kvar=0 model=1
New Load.2380535E Bus1=-99999912342123.2.0 phases=1 kV=0.069282 kW=0 kvar=0 model=1
New Load.330022E Bus1=-99999912342748.3.0 phases=1 kV=0.069282 kW=0 kvar=0 model=1
New Load.418947H Bus1=-99999912342873.1.0 phases=1 kV=0.069282 kW=0 kvar=0 model=1
New Load.423101E Bus1=-999999235814960.1.0 phases=1 kV=0.069282 kW=0 kvar=0 model=1
New Load.1336050E Bus1=-99999912344144.1.0 phases=1 kV=0.069282 kW=0 kvar=0 model=1

! Generators
New Generator.SCE-46780_PHOTOVOLTAIC Bus1=-99999912342523.1.0 phases=1 kV=0.069282 kW=0 kvar=0 model=7
New Generator.SCE-02453_PHOTOVOLTAIC Bus1=-999999160854379.2.0 phases=1 kV=0.069282 kW=0 kvar=0 model=7
New Generator.500065164_PHOTOVOLTAIC Bus1=-999999160854379.2.0 phases=1 kV=0.069282 kW=0 kvar=0 model=7
New Generator.SCE-85034_PHOTOVOLTAIC Bus1=-99999912343506.1.0 phases=1 kV=0.069282 kW=0 kvar=0 model=7
New Generator.SBP-98214_PHOTOVOLTAIC Bus1=-99999912342323.2.0 phases=1 kV=0.069282 kW=0 kvar=0 model=7
New Generator.SBP-98214_BATTERY Bus1=-99999912342323.2.0 phases=1 kV=0.069282 kW=3.972 kvar=0 model=7
New Generator.NST-57562_PHOTOVOLTAIC Bus1=-99999912342623.3.0 phases=1 kV=0.069282 kW=0 kvar=0 model=7
New Generator.NST-376191_PHOTOVOLTAIC Bus1=-999999160854379.2.0 phases=1 kV=0.069282 kW=0 kvar=0 model=7
New Generator.SCE-74400_PHOTOVOLTAIC Bus1=-99999912343990.1.0 phases=1 kV=0.069282 kW=0 kvar=0 model=7
New Generator.500091289_PHOTOVOLTAIC Bus1=-99999912344090.3.0 phases=1 kV=0.069282 kW=0 kvar=0 model=7
New Generator.SBP-49344_PHOTOVOLTAIC Bus1=-99999912343456.1.0 phases=1 kV=0.069282 kW=0 kvar=0 model=7
New Generator.500062519_PHOTOVOLTAIC Bus1=-99999912342902.1.0 phases=1 kV=0.069282 kW=0 kvar=0 model=7
New Generator.SCE-53273_PHOTOVOLTAIC Bus1=-99999912341697.1.0 phases=1 kV=0.069282 kW=0 kvar=0 model=7
New Generator.SCE-57452_PHOTOVOLTAIC Bus1=-99999912344294.3.0 phases=1 kV=0.069282 kW=0 kvar=0 model=7
New Generator.500688422_PHOTOVOLTAIC Bus1=-99999912344065.3.0 phases=1 kV=0.069282 kW=0 kvar=0 model=7
New Generator.SCE-78650_PHOTOVOLTAIC Bus1=-99999912342473.1.0 phases=1 kV=0.069282 kW=0 kvar=0 model=7
New Generator.SBP-16868_PHOTOVOLTAIC Bus1=-99999912342473.1.0 phases=1 kV=0.069282 kW=0 kvar=0 model=7
New Generator.SBP-78085_BATTERY Bus1=-99999912344244.3.0 phases=1 kV=0.069282 kW=1.728 kvar=0 model=7
New Generator.SBP-78085_PHOTOVOLTAIC Bus1=-99999912344244.3.0 phases=1 kV=0.069282 kW=0 kvar=0 model=7
New Generator.SBP-16124_BATTERY Bus1=-999999137713786.1.0 phases=1 kV=0.069282 kW=1.728 kvar=0 model=7
New Generator.SBP-16124_PHOTOVOLTAIC Bus1=-999999137713786.1.0 phases=1 kV=0.069282 kW=0 kvar=0 model=7
New Generator.SCE-17000_PHOTOVOLTAIC Bus1=-99999912343381.2.0 phases=1 kV=0.069282 kW=0 kvar=0 model=7
New Generator.SBP-113288_BATTERY Bus1=-99999912343381.2.0 phases=1 kV=0.069282 kW=2.487 kvar=0 model=7
New Generator.SBP-113288_PHOTOVOLTAIC Bus1=-99999912343381.2.0 phases=1 kV=0.069282 kW=0 kvar=0 model=7
New Generator.NST-08452_PHOTOVOLTAIC Bus1=-99999912343356.2.0 phases=1 kV=0.069282 kW=0 kvar=0 model=7
New Generator.500074776_PHOTOVOLTAIC Bus1=-99999912343356.2.0 phases=1 kV=0.069282 kW=0 kvar=0 model=7
New Generator.SBP-70033_BATTERY Bus1=-99999912342173.3.0 phases=1 kV=0.069282 kW=1.728 kvar=0 model=7
New Generator.SBP-70033_PHOTOVOLTAIC Bus1=-99999912342173.3.0 phases=1 kV=0.069282 kW=0 kvar=0 model=7
New Generator.SBP-133172_BATTERY Bus1=-99999912342927.1.0 phases=1 kV=0.069282 kW=0.863 kvar=0 model=7
New Generator.SBP-133172_PHOTOVOLTAIC Bus1=-99999912342927.1.0 phases=1 kV=0.069282 kW=0 kvar=0 model=7
New Generator.NST-457527_PHOTOVOLTAIC Bus1=-99999912343806.1.0 phases=1 kV=0.069282 kW=0 kvar=0 model=7
New Generator.SCE-62686_PHOTOVOLTAIC Bus1=-99999912342548.3.0 phases=1 kV=0.069282 kW=0 kvar=0 model=7
New Generator.SCE-71070_PHOTOVOLTAIC Bus1=-99999912342273.2.0 phases=1 kV=0.069282 kW=0 kvar=0 model=7
New Generator.SCE-78001_PHOTOVOLTAIC Bus1=-99999912344169.1.0 phases=1 kV=0.069282 kW=0 kvar=0 model=7
New Generator.500122553_PHOTOVOLTAIC Bus1=-99999912342036.3.0 phases=1 kV=0.069282 kW=0 kvar=0 model=7
New Generator.SBP-123735_BATTERY Bus1=-99999912344169.1.0 phases=1 kV=0.069282 kW=1.727 kvar=0 model=7
New Generator.SBP-123735_PHOTOVOLTAIC Bus1=-99999912344169.1.0 phases=1 kV=0.069282 kW=0 kvar=0 model=7
New Generator.SBP-20876_PHOTOVOLTAIC Bus1=-99999912342036.3.0 phases=1 kV=0.069282 kW=0 kvar=0 model=7
New Generator.SBP-48501_BATTERY Bus1=-99999912342036.3.0 phases=1 kV=0.069282 kW=1.326 kvar=0 model=7
New Generator.SBP-48501_PHOTOVOLTAIC Bus1=-99999912342036.3.0 phases=1 kV=0.069282 kW=0 kvar=0 model=7
New Generator.SBP-20876_BATTERY Bus1=-99999912342036.3.0 phases=1 kV=0.069282 kW=0.441 kvar=0 model=7
New Generator.500679160_PHOTOVOLTAIC Bus1=-99999912341801.2.0 phases=1 kV=0.069282 kW=0 kvar=0 model=7
New Generator.500465501_PHOTOVOLTAIC Bus1=-99999912342373.2.0 phases=1 kV=0.069282 kW=0 kvar=0 model=7
New Generator.500455729_PHOTOVOLTAIC Bus1=-99999912343881.2.0 phases=1 kV=0.069282 kW=0 kvar=0 model=7
New Generator.NST-463151_PHOTOVOLTAIC Bus1=-99999912342373.2.0 phases=1 kV=0.069282 kW=0 kvar=0 model=7
New Generator.SCE-84226_PHOTOVOLTAIC Bus1=-99999912344348.3.0 phases=1 kV=0.069282 kW=0 kvar=0 model=7
New Generator.SCE-56431_PHOTOVOLTAIC Bus1=-99999912344348.3.0 phases=1 kV=0.069282 kW=0 kvar=0 model=7
New Generator.NST-224262_PHOTOVOLTAIC Bus1=-99999912343406.2.0 phases=1 kV=0.069282 kW=0 kvar=0 model=7
New Generator.SBP-74602_PHOTOVOLTAIC Bus1=-999999237503228.2.0 phases=1 kV=0.069282 kW=0 kvar=0 model=7
New Generator.NST-408953_PHOTOVOLTAIC Bus1=-999999237503228.2.0 phases=1 kV=0.069282 kW=0 kvar=0 model=7
New Generator.500548458_PHOTOVOLTAIC Bus1=-99999912342423.2.0 phases=1 kV=0.069282 kW=0 kvar=0 model=7
New Generator.500726034_PHOTOVOLTAIC Bus1=-99999912343531.1.0 phases=1 kV=0.069282 kW=0 kvar=0 model=7
New Generator.SCE-02878_PHOTOVOLTAIC Bus1=-99999912343531.1.0 phases=1 kV=0.069282 kW=0 kvar=0 model=7
New Generator.SCE-88974_PHOTOVOLTAIC Bus1=-99999912343481.1.0 phases=1 kV=0.069282 kW=0 kvar=0 model=7
New Generator.500647232_PHOTOVOLTAIC Bus1=-99999912343581.2.0 phases=1 kV=0.069282 kW=0 kvar=0 model=7
New Generator.500174700_PHOTOVOLTAIC Bus1=-99999912343256.1.0 phases=1 kV=0.069282 kW=0 kvar=0 model=7
New Generator.SCE-53085_PHOTOVOLTAIC Bus1=-99999912343202.1.0 phases=1 kV=0.069282 kW=0 kvar=0 model=7
New Generator.NST-263959_PHOTOVOLTAIC Bus1=-99999912343052.3.0 phases=1 kV=0.069282 kW=0 kvar=0 model=7

! Transformers
New Transformer.LR_250104995_0_0 phases=1 windings=2 xhl=0.5 %R=0.353554 %imag=1e-06 %noloadloss=0
~ wdg=1 bus=-8888882182618.1.0 kV=4 kVA=250 conn=wye
~ wdg=2 bus=-666666250104995.1.0 kV=4 kVA=250 conn=wye
New Transformer.LR_250104995_0_1 phases=1 windings=2 xhl=0.5 %R=0.353554 %imag=1e-06 %noloadloss=0
~ wdg=1 bus=-8888882182618.2.0 kV=4 kVA=250 conn=wye
~ wdg=2 bus=-666666250104995.2.0 kV=4 kVA=250 conn=wye
New Transformer.LR_250104995_0_2 phases=1 windings=2 xhl=0.5 %R=0.353554 %imag=1e-06 %noloadloss=0
~ wdg=1 bus=-8888882182618.3.0 kV=4 kVA=250 conn=wye
~ wdg=2 bus=-666666250104995.3.0 kV=4 kVA=250 conn=wye
New Transformer.293588A543BCEE34E0637F61810A7CE3_1_0 phases=1 windings=2 xhl=0.5 %R=0.353554 %imag=1e-06 %noloadloss=0
~ wdg=1 bus=145002330.3.0 kV=2.3094 kVA=25 conn=wye
~ wdg=2 bus=-999999145002330.3.0 kV=0.069282 kVA=25 conn=wye
New Transformer.293588A4E1C5EE34E0637F61810A7CE3_2_0 phases=1 windings=2 xhl=0.5 %R=0.353554 %imag=1e-06 %noloadloss=0
~ wdg=1 bus=12343152.2.0 kV=2.3094 kVA=50 conn=wye
~ wdg=2 bus=-99999912343152.2.0 kV=0.069282 kVA=50 conn=wye
New Transformer.293588A4DE3CEE34E0637F61810A7CE3_3_0 phases=1 windings=2 xhl=0.5 %R=0.353554 %imag=1e-06 %noloadloss=0
~ wdg=1 bus=12342148.2.0 kV=2.3094 kVA=10 conn=wye
~ wdg=2 bus=-99999912342148.2.0 kV=0.069282 kVA=10 conn=wye
New Transformer.293588A4E1F4EE34E0637F61810A7CE3_4_0 phases=1 windings=2 xhl=0.5 %R=0.353554 %imag=1e-06 %noloadloss=0
~ wdg=1 bus=12343306.3.0 kV=2.3094 kVA=10 conn=wye
~ wdg=2 bus=-99999912343306.3.0 kV=0.069282 kVA=10 conn=wye
New Transformer.293588A83695EE34E0637F61810A7CE3_5_0 phases=1 windings=2 xhl=0.5 %R=0.353554 %imag=1e-06 %noloadloss=0
~ wdg=1 bus=12341747.1.0 kV=2.3094 kVA=10 conn=wye
~ wdg=2 bus=-99999912341747.1.0 kV=0.069282 kVA=10 conn=wye
New Transformer.293588A71D7EEE34E0637F61810A7CE3_6_0 phases=1 windings=2 xhl=0.5 %R=0.353554 %imag=1e-06 %noloadloss=0
~ wdg=1 bus=237712662.1.0 kV=2.3094 kVA=25 conn=wye
~ wdg=2 bus=-999999237712662.1.0 kV=0.069282 kVA=25 conn=wye
New Transformer.293588A4E230EE34E0637F61810A7CE3_7_0 phases=1 windings=2 xhl=0.5 %R=0.353554 %imag=1e-06 %noloadloss=0
~ wdg=1 bus=12343906.2.0 kV=2.3094 kVA=15 conn=wye
~ wdg=2 bus=-99999912343906.2.0 kV=0.069282 kVA=15 conn=wye
New Transformer.293588A83699EE34E0637F61810A7CE3_8_0 phases=1 windings=2 xhl=0.5 %R=0.353554 %imag=1e-06 %noloadloss=0
~ wdg=1 bus=12341851.3.0 kV=2.3094 kVA=25 conn=wye
~ wdg=2 bus=-99999912341851.3.0 kV=0.069282 kVA=25 conn=wye
New Transformer.293588A4E269EE34E0637F61810A7CE3_9_0 phases=1 windings=2 xhl=0.5 %R=0.353554 %imag=1e-06 %noloadloss=0
~ wdg=1 bus=12344319.2.0 kV=2.3094 kVA=15 conn=wye
~ wdg=2 bus=-99999912344319.2.0 kV=0.069282 kVA=15 conn=wye
New Transformer.293588A83648EE34E0637F61810A7CE3_10_0 phases=1 windings=2 xhl=0.5 %R=0.353554 %imag=1e-06 %noloadloss=0
~ wdg=1 bus=12342873.1.0 kV=2.3094 kVA=15 conn=wye
~ wdg=2 bus=-99999912342873.1.0 kV=0.069282 kVA=15 conn=wye
New Transformer.293588A4E26AEE34E0637F61810A7CE3_11_0 phases=1 windings=2 xhl=0.5 %R=0.353554 %imag=1e-06 %noloadloss=0
~ wdg=1 bus=12344348.3.0 kV=2.3094 kVA=15 conn=wye
~ wdg=2 bus=-99999912344348.3.0 kV=0.069282 kVA=15 conn=wye
New Transformer.293588A83696EE34E0637F61810A7CE3_12_0 phases=1 windings=2 xhl=0.5 %R=0.353554 %imag=1e-06 %noloadloss=0
~ wdg=1 bus=12341772.2.0 kV=2.3094 kVA=25 conn=wye
~ wdg=2 bus=-99999912341772.2.0 kV=0.069282 kVA=25 conn=wye
New Transformer.293588A4E1C7EE34E0637F61810A7CE3_13_0 phases=1 windings=2 xhl=0.5 %R=0.353554 %imag=1e-06 %noloadloss=0
~ wdg=1 bus=12343202.1.0 kV=2.3094 kVA=25 conn=wye
~ wdg=2 bus=-99999912343202.1.0 kV=0.069282 kVA=25 conn=wye
New Transformer.293588A4E1C1EE34E0637F61810A7CE3_14_0 phases=1 windings=2 xhl=0.5 %R=0.353554 %imag=1e-06 %noloadloss=0
~ wdg=1 bus=12343052.3.0 kV=2.3094 kVA=37.5 conn=wye
~ wdg=2 bus=-99999912343052.3.0 kV=0.069282 kVA=37.5 conn=wye
New Transformer.293588A4E23AEE34E0637F61810A7CE3_15_0 phases=1 windings=2 xhl=0.5 %R=0.353554 %imag=1e-06 %noloadloss=0
~ wdg=1 bus=12344219.1.0 kV=2.3094 kVA=25 conn=wye
~ wdg=2 bus=-99999912344219.1.0 kV=0.069282 kVA=25 conn=wye
New Transformer.293588A4DE3EEE34E0637F61810A7CE3_16_0 phases=1 windings=2 xhl=0.5 %R=0.353554 %imag=1e-06 %noloadloss=0
~ wdg=1 bus=12342223.3.0 kV=2.3094 kVA=25 conn=wye
~ wdg=2 bus=-99999912342223.3.0 kV=0.069282 kVA=25 conn=wye
New Transformer.293588A8369AEE34E0637F61810A7CE3_17_0 phases=1 windings=2 xhl=0.5 %R=0.353554 %imag=1e-06 %noloadloss=0
~ wdg=1 bus=12341906.3.0 kV=2.3094 kVA=50 conn=wye
~ wdg=2 bus=-99999912341906.3.0 kV=0.069282 kVA=50 conn=wye
New Transformer.293588A83698EE34E0637F61810A7CE3_18_0 phases=1 windings=2 xhl=0.5 %R=0.353554 %imag=1e-06 %noloadloss=0
~ wdg=1 bus=12341826.1.0 kV=2.3094 kVA=25 conn=wye
~ wdg=2 bus=-99999912341826.1.0 kV=0.069282 kVA=25 conn=wye
New Transformer.293588A4E23DEE34E0637F61810A7CE3_19_0 phases=1 windings=2 xhl=0.5 %R=0.353554 %imag=1e-06 %noloadloss=0
~ wdg=1 bus=12344294.3.0 kV=2.3094 kVA=25 conn=wye
~ wdg=2 bus=-99999912344294.3.0 kV=0.069282 kVA=25 conn=wye
New Transformer.293588A4E23BEE34E0637F61810A7CE3_20_0 phases=1 windings=2 xhl=0.5 %R=0.353554 %imag=1e-06 %noloadloss=0
~ wdg=1 bus=12344244.3.0 kV=2.3094 kVA=50 conn=wye
~ wdg=2 bus=-99999912344244.3.0 kV=0.069282 kVA=50 conn=wye
New Transformer.293588A4E235EE34E0637F61810A7CE3_21_0 phases=1 windings=2 xhl=0.5 %R=0.353554 %imag=1e-06 %noloadloss=0
~ wdg=1 bus=12344090.3.0 kV=2.3094 kVA=37.5 conn=wye
~ wdg=2 bus=-99999912344090.3.0 kV=0.069282 kVA=37.5 conn=wye
New Transformer.293588A8369DEE34E0637F61810A7CE3_22_0 phases=1 windings=2 xhl=0.5 %R=0.353554 %imag=1e-06 %noloadloss=0
~ wdg=1 bus=12342036.3.0 kV=2.3094 kVA=37.5 conn=wye
~ wdg=2 bus=-99999912342036.3.0 kV=0.069282 kVA=37.5 conn=wye
New Transformer.293588A4D0F9EE34E0637F61810A7CE3_23_0 phases=1 windings=2 xhl=0.5 %R=0.353554 %imag=1e-06 %noloadloss=0
~ wdg=1 bus=137713786.1.0 kV=2.3094 kVA=37.5 conn=wye
~ wdg=2 bus=-999999137713786.1.0 kV=0.069282 kVA=37.5 conn=wye
New Transformer.293588A559DFEE34E0637F61810A7CE3_24_0 phases=1 windings=2 xhl=0.5 %R=0.353554 %imag=1e-06 %noloadloss=0
~ wdg=1 bus=176359007.2.0 kV=2.3094 kVA=37.5 conn=wye
~ wdg=2 bus=-999999176359007.2.0 kV=0.069282 kVA=37.5 conn=wye
New Transformer.293588A4DE47EE34E0637F61810A7CE3_25_0 phases=1 windings=2 xhl=0.5 %R=0.353554 %imag=1e-06 %noloadloss=0
~ wdg=1 bus=12342473.1.0 kV=2.3094 kVA=15 conn=wye
~ wdg=2 bus=-99999912342473.1.0 kV=0.069282 kVA=15 conn=wye
New Transformer.293588A4DE48EE34E0637F61810A7CE3_26_0 phases=1 windings=2 xhl=0.5 %R=0.353554 %imag=1e-06 %noloadloss=0
~ wdg=1 bus=12342498.3.0 kV=2.3094 kVA=25 conn=wye
~ wdg=2 bus=-99999912342498.3.0 kV=0.069282 kVA=25 conn=wye
New Transformer.293588A4DE40EE34E0637F61810A7CE3_27_0 phases=1 windings=2 xhl=0.5 %R=0.353554 %imag=1e-06 %noloadloss=0
~ wdg=1 bus=12342273.2.0 kV=2.3094 kVA=37.5 conn=wye
~ wdg=2 bus=-99999912342273.2.0 kV=0.069282 kVA=37.5 conn=wye
New Transformer.293588A4E26EEE34E0637F61810A7CE3_28_0 phases=1 windings=2 xhl=0.5 %R=0.353554 %imag=1e-06 %noloadloss=0
~ wdg=1 bus=12344448.3.0 kV=2.3094 kVA=37.5 conn=wye
~ wdg=2 bus=-99999912344448.3.0 kV=0.069282 kVA=37.5 conn=wye
New Transformer.293588A4DE49EE34E0637F61810A7CE3_29_0 phases=1 windings=2 xhl=0.5 %R=0.353554 %imag=1e-06 %noloadloss=0
~ wdg=1 bus=12342523.1.0 kV=2.3094 kVA=37.5 conn=wye
~ wdg=2 bus=-99999912342523.1.0 kV=0.069282 kVA=37.5 conn=wye
New Transformer.293588A4DE3AEE34E0637F61810A7CE3_30_0 phases=1 windings=2 xhl=0.5 %R=0.353554 %imag=1e-06 %noloadloss=0
~ wdg=1 bus=12342094.1.0 kV=2.3094 kVA=50 conn=wye
~ wdg=2 bus=-99999912342094.1.0 kV=0.069282 kVA=50 conn=wye
New Transformer.293588A4DE3DEE34E0637F61810A7CE3_31_0 phases=1 windings=2 xhl=0.5 %R=0.353554 %imag=1e-06 %noloadloss=0
~ wdg=1 bus=12342173.3.0 kV=2.3094 kVA=37.5 conn=wye
~ wdg=2 bus=-99999912342173.3.0 kV=0.069282 kVA=37.5 conn=wye
New Transformer.293588A4E1C4EE34E0637F61810A7CE3_32_0 phases=1 windings=2 xhl=0.5 %R=0.353554 %imag=1e-06 %noloadloss=0
~ wdg=1 bus=12343127.1.0 kV=2.3094 kVA=50 conn=wye
~ wdg=2 bus=-99999912343127.1.2 kV=0.069282 kVA=50 conn=delta
New Transformer.293588A4E1C4EE34E0637F61810A7CE3_32_1 phases=1 windings=2 xhl=0.5 %R=0.353554 %imag=1e-06 %noloadloss=0
~ wdg=1 bus=12343127.2.0 kV=2.3094 kVA=50 conn=wye
~ wdg=2 bus=-99999912343127.2.3 kV=0.069282 kVA=50 conn=delta
New Transformer.293588A4E1C4EE34E0637F61810A7CE3_32_2 phases=1 windings=2 xhl=0.5 %R=0.353554 %imag=1e-06 %noloadloss=0
~ wdg=1 bus=12343127.3.0 kV=2.3094 kVA=50 conn=wye
~ wdg=2 bus=-99999912343127.3.1 kV=0.069282 kVA=50 conn=delta
New Transformer.293588A4E26CEE34E0637F61810A7CE3_33_0 phases=1 windings=2 xhl=0.5 %R=0.353554 %imag=1e-06 %noloadloss=0
~ wdg=1 bus=12344398.3.0 kV=2.3094 kVA=15 conn=wye
~ wdg=2 bus=-99999912344398.3.0 kV=0.069282 kVA=15 conn=wye
New Transformer.293588A4E1C3EE34E0637F61810A7CE3_34_0 phases=1 windings=2 xhl=0.5 %R=0.353554 %imag=1e-06 %noloadloss=0
~ wdg=1 bus=12343102.1.0 kV=2.3094 kVA=33.3333 conn=wye
~ wdg=2 bus=-99999912343102.1.2 kV=0.069282 kVA=33.3333 conn=delta
New Transformer.293588A4E1C3EE34E0637F61810A7CE3_34_1 phases=1 windings=2 xhl=0.5 %R=0.353554 %imag=1e-06 %noloadloss=0
~ wdg=1 bus=12343102.2.0 kV=2.3094 kVA=33.3333 conn=wye
~ wdg=2 bus=-99999912343102.2.3 kV=0.069282 kVA=33.3333 conn=delta
New Transformer.293588A4E1C3EE34E0637F61810A7CE3_34_2 phases=1 windings=2 xhl=0.5 %R=0.353554 %imag=1e-06 %noloadloss=0
~ wdg=1 bus=12343102.3.0 kV=2.3094 kVA=33.3333 conn=wye
~ wdg=2 bus=-99999912343102.3.1 kV=0.069282 kVA=33.3333 conn=delta
New Transformer.293588A4E236EE34E0637F61810A7CE3_35_0 phases=1 windings=2 xhl=0.5 %R=0.353554 %imag=1e-06 %noloadloss=0
~ wdg=1 bus=12344119.1.0 kV=2.3094 kVA=25 conn=wye
~ wdg=2 bus=-99999912344119.1.0 kV=0.069282 kVA=25 conn=wye
New Transformer.293588A7216DEE34E0637F61810A7CE3_36_0 phases=1 windings=2 xhl=0.5 %R=0.353554 %imag=1e-06 %noloadloss=0
~ wdg=1 bus=235814960.1.0 kV=2.3094 kVA=25 conn=wye
~ wdg=2 bus=-999999235814960.1.0 kV=0.069282 kVA=25 conn=wye
New Transformer.293588A4DE41EE34E0637F61810A7CE3_37_0 phases=1 windings=2 xhl=0.5 %R=0.353554 %imag=1e-06 %noloadloss=0
~ wdg=1 bus=12342298.2.0 kV=2.3094 kVA=25 conn=wye
~ wdg=2 bus=-99999912342298.2.0 kV=0.069282 kVA=25 conn=wye
New Transformer.293588A83642EE34E0637F61810A7CE3_38_0 phases=1 windings=2 xhl=0.5 %R=0.353554 %imag=1e-06 %noloadloss=0
~ wdg=1 bus=12342723.3.0 kV=2.3094 kVA=50 conn=wye
~ wdg=2 bus=-99999912342723.3.0 kV=0.069282 kVA=50 conn=wye
New Transformer.293588A4E1C0EE34E0637F61810A7CE3_39_0 phases=1 windings=2 xhl=0.5 %R=0.353554 %imag=1e-06 %noloadloss=0
~ wdg=1 bus=12343027.2.0 kV=2.3094 kVA=25 conn=wye
~ wdg=2 bus=-99999912343027.2.0 kV=0.069282 kVA=25 conn=wye
New Transformer.293588A4E1F8EE34E0637F61810A7CE3_40_0 phases=1 windings=2 xhl=0.5 %R=0.353554 %imag=1e-06 %noloadloss=0
~ wdg=1 bus=12343406.2.0 kV=2.3094 kVA=15 conn=wye
~ wdg=2 bus=-99999912343406.2.0 kV=0.069282 kVA=15 conn=wye
New Transformer.293588A71EDAEE34E0637F61810A7CE3_41_0 phases=1 windings=2 xhl=0.5 %R=0.353554 %imag=1e-06 %noloadloss=0
~ wdg=1 bus=237503228.2.0 kV=2.3094 kVA=50 conn=wye
~ wdg=2 bus=-999999237503228.2.0 kV=0.069282 kVA=50 conn=wye
New Transformer.293588A4DE3BEE34E0637F61810A7CE3_42_0 phases=1 windings=2 xhl=0.5 %R=0.353554 %imag=1e-06 %noloadloss=0
~ wdg=1 bus=12342123.2.0 kV=2.3094 kVA=25 conn=wye
~ wdg=2 bus=-99999912342123.2.0 kV=0.069282 kVA=25 conn=wye
New Transformer.293588A83643EE34E0637F61810A7CE3_43_0 phases=1 windings=2 xhl=0.5 %R=0.353554 %imag=1e-06 %noloadloss=0
~ wdg=1 bus=12342748.3.0 kV=2.3094 kVA=37.5 conn=wye
~ wdg=2 bus=-99999912342748.3.0 kV=0.069282 kVA=37.5 conn=wye
New Transformer.293588A4E1F9EE34E0637F61810A7CE3_44_0 phases=1 windings=2 xhl=0.5 %R=0.353554 %imag=1e-06 %noloadloss=0
~ wdg=1 bus=12343431.2.0 kV=2.3094 kVA=25 conn=wye
~ wdg=2 bus=-99999912343431.2.0 kV=0.069282 kVA=25 conn=wye
New Transformer.293588A4E1BFEE34E0637F61810A7CE3_45_0 phases=1 windings=2 xhl=0.5 %R=0.353554 %imag=1e-06 %noloadloss=0
~ wdg=1 bus=12343002.1.0 kV=2.3094 kVA=37.5 conn=wye
~ wdg=2 bus=-99999912343002.1.0 kV=0.069282 kVA=37.5 conn=wye
New Transformer.293588A4E1BDEE34E0637F61810A7CE3_46_0 phases=1 windings=2 xhl=0.5 %R=0.353554 %imag=1e-06 %noloadloss=0
~ wdg=1 bus=12342952.1.0 kV=2.3094 kVA=37.5 conn=wye
~ wdg=2 bus=-99999912342952.1.0 kV=0.069282 kVA=37.5 conn=wye
New Transformer.293588A4E1BEEE34E0637F61810A7CE3_47_0 phases=1 windings=2 xhl=0.5 %R=0.353554 %imag=1e-06 %noloadloss=0
~ wdg=1 bus=12342977.1.0 kV=2.3094 kVA=10 conn=wye
~ wdg=2 bus=-99999912342977.1.0 kV=0.069282 kVA=10 conn=wye
New Transformer.293588A4E1F7EE34E0637F61810A7CE3_48_0 phases=1 windings=2 xhl=0.5 %R=0.353554 %imag=1e-06 %noloadloss=0
~ wdg=1 bus=12343381.2.0 kV=2.3094 kVA=25 conn=wye
~ wdg=2 bus=-99999912343381.2.0 kV=0.069282 kVA=25 conn=wye
New Transformer.293588A79161EE34E0637F61810A7CE3_49_0 phases=1 windings=2 xhl=0.5 %R=0.353554 %imag=1e-06 %noloadloss=0
~ wdg=1 bus=138041801.1.0 kV=2.3094 kVA=15 conn=wye
~ wdg=2 bus=-999999138041801.1.0 kV=0.069282 kVA=15 conn=wye
New Transformer.293588A83644EE34E0637F61810A7CE3_50_0 phases=1 windings=2 xhl=0.5 %R=0.353554 %imag=1e-06 %noloadloss=0
~ wdg=1 bus=12342773.1.0 kV=2.3094 kVA=15 conn=wye
~ wdg=2 bus=-99999912342773.1.0 kV=0.069282 kVA=15 conn=wye
New Transformer.293588A4E237EE34E0637F61810A7CE3_51_0 phases=1 windings=2 xhl=0.5 %R=0.353554 %imag=1e-06 %noloadloss=0
~ wdg=1 bus=12344144.1.0 kV=2.3094 kVA=25 conn=wye
~ wdg=2 bus=-99999912344144.1.0 kV=0.069282 kVA=25 conn=wye
New Transformer.293588A83693EE34E0637F61810A7CE3_52_0 phases=1 windings=2 xhl=0.5 %R=0.353554 %imag=1e-06 %noloadloss=0
~ wdg=1 bus=12341697.1.0 kV=2.3094 kVA=15 conn=wye
~ wdg=2 bus=-99999912341697.1.0 kV=0.069282 kVA=15 conn=wye
New Transformer.293588A4E231EE34E0637F61810A7CE3_53_0 phases=1 windings=2 xhl=0.5 %R=0.353554 %imag=1e-06 %noloadloss=0
~ wdg=1 bus=12343990.1.0 kV=2.3094 kVA=15 conn=wye
~ wdg=2 bus=-99999912343990.1.0 kV=0.069282 kVA=15 conn=wye
New Transformer.293588A83694EE34E0637F61810A7CE3_54_0 phases=1 windings=2 xhl=0.5 %R=0.353554 %imag=1e-06 %noloadloss=0
~ wdg=1 bus=12341722.1.0 kV=2.3094 kVA=37.5 conn=wye
~ wdg=2 bus=-99999912341722.1.0 kV=0.069282 kVA=37.5 conn=wye
New Transformer.293588A83697EE34E0637F61810A7CE3_55_0 phases=1 windings=2 xhl=0.5 %R=0.353554 %imag=1e-06 %noloadloss=0
~ wdg=1 bus=12341801.2.0 kV=2.3094 kVA=25 conn=wye
~ wdg=2 bus=-99999912341801.2.0 kV=0.069282 kVA=25 conn=wye
New Transformer.293588A4E23CEE34E0637F61810A7CE3_56_0 phases=1 windings=2 xhl=0.5 %R=0.353554 %imag=1e-06 %noloadloss=0
~ wdg=1 bus=12344269.1.0 kV=2.3094 kVA=15 conn=wye
~ wdg=2 bus=-99999912344269.1.2 kV=0.069282 kVA=15 conn=delta
New Transformer.293588A4E23CEE34E0637F61810A7CE3_56_1 phases=1 windings=2 xhl=0.5 %R=0.353554 %imag=1e-06 %noloadloss=0
~ wdg=1 bus=12344269.2.0 kV=2.3094 kVA=15 conn=wye
~ wdg=2 bus=-99999912344269.2.3 kV=0.069282 kVA=15 conn=delta
New Transformer.293588A4E23CEE34E0637F61810A7CE3_56_2 phases=1 windings=2 xhl=0.5 %R=0.353554 %imag=1e-06 %noloadloss=0
~ wdg=1 bus=12344269.3.0 kV=2.3094 kVA=15 conn=wye
~ wdg=2 bus=-99999912344269.3.1 kV=0.069282 kVA=15 conn=delta
New Transformer.293588A4E232EE34E0637F61810A7CE3_57_0 phases=1 windings=2 xhl=0.5 %R=0.353554 %imag=1e-06 %noloadloss=0
~ wdg=1 bus=12344015.1.0 kV=2.3094 kVA=16.6667 conn=wye
~ wdg=2 bus=-99999912344015.1.2 kV=0.069282 kVA=16.6667 conn=delta
New Transformer.293588A4E232EE34E0637F61810A7CE3_57_1 phases=1 windings=2 xhl=0.5 %R=0.353554 %imag=1e-06 %noloadloss=0
~ wdg=1 bus=12344015.2.0 kV=2.3094 kVA=16.6667 conn=wye
~ wdg=2 bus=-99999912344015.2.3 kV=0.069282 kVA=16.6667 conn=delta
New Transformer.293588A4E232EE34E0637F61810A7CE3_57_2 phases=1 windings=2 xhl=0.5 %R=0.353554 %imag=1e-06 %noloadloss=0
~ wdg=1 bus=12344015.3.0 kV=2.3094 kVA=16.6667 conn=wye
~ wdg=2 bus=-99999912344015.3.1 kV=0.069282 kVA=16.6667 conn=delta
New Transformer.293588A83692EE34E0637F61810A7CE3_58_0 phases=1 windings=2 xhl=0.5 %R=0.353554 %imag=1e-06 %noloadloss=0
~ wdg=1 bus=12341672.1.0 kV=2.3094 kVA=25 conn=wye
~ wdg=2 bus=-99999912341672.1.0 kV=0.069282 kVA=25 conn=wye
New Transformer.293588A4E1C6EE34E0637F61810A7CE3_59_0 phases=1 windings=2 xhl=0.5 %R=0.353554 %imag=1e-06 %noloadloss=0
~ wdg=1 bus=12343177.1.0 kV=2.3094 kVA=50 conn=wye
~ wdg=2 bus=-99999912343177.1.0 kV=0.069282 kVA=50 conn=wye
New Transformer.293588A4E1C2EE34E0637F61810A7CE3_60_0 phases=1 windings=2 xhl=0.5 %R=0.353554 %imag=1e-06 %noloadloss=0
~ wdg=1 bus=12343077.1.0 kV=2.3094 kVA=37.5 conn=wye
~ wdg=2 bus=-99999912343077.1.0 kV=0.069282 kVA=37.5 conn=wye
New Transformer.293588A4E1C8EE34E0637F61810A7CE3_61_0 phases=1 windings=2 xhl=0.5 %R=0.353554 %imag=1e-06 %noloadloss=0
~ wdg=1 bus=12343231.3.0 kV=2.3094 kVA=50 conn=wye
~ wdg=2 bus=-99999912343231.3.0 kV=0.069282 kVA=50 conn=wye
New Transformer.293588A4E1FAEE34E0637F61810A7CE3_62_0 phases=1 windings=2 xhl=0.5 %R=0.353554 %imag=1e-06 %noloadloss=0
~ wdg=1 bus=12343456.1.0 kV=2.3094 kVA=25 conn=wye
~ wdg=2 bus=-99999912343456.1.0 kV=0.069282 kVA=25 conn=wye
New Transformer.293588A4E238EE34E0637F61810A7CE3_63_0 phases=1 windings=2 xhl=0.5 %R=0.353554 %imag=1e-06 %noloadloss=0
~ wdg=1 bus=12344169.1.0 kV=2.3094 kVA=25 conn=wye
~ wdg=2 bus=-99999912344169.1.0 kV=0.069282 kVA=25 conn=wye
New Transformer.293588A4E26DEE34E0637F61810A7CE3_64_0 phases=1 windings=2 xhl=0.5 %R=0.353554 %imag=1e-06 %noloadloss=0
~ wdg=1 bus=12344423.1.0 kV=2.3094 kVA=37.5 conn=wye
~ wdg=2 bus=-99999912344423.1.0 kV=0.069282 kVA=37.5 conn=wye
New Transformer.293588A4E234EE34E0637F61810A7CE3_65_0 phases=1 windings=2 xhl=0.5 %R=0.353554 %imag=1e-06 %noloadloss=0
~ wdg=1 bus=12344065.3.0 kV=2.3094 kVA=15 conn=wye
~ wdg=2 bus=-99999912344065.3.0 kV=0.069282 kVA=15 conn=wye
New Transformer.293588A8363BEE34E0637F61810A7CE3_66_0 phases=1 windings=2 xhl=0.5 %R=0.353554 %imag=1e-06 %noloadloss=0
~ wdg=1 bus=12342548.3.0 kV=2.3094 kVA=15 conn=wye
~ wdg=2 bus=-99999912342548.3.0 kV=0.069282 kVA=15 conn=wye
New Transformer.293588A8363FEE34E0637F61810A7CE3_67_0 phases=1 windings=2 xhl=0.5 %R=0.353554 %imag=1e-06 %noloadloss=0
~ wdg=1 bus=12342648.2.0 kV=2.3094 kVA=50 conn=wye
~ wdg=2 bus=-99999912342648.2.0 kV=0.069282 kVA=50 conn=wye
New Transformer.293588A4E200EE34E0637F61810A7CE3_68_0 phases=1 windings=2 xhl=0.5 %R=0.353554 %imag=1e-06 %noloadloss=0
~ wdg=1 bus=12343806.1.0 kV=2.3094 kVA=50 conn=wye
~ wdg=2 bus=-99999912343806.1.0 kV=0.069282 kVA=50 conn=wye
New Transformer.293588A83641EE34E0637F61810A7CE3_69_0 phases=1 windings=2 xhl=0.5 %R=0.353554 %imag=1e-06 %noloadloss=0
~ wdg=1 bus=12342698.3.0 kV=2.3094 kVA=75 conn=wye
~ wdg=2 bus=-99999912342698.3.0 kV=0.069282 kVA=75 conn=wye
New Transformer.293588A4E1CAEE34E0637F61810A7CE3_70_0 phases=1 windings=2 xhl=0.5 %R=0.353554 %imag=1e-06 %noloadloss=0
~ wdg=1 bus=12343281.1.0 kV=2.3094 kVA=37.5 conn=wye
~ wdg=2 bus=-99999912343281.1.0 kV=0.069282 kVA=37.5 conn=wye
New Transformer.293588A4DE3FEE34E0637F61810A7CE3_71_0 phases=1 windings=2 xhl=0.5 %R=0.353554 %imag=1e-06 %noloadloss=0
~ wdg=1 bus=12342248.2.0 kV=2.3094 kVA=25 conn=wye
~ wdg=2 bus=-99999912342248.2.0 kV=0.069282 kVA=25 conn=wye
New Transformer.293588A83640EE34E0637F61810A7CE3_72_0 phases=1 windings=2 xhl=0.5 %R=0.353554 %imag=1e-06 %noloadloss=0
~ wdg=1 bus=12342673.3.0 kV=2.3094 kVA=50 conn=wye
~ wdg=2 bus=-99999912342673.3.0 kV=0.069282 kVA=50 conn=wye
New Transformer.293588A8363CEE34E0637F61810A7CE3_73_0 phases=1 windings=2 xhl=0.5 %R=0.353554 %imag=1e-06 %noloadloss=0
~ wdg=1 bus=12342573.3.0 kV=2.3094 kVA=50 conn=wye
~ wdg=2 bus=-99999912342573.3.0 kV=0.069282 kVA=50 conn=wye
New Transformer.293588A8369BEE34E0637F61810A7CE3_74_0 phases=1 windings=2 xhl=0.5 %R=0.353554 %imag=1e-06 %noloadloss=0
~ wdg=1 bus=12341931.2.0 kV=2.3094 kVA=25 conn=wye
~ wdg=2 bus=-99999912341931.2.0 kV=0.069282 kVA=25 conn=wye
New Transformer.293588A83645EE34E0637F61810A7CE3_75_0 phases=1 windings=2 xhl=0.5 %R=0.353554 %imag=1e-06 %noloadloss=0
~ wdg=1 bus=12342798.3.0 kV=2.3094 kVA=37.5 conn=wye
~ wdg=2 bus=-99999912342798.3.0 kV=0.069282 kVA=37.5 conn=wye
New Transformer.293588A4E1FEEE34E0637F61810A7CE3_76_0 phases=1 windings=2 xhl=0.5 %R=0.353554 %imag=1e-06 %noloadloss=0
~ wdg=1 bus=12343556.1.0 kV=2.3094 kVA=25 conn=wye
~ wdg=2 bus=-99999912343556.1.2 kV=0.069282 kVA=25 conn=delta
New Transformer.293588A4E1FEEE34E0637F61810A7CE3_76_1 phases=1 windings=2 xhl=0.5 %R=0.353554 %imag=1e-06 %noloadloss=0
~ wdg=1 bus=12343556.2.0 kV=2.3094 kVA=25 conn=wye
~ wdg=2 bus=-99999912343556.2.3 kV=0.069282 kVA=25 conn=delta
New Transformer.293588A4E1FEEE34E0637F61810A7CE3_76_2 phases=1 windings=2 xhl=0.5 %R=0.353554 %imag=1e-06 %noloadloss=0
~ wdg=1 bus=12343556.3.0 kV=2.3094 kVA=25 conn=wye
~ wdg=2 bus=-99999912343556.3.1 kV=0.069282 kVA=25 conn=delta
New Transformer.293588A83646EE34E0637F61810A7CE3_77_0 phases=1 windings=2 xhl=0.5 %R=0.353554 %imag=1e-06 %noloadloss=0
~ wdg=1 bus=12342823.3.0 kV=2.3094 kVA=15 conn=wye
~ wdg=2 bus=-99999912342823.3.0 kV=0.069282 kVA=15 conn=wye
New Transformer.293588A4E202EE34E0637F61810A7CE3_78_0 phases=1 windings=2 xhl=0.5 %R=0.353554 %imag=1e-06 %noloadloss=0
~ wdg=1 bus=12343856.2.0 kV=2.3094 kVA=25 conn=wye
~ wdg=2 bus=-99999912343856.2.0 kV=0.069282 kVA=25 conn=wye
New Transformer.293588A83649EE34E0637F61810A7CE3_79_0 phases=1 windings=2 xhl=0.5 %R=0.353554 %imag=1e-06 %noloadloss=0
~ wdg=1 bus=12342902.1.0 kV=2.3094 kVA=15 conn=wye
~ wdg=2 bus=-99999912342902.1.0 kV=0.069282 kVA=15 conn=wye
New Transformer.293588A4E239EE34E0637F61810A7CE3_80_0 phases=1 windings=2 xhl=0.5 %R=0.353554 %imag=1e-06 %noloadloss=0
~ wdg=1 bus=12344194.2.0 kV=2.3094 kVA=50 conn=wye
~ wdg=2 bus=-99999912344194.2.0 kV=0.069282 kVA=50 conn=wye
New Transformer.293588A4E1F5EE34E0637F61810A7CE3_81_0 phases=1 windings=2 xhl=0.5 %R=0.353554 %imag=1e-06 %noloadloss=0
~ wdg=1 bus=12343331.2.0 kV=2.3094 kVA=37.5 conn=wye
~ wdg=2 bus=-99999912343331.2.0 kV=0.069282 kVA=37.5 conn=wye
New Transformer.293588A83647EE34E0637F61810A7CE3_82_0 phases=1 windings=2 xhl=0.5 %R=0.353554 %imag=1e-06 %noloadloss=0
~ wdg=1 bus=12342848.3.0 kV=2.3094 kVA=75 conn=wye
~ wdg=2 bus=-99999912342848.3.0 kV=0.069282 kVA=75 conn=wye
New Transformer.293588A4DE45EE34E0637F61810A7CE3_83_0 phases=1 windings=2 xhl=0.5 %R=0.353554 %imag=1e-06 %noloadloss=0
~ wdg=1 bus=12342423.2.0 kV=2.3094 kVA=37.5 conn=wye
~ wdg=2 bus=-99999912342423.2.0 kV=0.069282 kVA=37.5 conn=wye
New Transformer.293588A8363DEE34E0637F61810A7CE3_84_0 phases=1 windings=2 xhl=0.5 %R=0.353554 %imag=1e-06 %noloadloss=0
~ wdg=1 bus=12342598.3.0 kV=2.3094 kVA=50 conn=wye
~ wdg=2 bus=-99999912342598.3.0 kV=0.069282 kVA=50 conn=wye
New Transformer.293588A4DE46EE34E0637F61810A7CE3_85_0 phases=1 windings=2 xhl=0.5 %R=0.353554 %imag=1e-06 %noloadloss=0
~ wdg=1 bus=12342448.3.0 kV=2.3094 kVA=37.5 conn=wye
~ wdg=2 bus=-99999912342448.3.0 kV=0.069282 kVA=37.5 conn=wye
New Transformer.293588A4E1FDEE34E0637F61810A7CE3_86_0 phases=1 windings=2 xhl=0.5 %R=0.353554 %imag=1e-06 %noloadloss=0
~ wdg=1 bus=12343531.1.0 kV=2.3094 kVA=15 conn=wye
~ wdg=2 bus=-99999912343531.1.0 kV=0.069282 kVA=15 conn=wye
New Transformer.293588A4E233EE34E0637F61810A7CE3_87_0 phases=1 windings=2 xhl=0.5 %R=0.353554 %imag=1e-06 %noloadloss=0
~ wdg=1 bus=12344040.3.0 kV=2.3094 kVA=25 conn=wye
~ wdg=2 bus=-99999912344040.3.0 kV=0.069282 kVA=25 conn=wye
New Transformer.293588A4E1FBEE34E0637F61810A7CE3_88_0 phases=1 windings=2 xhl=0.5 %R=0.353554 %imag=1e-06 %noloadloss=0
~ wdg=1 bus=12343481.1.0 kV=2.3094 kVA=37.5 conn=wye
~ wdg=2 bus=-99999912343481.1.0 kV=0.069282 kVA=37.5 conn=wye
New Transformer.293588A7054CEE34E0637F61810A7CE3_89_0 phases=1 windings=2 xhl=0.5 %R=0.353554 %imag=1e-06 %noloadloss=0
~ wdg=1 bus=96627083.2.0 kV=2.3094 kVA=25 conn=wye
~ wdg=2 bus=-99999996627083.2.0 kV=0.069282 kVA=25 conn=wye
New Transformer.293588A4E1FFEE34E0637F61810A7CE3_90_0 phases=1 windings=2 xhl=0.5 %R=0.353554 %imag=1e-06 %noloadloss=0
~ wdg=1 bus=12343581.2.0 kV=2.3094 kVA=25 conn=wye
~ wdg=2 bus=-99999912343581.2.0 kV=0.069282 kVA=25 conn=wye
New Transformer.293588A4E1C9EE34E0637F61810A7CE3_91_0 phases=1 windings=2 xhl=0.5 %R=0.353554 %imag=1e-06 %noloadloss=0
~ wdg=1 bus=12343256.1.0 kV=2.3094 kVA=25 conn=wye
~ wdg=2 bus=-99999912343256.1.0 kV=0.069282 kVA=25 conn=wye
New Transformer.293588A4DE42EE34E0637F61810A7CE3_92_0 phases=1 windings=2 xhl=0.5 %R=0.353554 %imag=1e-06 %noloadloss=0
~ wdg=1 bus=12342323.2.0 kV=2.3094 kVA=25 conn=wye
~ wdg=2 bus=-99999912342323.2.0 kV=0.069282 kVA=25 conn=wye
New Transformer.293588A4DE44EE34E0637F61810A7CE3_93_0 phases=1 windings=2 xhl=0.5 %R=0.353554 %imag=1e-06 %noloadloss=0
~ wdg=1 bus=12342398.2.0 kV=2.3094 kVA=25 conn=wye
~ wdg=2 bus=-99999912342398.2.0 kV=0.069282 kVA=25 conn=wye
New Transformer.293588A8363EEE34E0637F61810A7CE3_94_0 phases=1 windings=2 xhl=0.5 %R=0.353554 %imag=1e-06 %noloadloss=0
~ wdg=1 bus=12342623.3.0 kV=2.3094 kVA=15 conn=wye
~ wdg=2 bus=-99999912342623.3.0 kV=0.069282 kVA=15 conn=wye
New Transformer.293588A9877EEE34E0637F61810A7CE3_95_0 phases=1 windings=2 xhl=0.5 %R=0.353554 %imag=1e-06 %noloadloss=0
~ wdg=1 bus=160854379.2.0 kV=2.3094 kVA=25 conn=wye
~ wdg=2 bus=-999999160854379.2.0 kV=0.069282 kVA=25 conn=wye
New Transformer.293588A4E1FCEE34E0637F61810A7CE3_96_0 phases=1 windings=2 xhl=0.5 %R=0.353554 %imag=1e-06 %noloadloss=0
~ wdg=1 bus=12343506.1.0 kV=2.3094 kVA=15 conn=wye
~ wdg=2 bus=-99999912343506.1.0 kV=0.069282 kVA=15 conn=wye
New Transformer.293588A8369CEE34E0637F61810A7CE3_97_0 phases=1 windings=2 xhl=0.5 %R=0.353554 %imag=1e-06 %noloadloss=0
~ wdg=1 bus=12341956.3.0 kV=2.3094 kVA=10 conn=wye
~ wdg=2 bus=-99999912341956.3.0 kV=0.069282 kVA=10 conn=wye
New Transformer.293588A4DE43EE34E0637F61810A7CE3_98_0 phases=1 windings=2 xhl=0.5 %R=0.353554 %imag=1e-06 %noloadloss=0
~ wdg=1 bus=12342373.2.0 kV=2.3094 kVA=25 conn=wye
~ wdg=2 bus=-99999912342373.2.0 kV=0.069282 kVA=25 conn=wye
New Transformer.293588A4E22FEE34E0637F61810A7CE3_99_0 phases=1 windings=2 xhl=0.5 %R=0.353554 %imag=1e-06 %noloadloss=0
~ wdg=1 bus=12343881.2.0 kV=2.3094 kVA=37.5 conn=wye
~ wdg=2 bus=-99999912343881.2.0 kV=0.069282 kVA=37.5 conn=wye
New Transformer.293588A4E201EE34E0637F61810A7CE3_100_0 phases=1 windings=2 xhl=0.5 %R=0.353554 %imag=1e-06 %noloadloss=0
~ wdg=1 bus=12343831.2.0 kV=2.3094 kVA=50 conn=wye
~ wdg=2 bus=-99999912343831.2.0 kV=0.069282 kVA=50 conn=wye
New Transformer.293588A4E1F6EE34E0637F61810A7CE3_101_0 phases=1 windings=2 xhl=0.5 %R=0.353554 %imag=1e-06 %noloadloss=0
~ wdg=1 bus=12343356.2.0 kV=2.3094 kVA=25 conn=wye
~ wdg=2 bus=-99999912343356.2.0 kV=0.069282 kVA=25 conn=wye
New Transformer.293588A4E1BCEE34E0637F61810A7CE3_102_0 phases=1 windings=2 xhl=0.5 %R=0.353554 %imag=1e-06 %noloadloss=0
~ wdg=1 bus=12342927.1.0 kV=2.3094 kVA=25 conn=wye
~ wdg=2 bus=-99999912342927.1.0 kV=0.069282 kVA=25 conn=wye
New Transformer.293588A4E26BEE34E0637F61810A7CE3_103_0 phases=1 windings=2 xhl=0.5 %R=0.353554 %imag=1e-06 %noloadloss=0
~ wdg=1 bus=12344373.2.0 kV=2.3094 kVA=25 conn=wye
~ wdg=2 bus=-99999912344373.2.0 kV=0.069282 kVA=25 conn=wye
New Transformer.293588A4D5B2EE34E0637F61810A7CE3_104_0 phases=1 windings=2 xhl=0.5 %R=0.353554 %imag=1e-06 %noloadloss=0
~ wdg=1 bus=164728626.3.0 kV=2.3094 kVA=25 conn=wye
~ wdg=2 bus=-999999164728626.3.0 kV=0.069282 kVA=25 conn=wye

Set voltagebases=[4.0 0.12]
CalcVoltageBases
Solve
