! OpenDSS script generated from multiconductor network
Clear

New Circuit.mc_network basekv=12.0 pu=1.000000 angle=0.00 frequency=60.0 phases=3 Mvasc3=143993 Mvasc1=47997.6
~ bus1=-8888882157306.1.2.3

! Line codes
New LineCode.1/0_ACSR_3PH_12KV_3 nphases=3 units=km Rmatrix=[ 0.010847 | 0 0.010847 | 0 0 0.010847 ] Xmatrix=[ 0.008636 | 0 0.008636 | 0 0 0.008636 ] Cmatrix=[ 0 | 0 0 | 0 0 0 ]
New LineCode.1/0_ACSR_2PH_12KV_2 nphases=2 units=km Rmatrix=[ 0.082372 | 0 0.082372 ] Xmatrix=[ 0.065584 | 0 0.065584 ] Cmatrix=[ 0 | 0 0 ]
New LineCode.336_ATW_3PH_12KV_3 nphases=3 units=km Rmatrix=[ 1e-05 | 0 1e-05 | 0 0 1e-05 ] Xmatrix=[ 1e-05 | 0 1e-05 | 0 0 1e-05 ] Cmatrix=[ 0 | 0 0 | 0 0 0 ]
New LineCode.1/0_ATW_3PH_12KV_3 nphases=3 units=km Rmatrix=[ 1e-05 | 0 1e-05 | 0 0 1e-05 ] Xmatrix=[ 1e-05 | 0 1e-05 | 0 0 1e-05 ] Cmatrix=[ 0 | 0 0 | 0 0 0 ]
New LineCode.350_CLP_3PH_12KV_3 nphases=3 units=km Rmatrix=[ 0.015671 | 0 0.015671 | 0 0 0.015671 ] Xmatrix=[ 0.011907 | 0 0.011907 | 0 0 0.011907 ] Cmatrix=[ 0 | 0 0 | 0 0 0 ]
New LineCode.2_CLP_3PH_12KV_3 nphases=3 units=km Rmatrix=[ 0.027497 | 0 0.027497 | 0 0 0.027497 ] Xmatrix=[ 0.005796 | 0 0.005796 | 0 0 0.005796 ] Cmatrix=[ 0 | 0 0 | 0 0 0 ]
New LineCode.1/0_JCN_3PH_12KV_3 nphases=3 units=km Rmatrix=[ 0.28426 | 0 0.28426 | 0 0 0.28426 ] Xmatrix=[ 0.086883 | 0 0.086883 | 0 0 0.086883 ] Cmatrix=[ 0 | 0 0 | 0 0 0 ]
New LineCode.1/0_CLP_3PH_12KV_3 nphases=3 units=km Rmatrix=[ 0.236853 | 0 0.236853 | 0 0 0.236853 ] Xmatrix=[ 0.072394 | 0 0.072394 | 0 0 0.072394 ] Cmatrix=[ 0 | 0 0 | 0 0 0 ]
New LineCode.2_CLP_2PH_12KV_2 nphases=2 units=km Rmatrix=[ 0.11813 | 0 0.11813 ] Xmatrix=[ 0.0249 | 0 0.0249 ] Cmatrix=[ 0 | 0 0 ]
New LineCode.350_AL_3PH_12KV_3 nphases=3 units=km Rmatrix=[ 0.002572 | 0 0.002572 | 0 0 0.002572 ] Xmatrix=[ 0.001954 | 0 0.001954 | 0 0 0.001954 ] Cmatrix=[ 0 | 0 0 | 0 0 0 ]
New LineCode.1/0_JCN_2PH_12KV_2 nphases=2 units=km Rmatrix=[ 0.037118 | 0 0.037118 ] Xmatrix=[ 0.011345 | 0 0.011345 ] Cmatrix=[ 0 | 0 0 ]
New LineCode.2_JCN_2PH_12KV_2 nphases=2 units=km Rmatrix=[ 0.468989 | 0 0.468989 ] Xmatrix=[ 0.098854 | 0 0.098854 ] Cmatrix=[ 0 | 0 0 ]
New LineCode.1/0_CLP_2PH_12KV_2 nphases=2 units=km Rmatrix=[ 0.091738 | 0 0.091738 ] Xmatrix=[ 0.028039 | 0 0.028039 ] Cmatrix=[ 0 | 0 0 ]
New LineCode.350_JCN_3PH_12KV_3 nphases=3 units=km Rmatrix=[ 0.027783 | 0 0.027783 | 0 0 0.027783 ] Xmatrix=[ 0.021109 | 0 0.021109 | 0 0 0.021109 ] Cmatrix=[ 0 | 0 0 | 0 0 0 ]
New LineCode.1/0_JCN_1PH_12KV_1 nphases=1 units=km Rmatrix=[ 0.000741 ] Xmatrix=[ 0.000226 ] Cmatrix=[ 0 ]
New LineCode.336_ACSR_3PH_12KV_3 nphases=3 units=km Rmatrix=[ 0.002507 | 0 0.002507 | 0 0 0.002507 ] Xmatrix=[ 0.005613 | 0 0.005613 | 0 0 0.005613 ] Cmatrix=[ 0 | 0 0 | 0 0 0 ]

! Lines
New Line.ND43667564$582309E phases=3 Bus1=43667564.1.2.3 Bus2=-77777743667564.1.2.3 LineCode=1/0_ACSR_3PH_12KV_3 Length=0.112395 units=km
New Line.ND12583483$BF50005 phases=3 Bus1=218176758.1.2.3 Bus2=-777777218176758.1.2.3 LineCode=1/0_ACSR_3PH_12KV_3 Length=0.016966 units=km
New Line.ND43667604$4322467E phases=2 Bus1=43667604.1.3 Bus2=-77777743667604.1.3 LineCode=1/0_ACSR_2PH_12KV_2 Length=0.035712 units=km
New Line.4260770EP$ND18894766 phases=3 Bus1=18892883.1.2.3 Bus2=18894687.1.2.3 LineCode=336_ATW_3PH_12KV_3 Length=0.009434 units=km
New Line.ND43667407$1031042E phases=3 Bus1=43666816.1.2.3 Bus2=43667407.1.2.3 LineCode=1/0_ATW_3PH_12KV_3 Length=0.200547 units=km
New Line.RCS0869$ND43667407 phases=3 Bus1=43667407.1.2.3 Bus2=43667197.1.2.3 LineCode=1/0_ATW_3PH_12KV_3 Length=0.145313 units=km
New Line.RCS0869$1030951E phases=3 Bus1=43667196.1.2.3 Bus2=43666737.1.2.3 LineCode=1/0_ATW_3PH_12KV_3 Length=0.217644 units=km
New Line.ND43667479$1030951E phases=3 Bus1=43666737.1.2.3 Bus2=43667479.1.2.3 LineCode=1/0_ATW_3PH_12KV_3 Length=0.155434 units=km
New Line.ND43667391$ND43667479 phases=3 Bus1=43667479.1.2.3 Bus2=43667391.1.2.3 LineCode=1/0_ATW_3PH_12KV_3 Length=0.153935 units=km
New Line.ND43667307$ND43667391 phases=3 Bus1=43667391.1.2.3 Bus2=43667307.1.2.3 LineCode=1/0_ATW_3PH_12KV_3 Length=0.245427 units=km
New Line.PS0868$ND43667307 phases=3 Bus1=43667307.1.2.3 Bus2=43667129.1.2.3 LineCode=1/0_ATW_3PH_12KV_3 Length=0.089027 units=km
New Line.PS0868$ND43667357 phases=3 Bus1=43667128.1.2.3 Bus2=43667357.1.2.3 LineCode=1/0_ATW_3PH_12KV_3 Length=0.088691 units=km
New Line.ND43667323$ND43667357 phases=3 Bus1=43667357.1.2.3 Bus2=43667323.1.2.3 LineCode=1/0_ATW_3PH_12KV_3 Length=0.222292 units=km
New Line.ND43667322$ND43667323 phases=3 Bus1=43667323.1.2.3 Bus2=43667322.1.2.3 LineCode=1/0_ATW_3PH_12KV_3 Length=0.097058 units=km
New Line.1030980E$ND43667322 phases=3 Bus1=43667322.1.2.3 Bus2=43666508.1.2.3 LineCode=1/0_ATW_3PH_12KV_3 Length=0.160152 units=km
New Line.ND18895557$ND18894764 phases=3 Bus1=18894705.1.2.3 Bus2=18895557.1.2.3 LineCode=336_ATW_3PH_12KV_3 Length=0.202854 units=km
New Line.ND18895557$1749936E phases=3 Bus1=18895557.1.2.3 Bus2=18895174.1.2.3 LineCode=336_ATW_3PH_12KV_3 Length=0.14952 units=km
New Line.1749936E$ND166458063 phases=3 Bus1=18895174.1.2.3 Bus2=166458063.1.2.3 LineCode=336_ATW_3PH_12KV_3 Length=0.088468 units=km
New Line.ND166458063$ND164478880 phases=3 Bus1=166458063.1.2.3 Bus2=164478880.1.2.3 LineCode=336_ATW_3PH_12KV_3 Length=0.10151 units=km
New Line.ND164478880$PS0054 phases=3 Bus1=164478880.1.2.3 Bus2=18895205.1.2.3 LineCode=336_ATW_3PH_12KV_3 Length=0.115975 units=km
New Line.ND164478880$PS7093 phases=3 Bus1=164478880.1.2.3 Bus2=241138042.1.2.3 LineCode=336_ATW_3PH_12KV_3 Length=0.083279 units=km
New Line.PS0054$PS7094 phases=3 Bus1=18895206.1.2.3 Bus2=250297154.1.2.3 LineCode=336_ATW_3PH_12KV_3 Length=1.74609 units=km
New Line.4322529E$ND18895386 phases=3 Bus1=18895386.1.2.3 Bus2=170146383.1.2.3 LineCode=1/0_ATW_3PH_12KV_3 Length=0.259343 units=km
New Line.PS7094$PH729E phases=3 Bus1=250297155.1.2.3 Bus2=18893146.1.2.3 LineCode=336_ATW_3PH_12KV_3 Length=0.009519 units=km
New Line.PS0120$4322529E phases=3 Bus1=170146383.1.2.3 Bus2=69323297.1.2.3 LineCode=1/0_ATW_3PH_12KV_3 Length=0.204309 units=km
New Line.PS0120$1031036ET phases=3 Bus1=69323296.1.2.3 Bus2=98593343.1.2.3 LineCode=1/0_ATW_3PH_12KV_3 Length=0.051655 units=km
New Line.ND43667331$1031036ET phases=3 Bus1=98593342.1.2.3 Bus2=43667331.1.2.3 LineCode=1/0_ATW_3PH_12KV_3 Length=0.024276 units=km
New Line.ND43667288$1030980E phases=3 Bus1=43666508.1.2.3 Bus2=43667288.1.2.3 LineCode=1/0_ATW_3PH_12KV_3 Length=0.08496 units=km
New Line.RCS0119$ND43667288 phases=3 Bus1=43667288.1.2.3 Bus2=229648979.1.2.3 LineCode=1/0_ATW_3PH_12KV_3 Length=0.031272 units=km
New Line.1031042E$2344536E phases=3 Bus1=43666826.1.2.3 Bus2=43666816.1.2.3 LineCode=1/0_ATW_3PH_12KV_3 Length=0.016627 units=km
New Line.S5169737$ND216957845 phases=3 Bus1=216957845.1.2.3 Bus2=18895299.1.2.3 LineCode=350_CLP_3PH_12KV_3 Length=0.070576 units=km
New Line.ND216957784$S5169737 phases=3 Bus1=18895299.1.2.3 Bus2=216957784.1.2.3 LineCode=350_CLP_3PH_12KV_3 Length=0.081737 units=km
New Line.ND216957784$4260770EP phases=3 Bus1=216957784.1.2.3 Bus2=18892884.1.2.3 LineCode=350_CLP_3PH_12KV_3 Length=0.198191 units=km
New Line.1099961E$S5169737 phases=3 Bus1=18895298.1.2.3 Bus2=18892897.1.2.3 LineCode=350_CLP_3PH_12KV_3 Length=0.136007 units=km
New Line.ND18895515$ND18895372 phases=3 Bus1=18895515.1.2.3 Bus2=18895372.1.2.3 LineCode=2_CLP_3PH_12KV_3 Length=0.088685 units=km
New Line.P5017505-2$208474884 phases=3 Bus1=18893513.1.2.3 Bus2=208474887.1.2.3 LineCode=2_CLP_3PH_12KV_3 Length=0.00305 units=km
New Line.P5741484-1$PME0086-3 phases=3 Bus1=226453033.1.2.3 Bus2=226453200.1.2.3 LineCode=1/0_JCN_3PH_12KV_3 Length=0.333615 units=km
New Line.P5568214-1$PME0041-4 phases=3 Bus1=18893178.1.2.3 Bus2=95639460.1.2.3 LineCode=2_CLP_3PH_12KV_3 Length=0.5745 units=km
New Line.0013224$PME0041-2 phases=3 Bus1=18893187.1.2.3 Bus2=182525859.1.2.3 LineCode=350_CLP_3PH_12KV_3 Length=0.014637 units=km
New Line.P5372901-1$PME0041-3 phases=3 Bus1=18893169.1.2.3 Bus2=18893373.1.2.3 LineCode=1/0_CLP_3PH_12KV_3 Length=0.017988 units=km
New Line.ND18895372$POS0055-1 phases=2 Bus1=18895372.1.3 Bus2=18894068.1.3 LineCode=2_CLP_2PH_12KV_2 Length=0.019779 units=km
New Line.208475015$POS0019-1 phases=2 Bus1=208475018.1.2 Bus2=18894118.1.2 LineCode=2_CLP_2PH_12KV_2 Length=0.004159 units=km
New Line.P5403198-1$ND18895372 phases=2 Bus1=18895372.1.2 Bus2=18894600.1.2 LineCode=2_CLP_2PH_12KV_2 Length=0.019779 units=km
New Line.208474884$208474836 phases=3 Bus1=208474886.1.2.3 Bus2=208474838.1.2.3 LineCode=2_CLP_3PH_12KV_3 Length=0.063507 units=km
New Line.POS0055-1$ND18895401 phases=2 Bus1=18894069.1.3 Bus2=18895401.1.3 LineCode=2_CLP_2PH_12KV_2 Length=0.184034 units=km
New Line.POS0019-1$208475042 phases=2 Bus1=18894119.1.2 Bus2=208475045.1.2 LineCode=2_CLP_2PH_12KV_2 Length=0.004491 units=km
New Line.208474836$P5017506-B phases=3 Bus1=208474839.1.2.3 Bus2=18893585.1.2.3 LineCode=2_CLP_3PH_12KV_3 Length=0.004572 units=km
New Line.P5017516-1$ND18895401 phases=2 Bus1=18895401.1.3 Bus2=18894312.1.3 LineCode=2_CLP_2PH_12KV_2 Length=0.029907 units=km
New Line.P5017515-1$ND18895401 phases=2 Bus1=18895401.1.3 Bus2=18894384.1.3 LineCode=2_CLP_2PH_12KV_2 Length=0.016635 units=km
New Line.P5017521-1$ND18895401 phases=2 Bus1=18895401.1.3 Bus2=18894456.1.3 LineCode=2_CLP_2PH_12KV_2 Length=0.136103 units=km
New Line.208475042$208475067 phases=2 Bus1=208475044.1.2 Bus2=208475069.1.2 LineCode=2_CLP_2PH_12KV_2 Length=0.025281 units=km
New Line.208475067$P5017512-1 phases=2 Bus1=208475070.1.2 Bus2=18894168.1.2 LineCode=2_CLP_2PH_12KV_2 Length=0.00271 units=km
New Line.P5350657-1$P5017521-2 phases=2 Bus1=18894465.1.3 Bus2=18894528.1.3 LineCode=2_CLP_2PH_12KV_2 Length=0.105613 units=km
New Line.208474911$P5017506-A phases=3 Bus1=18893576.1.2.3 Bus2=208474914.1.2.3 LineCode=2_CLP_3PH_12KV_3 Length=0.034542 units=km
New Line.208474938$208474911 phases=3 Bus1=208474913.1.2.3 Bus2=208474940.1.2.3 LineCode=2_CLP_3PH_12KV_3 Length=0.112016 units=km
New Line.208475092$P5017512-2 phases=2 Bus1=18894177.1.2 Bus2=208475095.1.2 LineCode=2_CLP_2PH_12KV_2 Length=0.002685 units=km
New Line.P5017507-2$208474938 phases=3 Bus1=208474941.1.2.3 Bus2=18893662.1.2.3 LineCode=2_CLP_3PH_12KV_3 Length=0.002642 units=km
New Line.P5059634-1$PH939E phases=3 Bus1=18893037.1.2.3 Bus2=18893053.1.2.3 LineCode=350_AL_3PH_12KV_3 Length=0.011582 units=km
New Line.208474977$1031017E phases=2 Bus1=18892952.1.2 Bus2=208474979.1.2 LineCode=1/0_JCN_2PH_12KV_2 Length=0.052651 units=km
New Line.2367079E$ND239709006 phases=3 Bus1=239709006.1.2.3 Bus2=239709078.1.2.3 LineCode=1/0_ACSR_3PH_12KV_3 Length=0.108621 units=km
New Line.4662994E$PH934E phases=3 Bus1=166458072.1.2.3 Bus2=164478917.1.2.3 LineCode=1/0_JCN_3PH_12KV_3 Length=0.401952 units=km
New Line.1338257E$2367079E phases=3 Bus1=239709078.1.2.3 Bus2=19809495.1.2.3 LineCode=1/0_ACSR_3PH_12KV_3 Length=0.082525 units=km
New Line.P5059621-1$208474977 phases=2 Bus1=208474980.1.2 Bus2=18892968.1.2 LineCode=1/0_JCN_2PH_12KV_2 Length=0.004864 units=km
New Line.1031023E$ND18895507 phases=3 Bus1=18892939.1.2.3 Bus2=18895507.1.2.3 LineCode=1/0_CLP_3PH_12KV_3 Length=0.099856 units=km
New Line.ND18895507$P5017501-A phases=3 Bus1=18895507.1.2.3 Bus2=151630655.1.2.3 LineCode=1/0_CLP_3PH_12KV_3 Length=0.030806 units=km
New Line.4662994E$P5470170-1 phases=2 Bus1=164478925.1.3 Bus2=164478998.1.3 LineCode=2_JCN_2PH_12KV_2 Length=0.419296 units=km
New Line.ND18895507$POS0059-1 phases=2 Bus1=18895507.2.3 Bus2=18894876.2.3 LineCode=1/0_CLP_2PH_12KV_2 Length=0.037174 units=km
New Line.PH729E$ND203123937 phases=3 Bus1=18893147.1.2.3 Bus2=203123937.1.2.3 LineCode=350_JCN_3PH_12KV_3 Length=0.100931 units=km
New Line.ND203123937$RCS0083-3 phases=3 Bus1=203123937.1.2.3 Bus2=182347306.1.2.3 LineCode=350_JCN_3PH_12KV_3 Length=0.028537 units=km
New Line.ND203123937$P5470184 phases=1 Bus1=203123937.1 Bus2=203123950.1 LineCode=1/0_JCN_1PH_12KV_1 Length=0.001047 units=km
New Line.P5429508-2$POS0059-1 phases=2 Bus1=18894877.2.3 Bus2=18894935.2.3 LineCode=1/0_CLP_2PH_12KV_2 Length=0.058699 units=km
New Line.ND18895394$P5017501-B phases=3 Bus1=151630673.1.2.3 Bus2=18895394.1.2.3 LineCode=2_CLP_3PH_12KV_3 Length=0.172731 units=km
New Line.208475117$208475092 phases=2 Bus1=208475094.1.2 Bus2=208475119.1.2 LineCode=2_CLP_2PH_12KV_2 Length=0.029821 units=km
New Line.P5017513-1$208475117 phases=2 Bus1=208475120.1.2 Bus2=18894240.1.2 LineCode=2_CLP_2PH_12KV_2 Length=0.002746 units=km
New Line.208474811$P5017507-1 phases=3 Bus1=18893653.1.2.3 Bus2=208474814.1.2.3 LineCode=2_CLP_3PH_12KV_3 Length=0.002878 units=km
New Line.208474784$208474811 phases=3 Bus1=208474813.1.2.3 Bus2=208474786.1.2.3 LineCode=2_CLP_3PH_12KV_3 Length=0.068275 units=km
New Line.ND18895394$P5017504-A phases=3 Bus1=18895394.1.2.3 Bus2=18895079.1.2.3 LineCode=2_CLP_3PH_12KV_3 Length=0.004716 units=km
New Line.ND18895394$ND18895571 phases=3 Bus1=18895394.1.2.3 Bus2=18895571.1.2.3 LineCode=2_CLP_3PH_12KV_3 Length=0.009553 units=km
New Line.RCS0083-2$ND235893921 phases=3 Bus1=182347324.1.2.3 Bus2=235893921.1.2.3 LineCode=350_JCN_3PH_12KV_3 Length=0.12551 units=km
New Line.ND182347615$ND235893921 phases=3 Bus1=235893921.1.2.3 Bus2=182347615.1.2.3 LineCode=1/0_JCN_3PH_12KV_3 Length=0.193764 units=km
New Line.P5017502-2$ND18895571 phases=2 Bus1=18895571.2.3 Bus2=18893933.2.3 LineCode=2_CLP_2PH_12KV_2 Length=0.097368 units=km
New Line.P5429533-2$P5429508-1 phases=2 Bus1=18894926.2.3 Bus2=18895007.2.3 LineCode=1/0_CLP_2PH_12KV_2 Length=0.130131 units=km
New Line.ND18895428$RCS0083-4 phases=3 Bus1=182347315.1.2.3 Bus2=18895428.1.2.3 LineCode=350_CLP_3PH_12KV_3 Length=0.128624 units=km
New Line.ND18895571$ND18895452 phases=3 Bus1=18895571.1.2.3 Bus2=18895452.1.2.3 LineCode=2_CLP_3PH_12KV_3 Length=0.007808 units=km
New Line.ND235893921$ND235894082 phases=3 Bus1=235893921.1.2.3 Bus2=235894082.1.2.3 LineCode=350_JCN_3PH_12KV_3 Length=1.28964 units=km
New Line.ND43667339$1031036E phases=3 Bus1=43666840.1.2.3 Bus2=43667339.1.2.3 LineCode=1/0_CLP_3PH_12KV_3 Length=0.081075 units=km
New Line.ND182347615$P5470185-1 phases=3 Bus1=182347615.1.2.3 Bus2=182347562.1.2.3 LineCode=1/0_JCN_3PH_12KV_3 Length=0.021159 units=km
New Line.ND182347615$P5470186-1 phases=2 Bus1=182347615.1.2 Bus2=182347650.1.2 LineCode=1/0_JCN_2PH_12KV_2 Length=0.171528 units=km
New Line.P5059653-1$ND18895428 phases=3 Bus1=18895428.1.2.3 Bus2=18893325.1.2.3 LineCode=1/0_CLP_3PH_12KV_3 Length=0.054701 units=km
New Line.ND18895452$BS0004-1 phases=3 Bus1=18895452.1.2.3 Bus2=18893797.1.2.3 LineCode=2_CLP_3PH_12KV_3 Length=0.100681 units=km
New Line.ND18895452$P5017510-A phases=2 Bus1=18895452.1.2 Bus2=18893847.1.2 LineCode=2_CLP_2PH_12KV_2 Length=0.100681 units=km
New Line.ND226452861$ND18895428 phases=3 Bus1=18895428.1.2.3 Bus2=226452861.1.2.3 LineCode=350_CLP_3PH_12KV_3 Length=0.169285 units=km
New Line.ND235894082$RCS0080-4 phases=3 Bus1=235894082.1.2.3 Bus2=235893765.1.2.3 LineCode=350_JCN_3PH_12KV_3 Length=0.236932 units=km
New Line.ND235894082$P5650241 phases=3 Bus1=235894082.1.2.3 Bus2=235894076.1.2.3 LineCode=350_JCN_3PH_12KV_3 Length=0.004976 units=km
New Line.ND43667339$2344536E phases=3 Bus1=43667339.1.2.3 Bus2=43666827.1.2.3 LineCode=1/0_CLP_3PH_12KV_3 Length=0.094378 units=km
New Line.ND43667339$1650349E phases=3 Bus1=43667339.1.2.3 Bus2=43666853.1.2.3 LineCode=1/0_CLP_3PH_12KV_3 Length=0.063438 units=km
New Line.PME0041-1$ND226452861 phases=3 Bus1=226452861.1.2.3 Bus2=18893196.1.2.3 LineCode=350_CLP_3PH_12KV_3 Length=2.35155 units=km
New Line.P5017505-1$P5017504-B phases=3 Bus1=18895070.1.2.3 Bus2=18893504.1.2.3 LineCode=2_CLP_3PH_12KV_3 Length=0.096593 units=km
New Line.PME0086-2$ND226452861 phases=3 Bus1=226452861.1.2.3 Bus2=226453051.1.2.3 LineCode=350_JCN_3PH_12KV_3 Length=0.540471 units=km
New Line.BS0004-1$ND18895414 phases=3 Bus1=18893798.1.2.3 Bus2=18895414.1.2.3 LineCode=2_CLP_3PH_12KV_3 Length=0.236395 units=km
New Line.P5017511-1$P5017510-B phases=2 Bus1=18893856.1.2 Bus2=18893996.1.2 LineCode=2_CLP_2PH_12KV_2 Length=0.043034 units=km
New Line.ND18895414$ND18895515 phases=3 Bus1=18895414.1.2.3 Bus2=18895515.1.2.3 LineCode=2_CLP_3PH_12KV_3 Length=0.115988 units=km
New Line.ND18895414$208475015 phases=2 Bus1=18895414.1.2 Bus2=208475017.1.2 LineCode=2_CLP_2PH_12KV_2 Length=0.020328 units=km
New Line.P5017508-2$208474784 phases=3 Bus1=208474787.1.2.3 Bus2=18893734.1.2.3 LineCode=2_CLP_3PH_12KV_3 Length=0.003653 units=km
New Line.1099961E$ND18894868 phases=3 Bus1=18892896.1.2.3 Bus2=18894807.1.2.3 LineCode=1/0_ACSR_3PH_12KV_3 Length=0.046273 units=km
New Line.PS0456$3007674E phases=3 Bus1=69323340.1.2.3 Bus2=43666907.1.2.3 LineCode=1/0_ACSR_3PH_12KV_3 Length=0.037021 units=km
New Line.ND43667407$BF50010 phases=2 Bus1=43667407.2.3 Bus2=43667205.2.3 LineCode=1/0_ACSR_2PH_12KV_2 Length=0.051435 units=km
New Line.3007674E$1030759E phases=3 Bus1=43666907.1.2.3 Bus2=43666882.1.2.3 LineCode=1/0_ACSR_3PH_12KV_3 Length=0.289431 units=km
New Line.BF50010$4278853E phases=2 Bus1=43667206.2.3 Bus2=43667061.2.3 LineCode=1/0_ACSR_2PH_12KV_2 Length=0.061317 units=km
New Line.4278853E$ND43667460 phases=2 Bus1=43667061.2.3 Bus2=43667460.2.3 LineCode=1/0_ACSR_2PH_12KV_2 Length=0.289984 units=km
New Line.ND43667460$582350E phases=2 Bus1=43667460.2.3 Bus2=233842952.2.3 LineCode=1/0_ACSR_2PH_12KV_2 Length=0.07825 units=km
New Line.ND43667460$4876865E phases=2 Bus1=43667460.2.3 Bus2=233842991.2.3 LineCode=1/0_ACSR_2PH_12KV_2 Length=0.130672 units=km
New Line.ND43667479$BF50018 phases=3 Bus1=43667479.1.2.3 Bus2=43667175.1.2.3 LineCode=1/0_ACSR_3PH_12KV_3 Length=0.007521 units=km
New Line.4876865E$3007853E phases=2 Bus1=233842991.2.3 Bus2=233843030.2.3 LineCode=1/0_ACSR_2PH_12KV_2 Length=0.217959 units=km
New Line.582350E$382357E phases=2 Bus1=233842952.2.3 Bus2=43666764.2.3 LineCode=1/0_ACSR_2PH_12KV_2 Length=0.057222 units=km
New Line.ND43667391$BF50017 phases=2 Bus1=43667391.1.2 Bus2=43667156.1.2 LineCode=1/0_ACSR_2PH_12KV_2 Length=0.005624 units=km
New Line.BF50018$582304E phases=3 Bus1=43667176.1.2.3 Bus2=236674917.1.2.3 LineCode=1/0_ACSR_3PH_12KV_3 Length=0.140363 units=km
New Line.ND43667307$BF50016 phases=2 Bus1=43667307.2.3 Bus2=43667137.2.3 LineCode=1/0_ACSR_2PH_12KV_2 Length=0.073197 units=km
New Line.3007853E$ND43667314 phases=2 Bus1=233843030.2.3 Bus2=43667314.2.3 LineCode=1/0_ACSR_2PH_12KV_2 Length=0.086707 units=km
New Line.BF50017$1432550E phases=2 Bus1=43667157.1.2 Bus2=43666635.1.2 LineCode=1/0_ACSR_2PH_12KV_2 Length=0.076881 units=km
New Line.ND43667314$1278866E phases=2 Bus1=43667314.2.3 Bus2=43666789.2.3 LineCode=1/0_ACSR_2PH_12KV_2 Length=0.237209 units=km
New Line.ND43667314$4810777E phases=2 Bus1=43667314.2.3 Bus2=43667036.2.3 LineCode=1/0_ACSR_2PH_12KV_2 Length=0.066218 units=km
New Line.582304E$ND43667564 phases=3 Bus1=236674917.1.2.3 Bus2=43667564.1.2.3 LineCode=1/0_ACSR_3PH_12KV_3 Length=0.053841 units=km
New Line.BF50016$4902565E phases=2 Bus1=43667138.2.3 Bus2=43666610.2.3 LineCode=1/0_ACSR_2PH_12KV_2 Length=0.020589 units=km
New Line.ND43667564$2367145E phases=2 Bus1=43667564.2.3 Bus2=43666685.2.3 LineCode=1/0_ACSR_2PH_12KV_2 Length=0.066452 units=km
New Line.ND43667357$BF50015 phases=2 Bus1=43667357.1.3 Bus2=43667107.1.3 LineCode=1/0_ACSR_2PH_12KV_2 Length=0.00786 units=km
New Line.2367145E$ND43667415 phases=2 Bus1=43666685.2.3 Bus2=43667415.2.3 LineCode=1/0_ACSR_2PH_12KV_2 Length=0.128699 units=km
New Line.ND43667415$1338266E phases=2 Bus1=43667415.2.3 Bus2=283807125.2.3 LineCode=1/0_ACSR_2PH_12KV_2 Length=0.056242 units=km
New Line.ND43667415$2197623E phases=2 Bus1=43667415.2.3 Bus2=43666986.2.3 LineCode=1/0_ACSR_2PH_12KV_2 Length=0.234562 units=km
New Line.ND43667323$BF50021 phases=2 Bus1=43667323.2.3 Bus2=43667088.2.3 LineCode=1/0_ACSR_2PH_12KV_2 Length=0.009578 units=km
New Line.ND18894866$4906198E phases=3 Bus1=18894789.1.2.3 Bus2=218176731.1.2.3 LineCode=1/0_ACSR_3PH_12KV_3 Length=0.045887 units=km
New Line.4906198E$ND18895380 phases=3 Bus1=218176731.1.2.3 Bus2=18895380.1.2.3 LineCode=1/0_ACSR_3PH_12KV_3 Length=0.092911 units=km
New Line.ND18895557$PS7092 phases=3 Bus1=18895557.1.2.3 Bus2=241137997.1.2.3 LineCode=336_ACSR_3PH_12KV_3 Length=0.0134 units=km
New Line.1840354E$ND18895380 phases=3 Bus1=18895380.1.2.3 Bus2=18892928.1.2.3 LineCode=1/0_ACSR_3PH_12KV_3 Length=0.295 units=km
New Line.BF50005$ND18895380 phases=3 Bus1=18895380.1.2.3 Bus2=218176757.1.2.3 LineCode=1/0_ACSR_3PH_12KV_3 Length=0.102081 units=km
New Line.PS7092$PH939E phases=3 Bus1=241137998.1.2.3 Bus2=18893036.1.2.3 LineCode=336_ACSR_3PH_12KV_3 Length=0.007937 units=km
New Line.1840354E$ND239708965 phases=3 Bus1=18892928.1.2.3 Bus2=239708965.1.2.3 LineCode=1/0_ACSR_3PH_12KV_3 Length=0.185051 units=km
New Line.ND239708965$ND18895584 phases=3 Bus1=239708965.1.2.3 Bus2=18895584.1.2.3 LineCode=1/0_ACSR_3PH_12KV_3 Length=0.179957 units=km
New Line.ND239708965$BF50136 phases=3 Bus1=239708965.1.2.3 Bus2=239709024.1.2.3 LineCode=1/0_ACSR_3PH_12KV_3 Length=0.010073 units=km
New Line.ND18895584$1031017E phases=3 Bus1=18895584.1.2.3 Bus2=18892951.1.2.3 LineCode=1/0_ACSR_3PH_12KV_3 Length=0.003711 units=km
New Line.ND18895584$ND252273332 phases=3 Bus1=18895584.1.2.3 Bus2=252273332.1.2.3 LineCode=1/0_ACSR_3PH_12KV_3 Length=0.092004 units=km
New Line.PS7093$PH934E phases=3 Bus1=241138043.1.2.3 Bus2=166458071.1.2.3 LineCode=336_ACSR_3PH_12KV_3 Length=0.008001 units=km
New Line.ND252273332$ND18895386 phases=3 Bus1=252273332.1.2.3 Bus2=18895386.1.2.3 LineCode=1/0_ACSR_3PH_12KV_3 Length=0.257968 units=km
New Line.BF50136$ND239709006 phases=3 Bus1=239709025.1.2.3 Bus2=239709006.1.2.3 LineCode=1/0_ACSR_3PH_12KV_3 Length=0.041636 units=km
New Line.ND18895386$1031023E phases=3 Bus1=18895386.1.2.3 Bus2=18892938.1.2.3 LineCode=1/0_ACSR_3PH_12KV_3 Length=0.006889 units=km
New Line.ND239709006$1722516E phases=3 Bus1=239709006.1.2.3 Bus2=239709116.1.2.3 LineCode=1/0_ACSR_3PH_12KV_3 Length=0.047716 units=km
New Line.1722516E$559224E phases=3 Bus1=239709116.1.2.3 Bus2=19809470.1.2.3 LineCode=1/0_ACSR_3PH_12KV_3 Length=0.085886 units=km
New Line.1031036E$ND43667331 phases=3 Bus1=43667331.1.2.3 Bus2=43666839.1.2.3 LineCode=1/0_ACSR_3PH_12KV_3 Length=0.004843 units=km
New Line.BF50020$ND43667331 phases=2 Bus1=43667331.1.3 Bus2=43667241.1.3 LineCode=1/0_ACSR_2PH_12KV_2 Length=0.005406 units=km
New Line.ND43667322$BF50014 phases=2 Bus1=43667322.1.3 Bus2=43667069.1.3 LineCode=1/0_ACSR_2PH_12KV_2 Length=0.008438 units=km
New Line.BF50015$ND43667604 phases=2 Bus1=43667108.1.3 Bus2=43667604.1.3 LineCode=1/0_ACSR_2PH_12KV_2 Length=0.168309 units=km
New Line.ND43667604$591374E phases=2 Bus1=43667604.1.3 Bus2=237009657.1.3 LineCode=1/0_ACSR_2PH_12KV_2 Length=0.073721 units=km
New Line.BF50021$1432533E phases=2 Bus1=43667089.2.3 Bus2=43666560.2.3 LineCode=1/0_ACSR_2PH_12KV_2 Length=0.077103 units=km
New Line.572405E$BF50014 phases=2 Bus1=43667070.1.3 Bus2=43666535.1.3 LineCode=1/0_ACSR_2PH_12KV_2 Length=0.067719 units=km
New Line.591374E$602421E phases=2 Bus1=237009657.1.3 Bus2=43666585.1.3 LineCode=1/0_ACSR_2PH_12KV_2 Length=0.053034 units=km
New Line.602421E$4260838E phases=2 Bus1=43666585.1.3 Bus2=229649087.1.3 LineCode=1/0_ACSR_2PH_12KV_2 Length=0.059843 units=km
New Line.2139004E$BF50020 phases=2 Bus1=43667242.1.3 Bus2=43666932.1.3 LineCode=1/0_ACSR_2PH_12KV_2 Length=0.156524 units=km
New Line.PS0456$1650349E phases=3 Bus1=43666852.1.2.3 Bus2=69323341.1.2.3 LineCode=1/0_ACSR_3PH_12KV_3 Length=0.099709 units=km
New Line.03476$ND216957845 phases=3 Bus1=-8888882157306.1.2.3 Bus2=216957845.1.2.3 LineCode=350_CLP_3PH_12KV_3 Length=0.379153 units=km

! Switches
New Line.5650241:RCS0080-3 phases=3 Bus1=235893748.1.2.3 Bus2=-777777235893748.1.2.3 switch=y r1=0.001 x1=0.001 r0=0.001 x0=0.001 Length=0.001 units=km enabled=false
New Line.CHINA_PEAK$REGATTA_RCS0119$RCS0119 phases=3 Bus1=229648978.1.2.3 Bus2=-777777229648978.1.2.3 switch=y r1=0.001 x1=0.001 r0=0.001 x0=0.001 Length=0.001 units=km
New Line.5741483:PME0086-4 phases=3 Bus1=226453024.1.2.3 Bus2=226453042.1.2.3 switch=y r1=0.001 x1=0.001 r0=0.001 x0=0.001 Length=0.001 units=km enabled=false
New Line.5741483:PME0086-1 phases=3 Bus1=226453024.1.2.3 Bus2=226453060.1.2.3 switch=y r1=0.001 x1=0.001 r0=0.001 x0=0.001 Length=0.001 units=km enabled=false
New Line.5470184:RCS0083-1 phases=3 Bus1=182347298.1.2.3 Bus2=182347333.1.2.3 switch=y r1=0.001 x1=0.001 r0=0.001 x0=0.001 Length=0.001 units=km enabled=false
New Line.3007674E:PS0456 phases=3 Bus1=69323341.1.2.3 Bus2=69323340.1.2.3 switch=y r1=0.001 x1=0.001 r0=0.001 x0=0.001 Length=0.001 units=km
New Line.5017511:P5017511-1 phases=2 Bus1=18893996.1.2 Bus2=18893997.1.2 switch=y r1=0.001 x1=0.001 r0=0.001 x0=0.001 Length=0.001 units=km
New Line.5741484:P5741484-1 phases=3 Bus1=226453200.1.2.3 Bus2=226453201.1.2.3 switch=y r1=0.001 x1=0.001 r0=0.001 x0=0.001 Length=0.001 units=km
New Line.5372901:P5372901-1 phases=3 Bus1=18893373.1.2.3 Bus2=18893374.1.2.3 switch=y r1=0.001 x1=0.001 r0=0.001 x0=0.001 Length=0.001 units=km
New Line.5403198:P5403198-1 phases=2 Bus1=18894600.1.2 Bus2=18894601.1.2 switch=y r1=0.001 x1=0.001 r0=0.001 x0=0.001 Length=0.001 units=km
New Line.5017506:P5017506-B phases=3 Bus1=18893585.1.2.3 Bus2=18893577.1.2.3 switch=y r1=0.001 x1=0.001 r0=0.001 x0=0.001 Length=0.001 units=km
New Line.5017515:P5017515-1 phases=2 Bus1=18894384.1.3 Bus2=18894385.1.3 switch=y r1=0.001 x1=0.001 r0=0.001 x0=0.001 Length=0.001 units=km
New Line.5017521:P5017521-1 phases=2 Bus1=18894456.1.3 Bus2=18894457.1.3 switch=y r1=0.001 x1=0.001 r0=0.001 x0=0.001 Length=0.001 units=km
New Line.5017506:P5017506-A phases=3 Bus1=18893577.1.2.3 Bus2=18893576.1.2.3 switch=y r1=0.001 x1=0.001 r0=0.001 x0=0.001 Length=0.001 units=km
New Line.5017521:P5017521-2 phases=2 Bus1=18894457.1.3 Bus2=18894465.1.3 switch=y r1=0.001 x1=0.001 r0=0.001 x0=0.001 Length=0.001 units=km
New Line.5017512:P5017512-1 phases=2 Bus1=18894168.1.2 Bus2=18894169.1.2 switch=y r1=0.001 x1=0.001 r0=0.001 x0=0.001 Length=0.001 units=km
New Line.5350657:P5350657-1 phases=2 Bus1=18894528.1.3 Bus2=18894529.1.3 switch=y r1=0.001 x1=0.001 r0=0.001 x0=0.001 Length=0.001 units=km
New Line.5017512:P5017512-2 phases=2 Bus1=18894169.1.2 Bus2=18894177.1.2 switch=y r1=0.001 x1=0.001 r0=0.001 x0=0.001 Length=0.001 units=km
New Line.5059634:P5059634-1 phases=3 Bus1=18893053.1.2.3 Bus2=18893054.1.2.3 switch=y r1=0.001 x1=0.001 r0=0.001 x0=0.001 Length=0.001 units=km
New Line.5059621:P5059621-1 phases=2 Bus1=18892968.1.2 Bus2=18892969.1.2 switch=y r1=0.001 x1=0.001 r0=0.001 x0=0.001 Length=0.001 units=km
New Line.5470170:P5470170-1 phases=2 Bus1=164478998.1.3 Bus2=164478999.1.3 switch=y r1=0.001 x1=0.001 r0=0.001 x0=0.001 Length=0.001 units=km
New Line.5429508:P5429508-2 phases=2 Bus1=18894935.2.3 Bus2=18894927.2.3 switch=y r1=0.001 x1=0.001 r0=0.001 x0=0.001 Length=0.001 units=km
New Line.5017507:P5017507-2 phases=3 Bus1=18893662.1.2.3 Bus2=18893654.1.2.3 switch=y r1=0.001 x1=0.001 r0=0.001 x0=0.001 Length=0.001 units=km
New Line.5017507:P5017507-1 phases=3 Bus1=18893654.1.2.3 Bus2=18893653.1.2.3 switch=y r1=0.001 x1=0.001 r0=0.001 x0=0.001 Length=0.001 units=km
New Line.5017513:P5017513-1 phases=2 Bus1=18894240.1.2 Bus2=18894241.1.2 switch=y r1=0.001 x1=0.001 r0=0.001 x0=0.001 Length=0.001 units=km
New Line.5429508:P5429508-1 phases=2 Bus1=18894927.2.3 Bus2=18894926.2.3 switch=y r1=0.001 x1=0.001 r0=0.001 x0=0.001 Length=0.001 units=km
New Line.5017504:P5017504-A phases=3 Bus1=18895079.1.2.3 Bus2=18895071.1.2.3 switch=y r1=0.001 x1=0.001 r0=0.001 x0=0.001 Length=0.001 units=km
New Line.5017502:P5017502-2 phases=2 Bus1=18893933.2.3 Bus2=18893925.2.3 switch=y r1=0.001 x1=0.001 r0=0.001 x0=0.001 Length=0.001 units=km
New Line.5429533:P5429533-2 phases=2 Bus1=18895007.2.3 Bus2=18894999.2.3 switch=y r1=0.001 x1=0.001 r0=0.001 x0=0.001 Length=0.001 units=km
New Line.5017504:P5017504-B phases=3 Bus1=18895071.1.2.3 Bus2=18895070.1.2.3 switch=y r1=0.001 x1=0.001 r0=0.001 x0=0.001 Length=0.001 units=km
New Line.5470185:P5470185-1 phases=3 Bus1=182347562.1.2.3 Bus2=182347563.1.2.3 switch=y r1=0.001 x1=0.001 r0=0.001 x0=0.001 Length=0.001 units=km
New Line.5470186:P5470186-1 phases=2 Bus1=182347650.1.2 Bus2=182347651.1.2 switch=y r1=0.001 x1=0.001 r0=0.001 x0=0.001 Length=0.001 units=km
New Line.5059653:P5059653-1 phases=3 Bus1=18893325.1.2.3 Bus2=18893326.1.2.3 switch=y r1=0.001 x1=0.001 r0=0.001 x0=0.001 Length=0.001 units=km
New Line.5017510:P5017510-A phases=2 Bus1=18893847.1.2 Bus2=18893848.1.2 switch=y r1=0.001 x1=0.001 r0=0.001 x0=0.001 Length=0.001 units=km
New Line.5017505:P5017505-1 phases=3 Bus1=18893504.1.2.3 Bus2=18893505.1.2.3 switch=y r1=0.001 x1=0.001 r0=0.001 x0=0.001 Length=0.001 units=km
New Line.5017510:P5017510-B phases=2 Bus1=18893848.1.2 Bus2=18893856.1.2 switch=y r1=0.001 x1=0.001 r0=0.001 x0=0.001 Length=0.001 units=km
New Line.5017505:P5017505-2 phases=3 Bus1=18893505.1.2.3 Bus2=18893513.1.2.3 switch=y r1=0.001 x1=0.001 r0=0.001 x0=0.001 Length=0.001 units=km
New Line.5017508:P5017508-2 phases=3 Bus1=18893734.1.2.3 Bus2=18893726.1.2.3 switch=y r1=0.001 x1=0.001 r0=0.001 x0=0.001 Length=0.001 units=km
New Line.5017516:P5017516-2 phases=2 Bus1=18894313.1.3 Bus2=-77777718894313.1.3 switch=y r1=0.001 x1=0.001 r0=0.001 x0=0.001 Length=0.001 units=km
New Line.CAB_1030759E:1030759E phases=3 Bus1=43666882.1.2.3 Bus2=43666866.1.2.3 switch=y r1=0.001 x1=0.001 r0=0.001 x0=0.001 Length=0.001 units=km
New Line.CAB_1030951E:1030951E phases=3 Bus1=43666737.1.2.3 Bus2=43666719.1.2.3 switch=y r1=0.001 x1=0.001 r0=0.001 x0=0.001 Length=0.001 units=km
New Line.CAB_382357E:382357E phases=3 Bus1=43666764.1.2.3 Bus2=43666748.1.2.3 switch=y r1=0.001 x1=0.001 r0=0.001 x0=0.001 Length=0.001 units=km
New Line.CAB_1278866E:1278866E phases=3 Bus1=43666789.1.2.3 Bus2=43666773.1.2.3 switch=y r1=0.001 x1=0.001 r0=0.001 x0=0.001 Length=0.001 units=km
New Line.CAB_2367145E:2367145E phases=3 Bus1=43666685.1.2.3 Bus2=43666669.1.2.3 switch=y r1=0.001 x1=0.001 r0=0.001 x0=0.001 Length=0.001 units=km
New Line.CAB_4906198E:4906198E phases=3 Bus1=218176731.1.2.3 Bus2=218176714.1.2.3 switch=y r1=0.001 x1=0.001 r0=0.001 x0=0.001 Length=0.001 units=km
New Line.CAB_1749936E:1749936E phases=3 Bus1=18895174.1.2.3 Bus2=18895156.1.2.3 switch=y r1=0.001 x1=0.001 r0=0.001 x0=0.001 Length=0.001 units=km
New Line.CAB_1840354E:1840354E phases=3 Bus1=18892928.1.2.3 Bus2=18892910.1.2.3 switch=y r1=0.001 x1=0.001 r0=0.001 x0=0.001 Length=0.001 units=km
New Line.CAB_4322529E:4322529E phases=3 Bus1=170146383.1.2.3 Bus2=170146366.1.2.3 switch=y r1=0.001 x1=0.001 r0=0.001 x0=0.001 Length=0.001 units=km
New Line.CAB_1722516E:1722516E phases=3 Bus1=239709116.1.2.3 Bus2=239709099.1.2.3 switch=y r1=0.001 x1=0.001 r0=0.001 x0=0.001 Length=0.001 units=km
New Line.CAB_1338257E:1338257E phases=3 Bus1=19809495.1.2.3 Bus2=19809479.1.2.3 switch=y r1=0.001 x1=0.001 r0=0.001 x0=0.001 Length=0.001 units=km
New Line.CAB_1432533E:1432533E phases=3 Bus1=43666560.1.2.3 Bus2=43666544.1.2.3 switch=y r1=0.001 x1=0.001 r0=0.001 x0=0.001 Length=0.001 units=km
New Line.CAB_2139004E:2139004E phases=3 Bus1=43666932.1.2.3 Bus2=43666916.1.2.3 switch=y r1=0.001 x1=0.001 r0=0.001 x0=0.001 Length=0.001 units=km
New Line.CAB_3007674E:3007674E phases=3 Bus1=43666907.1.2.3 Bus2=43666891.1.2.3 switch=y r1=0.001 x1=0.001 r0=0.001 x0=0.001 Length=0.001 units=km
New Line.CAB_4278853E:4278853E phases=3 Bus1=43667061.1.2.3 Bus2=43667045.1.2.3 switch=y r1=0.001 x1=0.001 r0=0.001 x0=0.001 Length=0.001 units=km
New Line.CAB_582350E:582350E phases=3 Bus1=233842952.1.2.3 Bus2=233842935.1.2.3 switch=y r1=0.001 x1=0.001 r0=0.001 x0=0.001 Length=0.001 units=km
New Line.CAB_4876865E:4876865E phases=3 Bus1=233842991.1.2.3 Bus2=233842974.1.2.3 switch=y r1=0.001 x1=0.001 r0=0.001 x0=0.001 Length=0.001 units=km
New Line.CAB_3007853E:3007853E phases=3 Bus1=233843030.1.2.3 Bus2=233843013.1.2.3 switch=y r1=0.001 x1=0.001 r0=0.001 x0=0.001 Length=0.001 units=km
New Line.CAB_582304E:582304E phases=3 Bus1=236674917.1.2.3 Bus2=236674900.1.2.3 switch=y r1=0.001 x1=0.001 r0=0.001 x0=0.001 Length=0.001 units=km
New Line.CAB_1432550E:1432550E phases=3 Bus1=43666635.1.2.3 Bus2=43666619.1.2.3 switch=y r1=0.001 x1=0.001 r0=0.001 x0=0.001 Length=0.001 units=km
New Line.CAB_4810777E:4810777E phases=3 Bus1=43667036.1.2.3 Bus2=43667020.1.2.3 switch=y r1=0.001 x1=0.001 r0=0.001 x0=0.001 Length=0.001 units=km
New Line.CAB_4902565E:4902565E phases=3 Bus1=43666610.1.2.3 Bus2=248056495.1.2.3 switch=y r1=0.001 x1=0.001 r0=0.001 x0=0.001 Length=0.001 units=km
New Line.CAB_2197623E:2197623E phases=3 Bus1=43666986.1.2.3 Bus2=244670936.1.2.3 switch=y r1=0.001 x1=0.001 r0=0.001 x0=0.001 Length=0.001 units=km
New Line.CAB_1338266E:1338266E phases=3 Bus1=283807125.1.2.3 Bus2=283807133.1.2.3 switch=y r1=0.001 x1=0.001 r0=0.001 x0=0.001 Length=0.001 units=km
New Line.CAB_2367079E:2367079E phases=3 Bus1=239709078.1.2.3 Bus2=239709061.1.2.3 switch=y r1=0.001 x1=0.001 r0=0.001 x0=0.001 Length=0.001 units=km
New Line.CAB_559224E:559224E phases=3 Bus1=19809470.1.2.3 Bus2=19809454.1.2.3 switch=y r1=0.001 x1=0.001 r0=0.001 x0=0.001 Length=0.001 units=km
New Line.CAB_1030980E:1030980E phases=3 Bus1=43666508.1.2.3 Bus2=43666490.1.2.3 switch=y r1=0.001 x1=0.001 r0=0.001 x0=0.001 Length=0.001 units=km
New Line.CAB_591374E:591374E phases=3 Bus1=237009657.1.2.3 Bus2=237009640.1.2.3 switch=y r1=0.001 x1=0.001 r0=0.001 x0=0.001 Length=0.001 units=km
New Line.CAB_572405E:572405E phases=3 Bus1=43666535.1.2.3 Bus2=43666519.1.2.3 switch=y r1=0.001 x1=0.001 r0=0.001 x0=0.001 Length=0.001 units=km
New Line.CAB_4260838E:4260838E phases=3 Bus1=229649087.1.2.3 Bus2=229649092.1.2.3 switch=y r1=0.001 x1=0.001 r0=0.001 x0=0.001 Length=0.001 units=km
New Line.CAB_1031042E:1031042E phases=3 Bus1=43666816.1.2.3 Bus2=43666798.1.2.3 switch=y r1=0.001 x1=0.001 r0=0.001 x0=0.001 Length=0.001 units=km
New Line.5372902:PME0041-3 phases=3 Bus1=18893161.1.2.3 Bus2=18893169.1.2.3 switch=y r1=0.001 x1=0.001 r0=0.001 x0=0.001 Length=0.001 units=km
New Line.5429529:POS0055-1 phases=2 Bus1=18894068.1.3 Bus2=18894069.1.3 switch=y r1=0.001 x1=0.001 r0=0.001 x0=0.001 Length=0.001 units=km
New Line.5059607:POS0019-1 phases=2 Bus1=18894118.1.2 Bus2=18894119.1.2 switch=y r1=0.001 x1=0.001 r0=0.001 x0=0.001 Length=0.001 units=km
New Line.293588A3E4F5EE34E0637F61810A7CE3 phases=3 Bus1=18895299.1.2.3 Bus2=18895298.1.2.3 switch=y r1=0.001 x1=0.001 r0=0.001 x0=0.001 Length=0.001 units=km
New Line.5429507:POS0059-1 phases=2 Bus1=18894876.2.3 Bus2=18894877.2.3 switch=y r1=0.001 x1=0.001 r0=0.001 x0=0.001 Length=0.001 units=km
New Line.1030981E:RCS0119 phases=3 Bus1=229648979.1.2.3 Bus2=229648978.1.2.3 switch=y r1=0.001 x1=0.001 r0=0.001 x0=0.001 Length=0.001 units=km enabled=false
New Line.5741483:PME0086-3 phases=3 Bus1=226453025.1.2.3 Bus2=226453033.1.2.3 switch=y r1=0.001 x1=0.001 r0=0.001 x0=0.001 Length=0.001 units=km
New Line.5017511:P5017511-2 phases=2 Bus1=18893997.1.2 Bus2=-77777718893997.1.2 switch=y r1=0.001 x1=0.001 r0=0.001 x0=0.001 Length=0.001 units=km
New Line.5403198:P5403198-2 phases=2 Bus1=18894601.1.2 Bus2=-77777718894601.1.2 switch=y r1=0.001 x1=0.001 r0=0.001 x0=0.001 Length=0.001 units=km
New Line.5017515:P5017515-2 phases=2 Bus1=18894385.1.3 Bus2=-77777718894385.1.3 switch=y r1=0.001 x1=0.001 r0=0.001 x0=0.001 Length=0.001 units=km
New Line.5350657:P5350657-2 phases=2 Bus1=18894529.1.3 Bus2=-77777718894529.1.3 switch=y r1=0.001 x1=0.001 r0=0.001 x0=0.001 Length=0.001 units=km
New Line.5059634:P5059634-2 phases=3 Bus1=18893054.1.2.3 Bus2=-77777718893054.1.2.3 switch=y r1=0.001 x1=0.001 r0=0.001 x0=0.001 Length=0.001 units=km
New Line.5059621:P5059621-2 phases=2 Bus1=18892969.1.2 Bus2=-77777718892969.1.2 switch=y r1=0.001 x1=0.001 r0=0.001 x0=0.001 Length=0.001 units=km
New Line.5470170:P5470170-2 phases=2 Bus1=164478999.1.3 Bus2=-777777164478999.1.3 switch=y r1=0.001 x1=0.001 r0=0.001 x0=0.001 Length=0.001 units=km
New Line.5017513:P5017513-2 phases=2 Bus1=18894241.1.2 Bus2=-77777718894241.1.2 switch=y r1=0.001 x1=0.001 r0=0.001 x0=0.001 Length=0.001 units=km
New Line.5429533:P5429533-1 phases=2 Bus1=18894999.2.3 Bus2=-77777718894999.2.3 switch=y r1=0.001 x1=0.001 r0=0.001 x0=0.001 Length=0.001 units=km
New Line.5017502:P5017502-1 phases=2 Bus1=18893925.2.3 Bus2=-77777718893925.2.3 switch=y r1=0.001 x1=0.001 r0=0.001 x0=0.001 Length=0.001 units=km
New Line.5470186:P5470186-2 phases=2 Bus1=182347651.1.2 Bus2=-777777182347651.1.2 switch=y r1=0.001 x1=0.001 r0=0.001 x0=0.001 Length=0.001 units=km
New Line.5017508:P5017508-1 phases=3 Bus1=18893726.1.2.3 Bus2=-77777718893726.1.2.3 switch=y r1=0.001 x1=0.001 r0=0.001 x0=0.001 Length=0.001 units=km
New Line.1031036E:1031036ET phases=3 Bus1=98593343.1.2.3 Bus2=98593342.1.2.3 switch=y r1=0.001 x1=0.001 r0=0.001 x0=0.001 Length=0.001 units=km
New Line.2197627E:RAR0242 phases=3 Bus1=18894669.1.2.3 Bus2=18894670.1.2.3 switch=y r1=0.001 x1=0.001 r0=0.001 x0=0.001 Length=0.001 units=km
New Line.4696668E:RAR0934 phases=3 Bus1=18894772.1.2.3 Bus2=18894771.1.2.3 switch=y r1=0.001 x1=0.001 r0=0.001 x0=0.001 Length=0.001 units=km
New Line.18894727$B phases=3 Bus1=18894687.1.2.3 Bus2=18894675.1.2.3 switch=y r1=0.001 x1=0.001 r0=0.001 x0=0.001 Length=0.001 units=km
New Line.18894727$C phases=3 Bus1=18894687.1.2.3 Bus2=18894688.1.2.3 switch=y r1=0.001 x1=0.001 r0=0.001 x0=0.001 Length=0.001 units=km
New Line.18894833$D phases=3 Bus1=18894807.1.2.3 Bus2=18894783.1.2.3 switch=y r1=0.001 x1=0.001 r0=0.001 x0=0.001 Length=0.001 units=km
New Line.18894833$C phases=3 Bus1=18894807.1.2.3 Bus2=18894808.1.2.3 switch=y r1=0.001 x1=0.001 r0=0.001 x0=0.001 Length=0.001 units=km
New Line.B$RAR0242 phases=3 Bus1=18894676.1.2.3 Bus2=18894669.1.2.3 switch=y r1=0.001 x1=0.001 r0=0.001 x0=0.001 Length=0.001 units=km
New Line.18894731$C phases=3 Bus1=18894706.1.2.3 Bus2=18894705.1.2.3 switch=y r1=0.001 x1=0.001 r0=0.001 x0=0.001 Length=0.001 units=km
New Line.RAR0934$D phases=3 Bus1=18894784.1.2.3 Bus2=18894772.1.2.3 switch=y r1=0.001 x1=0.001 r0=0.001 x0=0.001 Length=0.001 units=km
New Line.18894829$C phases=3 Bus1=18894790.1.2.3 Bus2=18894789.1.2.3 switch=y r1=0.001 x1=0.001 r0=0.001 x0=0.001 Length=0.001 units=km
New Line.208475015 phases=2 Bus1=208475017.1.2 Bus2=208475018.1.2 switch=y r1=0.001 x1=0.001 r0=0.001 x0=0.001 Length=0.001 units=km
New Line.208474884 phases=3 Bus1=208474887.1.2.3 Bus2=208474886.1.2.3 switch=y r1=0.001 x1=0.001 r0=0.001 x0=0.001 Length=0.001 units=km
New Line.208474836 phases=3 Bus1=208474838.1.2.3 Bus2=208474839.1.2.3 switch=y r1=0.001 x1=0.001 r0=0.001 x0=0.001 Length=0.001 units=km
New Line.208475042 phases=2 Bus1=208475045.1.2 Bus2=208475044.1.2 switch=y r1=0.001 x1=0.001 r0=0.001 x0=0.001 Length=0.001 units=km
New Line.208475067 phases=2 Bus1=208475069.1.2 Bus2=208475070.1.2 switch=y r1=0.001 x1=0.001 r0=0.001 x0=0.001 Length=0.001 units=km
New Line.208474911 phases=3 Bus1=208474914.1.2.3 Bus2=208474913.1.2.3 switch=y r1=0.001 x1=0.001 r0=0.001 x0=0.001 Length=0.001 units=km
New Line.208474938 phases=3 Bus1=208474940.1.2.3 Bus2=208474941.1.2.3 switch=y r1=0.001 x1=0.001 r0=0.001 x0=0.001 Length=0.001 units=km
New Line.208475092 phases=2 Bus1=208475095.1.2 Bus2=208475094.1.2 switch=y r1=0.001 x1=0.001 r0=0.001 x0=0.001 Length=0.001 units=km
New Line.18894731$D phases=3 Bus1=18894705.1.2.3 Bus2=18894681.1.2.3 switch=y r1=0.001 x1=0.001 r0=0.001 x0=0.001 Length=0.001 units=km
New Line.18894829$B phases=3 Bus1=18894789.1.2.3 Bus2=18894777.1.2.3 switch=y r1=0.001 x1=0.001 r0=0.001 x0=0.001 Length=0.001 units=km
New Line.RAR0242$D phases=3 Bus1=18894670.1.2.3 Bus2=18894682.1.2.3 switch=y r1=0.001 x1=0.001 r0=0.001 x0=0.001 Length=0.001 units=km
New Line.B$RAR0934 phases=3 Bus1=18894771.1.2.3 Bus2=18894778.1.2.3 switch=y r1=0.001 x1=0.001 r0=0.001 x0=0.001 Length=0.001 units=km
New Line.208474977 phases=2 Bus1=208474979.1.2 Bus2=208474980.1.2 switch=y r1=0.001 x1=0.001 r0=0.001 x0=0.001 Length=0.001 units=km
New Line.182347322$182347331 phases=3 Bus1=182347297.1.2.3 Bus2=182347298.1.2.3 switch=y r1=0.001 x1=0.001 r0=0.001 x0=0.001 Length=0.001 units=km
New Line.208475117 phases=2 Bus1=208475119.1.2 Bus2=208475120.1.2 switch=y r1=0.001 x1=0.001 r0=0.001 x0=0.001 Length=0.001 units=km
New Line.208474811 phases=3 Bus1=208474814.1.2.3 Bus2=208474813.1.2.3 switch=y r1=0.001 x1=0.001 r0=0.001 x0=0.001 Length=0.001 units=km
New Line.1031042E:43666796 phases=3 Bus1=43666798.1.2.3 Bus2=43666799.1.2.3 switch=y r1=0.001 x1=0.001 r0=0.001 x0=0.001 Length=0.001 units=km
New Line.3007674E:43666889 phases=3 Bus1=43666891.1.2.3 Bus2=43666892.1.2.3 switch=y r1=0.001 x1=0.001 r0=0.001 x0=0.001 Length=0.001 units=km
New Line.1030759E:43666864 phases=3 Bus1=43666866.1.2.3 Bus2=43666867.1.2.3 switch=y r1=0.001 x1=0.001 r0=0.001 x0=0.001 Length=0.001 units=km
New Line.1030951E:43666717 phases=3 Bus1=43666719.1.2.3 Bus2=43666720.1.2.3 switch=y r1=0.001 x1=0.001 r0=0.001 x0=0.001 Length=0.001 units=km
New Line.4278853E:43667043 phases=2 Bus1=43667045.2.3 Bus2=43667046.2.3 switch=y r1=0.001 x1=0.001 r0=0.001 x0=0.001 Length=0.001 units=km
New Line.582350E:233842933 phases=2 Bus1=233842935.2.3 Bus2=233842936.2.3 switch=y r1=0.001 x1=0.001 r0=0.001 x0=0.001 Length=0.001 units=km
New Line.4876865E:233842972 phases=2 Bus1=233842974.2.3 Bus2=233842975.2.3 switch=y r1=0.001 x1=0.001 r0=0.001 x0=0.001 Length=0.001 units=km
New Line.3007853E:233843011 phases=2 Bus1=233843013.2.3 Bus2=233843014.2.3 switch=y r1=0.001 x1=0.001 r0=0.001 x0=0.001 Length=0.001 units=km
New Line.382357E:43666746 phases=2 Bus1=43666748.2.3 Bus2=43666749.2.3 switch=y r1=0.001 x1=0.001 r0=0.001 x0=0.001 Length=0.001 units=km
New Line.582304E:236674898 phases=3 Bus1=236674900.1.2.3 Bus2=236674901.1.2.3 switch=y r1=0.001 x1=0.001 r0=0.001 x0=0.001 Length=0.001 units=km
New Line.1432550E:43666617 phases=2 Bus1=43666619.1.2 Bus2=43666620.1.2 switch=y r1=0.001 x1=0.001 r0=0.001 x0=0.001 Length=0.001 units=km
New Line.1278866E:43666771 phases=2 Bus1=43666773.2.3 Bus2=43666774.2.3 switch=y r1=0.001 x1=0.001 r0=0.001 x0=0.001 Length=0.001 units=km
New Line.4810777E:43667018 phases=2 Bus1=43667020.2.3 Bus2=43667021.2.3 switch=y r1=0.001 x1=0.001 r0=0.001 x0=0.001 Length=0.001 units=km
New Line.4902565E:248056493 phases=2 Bus1=248056495.2.3 Bus2=248056496.2.3 switch=y r1=0.001 x1=0.001 r0=0.001 x0=0.001 Length=0.001 units=km
New Line.2367145E:43666667 phases=2 Bus1=43666669.2.3 Bus2=43666670.2.3 switch=y r1=0.001 x1=0.001 r0=0.001 x0=0.001 Length=0.001 units=km
New Line.4906198E:218176712 phases=3 Bus1=218176714.1.2.3 Bus2=218176715.1.2.3 switch=y r1=0.001 x1=0.001 r0=0.001 x0=0.001 Length=0.001 units=km
New Line.1749936E:18895154 phases=3 Bus1=18895156.1.2.3 Bus2=18895157.1.2.3 switch=y r1=0.001 x1=0.001 r0=0.001 x0=0.001 Length=0.001 units=km
New Line.1840354E:18892908 phases=3 Bus1=18892910.1.2.3 Bus2=18892911.1.2.3 switch=y r1=0.001 x1=0.001 r0=0.001 x0=0.001 Length=0.001 units=km
New Line.4322529E:170146364 phases=3 Bus1=170146366.1.2.3 Bus2=170146367.1.2.3 switch=y r1=0.001 x1=0.001 r0=0.001 x0=0.001 Length=0.001 units=km
New Line.2367079E:239709059 phases=3 Bus1=239709061.1.2.3 Bus2=239709062.1.2.3 switch=y r1=0.001 x1=0.001 r0=0.001 x0=0.001 Length=0.001 units=km
New Line.1722516E:239709097 phases=3 Bus1=239709099.1.2.3 Bus2=239709100.1.2.3 switch=y r1=0.001 x1=0.001 r0=0.001 x0=0.001 Length=0.001 units=km
New Line.559224E:19809452 phases=3 Bus1=19809454.1.2.3 Bus2=19809455.1.2.3 switch=y r1=0.001 x1=0.001 r0=0.001 x0=0.001 Length=0.001 units=km
New Line.1338257E:19809477 phases=3 Bus1=19809479.1.2.3 Bus2=19809480.1.2.3 switch=y r1=0.001 x1=0.001 r0=0.001 x0=0.001 Length=0.001 units=km
New Line.2197623E:244670934 phases=2 Bus1=244670936.2.3 Bus2=244670937.2.3 switch=y r1=0.001 x1=0.001 r0=0.001 x0=0.001 Length=0.001 units=km
New Line.1338266E:283807131 phases=2 Bus1=283807133.2.3 Bus2=283807134.2.3 switch=y r1=0.001 x1=0.001 r0=0.001 x0=0.001 Length=0.001 units=km
New Line.1030980E:43666488 phases=3 Bus1=43666490.1.2.3 Bus2=43666491.1.2.3 switch=y r1=0.001 x1=0.001 r0=0.001 x0=0.001 Length=0.001 units=km
New Line.235893781$RCS0080-3 phases=3 Bus1=235893747.1.2.3 Bus2=235893748.1.2.3 switch=y r1=0.001 x1=0.001 r0=0.001 x0=0.001 Length=0.001 units=km
New Line.PME0041-4$PME0041-3 phases=3 Bus1=18893160.1.2.3 Bus2=18893161.1.2.3 switch=y r1=0.001 x1=0.001 r0=0.001 x0=0.001 Length=0.001 units=km
New Line.PME0086-4$PME0086-2 phases=3 Bus1=226453025.1.2.3 Bus2=226453024.1.2.3 switch=y r1=0.001 x1=0.001 r0=0.001 x0=0.001 Length=0.001 units=km
New Line.208474784 phases=3 Bus1=208474786.1.2.3 Bus2=208474787.1.2.3 switch=y r1=0.001 x1=0.001 r0=0.001 x0=0.001 Length=0.001 units=km
New Line.2197627E:RAR0242_B phases=3 Bus1=18894675.1.2.3 Bus2=18894676.1.2.3 switch=y r1=0.001 x1=0.001 r0=0.001 x0=0.001 Length=0.001 units=km
New Line.2197627E:RAR0242_C phases=3 Bus1=18894688.1.2.3 Bus2=18894706.1.2.3 switch=y r1=0.001 x1=0.001 r0=0.001 x0=0.001 Length=0.001 units=km enabled=false
New Line.4696668E:RAR0934_D phases=3 Bus1=18894783.1.2.3 Bus2=18894784.1.2.3 switch=y r1=0.001 x1=0.001 r0=0.001 x0=0.001 Length=0.001 units=km
New Line.4696668E:RAR0934_C phases=3 Bus1=18894808.1.2.3 Bus2=18894790.1.2.3 switch=y r1=0.001 x1=0.001 r0=0.001 x0=0.001 Length=0.001 units=km enabled=false
New Line.5372902:PME0041-2 phases=3 Bus1=18893161.1.2.3 Bus2=18893187.1.2.3 switch=y r1=0.001 x1=0.001 r0=0.001 x0=0.001 Length=0.001 units=km
New Line.1031050E:RCS0869 phases=3 Bus1=43667197.1.2.3 Bus2=43667196.1.2.3 switch=y r1=0.001 x1=0.001 r0=0.001 x0=0.001 Length=0.001 units=km
New Line.5568214:P5568214-1 phases=3 Bus1=95639460.1.2.3 Bus2=95639461.1.2.3 switch=y r1=0.001 x1=0.001 r0=0.001 x0=0.001 Length=0.001 units=km
New Line.5017516:P5017516-1 phases=2 Bus1=18894312.1.3 Bus2=18894313.1.3 switch=y r1=0.001 x1=0.001 r0=0.001 x0=0.001 Length=0.001 units=km
New Line.1030968E:PS0868 phases=3 Bus1=43667129.1.2.3 Bus2=43667128.1.2.3 switch=y r1=0.001 x1=0.001 r0=0.001 x0=0.001 Length=0.001 units=km
New Line.2197627E:RAR0242_D phases=3 Bus1=18894681.1.2.3 Bus2=18894682.1.2.3 switch=y r1=0.001 x1=0.001 r0=0.001 x0=0.001 Length=0.001 units=km
New Line.4696668E:RAR0934_B phases=3 Bus1=18894777.1.2.3 Bus2=18894778.1.2.3 switch=y r1=0.001 x1=0.001 r0=0.001 x0=0.001 Length=0.001 units=km
New Line.1749939E:PS7092 phases=3 Bus1=241137997.1.2.3 Bus2=241137998.1.2.3 switch=y r1=0.001 x1=0.001 r0=0.001 x0=0.001 Length=0.001 units=km
New Line.1749925E:PS0054 phases=3 Bus1=18895205.1.2.3 Bus2=18895206.1.2.3 switch=y r1=0.001 x1=0.001 r0=0.001 x0=0.001 Length=0.001 units=km
New Line.1749934E:PS7093 phases=3 Bus1=241138042.1.2.3 Bus2=241138043.1.2.3 switch=y r1=0.001 x1=0.001 r0=0.001 x0=0.001 Length=0.001 units=km
New Line.1722729E:PS7094 phases=3 Bus1=250297154.1.2.3 Bus2=250297155.1.2.3 switch=y r1=0.001 x1=0.001 r0=0.001 x0=0.001 Length=0.001 units=km
New Line.1031024E:PS0120 phases=3 Bus1=69323297.1.2.3 Bus2=69323296.1.2.3 switch=y r1=0.001 x1=0.001 r0=0.001 x0=0.001 Length=0.001 units=km
New Line.5017501:P5017501-A phases=3 Bus1=151630655.1.2.3 Bus2=151630656.1.2.3 switch=y r1=0.001 x1=0.001 r0=0.001 x0=0.001 Length=0.001 units=km
New Line.5017501:P5017501-T phases=3 Bus1=151630656.1.2.3 Bus2=151630664.1.2.3 switch=y r1=0.001 x1=0.001 r0=0.001 x0=0.001 Length=0.001 units=km
New Line.5017501:P5017501-B phases=3 Bus1=151630656.1.2.3 Bus2=151630673.1.2.3 switch=y r1=0.001 x1=0.001 r0=0.001 x0=0.001 Length=0.001 units=km
New Line.5470184:RCS0083-3 phases=3 Bus1=182347306.1.2.3 Bus2=182347297.1.2.3 switch=y r1=0.001 x1=0.001 r0=0.001 x0=0.001 Length=0.001 units=km
New Line.5470184:RCS0083-2 phases=3 Bus1=182347297.1.2.3 Bus2=182347324.1.2.3 switch=y r1=0.001 x1=0.001 r0=0.001 x0=0.001 Length=0.001 units=km
New Line.5470184:RCS0083-4 phases=3 Bus1=182347298.1.2.3 Bus2=182347315.1.2.3 switch=y r1=0.001 x1=0.001 r0=0.001 x0=0.001 Length=0.001 units=km
New Line.5017509:BS0004-1 phases=3 Bus1=18893797.1.2.3 Bus2=18893798.1.2.3 switch=y r1=0.001 x1=0.001 r0=0.001 x0=0.001 Length=0.001 units=km
New Line.5650241:RCS0080-4 phases=3 Bus1=235893765.1.2.3 Bus2=235893747.1.2.3 switch=y r1=0.001 x1=0.001 r0=0.001 x0=0.001 Length=0.001 units=km enabled=false
New Line.5372902:PME0041-1 phases=3 Bus1=18893196.1.2.3 Bus2=18893160.1.2.3 switch=y r1=0.001 x1=0.001 r0=0.001 x0=0.001 Length=0.001 units=km
New Line.5741483:PME0086-2 phases=3 Bus1=226453051.1.2.3 Bus2=226453025.1.2.3 switch=y r1=0.001 x1=0.001 r0=0.001 x0=0.001 Length=0.001 units=km
New Line.5372902:PME0041-4 phases=3 Bus1=18893160.1.2.3 Bus2=18893178.1.2.3 switch=y r1=0.001 x1=0.001 r0=0.001 x0=0.001 Length=0.001 units=km
New Line.591374E:237009638 phases=2 Bus1=237009640.1.3 Bus2=237009641.1.3 switch=y r1=0.001 x1=0.001 r0=0.001 x0=0.001 Length=0.001 units=km
New Line.1432533E:43666542 phases=2 Bus1=43666544.2.3 Bus2=43666545.2.3 switch=y r1=0.001 x1=0.001 r0=0.001 x0=0.001 Length=0.001 units=km
New Line.572405E:43666517 phases=2 Bus1=43666519.1.3 Bus2=43666520.1.3 switch=y r1=0.001 x1=0.001 r0=0.001 x0=0.001 Length=0.001 units=km
New Line.4260838E:229649090 phases=2 Bus1=229649092.1.3 Bus2=229649093.1.3 switch=y r1=0.001 x1=0.001 r0=0.001 x0=0.001 Length=0.001 units=km
New Line.2139004E:43666914 phases=2 Bus1=43666916.1.3 Bus2=43666917.1.3 switch=y r1=0.001 x1=0.001 r0=0.001 x0=0.001 Length=0.001 units=km
New Line.1031045E:BF50010 phases=2 Bus1=43667205.2.3 Bus2=43667206.2.3 switch=y r1=0.001 x1=0.001 r0=0.001 x0=0.001 Length=0.001 units=km
New Line.1030954E:BF50018 phases=3 Bus1=43667175.1.2.3 Bus2=43667176.1.2.3 switch=y r1=0.001 x1=0.001 r0=0.001 x0=0.001 Length=0.001 units=km
New Line.1030959E:BF50017 phases=2 Bus1=43667156.1.2 Bus2=43667157.1.2 switch=y r1=0.001 x1=0.001 r0=0.001 x0=0.001 Length=0.001 units=km
New Line.1030965E:BF50016 phases=2 Bus1=43667137.2.3 Bus2=43667138.2.3 switch=y r1=0.001 x1=0.001 r0=0.001 x0=0.001 Length=0.001 units=km
New Line.1030970E:BF50015 phases=2 Bus1=43667107.1.3 Bus2=43667108.1.3 switch=y r1=0.001 x1=0.001 r0=0.001 x0=0.001 Length=0.001 units=km
New Line.4906198E:BF50005 phases=3 Bus1=218176757.1.2.3 Bus2=218176758.1.2.3 switch=y r1=0.001 x1=0.001 r0=0.001 x0=0.001 Length=0.001 units=km
New Line.4236677E:BF50136 phases=3 Bus1=239709024.1.2.3 Bus2=239709025.1.2.3 switch=y r1=0.001 x1=0.001 r0=0.001 x0=0.001 Length=0.001 units=km
New Line.1030975E:BF50021 phases=2 Bus1=43667088.2.3 Bus2=43667089.2.3 switch=y r1=0.001 x1=0.001 r0=0.001 x0=0.001 Length=0.001 units=km
New Line.1030977E:BF50014 phases=2 Bus1=43667069.1.3 Bus2=43667070.1.3 switch=y r1=0.001 x1=0.001 r0=0.001 x0=0.001 Length=0.001 units=km
New Line.1031036E:BF50020 phases=2 Bus1=43667241.1.3 Bus2=43667242.1.3 switch=y r1=0.001 x1=0.001 r0=0.001 x0=0.001 Length=0.001 units=km
New Line.4260770E:4260770EP phases=3 Bus1=18892884.1.2.3 Bus2=18892883.1.2.3 switch=y r1=0.001 x1=0.001 r0=0.001 x0=0.001 Length=0.001 units=km
New Line.1099961E:1099961E phases=3 Bus1=18892897.1.2.3 Bus2=18892896.1.2.3 switch=y r1=0.001 x1=0.001 r0=0.001 x0=0.001 Length=0.001 units=km
New Line.1749939E:PH939E phases=3 Bus1=18893036.1.2.3 Bus2=18893037.1.2.3 switch=y r1=0.001 x1=0.001 r0=0.001 x0=0.001 Length=0.001 units=km
New Line.1031017E:1031017E phases=3 Bus1=18892951.1.2.3 Bus2=18892952.1.2.3 switch=y r1=0.001 x1=0.001 r0=0.001 x0=0.001 Length=0.001 units=km
New Line.1749934E:PH934E phases=3 Bus1=166458071.1.2.3 Bus2=166458072.1.2.3 switch=y r1=0.001 x1=0.001 r0=0.001 x0=0.001 Length=0.001 units=km
New Line.1031023E:1031023E phases=3 Bus1=18892938.1.2.3 Bus2=18892939.1.2.3 switch=y r1=0.001 x1=0.001 r0=0.001 x0=0.001 Length=0.001 units=km
New Line.4662994E:4662994E phases=3 Bus1=164478917.1.2.3 Bus2=164478925.1.2.3 switch=y r1=0.001 x1=0.001 r0=0.001 x0=0.001 Length=0.001 units=km
New Line.1722729E:PH729E phases=3 Bus1=18893146.1.2.3 Bus2=18893147.1.2.3 switch=y r1=0.001 x1=0.001 r0=0.001 x0=0.001 Length=0.001 units=km
New Line.1031036E:1031036E phases=3 Bus1=43666839.1.2.3 Bus2=43666840.1.2.3 switch=y r1=0.001 x1=0.001 r0=0.001 x0=0.001 Length=0.001 units=km
New Line.2344536E:2344536E phases=3 Bus1=43666827.1.2.3 Bus2=43666826.1.2.3 switch=y r1=0.001 x1=0.001 r0=0.001 x0=0.001 Length=0.001 units=km
New Line.1650349E:1650349E phases=3 Bus1=43666853.1.2.3 Bus2=43666852.1.2.3 switch=y r1=0.001 x1=0.001 r0=0.001 x0=0.001 Length=0.001 units=km

! Loads
New Load.5470184 Bus1=-999999203123950.2.0 phases=1 kV=0.069282 kW=0 kvar=0 model=1
New Load.4906198E_0 Bus1=-999999218176715.2.0 phases=1 kV=1.38564 kW=0 kvar=0 model=1
New Load.4906198E_1 Bus1=-999999218176715.3.0 phases=1 kV=1.38564 kW=0 kvar=0 model=1
New Load.572405E_0 Bus1=-99999943666520.1.0 phases=1 kV=0.069282 kW=0 kvar=0 model=1
New Load.572405E_1 Bus1=-99999943666520.2.0 phases=1 kV=0.069282 kW=0 kvar=0 model=1
New Load.5017513_0 Bus1=-99999918894241.3.0 phases=1 kV=0.069282 kW=0 kvar=0 model=1
New Load.5017513_1 Bus1=-99999918894241.1.0 phases=1 kV=0.069282 kW=0 kvar=0 model=1
New Load.582350E_0 Bus1=-999999233842936.2.0 phases=1 kV=0.069282 kW=0 kvar=0 model=1
New Load.582350E_1 Bus1=-999999233842936.3.0 phases=1 kV=0.069282 kW=0 kvar=0 model=1
New Load.4876865E_0 Bus1=-999999233842975.2.0 phases=1 kV=0.069282 kW=0 kvar=0 model=1
New Load.4876865E_1 Bus1=-999999233842975.3.0 phases=1 kV=0.069282 kW=0 kvar=0 model=1
New Load.5470185 Bus1=-999999182347563.1.0 phases=1 kV=0.069282 kW=0 kvar=0 model=1
New Load.5059653_0 Bus1=-99999918893326.1.0 phases=1 kV=0.159926 kW=0 kvar=0 model=1
New Load.5059653_1 Bus1=-99999918893326.2.0 phases=1 kV=0.159926 kW=0 kvar=0 model=1
New Load.5059653_2 Bus1=-99999918893326.3.0 phases=1 kV=0.159926 kW=0 kvar=0 model=1
New Load.5470186_0 Bus1=-999999182347651.3.0 phases=1 kV=0.069282 kW=0 kvar=0 model=1
New Load.5470186_1 Bus1=-999999182347651.1.0 phases=1 kV=0.069282 kW=0 kvar=0 model=1
New Load.5017510_0 Bus1=-99999918893848.2.0 phases=1 kV=0.069282 kW=0 kvar=0 model=1
New Load.5017510_1 Bus1=-99999918893848.3.0 phases=1 kV=0.069282 kW=0 kvar=0 model=1
New Load.2139004E_0 Bus1=-99999943666917.1.0 phases=1 kV=0.069282 kW=0 kvar=0 model=1
New Load.2139004E_1 Bus1=-99999943666917.2.0 phases=1 kV=0.069282 kW=0 kvar=0 model=1
New Load.5059634 Bus1=-99999918893054.2.0 phases=1 kV=0.159926 kW=0 kvar=0 model=1
New Load.4810777E_0 Bus1=-99999943667021.2.0 phases=1 kV=0.069282 kW=0 kvar=0 model=1
New Load.4810777E_1 Bus1=-99999943667021.3.0 phases=1 kV=0.069282 kW=0 kvar=0 model=1
New Load.1432550E_0 Bus1=-99999943666620.1.0 phases=1 kV=0.069282 kW=0 kvar=0 model=1
New Load.1432550E_1 Bus1=-99999943666620.2.0 phases=1 kV=0.069282 kW=0 kvar=0 model=1
New Load.1278866E_0 Bus1=-99999943666774.2.0 phases=1 kV=0.069282 kW=0 kvar=0 model=1
New Load.1278866E_1 Bus1=-99999943666774.3.0 phases=1 kV=0.069282 kW=0 kvar=0 model=1
New Load.1030980E_0 Bus1=-99999943666491.2.0 phases=1 kV=0.069282 kW=0 kvar=0 model=1
New Load.1030980E_1 Bus1=-99999943666491.3.0 phases=1 kV=0.069282 kW=0 kvar=0 model=1
New Load.591374E_0 Bus1=-999999237009641.1.0 phases=1 kV=0.069282 kW=0 kvar=0 model=1
New Load.591374E_1 Bus1=-999999237009641.2.0 phases=1 kV=0.069282 kW=0 kvar=0 model=1
New Load.1432533E_0 Bus1=-99999943666545.1.0 phases=1 kV=0.069282 kW=0 kvar=0 model=1
New Load.1432533E_1 Bus1=-99999943666545.2.0 phases=1 kV=0.069282 kW=0 kvar=0 model=1
New Load.5017505 Bus1=-99999918893505.1.0 phases=1 kV=0.069282 kW=0 kvar=0 model=1
New Load.5017501 Bus1=-999999151630664.1.0 phases=1 kV=0.159926 kW=0 kvar=0 model=1
New Load.1840354E_0 Bus1=-99999918892911.3.0 phases=1 kV=0.069282 kW=0 kvar=0 model=1
New Load.1840354E_1 Bus1=-99999918892911.1.0 phases=1 kV=0.069282 kW=0 kvar=0 model=1
New Load.5429508_0 Bus1=-99999918894927.1.0 phases=1 kV=0.069282 kW=0 kvar=0 model=1
New Load.5429508_1 Bus1=-99999918894927.2.0 phases=1 kV=0.069282 kW=0 kvar=0 model=1
New Load.5429533_0 Bus1=-99999918894999.1.0 phases=1 kV=0.069282 kW=0 kvar=0 model=1
New Load.5429533_1 Bus1=-99999918894999.2.0 phases=1 kV=0.069282 kW=0 kvar=0 model=1
New Load.5017502_0 Bus1=-99999918893925.1.0 phases=1 kV=0.069282 kW=0 kvar=0 model=1
New Load.5017502_1 Bus1=-99999918893925.2.0 phases=1 kV=0.069282 kW=0 kvar=0 model=1
New Load.5650241 Bus1=-999999235894076.3.0 phases=1 kV=0.069282 kW=0 kvar=0 model=1
New Load.5470170_0 Bus1=-999999164478999.1.0 phases=1 kV=0.069282 kW=0 kvar=0 model=1
New Load.5470170_1 Bus1=-999999164478999.2.0 phases=1 kV=0.069282 kW=0 kvar=0 model=1
New Load.5017504 Bus1=-99999918895071.3.0 phases=1 kV=0.069282 kW=0 kvar=0 model=1
New Load.5059621_0 Bus1=-99999918892969.1.0 phases=1 kV=0.069282 kW=0 kvar=0 model=1
New Load.5059621_1 Bus1=-99999918892969.2.0 phases=1 kV=0.069282 kW=0 kvar=0 model=1
New Load.559224E_0 Bus1=-99999919809455.1.0 phases=1 kV=0.069282 kW=0 kvar=0 model=1
New Load.559224E_1 Bus1=-99999919809455.2.0 phases=1 kV=0.069282 kW=0 kvar=0 model=1
New Load.1338257E_0 Bus1=-99999919809480.3.0 phases=1 kV=0.069282 kW=0 kvar=0 model=1
New Load.1338257E_1 Bus1=-99999919809480.1.0 phases=1 kV=0.069282 kW=0 kvar=0 model=1
New Load.582304E_0 Bus1=-999999236674901.2.0 phases=1 kV=0.069282 kW=0 kvar=0 model=1
New Load.582304E_1 Bus1=-999999236674901.3.0 phases=1 kV=0.069282 kW=0 kvar=0 model=1
New Load.5350657_0 Bus1=-99999918894529.3.0 phases=1 kV=0.069282 kW=0 kvar=0 model=1
New Load.5350657_1 Bus1=-99999918894529.1.0 phases=1 kV=0.069282 kW=0 kvar=0 model=1
New Load.5017512_0 Bus1=-99999918894169.3.0 phases=1 kV=0.069282 kW=0 kvar=0 model=1
New Load.5017512_1 Bus1=-99999918894169.1.0 phases=1 kV=0.069282 kW=0 kvar=0 model=1
New Load.5017507 Bus1=-99999918893654.3.0 phases=1 kV=0.069282 kW=0 kvar=0 model=1
New Load.1338266E_0 Bus1=-999999283807134.3.0 phases=1 kV=0.069282 kW=0 kvar=0 model=1
New Load.1338266E_1 Bus1=-999999283807134.1.0 phases=1 kV=0.069282 kW=0 kvar=0 model=1
New Load.2197623E_0 Bus1=-999999244670937.3.0 phases=1 kV=0.069282 kW=0 kvar=0 model=1
New Load.2197623E_1 Bus1=-999999244670937.1.0 phases=1 kV=0.069282 kW=0 kvar=0 model=1
New Load.5372901_0 Bus1=-99999918893374.1.0 phases=1 kV=0.159926 kW=0 kvar=0 model=1
New Load.5372901_1 Bus1=-99999918893374.2.0 phases=1 kV=0.159926 kW=0 kvar=0 model=1
New Load.5372901_2 Bus1=-99999918893374.3.0 phases=1 kV=0.159926 kW=0 kvar=0 model=1
New Load.5403198_0 Bus1=-99999918894601.1.0 phases=1 kV=0.069282 kW=0 kvar=0 model=1
New Load.5403198_1 Bus1=-99999918894601.2.0 phases=1 kV=0.069282 kW=0 kvar=0 model=1
New Load.3007674E_0 Bus1=-99999943666892.1.2 phases=1 kV=0.069282 kW=0 kvar=0 model=1
New Load.3007674E_1 Bus1=-99999943666892.2.3 phases=1 kV=0.069282 kW=0 kvar=0 model=1
New Load.3007674E_2 Bus1=-99999943666892.3.1 phases=1 kV=0.069282 kW=0 kvar=0 model=1
New Load.4278853E_0 Bus1=-99999943667046.2.0 phases=1 kV=0.069282 kW=0 kvar=0 model=1
New Load.4278853E_1 Bus1=-99999943667046.3.0 phases=1 kV=0.069282 kW=0 kvar=0 model=1
New Load.1030951E_0 Bus1=-99999943666720.3.0 phases=1 kV=0.069282 kW=0 kvar=0 model=1
New Load.1030951E_1 Bus1=-99999943666720.1.0 phases=1 kV=0.069282 kW=0 kvar=0 model=1
New Load.4260838E_0 Bus1=-999999229649093.1.0 phases=1 kV=0.069282 kW=0 kvar=0 model=1
New Load.4260838E_1 Bus1=-999999229649093.2.0 phases=1 kV=0.069282 kW=0 kvar=0 model=1
New Load.3007853E_0 Bus1=-999999233843014.2.0 phases=1 kV=0.069282 kW=0 kvar=0 model=1
New Load.3007853E_1 Bus1=-999999233843014.3.0 phases=1 kV=0.069282 kW=0 kvar=0 model=1
New Load.382357E_0 Bus1=-99999943666749.2.0 phases=1 kV=0.069282 kW=0 kvar=0 model=1
New Load.382357E_1 Bus1=-99999943666749.3.0 phases=1 kV=0.069282 kW=0 kvar=0 model=1
New Load.5017508 Bus1=-99999918893726.1.0 phases=1 kV=0.069282 kW=0 kvar=0 model=1
New Load.2367079E_0 Bus1=-999999239709062.2.0 phases=1 kV=0.069282 kW=0 kvar=0 model=1
New Load.2367079E_1 Bus1=-999999239709062.3.0 phases=1 kV=0.069282 kW=0 kvar=0 model=1
New Load.4322529E_0 Bus1=-999999170146367.2.0 phases=1 kV=0.069282 kW=0 kvar=0 model=1
New Load.4322529E_1 Bus1=-999999170146367.3.0 phases=1 kV=0.069282 kW=0 kvar=0 model=1
New Load.1722516E_0 Bus1=-999999239709100.1.0 phases=1 kV=0.069282 kW=0 kvar=0 model=1
New Load.1722516E_1 Bus1=-999999239709100.2.0 phases=1 kV=0.069282 kW=0 kvar=0 model=1
New Load.4902565E_0 Bus1=-999999248056496.1.0 phases=1 kV=0.069282 kW=0 kvar=0 model=1
New Load.4902565E_1 Bus1=-999999248056496.2.0 phases=1 kV=0.069282 kW=0 kvar=0 model=1
New Load.2367145E_0 Bus1=-99999943666670.3.0 phases=1 kV=0.069282 kW=0 kvar=0 model=1
New Load.2367145E_1 Bus1=-99999943666670.1.0 phases=1 kV=0.069282 kW=0 kvar=0 model=1
New Load.5017511_0 Bus1=-99999918893997.2.0 phases=1 kV=0.069282 kW=0 kvar=0 model=1
New Load.5017511_1 Bus1=-99999918893997.3.0 phases=1 kV=0.069282 kW=0 kvar=0 model=1
New Load.1031042E_0 Bus1=-99999943666799.2.0 phases=1 kV=0.069282 kW=0 kvar=0 model=1
New Load.1031042E_1 Bus1=-99999943666799.3.0 phases=1 kV=0.069282 kW=0 kvar=0 model=1
New Load.5741484_0 Bus1=-999999226453201.1.0 phases=1 kV=0.159926 kW=0 kvar=0 model=1
New Load.5741484_1 Bus1=-999999226453201.2.0 phases=1 kV=0.159926 kW=0 kvar=0 model=1
New Load.5741484_2 Bus1=-999999226453201.3.0 phases=1 kV=0.159926 kW=0 kvar=0 model=1
New Load.1749936E_0 Bus1=-99999918895157.1.0 phases=1 kV=0.069282 kW=0 kvar=0 model=1
New Load.1749936E_1 Bus1=-99999918895157.2.0 phases=1 kV=0.069282 kW=0 kvar=0 model=1
New Load.5568214_0 Bus1=-99999995639461.1.0 phases=1 kV=0.159926 kW=0 kvar=0 model=1
New Load.5568214_1 Bus1=-99999995639461.2.0 phases=1 kV=0.159926 kW=0 kvar=0 model=1
New Load.5568214_2 Bus1=-99999995639461.3.0 phases=1 kV=0.159926 kW=0 kvar=0 model=1
New Load.1030759E_0 Bus1=-99999943666867.2.0 phases=1 kV=0.069282 kW=0 kvar=0 model=1
New Load.1030759E_1 Bus1=-99999943666867.3.0 phases=1 kV=0.069282 kW=0 kvar=0 model=1
New Load.5017506 Bus1=-99999918893577.2.0 phases=1 kV=0.069282 kW=0 kvar=0 model=1
New Load.5017515_0 Bus1=-99999918894385.3.0 phases=1 kV=0.069282 kW=0 kvar=0 model=1
New Load.5017515_1 Bus1=-99999918894385.1.0 phases=1 kV=0.069282 kW=0 kvar=0 model=1
New Load.5017521_0 Bus1=-99999918894457.3.0 phases=1 kV=0.069282 kW=0 kvar=0 model=1
New Load.5017521_1 Bus1=-99999918894457.1.0 phases=1 kV=0.069282 kW=0 kvar=0 model=1
New Load.5017516_0 Bus1=-99999918894313.3.0 phases=1 kV=0.069282 kW=0 kvar=0 model=1
New Load.5017516_1 Bus1=-99999918894313.1.0 phases=1 kV=0.069282 kW=0 kvar=0 model=1

! Generators
New Generator.SCE-25490_PHOTOVOLTAIC_0 Bus1=-99999918894601.1.0 phases=1 kV=0.069282 kW=0 kvar=0 model=7
New Generator.SCE-25490_PHOTOVOLTAIC_1 Bus1=-99999918894601.2.0 phases=1 kV=0.069282 kW=0 kvar=0 model=7
New Generator.NST-302802_PHOTOVOLTAIC_0 Bus1=-99999918894601.1.0 phases=1 kV=0.069282 kW=0 kvar=0 model=7
New Generator.NST-302802_PHOTOVOLTAIC_1 Bus1=-99999918894601.2.0 phases=1 kV=0.069282 kW=0 kvar=0 model=7

! Transformers
New Transformer.293588B38BFAEE34E0637F61810A7CE3_0_0 phases=1 windings=2 xhl=0.5 %R=0.353554 %imag=1e-06 %noloadloss=0
~ wdg=1 bus=95639461.1.2 kV=12 kVA=75 conn=delta
~ wdg=2 bus=-99999995639461.1.0 kV=0.159926 kVA=75 conn=wye
New Transformer.293588B38BFAEE34E0637F61810A7CE3_0_1 phases=1 windings=2 xhl=0.5 %R=0.353554 %imag=1e-06 %noloadloss=0
~ wdg=1 bus=95639461.2.3 kV=12 kVA=75 conn=delta
~ wdg=2 bus=-99999995639461.2.0 kV=0.159926 kVA=75 conn=wye
New Transformer.293588B38BFAEE34E0637F61810A7CE3_0_2 phases=1 windings=2 xhl=0.5 %R=0.353554 %imag=1e-06 %noloadloss=0
~ wdg=1 bus=95639461.3.1 kV=12 kVA=75 conn=delta
~ wdg=2 bus=-99999995639461.3.0 kV=0.159926 kVA=75 conn=wye
New Transformer.293588A54E1DEE34E0637F61810A7CE3_1_0 phases=1 windings=2 xhl=0.5 %R=0.353554 %imag=1e-06 %noloadloss=0
~ wdg=1 bus=43666867.2.0 kV=6.9282 kVA=12.5 conn=wye
~ wdg=2 bus=-99999943666867.2.0 kV=0.069282 kVA=12.5 conn=wye
New Transformer.293588A54E1DEE34E0637F61810A7CE3_1_1 phases=1 windings=2 xhl=0.5 %R=0.353554 %imag=1e-06 %noloadloss=0
~ wdg=1 bus=43666867.3.0 kV=6.9282 kVA=12.5 conn=wye
~ wdg=2 bus=-99999943666867.3.0 kV=0.069282 kVA=12.5 conn=wye
New Transformer.293588A54D47EE34E0637F61810A7CE3_2_0 phases=1 windings=2 xhl=0.5 %R=0.353554 %imag=1e-06 %noloadloss=0
~ wdg=1 bus=43666720.3.0 kV=6.9282 kVA=12.5 conn=wye
~ wdg=2 bus=-99999943666720.3.0 kV=0.069282 kVA=12.5 conn=wye
New Transformer.293588A54D47EE34E0637F61810A7CE3_2_1 phases=1 windings=2 xhl=0.5 %R=0.353554 %imag=1e-06 %noloadloss=0
~ wdg=1 bus=43666720.1.0 kV=6.9282 kVA=12.5 conn=wye
~ wdg=2 bus=-99999943666720.1.0 kV=0.069282 kVA=12.5 conn=wye
New Transformer.293588A4DBFFEE34E0637F61810A7CE3_3_0 phases=1 windings=2 xhl=0.5 %R=0.353554 %imag=1e-06 %noloadloss=0
~ wdg=1 bus=218176715.2.0 kV=6.9282 kVA=25 conn=wye
~ wdg=2 bus=-999999218176715.2.0 kV=1.38564 kVA=25 conn=wye
New Transformer.293588A4DBFFEE34E0637F61810A7CE3_3_1 phases=1 windings=2 xhl=0.5 %R=0.353554 %imag=1e-06 %noloadloss=0
~ wdg=1 bus=218176715.3.0 kV=6.9282 kVA=25 conn=wye
~ wdg=2 bus=-999999218176715.3.0 kV=1.38564 kVA=25 conn=wye
New Transformer.293588A5D7BEEE34E0637F61810A7CE3_4_0 phases=1 windings=2 xhl=0.5 %R=0.353554 %imag=1e-06 %noloadloss=0
~ wdg=1 bus=18895157.1.0 kV=6.9282 kVA=12.5 conn=wye
~ wdg=2 bus=-99999918895157.1.0 kV=0.069282 kVA=12.5 conn=wye
New Transformer.293588A5D7BEEE34E0637F61810A7CE3_4_1 phases=1 windings=2 xhl=0.5 %R=0.353554 %imag=1e-06 %noloadloss=0
~ wdg=1 bus=18895157.2.0 kV=6.9282 kVA=12.5 conn=wye
~ wdg=2 bus=-99999918895157.2.0 kV=0.069282 kVA=12.5 conn=wye
New Transformer.293588A5D7BDEE34E0637F61810A7CE3_5_0 phases=1 windings=2 xhl=0.5 %R=0.353554 %imag=1e-06 %noloadloss=0
~ wdg=1 bus=18892911.3.0 kV=6.9282 kVA=5 conn=wye
~ wdg=2 bus=-99999918892911.3.0 kV=0.069282 kVA=5 conn=wye
New Transformer.293588A5D7BDEE34E0637F61810A7CE3_5_1 phases=1 windings=2 xhl=0.5 %R=0.353554 %imag=1e-06 %noloadloss=0
~ wdg=1 bus=18892911.1.0 kV=6.9282 kVA=5 conn=wye
~ wdg=2 bus=-99999918892911.1.0 kV=0.069282 kVA=5 conn=wye
New Transformer.293588A95398EE34E0637F61810A7CE3_6_0 phases=1 windings=2 xhl=0.5 %R=0.353554 %imag=1e-06 %noloadloss=0
~ wdg=1 bus=170146367.2.0 kV=6.9282 kVA=12.5 conn=wye
~ wdg=2 bus=-999999170146367.2.0 kV=0.069282 kVA=12.5 conn=wye
New Transformer.293588A95398EE34E0637F61810A7CE3_6_1 phases=1 windings=2 xhl=0.5 %R=0.353554 %imag=1e-06 %noloadloss=0
~ wdg=1 bus=170146367.3.0 kV=6.9282 kVA=12.5 conn=wye
~ wdg=2 bus=-999999170146367.3.0 kV=0.069282 kVA=12.5 conn=wye
New Transformer.293588A71178EE34E0637F61810A7CE3_7_0 phases=1 windings=2 xhl=0.5 %R=0.353554 %imag=1e-06 %noloadloss=0
~ wdg=1 bus=239709100.1.0 kV=6.9282 kVA=12.5 conn=wye
~ wdg=2 bus=-999999239709100.1.0 kV=0.069282 kVA=12.5 conn=wye
New Transformer.293588A71178EE34E0637F61810A7CE3_7_1 phases=1 windings=2 xhl=0.5 %R=0.353554 %imag=1e-06 %noloadloss=0
~ wdg=1 bus=239709100.2.0 kV=6.9282 kVA=12.5 conn=wye
~ wdg=2 bus=-999999239709100.2.0 kV=0.069282 kVA=12.5 conn=wye
New Transformer.293588A45054EE34E0637F61810A7CE3_8_0 phases=1 windings=2 xhl=0.5 %R=0.353554 %imag=1e-06 %noloadloss=0
~ wdg=1 bus=19809480.3.0 kV=6.9282 kVA=12.5 conn=wye
~ wdg=2 bus=-99999919809480.3.0 kV=0.069282 kVA=12.5 conn=wye
New Transformer.293588A45054EE34E0637F61810A7CE3_8_1 phases=1 windings=2 xhl=0.5 %R=0.353554 %imag=1e-06 %noloadloss=0
~ wdg=1 bus=19809480.1.0 kV=6.9282 kVA=12.5 conn=wye
~ wdg=2 bus=-99999919809480.1.0 kV=0.069282 kVA=12.5 conn=wye
New Transformer.293588B4036FEE34E0637F61810A7CE3_9_0 phases=1 windings=2 xhl=0.5 %R=0.353554 %imag=1e-06 %noloadloss=0
~ wdg=1 bus=151630664.1.0 kV=6.9282 kVA=75 conn=wye
~ wdg=2 bus=-999999151630664.1.0 kV=0.159926 kVA=75 conn=wye
New Transformer.293588B0E20EEE34E0637F61810A7CE3_10_0 phases=1 windings=2 xhl=0.5 %R=0.353554 %imag=1e-06 %noloadloss=0
~ wdg=1 bus=18894313.3.0 kV=6.9282 kVA=37.5 conn=wye
~ wdg=2 bus=-99999918894313.3.0 kV=0.069282 kVA=37.5 conn=wye
New Transformer.293588B0E20EEE34E0637F61810A7CE3_10_1 phases=1 windings=2 xhl=0.5 %R=0.353554 %imag=1e-06 %noloadloss=0
~ wdg=1 bus=18894313.1.0 kV=6.9282 kVA=37.5 conn=wye
~ wdg=2 bus=-99999918894313.1.0 kV=0.069282 kVA=37.5 conn=wye
New Transformer.293588A54E1AEE34E0637F61810A7CE3_11_0 phases=1 windings=2 xhl=0.5 %R=0.353554 %imag=1e-06 %noloadloss=0
~ wdg=1 bus=43666749.2.0 kV=6.9282 kVA=18.75 conn=wye
~ wdg=2 bus=-99999943666749.2.0 kV=0.069282 kVA=18.75 conn=wye
New Transformer.293588A54E1AEE34E0637F61810A7CE3_11_1 phases=1 windings=2 xhl=0.5 %R=0.353554 %imag=1e-06 %noloadloss=0
~ wdg=1 bus=43666749.3.0 kV=6.9282 kVA=18.75 conn=wye
~ wdg=2 bus=-99999943666749.3.0 kV=0.069282 kVA=18.75 conn=wye
New Transformer.293588A54E1BEE34E0637F61810A7CE3_12_0 phases=1 windings=2 xhl=0.5 %R=0.353554 %imag=1e-06 %noloadloss=0
~ wdg=1 bus=43666774.2.0 kV=6.9282 kVA=18.75 conn=wye
~ wdg=2 bus=-99999943666774.2.0 kV=0.069282 kVA=18.75 conn=wye
New Transformer.293588A54E1BEE34E0637F61810A7CE3_12_1 phases=1 windings=2 xhl=0.5 %R=0.353554 %imag=1e-06 %noloadloss=0
~ wdg=1 bus=43666774.3.0 kV=6.9282 kVA=18.75 conn=wye
~ wdg=2 bus=-99999943666774.3.0 kV=0.069282 kVA=18.75 conn=wye
New Transformer.293588A54D45EE34E0637F61810A7CE3_13_0 phases=1 windings=2 xhl=0.5 %R=0.353554 %imag=1e-06 %noloadloss=0
~ wdg=1 bus=43666670.3.0 kV=6.9282 kVA=7.5 conn=wye
~ wdg=2 bus=-99999943666670.3.0 kV=0.069282 kVA=7.5 conn=wye
New Transformer.293588A54D45EE34E0637F61810A7CE3_13_1 phases=1 windings=2 xhl=0.5 %R=0.353554 %imag=1e-06 %noloadloss=0
~ wdg=1 bus=43666670.1.0 kV=6.9282 kVA=7.5 conn=wye
~ wdg=2 bus=-99999943666670.1.0 kV=0.069282 kVA=7.5 conn=wye
New Transformer.293588A54D41EE34E0637F61810A7CE3_14_0 phases=1 windings=2 xhl=0.5 %R=0.353554 %imag=1e-06 %noloadloss=0
~ wdg=1 bus=43666545.1.0 kV=6.9282 kVA=12.5 conn=wye
~ wdg=2 bus=-99999943666545.1.0 kV=0.069282 kVA=12.5 conn=wye
New Transformer.293588A54D41EE34E0637F61810A7CE3_14_1 phases=1 windings=2 xhl=0.5 %R=0.353554 %imag=1e-06 %noloadloss=0
~ wdg=1 bus=43666545.2.0 kV=6.9282 kVA=12.5 conn=wye
~ wdg=2 bus=-99999943666545.2.0 kV=0.069282 kVA=12.5 conn=wye
New Transformer.293588A54E1FEE34E0637F61810A7CE3_15_0 phases=1 windings=2 xhl=0.5 %R=0.353554 %imag=1e-06 %noloadloss=0
~ wdg=1 bus=43666917.1.0 kV=6.9282 kVA=25 conn=wye
~ wdg=2 bus=-99999943666917.1.0 kV=0.069282 kVA=25 conn=wye
New Transformer.293588A54E1FEE34E0637F61810A7CE3_15_1 phases=1 windings=2 xhl=0.5 %R=0.353554 %imag=1e-06 %noloadloss=0
~ wdg=1 bus=43666917.2.0 kV=6.9282 kVA=25 conn=wye
~ wdg=2 bus=-99999943666917.2.0 kV=0.069282 kVA=25 conn=wye
New Transformer.293588B0E1DAEE34E0637F61810A7CE3_16_0 phases=1 windings=2 xhl=0.5 %R=0.353554 %imag=1e-06 %noloadloss=0
~ wdg=1 bus=18893505.1.0 kV=6.9282 kVA=75 conn=wye
~ wdg=2 bus=-99999918893505.1.0 kV=0.069282 kVA=75 conn=wye
New Transformer.293588A54E1CEE34E0637F61810A7CE3_17_0 phases=1 windings=2 xhl=0.5 %R=0.353554 %imag=1e-06 %noloadloss=0
~ wdg=1 bus=43666799.2.0 kV=6.9282 kVA=12.5 conn=wye
~ wdg=2 bus=-99999943666799.2.0 kV=0.069282 kVA=12.5 conn=wye
New Transformer.293588A54E1CEE34E0637F61810A7CE3_17_1 phases=1 windings=2 xhl=0.5 %R=0.353554 %imag=1e-06 %noloadloss=0
~ wdg=1 bus=43666799.3.0 kV=6.9282 kVA=12.5 conn=wye
~ wdg=2 bus=-99999943666799.3.0 kV=0.069282 kVA=12.5 conn=wye
New Transformer.293588B4CE47EE34E0637F61810A7CE3_18_0 phases=1 windings=2 xhl=0.5 %R=0.353554 %imag=1e-06 %noloadloss=0
~ wdg=1 bus=226453201.1.2 kV=12 kVA=833.333 conn=delta
~ wdg=2 bus=-999999226453201.1.0 kV=0.159926 kVA=833.333 conn=wye
New Transformer.293588B4CE47EE34E0637F61810A7CE3_18_1 phases=1 windings=2 xhl=0.5 %R=0.353554 %imag=1e-06 %noloadloss=0
~ wdg=1 bus=226453201.2.3 kV=12 kVA=833.333 conn=delta
~ wdg=2 bus=-999999226453201.2.0 kV=0.159926 kVA=833.333 conn=wye
New Transformer.293588B4CE47EE34E0637F61810A7CE3_18_2 phases=1 windings=2 xhl=0.5 %R=0.353554 %imag=1e-06 %noloadloss=0
~ wdg=1 bus=226453201.3.1 kV=12 kVA=833.333 conn=delta
~ wdg=2 bus=-999999226453201.3.0 kV=0.159926 kVA=833.333 conn=wye
New Transformer.293588B0E1D9EE34E0637F61810A7CE3_19_0 phases=1 windings=2 xhl=0.5 %R=0.353554 %imag=1e-06 %noloadloss=0
~ wdg=1 bus=18893374.1.2 kV=12 kVA=833.333 conn=delta
~ wdg=2 bus=-99999918893374.1.0 kV=0.159926 kVA=833.333 conn=wye
New Transformer.293588B0E1D9EE34E0637F61810A7CE3_19_1 phases=1 windings=2 xhl=0.5 %R=0.353554 %imag=1e-06 %noloadloss=0
~ wdg=1 bus=18893374.2.3 kV=12 kVA=833.333 conn=delta
~ wdg=2 bus=-99999918893374.2.0 kV=0.159926 kVA=833.333 conn=wye
New Transformer.293588B0E1D9EE34E0637F61810A7CE3_19_2 phases=1 windings=2 xhl=0.5 %R=0.353554 %imag=1e-06 %noloadloss=0
~ wdg=1 bus=18893374.3.1 kV=12 kVA=833.333 conn=delta
~ wdg=2 bus=-99999918893374.3.0 kV=0.159926 kVA=833.333 conn=wye
New Transformer.293588B0E1DBEE34E0637F61810A7CE3_20_0 phases=1 windings=2 xhl=0.5 %R=0.353554 %imag=1e-06 %noloadloss=0
~ wdg=1 bus=18893577.2.0 kV=6.9282 kVA=100 conn=wye
~ wdg=2 bus=-99999918893577.2.0 kV=0.069282 kVA=100 conn=wye
New Transformer.293588A594BEEE34E0637F61810A7CE3_21_0 phases=1 windings=2 xhl=0.5 %R=0.353554 %imag=1e-06 %noloadloss=0
~ wdg=1 bus=236674901.2.0 kV=6.9282 kVA=25 conn=wye
~ wdg=2 bus=-999999236674901.2.0 kV=0.069282 kVA=25 conn=wye
New Transformer.293588A594BEEE34E0637F61810A7CE3_21_1 phases=1 windings=2 xhl=0.5 %R=0.353554 %imag=1e-06 %noloadloss=0
~ wdg=1 bus=236674901.3.0 kV=6.9282 kVA=25 conn=wye
~ wdg=2 bus=-999999236674901.3.0 kV=0.069282 kVA=25 conn=wye
New Transformer.293588B0E1D7EE34E0637F61810A7CE3_22_0 phases=1 windings=2 xhl=0.5 %R=0.353554 %imag=1e-06 %noloadloss=0
~ wdg=1 bus=18893054.2.0 kV=6.9282 kVA=75 conn=wye
~ wdg=2 bus=-99999918893054.2.0 kV=0.159926 kVA=75 conn=wye
New Transformer.293588A865DFEE34E0637F61810A7CE3_23_0 phases=1 windings=2 xhl=0.5 %R=0.353554 %imag=1e-06 %noloadloss=0
~ wdg=1 bus=239709062.2.0 kV=6.9282 kVA=25 conn=wye
~ wdg=2 bus=-999999239709062.2.0 kV=0.069282 kVA=25 conn=wye
New Transformer.293588A865DFEE34E0637F61810A7CE3_23_1 phases=1 windings=2 xhl=0.5 %R=0.353554 %imag=1e-06 %noloadloss=0
~ wdg=1 bus=239709062.3.0 kV=6.9282 kVA=25 conn=wye
~ wdg=2 bus=-999999239709062.3.0 kV=0.069282 kVA=25 conn=wye
New Transformer.293588A45053EE34E0637F61810A7CE3_24_0 phases=1 windings=2 xhl=0.5 %R=0.353554 %imag=1e-06 %noloadloss=0
~ wdg=1 bus=19809455.1.0 kV=6.9282 kVA=25 conn=wye
~ wdg=2 bus=-99999919809455.1.0 kV=0.069282 kVA=25 conn=wye
New Transformer.293588A45053EE34E0637F61810A7CE3_24_1 phases=1 windings=2 xhl=0.5 %R=0.353554 %imag=1e-06 %noloadloss=0
~ wdg=1 bus=19809455.2.0 kV=6.9282 kVA=25 conn=wye
~ wdg=2 bus=-99999919809455.2.0 kV=0.069282 kVA=25 conn=wye
New Transformer.293588B0E1DCEE34E0637F61810A7CE3_25_0 phases=1 windings=2 xhl=0.5 %R=0.353554 %imag=1e-06 %noloadloss=0
~ wdg=1 bus=18893654.3.0 kV=6.9282 kVA=50 conn=wye
~ wdg=2 bus=-99999918893654.3.0 kV=0.069282 kVA=50 conn=wye
New Transformer.293588A54D3FEE34E0637F61810A7CE3_26_0 phases=1 windings=2 xhl=0.5 %R=0.353554 %imag=1e-06 %noloadloss=0
~ wdg=1 bus=43666491.2.0 kV=6.9282 kVA=12.5 conn=wye
~ wdg=2 bus=-99999943666491.2.0 kV=0.069282 kVA=12.5 conn=wye
New Transformer.293588A54D3FEE34E0637F61810A7CE3_26_1 phases=1 windings=2 xhl=0.5 %R=0.353554 %imag=1e-06 %noloadloss=0
~ wdg=1 bus=43666491.3.0 kV=6.9282 kVA=12.5 conn=wye
~ wdg=2 bus=-99999943666491.3.0 kV=0.069282 kVA=12.5 conn=wye
New Transformer.293588B0E215EE34E0637F61810A7CE3_27_0 phases=1 windings=2 xhl=0.5 %R=0.353554 %imag=1e-06 %noloadloss=0
~ wdg=1 bus=18895071.3.0 kV=6.9282 kVA=100 conn=wye
~ wdg=2 bus=-99999918895071.3.0 kV=0.069282 kVA=100 conn=wye
New Transformer.293588B47245EE34E0637F61810A7CE3_28_0 phases=1 windings=2 xhl=0.5 %R=0.353554 %imag=1e-06 %noloadloss=0
~ wdg=1 bus=182347563.1.0 kV=6.9282 kVA=75 conn=wye
~ wdg=2 bus=-999999182347563.1.0 kV=0.069282 kVA=75 conn=wye
New Transformer.293588B0E1D8EE34E0637F61810A7CE3_29_0 phases=1 windings=2 xhl=0.5 %R=0.353554 %imag=1e-06 %noloadloss=0
~ wdg=1 bus=18893326.1.2 kV=12 kVA=166.667 conn=delta
~ wdg=2 bus=-99999918893326.1.0 kV=0.159926 kVA=166.667 conn=wye
New Transformer.293588B0E1D8EE34E0637F61810A7CE3_29_1 phases=1 windings=2 xhl=0.5 %R=0.353554 %imag=1e-06 %noloadloss=0
~ wdg=1 bus=18893326.2.3 kV=12 kVA=166.667 conn=delta
~ wdg=2 bus=-99999918893326.2.0 kV=0.159926 kVA=166.667 conn=wye
New Transformer.293588B0E1D8EE34E0637F61810A7CE3_29_2 phases=1 windings=2 xhl=0.5 %R=0.353554 %imag=1e-06 %noloadloss=0
~ wdg=1 bus=18893326.3.1 kV=12 kVA=166.667 conn=delta
~ wdg=2 bus=-99999918893326.3.0 kV=0.159926 kVA=166.667 conn=wye
New Transformer.293588B0E1DDEE34E0637F61810A7CE3_30_0 phases=1 windings=2 xhl=0.5 %R=0.353554 %imag=1e-06 %noloadloss=0
~ wdg=1 bus=18893726.1.0 kV=6.9282 kVA=75 conn=wye
~ wdg=2 bus=-99999918893726.1.0 kV=0.069282 kVA=75 conn=wye
New Transformer.293588B0E1E0EE34E0637F61810A7CE3_31_0 phases=1 windings=2 xhl=0.5 %R=0.353554 %imag=1e-06 %noloadloss=0
~ wdg=1 bus=18893997.2.0 kV=6.9282 kVA=37.5 conn=wye
~ wdg=2 bus=-99999918893997.2.0 kV=0.069282 kVA=37.5 conn=wye
New Transformer.293588B0E1E0EE34E0637F61810A7CE3_31_1 phases=1 windings=2 xhl=0.5 %R=0.353554 %imag=1e-06 %noloadloss=0
~ wdg=1 bus=18893997.3.0 kV=6.9282 kVA=37.5 conn=wye
~ wdg=2 bus=-99999918893997.3.0 kV=0.069282 kVA=37.5 conn=wye
New Transformer.293588B0E212EE34E0637F61810A7CE3_32_0 phases=1 windings=2 xhl=0.5 %R=0.353554 %imag=1e-06 %noloadloss=0
~ wdg=1 bus=18894601.1.0 kV=6.9282 kVA=25 conn=wye
~ wdg=2 bus=-99999918894601.1.0 kV=0.069282 kVA=25 conn=wye
New Transformer.293588B0E212EE34E0637F61810A7CE3_32_1 phases=1 windings=2 xhl=0.5 %R=0.353554 %imag=1e-06 %noloadloss=0
~ wdg=1 bus=18894601.2.0 kV=6.9282 kVA=25 conn=wye
~ wdg=2 bus=-99999918894601.2.0 kV=0.069282 kVA=25 conn=wye
New Transformer.293588A54E1EEE34E0637F61810A7CE3_33_0 phases=1 windings=2 xhl=0.5 %R=0.353554 %imag=1e-06 %noloadloss=0
~ wdg=1 bus=43666892.1.2 kV=12 kVA=33.3333 conn=delta
~ wdg=2 bus=-99999943666892.1.2 kV=0.069282 kVA=33.3333 conn=delta
New Transformer.293588A54E1EEE34E0637F61810A7CE3_33_1 phases=1 windings=2 xhl=0.5 %R=0.353554 %imag=1e-06 %noloadloss=0
~ wdg=1 bus=43666892.2.3 kV=12 kVA=33.3333 conn=delta
~ wdg=2 bus=-99999943666892.2.3 kV=0.069282 kVA=33.3333 conn=delta
New Transformer.293588A54E1EEE34E0637F61810A7CE3_33_2 phases=1 windings=2 xhl=0.5 %R=0.353554 %imag=1e-06 %noloadloss=0
~ wdg=1 bus=43666892.3.1 kV=12 kVA=33.3333 conn=delta
~ wdg=2 bus=-99999943666892.3.1 kV=0.069282 kVA=33.3333 conn=delta
New Transformer.293588A54E21EE34E0637F61810A7CE3_34_0 phases=1 windings=2 xhl=0.5 %R=0.353554 %imag=1e-06 %noloadloss=0
~ wdg=1 bus=43667046.2.0 kV=6.9282 kVA=12.5 conn=wye
~ wdg=2 bus=-99999943667046.2.0 kV=0.069282 kVA=12.5 conn=wye
New Transformer.293588A54E21EE34E0637F61810A7CE3_34_1 phases=1 windings=2 xhl=0.5 %R=0.353554 %imag=1e-06 %noloadloss=0
~ wdg=1 bus=43667046.3.0 kV=6.9282 kVA=12.5 conn=wye
~ wdg=2 bus=-99999943667046.3.0 kV=0.069282 kVA=12.5 conn=wye
New Transformer.293588B0E20FEE34E0637F61810A7CE3_35_0 phases=1 windings=2 xhl=0.5 %R=0.353554 %imag=1e-06 %noloadloss=0
~ wdg=1 bus=18894385.3.0 kV=6.9282 kVA=50 conn=wye
~ wdg=2 bus=-99999918894385.3.0 kV=0.069282 kVA=50 conn=wye
New Transformer.293588B0E20FEE34E0637F61810A7CE3_35_1 phases=1 windings=2 xhl=0.5 %R=0.353554 %imag=1e-06 %noloadloss=0
~ wdg=1 bus=18894385.1.0 kV=6.9282 kVA=50 conn=wye
~ wdg=2 bus=-99999918894385.1.0 kV=0.069282 kVA=50 conn=wye
New Transformer.293588B0E210EE34E0637F61810A7CE3_36_0 phases=1 windings=2 xhl=0.5 %R=0.353554 %imag=1e-06 %noloadloss=0
~ wdg=1 bus=18894457.3.0 kV=6.9282 kVA=25 conn=wye
~ wdg=2 bus=-99999918894457.3.0 kV=0.069282 kVA=25 conn=wye
New Transformer.293588B0E210EE34E0637F61810A7CE3_36_1 phases=1 windings=2 xhl=0.5 %R=0.353554 %imag=1e-06 %noloadloss=0
~ wdg=1 bus=18894457.1.0 kV=6.9282 kVA=25 conn=wye
~ wdg=2 bus=-99999918894457.1.0 kV=0.069282 kVA=25 conn=wye
New Transformer.293588A71ADBEE34E0637F61810A7CE3_37_0 phases=1 windings=2 xhl=0.5 %R=0.353554 %imag=1e-06 %noloadloss=0
~ wdg=1 bus=233842936.2.0 kV=6.9282 kVA=18.75 conn=wye
~ wdg=2 bus=-999999233842936.2.0 kV=0.069282 kVA=18.75 conn=wye
New Transformer.293588A71ADBEE34E0637F61810A7CE3_37_1 phases=1 windings=2 xhl=0.5 %R=0.353554 %imag=1e-06 %noloadloss=0
~ wdg=1 bus=233842936.3.0 kV=6.9282 kVA=18.75 conn=wye
~ wdg=2 bus=-999999233842936.3.0 kV=0.069282 kVA=18.75 conn=wye
New Transformer.293588A71ADCEE34E0637F61810A7CE3_38_0 phases=1 windings=2 xhl=0.5 %R=0.353554 %imag=1e-06 %noloadloss=0
~ wdg=1 bus=233842975.2.0 kV=6.9282 kVA=12.5 conn=wye
~ wdg=2 bus=-999999233842975.2.0 kV=0.069282 kVA=12.5 conn=wye
New Transformer.293588A71ADCEE34E0637F61810A7CE3_38_1 phases=1 windings=2 xhl=0.5 %R=0.353554 %imag=1e-06 %noloadloss=0
~ wdg=1 bus=233842975.3.0 kV=6.9282 kVA=12.5 conn=wye
~ wdg=2 bus=-999999233842975.3.0 kV=0.069282 kVA=12.5 conn=wye
New Transformer.293588A71ADDEE34E0637F61810A7CE3_39_0 phases=1 windings=2 xhl=0.5 %R=0.353554 %imag=1e-06 %noloadloss=0
~ wdg=1 bus=233843014.2.0 kV=6.9282 kVA=12.5 conn=wye
~ wdg=2 bus=-999999233843014.2.0 kV=0.069282 kVA=12.5 conn=wye
New Transformer.293588A71ADDEE34E0637F61810A7CE3_39_1 phases=1 windings=2 xhl=0.5 %R=0.353554 %imag=1e-06 %noloadloss=0
~ wdg=1 bus=233843014.3.0 kV=6.9282 kVA=12.5 conn=wye
~ wdg=2 bus=-999999233843014.3.0 kV=0.069282 kVA=12.5 conn=wye
New Transformer.293588B0E211EE34E0637F61810A7CE3_40_0 phases=1 windings=2 xhl=0.5 %R=0.353554 %imag=1e-06 %noloadloss=0
~ wdg=1 bus=18894529.3.0 kV=6.9282 kVA=37.5 conn=wye
~ wdg=2 bus=-99999918894529.3.0 kV=0.069282 kVA=37.5 conn=wye
New Transformer.293588B0E211EE34E0637F61810A7CE3_40_1 phases=1 windings=2 xhl=0.5 %R=0.353554 %imag=1e-06 %noloadloss=0
~ wdg=1 bus=18894529.1.0 kV=6.9282 kVA=37.5 conn=wye
~ wdg=2 bus=-99999918894529.1.0 kV=0.069282 kVA=37.5 conn=wye
New Transformer.293588B0E20CEE34E0637F61810A7CE3_41_0 phases=1 windings=2 xhl=0.5 %R=0.353554 %imag=1e-06 %noloadloss=0
~ wdg=1 bus=18894169.3.0 kV=6.9282 kVA=50 conn=wye
~ wdg=2 bus=-99999918894169.3.0 kV=0.069282 kVA=50 conn=wye
New Transformer.293588B0E20CEE34E0637F61810A7CE3_41_1 phases=1 windings=2 xhl=0.5 %R=0.353554 %imag=1e-06 %noloadloss=0
~ wdg=1 bus=18894169.1.0 kV=6.9282 kVA=50 conn=wye
~ wdg=2 bus=-99999918894169.1.0 kV=0.069282 kVA=50 conn=wye
New Transformer.293588A54E20EE34E0637F61810A7CE3_42_0 phases=1 windings=2 xhl=0.5 %R=0.353554 %imag=1e-06 %noloadloss=0
~ wdg=1 bus=43667021.2.0 kV=6.9282 kVA=25 conn=wye
~ wdg=2 bus=-99999943667021.2.0 kV=0.069282 kVA=25 conn=wye
New Transformer.293588A54E20EE34E0637F61810A7CE3_42_1 phases=1 windings=2 xhl=0.5 %R=0.353554 %imag=1e-06 %noloadloss=0
~ wdg=1 bus=43667021.3.0 kV=6.9282 kVA=25 conn=wye
~ wdg=2 bus=-99999943667021.3.0 kV=0.069282 kVA=25 conn=wye
New Transformer.293588A54D43EE34E0637F61810A7CE3_43_0 phases=1 windings=2 xhl=0.5 %R=0.353554 %imag=1e-06 %noloadloss=0
~ wdg=1 bus=43666620.1.0 kV=6.9282 kVA=12.5 conn=wye
~ wdg=2 bus=-99999943666620.1.0 kV=0.069282 kVA=12.5 conn=wye
New Transformer.293588A54D43EE34E0637F61810A7CE3_43_1 phases=1 windings=2 xhl=0.5 %R=0.353554 %imag=1e-06 %noloadloss=0
~ wdg=1 bus=43666620.2.0 kV=6.9282 kVA=12.5 conn=wye
~ wdg=2 bus=-99999943666620.2.0 kV=0.069282 kVA=12.5 conn=wye
New Transformer.293588B0E1D6EE34E0637F61810A7CE3_44_0 phases=1 windings=2 xhl=0.5 %R=0.353554 %imag=1e-06 %noloadloss=0
~ wdg=1 bus=18892969.1.0 kV=6.9282 kVA=25 conn=wye
~ wdg=2 bus=-99999918892969.1.0 kV=0.069282 kVA=25 conn=wye
New Transformer.293588B0E1D6EE34E0637F61810A7CE3_44_1 phases=1 windings=2 xhl=0.5 %R=0.353554 %imag=1e-06 %noloadloss=0
~ wdg=1 bus=18892969.2.0 kV=6.9282 kVA=25 conn=wye
~ wdg=2 bus=-99999918892969.2.0 kV=0.069282 kVA=25 conn=wye
New Transformer.293588B446B8EE34E0637F61810A7CE3_45_0 phases=1 windings=2 xhl=0.5 %R=0.353554 %imag=1e-06 %noloadloss=0
~ wdg=1 bus=164478999.1.0 kV=6.9282 kVA=37.5 conn=wye
~ wdg=2 bus=-999999164478999.1.0 kV=0.069282 kVA=37.5 conn=wye
New Transformer.293588B446B8EE34E0637F61810A7CE3_45_1 phases=1 windings=2 xhl=0.5 %R=0.353554 %imag=1e-06 %noloadloss=0
~ wdg=1 bus=164478999.2.0 kV=6.9282 kVA=37.5 conn=wye
~ wdg=2 bus=-999999164478999.2.0 kV=0.069282 kVA=37.5 conn=wye
New Transformer.293588A4327DEE34E0637F61810A7CE3_46_0 phases=1 windings=2 xhl=0.5 %R=0.353554 %imag=1e-06 %noloadloss=0
~ wdg=1 bus=248056496.1.0 kV=6.9282 kVA=12.5 conn=wye
~ wdg=2 bus=-999999248056496.1.0 kV=0.069282 kVA=12.5 conn=wye
New Transformer.293588A4327DEE34E0637F61810A7CE3_46_1 phases=1 windings=2 xhl=0.5 %R=0.353554 %imag=1e-06 %noloadloss=0
~ wdg=1 bus=248056496.2.0 kV=6.9282 kVA=12.5 conn=wye
~ wdg=2 bus=-999999248056496.2.0 kV=0.069282 kVA=12.5 conn=wye
New Transformer.3369D9BF341D2CCFE0637F61810AE8FE_47_0 phases=1 windings=2 xhl=0.5 %R=0.353554 %imag=1e-06 %noloadloss=0
~ wdg=1 bus=283807134.3.0 kV=6.9282 kVA=25 conn=wye
~ wdg=2 bus=-999999283807134.3.0 kV=0.069282 kVA=25 conn=wye
New Transformer.3369D9BF341D2CCFE0637F61810AE8FE_47_1 phases=1 windings=2 xhl=0.5 %R=0.353554 %imag=1e-06 %noloadloss=0
~ wdg=1 bus=283807134.1.0 kV=6.9282 kVA=25 conn=wye
~ wdg=2 bus=-999999283807134.1.0 kV=0.069282 kVA=25 conn=wye
New Transformer.293588A7F5CCEE34E0637F61810A7CE3_48_0 phases=1 windings=2 xhl=0.5 %R=0.353554 %imag=1e-06 %noloadloss=0
~ wdg=1 bus=244670937.3.0 kV=6.9282 kVA=25 conn=wye
~ wdg=2 bus=-999999244670937.3.0 kV=0.069282 kVA=25 conn=wye
New Transformer.293588A7F5CCEE34E0637F61810A7CE3_48_1 phases=1 windings=2 xhl=0.5 %R=0.353554 %imag=1e-06 %noloadloss=0
~ wdg=1 bus=244670937.1.0 kV=6.9282 kVA=25 conn=wye
~ wdg=2 bus=-999999244670937.1.0 kV=0.069282 kVA=25 conn=wye
New Transformer.293588A746F7EE34E0637F61810A7CE3_49_0 phases=1 windings=2 xhl=0.5 %R=0.353554 %imag=1e-06 %noloadloss=0
~ wdg=1 bus=237009641.1.0 kV=6.9282 kVA=12.5 conn=wye
~ wdg=2 bus=-999999237009641.1.0 kV=0.069282 kVA=12.5 conn=wye
New Transformer.293588A746F7EE34E0637F61810A7CE3_49_1 phases=1 windings=2 xhl=0.5 %R=0.353554 %imag=1e-06 %noloadloss=0
~ wdg=1 bus=237009641.2.0 kV=6.9282 kVA=12.5 conn=wye
~ wdg=2 bus=-999999237009641.2.0 kV=0.069282 kVA=12.5 conn=wye
New Transformer.293588A54D40EE34E0637F61810A7CE3_50_0 phases=1 windings=2 xhl=0.5 %R=0.353554 %imag=1e-06 %noloadloss=0
~ wdg=1 bus=43666520.1.0 kV=6.9282 kVA=18.75 conn=wye
~ wdg=2 bus=-99999943666520.1.0 kV=0.069282 kVA=18.75 conn=wye
New Transformer.293588A54D40EE34E0637F61810A7CE3_50_1 phases=1 windings=2 xhl=0.5 %R=0.353554 %imag=1e-06 %noloadloss=0
~ wdg=1 bus=43666520.2.0 kV=6.9282 kVA=18.75 conn=wye
~ wdg=2 bus=-99999943666520.2.0 kV=0.069282 kVA=18.75 conn=wye
New Transformer.293588B0E20DEE34E0637F61810A7CE3_51_0 phases=1 windings=2 xhl=0.5 %R=0.353554 %imag=1e-06 %noloadloss=0
~ wdg=1 bus=18894241.3.0 kV=6.9282 kVA=25 conn=wye
~ wdg=2 bus=-99999918894241.3.0 kV=0.069282 kVA=25 conn=wye
New Transformer.293588B0E20DEE34E0637F61810A7CE3_51_1 phases=1 windings=2 xhl=0.5 %R=0.353554 %imag=1e-06 %noloadloss=0
~ wdg=1 bus=18894241.1.0 kV=6.9282 kVA=25 conn=wye
~ wdg=2 bus=-99999918894241.1.0 kV=0.069282 kVA=25 conn=wye
New Transformer.293588B0E213EE34E0637F61810A7CE3_52_0 phases=1 windings=2 xhl=0.5 %R=0.353554 %imag=1e-06 %noloadloss=0
~ wdg=1 bus=18894927.1.0 kV=6.9282 kVA=12.5 conn=wye
~ wdg=2 bus=-99999918894927.1.0 kV=0.069282 kVA=12.5 conn=wye
New Transformer.293588B0E213EE34E0637F61810A7CE3_52_1 phases=1 windings=2 xhl=0.5 %R=0.353554 %imag=1e-06 %noloadloss=0
~ wdg=1 bus=18894927.2.0 kV=6.9282 kVA=12.5 conn=wye
~ wdg=2 bus=-99999918894927.2.0 kV=0.069282 kVA=12.5 conn=wye
New Transformer.293588B0E214EE34E0637F61810A7CE3_53_0 phases=1 windings=2 xhl=0.5 %R=0.353554 %imag=1e-06 %noloadloss=0
~ wdg=1 bus=18894999.1.0 kV=6.9282 kVA=12.5 conn=wye
~ wdg=2 bus=-99999918894999.1.0 kV=0.069282 kVA=12.5 conn=wye
New Transformer.293588B0E214EE34E0637F61810A7CE3_53_1 phases=1 windings=2 xhl=0.5 %R=0.353554 %imag=1e-06 %noloadloss=0
~ wdg=1 bus=18894999.2.0 kV=6.9282 kVA=12.5 conn=wye
~ wdg=2 bus=-99999918894999.2.0 kV=0.069282 kVA=12.5 conn=wye
New Transformer.293588B0E1DFEE34E0637F61810A7CE3_54_0 phases=1 windings=2 xhl=0.5 %R=0.353554 %imag=1e-06 %noloadloss=0
~ wdg=1 bus=18893925.1.0 kV=6.9282 kVA=37.5 conn=wye
~ wdg=2 bus=-99999918893925.1.0 kV=0.069282 kVA=37.5 conn=wye
New Transformer.293588B0E1DFEE34E0637F61810A7CE3_54_1 phases=1 windings=2 xhl=0.5 %R=0.353554 %imag=1e-06 %noloadloss=0
~ wdg=1 bus=18893925.2.0 kV=6.9282 kVA=37.5 conn=wye
~ wdg=2 bus=-99999918893925.2.0 kV=0.069282 kVA=37.5 conn=wye
New Transformer.293588B47246EE34E0637F61810A7CE3_55_0 phases=1 windings=2 xhl=0.5 %R=0.353554 %imag=1e-06 %noloadloss=0
~ wdg=1 bus=182347651.3.0 kV=6.9282 kVA=37.5 conn=wye
~ wdg=2 bus=-999999182347651.3.0 kV=0.069282 kVA=37.5 conn=wye
New Transformer.293588B47246EE34E0637F61810A7CE3_55_1 phases=1 windings=2 xhl=0.5 %R=0.353554 %imag=1e-06 %noloadloss=0
~ wdg=1 bus=182347651.1.0 kV=6.9282 kVA=37.5 conn=wye
~ wdg=2 bus=-999999182347651.1.0 kV=0.069282 kVA=37.5 conn=wye
New Transformer.293588B0E1DEEE34E0637F61810A7CE3_56_0 phases=1 windings=2 xhl=0.5 %R=0.353554 %imag=1e-06 %noloadloss=0
~ wdg=1 bus=18893848.2.0 kV=6.9282 kVA=50 conn=wye
~ wdg=2 bus=-99999918893848.2.0 kV=0.069282 kVA=50 conn=wye
New Transformer.293588B0E1DEEE34E0637F61810A7CE3_56_1 phases=1 windings=2 xhl=0.5 %R=0.353554 %imag=1e-06 %noloadloss=0
~ wdg=1 bus=18893848.3.0 kV=6.9282 kVA=50 conn=wye
~ wdg=2 bus=-99999918893848.3.0 kV=0.069282 kVA=50 conn=wye
New Transformer.293588A71AF3EE34E0637F61810A7CE3_57_0 phases=1 windings=2 xhl=0.5 %R=0.353554 %imag=1e-06 %noloadloss=0
~ wdg=1 bus=229649093.1.0 kV=6.9282 kVA=12.5 conn=wye
~ wdg=2 bus=-999999229649093.1.0 kV=0.069282 kVA=12.5 conn=wye
New Transformer.293588A71AF3EE34E0637F61810A7CE3_57_1 phases=1 windings=2 xhl=0.5 %R=0.353554 %imag=1e-06 %noloadloss=0
~ wdg=1 bus=229649093.2.0 kV=6.9282 kVA=12.5 conn=wye
~ wdg=2 bus=-999999229649093.2.0 kV=0.069282 kVA=12.5 conn=wye
New Transformer.293588B12E7AEE34E0637F61810A7CE3_58_0 phases=1 windings=2 xhl=0.5 %R=0.353554 %imag=1e-06 %noloadloss=0
~ wdg=1 bus=235894076.3.0 kV=6.9282 kVA=75 conn=wye
~ wdg=2 bus=-999999235894076.3.0 kV=0.069282 kVA=75 conn=wye
New Transformer.293588B4A1BFEE34E0637F61810A7CE3_59_0 phases=1 windings=2 xhl=0.5 %R=0.353554 %imag=1e-06 %noloadloss=0
~ wdg=1 bus=203123950.2.0 kV=6.9282 kVA=75 conn=wye
~ wdg=2 bus=-999999203123950.2.0 kV=0.069282 kVA=75 conn=wye

Set voltagebases=[12.0 2.4 0.277 0.12]
CalcVoltageBases
Solve
