! OpenDSS script generated from multiconductor network
Clear

New Circuit.mc_network basekv=12.0 pu=1.000000 angle=0.00 frequency=60.0 phases=3 Mvasc3=143993 Mvasc1=47997.6
~ bus1=-8888882144744.1.2.3

! Line codes
New LineCode.1000_JCN_3PH_12KV_3 nphases=3 units=km Rmatrix=[ 0.001248 | 0 0.001248 | 0 0 0.001248 ] Xmatrix=[ 0.001889 | 0 0.001889 | 0 0 0.001889 ] Cmatrix=[ 0 | 0 0 | 0 0 0 ]
New LineCode.1/0_JCN_3PH_12KV_3 nphases=3 units=km Rmatrix=[ 0.01763 | 0 0.01763 | 0 0 0.01763 ] Xmatrix=[ 0.005389 | 0 0.005389 | 0 0 0.005389 ] Cmatrix=[ 0 | 0 0 | 0 0 0 ]
New LineCode.2_CLP_3PH_12KV_3 nphases=3 units=km Rmatrix=[ 0.004158 | 0 0.004158 | 0 0 0.004158 ] Xmatrix=[ 0.000876 | 0 0.000876 | 0 0 0.000876 ] Cmatrix=[ 0 | 0 0 | 0 0 0 ]
New LineCode.350_CLP_3PH_12KV_3 nphases=3 units=km Rmatrix=[ 0.009759 | 0 0.009759 | 0 0 0.009759 ] Xmatrix=[ 0.007415 | 0 0.007415 | 0 0 0.007415 ] Cmatrix=[ 0 | 0 0 | 0 0 0 ]
New LineCode.1/0_JCN_1PH_12KV_1 nphases=1 units=km Rmatrix=[ 0.128081 ] Xmatrix=[ 0.039148 ] Cmatrix=[ 0 ]
New LineCode.1/0_CLP_3PH_12KV_3 nphases=3 units=km Rmatrix=[ 0.173283 | 0 0.173283 | 0 0 0.173283 ] Xmatrix=[ 0.052963 | 0 0.052963 | 0 0 0.052963 ] Cmatrix=[ 0 | 0 0 | 0 0 0 ]
New LineCode.350_JCN_3PH_12KV_3 nphases=3 units=km Rmatrix=[ 0.023369 | 0 0.023369 | 0 0 0.023369 ] Xmatrix=[ 0.017756 | 0 0.017756 | 0 0 0.017756 ] Cmatrix=[ 0 | 0 0 | 0 0 0 ]
New LineCode.2_CLP_1PH_12KV_1 nphases=1 units=km Rmatrix=[ 0.039345 ] Xmatrix=[ 0.008293 ] Cmatrix=[ 0 ]
New LineCode.1000_CLP_3PH_12KV_3 nphases=3 units=km Rmatrix=[ 0.055318 | 0 0.055318 | 0 0 0.055318 ] Xmatrix=[ 0.083735 | 0 0.083735 | 0 0 0.083735 ] Cmatrix=[ 0 | 0 0 | 0 0 0 ]
New LineCode.750_CLP_3PH_12KV_3 nphases=3 units=km Rmatrix=[ 0.004547 | 0 0.004547 | 0 0 0.004547 ] Xmatrix=[ 0.005584 | 0 0.005584 | 0 0 0.005584 ] Cmatrix=[ 0 | 0 0 | 0 0 0 ]
New LineCode.1/0_CLP_1PH_12KV_1 nphases=1 units=km Rmatrix=[ 0.00143 ] Xmatrix=[ 0.000437 ] Cmatrix=[ 0 ]

! Lines
New Line.ND190701312$GS2085-4 phases=3 Bus1=190701312.1.2.3 Bus2=210985765.1.2.3 LineCode=1000_JCN_3PH_12KV_3 Length=0.008566 units=km
New Line.PME8012-3$222670807 phases=3 Bus1=200814954.1.2.3 Bus2=222670810.1.2.3 LineCode=1/0_JCN_3PH_12KV_3 Length=0.00308 units=km
New Line.211475605$ND37210854 phases=3 Bus1=211475608.1.2.3 Bus2=37210832.1.2.3 LineCode=2_CLP_3PH_12KV_3 Length=0.005257 units=km
New Line.ND37227041$ND37226655 phases=3 Bus1=37227041.1.2.3 Bus2=37226655.1.2.3 LineCode=350_CLP_3PH_12KV_3 Length=0.070915 units=km
New Line.ND190701312$S5306538-1 phases=1 Bus1=190701312.2 Bus2=54332362.2 LineCode=1/0_JCN_1PH_12KV_1 Length=0.110396 units=km
New Line.PME6185-1$ND37227041 phases=3 Bus1=37227041.1.2.3 Bus2=97327860.1.2.3 LineCode=1/0_CLP_3PH_12KV_3 Length=0.166238 units=km
New Line.PME5174-2$191583792 phases=3 Bus1=37210246.1.2.3 Bus2=191583795.1.2.3 LineCode=1/0_CLP_3PH_12KV_3 Length=0.002916 units=km
New Line.J172-2P$194153731 phases=3 Bus1=194153734.1.2.3 Bus2=194153386.1.2.3 LineCode=1/0_JCN_3PH_12KV_3 Length=0.008217 units=km
New Line.194153664$J171-3P phases=3 Bus1=194153667.1.2.3 Bus2=194153469.1.2.3 LineCode=1/0_JCN_3PH_12KV_3 Length=0.002593 units=km
New Line.0202680$PME8012-1 phases=3 Bus1=200814981.1.2.3 Bus2=200815088.1.2.3 LineCode=1/0_JCN_3PH_12KV_3 Length=0.073796 units=km
New Line.PME8012-4$222670780 phases=3 Bus1=200814963.1.2.3 Bus2=222670783.1.2.3 LineCode=1/0_JCN_3PH_12KV_3 Length=0.003663 units=km
New Line.PME8667-2$256244388 phases=3 Bus1=256244255.1.2.3 Bus2=256244391.1.2.3 LineCode=1/0_JCN_3PH_12KV_3 Length=0.001674 units=km
New Line.ND37226655$GS5256-2 phases=3 Bus1=37226655.1.2.3 Bus2=28608773.1.2.3 LineCode=350_CLP_3PH_12KV_3 Length=0.017948 units=km
New Line.ND37226655$S5300412 phases=3 Bus1=37226655.1.2.3 Bus2=37225997.1.2.3 LineCode=1/0_CLP_3PH_12KV_3 Length=0.003807 units=km
New Line.236002454$PME4480-1CL phases=3 Bus1=236002457.1.2.3 Bus2=54332102.1.2.3 LineCode=350_CLP_3PH_12KV_3 Length=0.003151 units=km
New Line.222670807$225190242 phases=3 Bus1=222670809.1.2.3 Bus2=225190244.1.2.3 LineCode=1/0_JCN_3PH_12KV_3 Length=0.109153 units=km
New Line.207275076$191583792 phases=3 Bus1=191583794.1.2.3 Bus2=207275078.1.2.3 LineCode=1/0_CLP_3PH_12KV_3 Length=0.019799 units=km
New Line.222670780$225190267 phases=3 Bus1=222670782.1.2.3 Bus2=225190269.1.2.3 LineCode=1/0_JCN_3PH_12KV_3 Length=0.150596 units=km
New Line.PME4480-1$236002481 phases=3 Bus1=54332101.1.2.3 Bus2=236002484.1.2.3 LineCode=2_CLP_3PH_12KV_3 Length=0.002871 units=km
New Line.256244388$256244361 phases=3 Bus1=256244390.1.2.3 Bus2=256244363.1.2.3 LineCode=1/0_JCN_3PH_12KV_3 Length=0.014195 units=km
New Line.PME6185-2$181775513 phases=3 Bus1=97327851.1.2.3 Bus2=181775516.1.2.3 LineCode=1/0_CLP_3PH_12KV_3 Length=0.002209 units=km
New Line.225190242$ND200815223 phases=3 Bus1=225190245.1.2.3 Bus2=200815205.1.2.3 LineCode=1/0_JCN_3PH_12KV_3 Length=0.006381 units=km
New Line.PME5981-1$GS2085-3 phases=3 Bus1=210985757.1.2.3 Bus2=69286870.1.2.3 LineCode=1/0_CLP_3PH_12KV_3 Length=0.088803 units=km
New Line.J172-3P$194153770 phases=3 Bus1=194153378.1.2.3 Bus2=194153773.1.2.3 LineCode=2_CLP_3PH_12KV_3 Length=0.003732 units=km
New Line.J171-2P$194153800 phases=3 Bus1=194153477.1.2.3 Bus2=194153803.1.2.3 LineCode=2_CLP_3PH_12KV_3 Length=0.002146 units=km
New Line.197749029$J172-1P phases=3 Bus1=194153370.1.2.3 Bus2=197749032.1.2.3 LineCode=1/0_JCN_3PH_12KV_3 Length=0.003384 units=km
New Line.225190267$ND200815198 phases=3 Bus1=225190270.1.2.3 Bus2=200815180.1.2.3 LineCode=1/0_JCN_3PH_12KV_3 Length=0.007279 units=km
New Line.256244361$ND256244343 phases=3 Bus1=256244364.1.2.3 Bus2=256244325.1.2.3 LineCode=1/0_JCN_3PH_12KV_3 Length=0.005463 units=km
New Line.ND37210343$207275076 phases=3 Bus1=207275079.1.2.3 Bus2=37210321.1.2.3 LineCode=1/0_CLP_3PH_12KV_3 Length=0.006152 units=km
New Line.236002481$ND54334672 phases=3 Bus1=236002483.1.2.3 Bus2=54334650.1.2.3 LineCode=2_CLP_3PH_12KV_3 Length=0.152457 units=km
New Line.J171-1P$194153691 phases=3 Bus1=194153461.1.2.3 Bus2=194153694.1.2.3 LineCode=1/0_JCN_3PH_12KV_3 Length=0.001806 units=km
New Line.P5315566$GS2085-1 phases=3 Bus1=210985749.1.2.3 Bus2=54334683.1.2.3 LineCode=2_CLP_3PH_12KV_3 Length=0.019935 units=km
New Line.181775513$ND97327944 phases=3 Bus1=181775515.1.2.3 Bus2=97327926.1.2.3 LineCode=1/0_CLP_3PH_12KV_3 Length=0.013501 units=km
New Line.197749029$197749049 phases=3 Bus1=197749031.1.2.3 Bus2=197749051.1.2.3 LineCode=1/0_JCN_3PH_12KV_3 Length=0.101738 units=km
New Line.P5165493-1$194153770 phases=3 Bus1=194153772.1.2.3 Bus2=54332253.1.2.3 LineCode=1/0_JCN_3PH_12KV_3 Length=0.190827 units=km
New Line.194153800$54335280 phases=3 Bus1=194153802.1.2.3 Bus2=54335282.1.2.3 LineCode=2_CLP_3PH_12KV_3 Length=0.130338 units=km
New Line.215899235$PME5981-2 phases=3 Bus1=69286861.1.2.3 Bus2=215899238.1.2.3 LineCode=1/0_CLP_3PH_12KV_3 Length=0.00652 units=km
New Line.194153691$S5162171 phases=3 Bus1=194153693.1.2.3 Bus2=54335244.1.2.3 LineCode=1/0_JCN_3PH_12KV_3 Length=0.010455 units=km
New Line.197749049$PME7986-1 phases=3 Bus1=197749052.1.2.3 Bus2=197749080.1.2.3 LineCode=1/0_JCN_3PH_12KV_3 Length=0.005013 units=km
New Line.54335280$P5352955-1 phases=3 Bus1=54335283.1.2.3 Bus2=54332151.1.2.3 LineCode=2_CLP_3PH_12KV_3 Length=0.00476 units=km
New Line.P5309496-1$215899235 phases=3 Bus1=215899237.1.2.3 Bus2=152257225.1.2.3 LineCode=1/0_CLP_3PH_12KV_3 Length=0.042882 units=km
New Line.PME7986-2$197749039 phases=3 Bus1=197749071.1.2.3 Bus2=197749042.1.2.3 LineCode=1/0_JCN_3PH_12KV_3 Length=0.003272 units=km
New Line.197749039$197749209 phases=3 Bus1=197749041.1.2.3 Bus2=197749211.1.2.3 LineCode=1/0_JCN_3PH_12KV_3 Length=0.004572 units=km
New Line.197749209$ND197749019 phases=3 Bus1=197749212.1.2.3 Bus2=197749001.1.2.3 LineCode=1/0_JCN_3PH_12KV_3 Length=0.009845 units=km
New Line.ND37226662$243416291 phases=3 Bus1=37226662.1.2.3 Bus2=243416293.1.2.3 LineCode=1/0_JCN_3PH_12KV_3 Length=0.010139 units=km
New Line.ND37226662$243416316 phases=3 Bus1=37226662.1.2.3 Bus2=243416319.1.2.3 LineCode=1/0_CLP_3PH_12KV_3 Length=0.010602 units=km
New Line.ND37226662$243416341 phases=3 Bus1=37226662.1.2.3 Bus2=243416344.1.2.3 LineCode=1/0_CLP_3PH_12KV_3 Length=0.019511 units=km
New Line.ND37226475$P5337490-1 phases=3 Bus1=37226475.1.2.3 Bus2=37210037.1.2.3 LineCode=1/0_CLP_3PH_12KV_3 Length=0.142876 units=km
New Line.ND37225948$GS1407-2 phases=3 Bus1=150145799.1.2.3 Bus2=37225948.1.2.3 LineCode=2_CLP_3PH_12KV_3 Length=0.116025 units=km
New Line.GS4900-2$ND37226490 phases=3 Bus1=37209875.1.2.3 Bus2=37226490.1.2.3 LineCode=1/0_CLP_3PH_12KV_3 Length=0.019974 units=km
New Line.ND37226490$P5337491-A phases=3 Bus1=37226490.1.2.3 Bus2=151659898.1.2.3 LineCode=1/0_CLP_3PH_12KV_3 Length=0.213915 units=km
New Line.P5165457-1$GS1407-3 phases=3 Bus1=150145815.1.2.3 Bus2=152257172.1.2.3 LineCode=1/0_CLP_3PH_12KV_3 Length=0.425239 units=km
New Line.P5757718-B$239383251 phases=3 Bus1=239383062.1.2.3 Bus2=239383254.1.2.3 LineCode=1/0_JCN_3PH_12KV_3 Length=0.00168 units=km
New Line.ND37226490$V5337488T1 phases=3 Bus1=37226490.1.2.3 Bus2=37210136.1.2.3 LineCode=1/0_CLP_3PH_12KV_3 Length=0.005243 units=km
New Line.GS4900-1$ND37227360 phases=3 Bus1=37209883.1.2.3 Bus2=37227360.1.2.3 LineCode=350_CLP_3PH_12KV_3 Length=0.223497 units=km
New Line.PME6252-1$PMC6251-1 phases=3 Bus1=99029948.1.2.3 Bus2=99029761.1.2.3 LineCode=350_CLP_3PH_12KV_3 Length=0.01256 units=km
New Line.243416316$P5404699-1 phases=3 Bus1=243416318.1.2.3 Bus2=151395558.1.2.3 LineCode=1/0_CLP_3PH_12KV_3 Length=0.024113 units=km
New Line.243416341$P5457615-1 phases=3 Bus1=243416343.1.2.3 Bus2=151395599.1.2.3 LineCode=1/0_CLP_3PH_12KV_3 Length=0.101225 units=km
New Line.184917129$ND37227360 phases=3 Bus1=37227360.1.2.3 Bus2=184917131.1.2.3 LineCode=2_CLP_3PH_12KV_3 Length=0.055377 units=km
New Line.GS8011-4$GS1407-4 phases=3 Bus1=150145823.1.2.3 Bus2=200814855.1.2.3 LineCode=1000_JCN_3PH_12KV_3 Length=0.484263 units=km
New Line.243416291$P5457616-1 phases=3 Bus1=243416294.1.2.3 Bus2=243416203.1.2.3 LineCode=1/0_JCN_3PH_12KV_3 Length=0.00162 units=km
New Line.ND37227360$ND37227215 phases=3 Bus1=37227360.1.2.3 Bus2=37227215.1.2.3 LineCode=350_CLP_3PH_12KV_3 Length=0.030984 units=km
New Line.239383251$239383276 phases=3 Bus1=239383253.1.2.3 Bus2=239383278.1.2.3 LineCode=1/0_JCN_3PH_12KV_3 Length=0.025069 units=km
New Line.ND37227215$PME4252-1 phases=3 Bus1=37227215.1.2.3 Bus2=37210483.1.2.3 LineCode=350_CLP_3PH_12KV_3 Length=0.061614 units=km
New Line.ND37227215$37225923 phases=3 Bus1=37227215.1.2.3 Bus2=37225925.1.2.3 LineCode=350_CLP_3PH_12KV_3 Length=0.234058 units=km
New Line.P5404670-A$184917129 phases=3 Bus1=184917132.1.2.3 Bus2=151659979.1.2.3 LineCode=2_CLP_3PH_12KV_3 Length=0.002799 units=km
New Line.183037875$PME6252-4 phases=3 Bus1=99029743.1.2.3 Bus2=183037878.1.2.3 LineCode=1/0_CLP_3PH_12KV_3 Length=0.002181 units=km
New Line.P5337491-B$ND37227062 phases=3 Bus1=151659881.1.2.3 Bus2=37227062.1.2.3 LineCode=1/0_CLP_3PH_12KV_3 Length=0.009241 units=km
New Line.183037915$PME6252-3 phases=3 Bus1=99029734.1.2.3 Bus2=183037918.1.2.3 LineCode=1/0_CLP_3PH_12KV_3 Length=0.002189 units=km
New Line.ND37227062$207275020 phases=3 Bus1=37227062.1.2.3 Bus2=207275023.1.2.3 LineCode=2_CLP_3PH_12KV_3 Length=0.000951 units=km
New Line.ND37227062$207275051 phases=3 Bus1=37227062.1.2.3 Bus2=207275054.1.2.3 LineCode=1/0_CLP_3PH_12KV_3 Length=0.000897 units=km
New Line.239383276$ND239383149 phases=3 Bus1=239383279.1.2.3 Bus2=239383131.1.2.3 LineCode=1/0_JCN_3PH_12KV_3 Length=0.005383 units=km
New Line.PME6252-2$256244413 phases=3 Bus1=99029752.1.2.3 Bus2=256244415.1.2.3 LineCode=1/0_JCN_3PH_12KV_3 Length=0.025679 units=km
New Line.37225923$P5464482-1 phases=3 Bus1=37225926.1.2.3 Bus2=37210354.1.2.3 LineCode=350_CLP_3PH_12KV_3 Length=0.002327 units=km
New Line.183037875$183037848 phases=3 Bus1=183037877.1.2.3 Bus2=183037850.1.2.3 LineCode=1/0_CLP_3PH_12KV_3 Length=0.073927 units=km
New Line.GS8011-3$BS7850-T phases=3 Bus1=200814846.1.2.3 Bus2=197009255.1.2.3 LineCode=1/0_JCN_3PH_12KV_3 Length=0.157601 units=km
New Line.ND110249172$183037915 phases=3 Bus1=183037917.1.2.3 Bus2=110249154.1.2.3 LineCode=1/0_CLP_3PH_12KV_3 Length=0.096597 units=km
New Line.184917156$P5404670-B phases=3 Bus1=151659997.1.2.3 Bus2=184917159.1.2.3 LineCode=2_CLP_3PH_12KV_3 Length=0.003391 units=km
New Line.GS8011-2$PME8012-2 phases=3 Bus1=200814837.1.2.3 Bus2=200814972.1.2.3 LineCode=350_JCN_3PH_12KV_3 Length=0.105032 units=km
New Line.256244413$PME8667-1 phases=3 Bus1=256244416.1.2.3 Bus2=256244264.1.2.3 LineCode=1/0_JCN_3PH_12KV_3 Length=0.005496 units=km
New Line.207275051$PME5174-1 phases=3 Bus1=207275053.1.2.3 Bus2=37210255.1.2.3 LineCode=1/0_CLP_3PH_12KV_3 Length=0.003766 units=km
New Line.37225933$207275020 phases=3 Bus1=207275022.1.2.3 Bus2=37225935.1.2.3 LineCode=2_CLP_3PH_12KV_3 Length=0.036963 units=km
New Line.ND37226312$PME4252-2 phases=3 Bus1=37210474.1.2.3 Bus2=37226312.1.2.3 LineCode=350_CLP_3PH_12KV_3 Length=0.357877 units=km
New Line.ND37226725$PME4252-3 phases=3 Bus1=37210456.1.2.3 Bus2=37226725.1.2.3 LineCode=2_CLP_3PH_12KV_3 Length=0.032488 units=km
New Line.ND148926093$ND37226312 phases=3 Bus1=37226312.1.2.3 Bus2=148926093.1.2.3 LineCode=350_CLP_3PH_12KV_3 Length=0.288232 units=km
New Line.GS8011-1$ND194153583 phases=3 Bus1=200814828.1.2.3 Bus2=194153583.1.2.3 LineCode=1000_JCN_3PH_12KV_3 Length=0.253836 units=km
New Line.ND37226725$211475605 phases=3 Bus1=37226725.1.2.3 Bus2=211475607.1.2.3 LineCode=2_CLP_3PH_12KV_3 Length=0.070895 units=km
New Line.B5370808-2$ND37226725 phases=1 Bus1=37226725.1 Bus2=37210871.1 LineCode=2_CLP_1PH_12KV_1 Length=0.035062 units=km
New Line.ND99029895$183037848 phases=3 Bus1=183037851.1.2.3 Bus2=99029877.1.2.3 LineCode=1/0_CLP_3PH_12KV_3 Length=0.006344 units=km
New Line.P5404671-1$184917156 phases=3 Bus1=184917158.1.2.3 Bus2=151395414.1.2.3 LineCode=2_CLP_3PH_12KV_3 Length=0.095105 units=km
New Line.ND190701312$ND194153583 phases=3 Bus1=194153583.1.2.3 Bus2=190701312.1.2.3 LineCode=1000_JCN_3PH_12KV_3 Length=0.088803 units=km
New Line.194153664$BS7850-R phases=3 Bus1=197009247.1.2.3 Bus2=194153666.1.2.3 LineCode=1/0_JCN_3PH_12KV_3 Length=0.017854 units=km
New Line.BS7850-L$194153731 phases=3 Bus1=197009238.1.2.3 Bus2=194153733.1.2.3 LineCode=1/0_JCN_3PH_12KV_3 Length=0.262881 units=km
New Line.ND194153583$236002454 phases=3 Bus1=194153583.1.2.3 Bus2=236002456.1.2.3 LineCode=350_CLP_3PH_12KV_3 Length=0.203998 units=km
New Line.37225933$P5458193-1 phases=3 Bus1=37225936.1.2.3 Bus2=37210402.1.2.3 LineCode=2_CLP_3PH_12KV_3 Length=0.001946 units=km
New Line.ND148926093$P5351072-1 phases=3 Bus1=148926093.1.2.3 Bus2=37210985.1.2.3 LineCode=1/0_CLP_3PH_12KV_3 Length=0.058913 units=km
New Line.ND37227041$ND148926093 phases=3 Bus1=148926093.1.2.3 Bus2=37227041.1.2.3 LineCode=350_CLP_3PH_12KV_3 Length=0.069658 units=km
New Line.04586$ND170115087 phases=3 Bus1=-8888882144744.1.2.3 Bus2=170115087.1.2.3 LineCode=1000_JCN_3PH_12KV_3 Length=0.13647 units=km
New Line.ND170115087$ND239383324 phases=3 Bus1=170115087.1.2.3 Bus2=239383324.1.2.3 LineCode=1000_CLP_3PH_12KV_3 Length=0.653561 units=km
New Line.GS0956-1$ND239383324 phases=3 Bus1=239383324.1.2.3 Bus2=43656895.1.2.3 LineCode=1000_JCN_3PH_12KV_3 Length=0.862849 units=km
New Line.GS0956-3$GS8811-3 phases=3 Bus1=43656903.1.2.3 Bus2=239382664.1.2.3 LineCode=1000_JCN_3PH_12KV_3 Length=0.22708 units=km
New Line.GS0956-4$ND239382908 phases=3 Bus1=43656911.1.2.3 Bus2=239382908.1.2.3 LineCode=2_CLP_3PH_12KV_3 Length=0.172385 units=km
New Line.ND239382908$V5048328 phases=1 Bus1=239382908.3 Bus2=239382903.3 LineCode=2_CLP_1PH_12KV_1 Length=0.001332 units=km
New Line.ND43704806$ND239382908 phases=3 Bus1=239382908.1.2.3 Bus2=43704806.1.2.3 LineCode=2_CLP_3PH_12KV_3 Length=0.010894 units=km
New Line.ND43704806$ND174936017 phases=3 Bus1=43704806.1.2.3 Bus2=174936017.1.2.3 LineCode=2_CLP_3PH_12KV_3 Length=0.01002 units=km
New Line.174936067$ND43704806 phases=3 Bus1=43704806.1.2.3 Bus2=174936069.1.2.3 LineCode=1/0_JCN_3PH_12KV_3 Length=0.085124 units=km
New Line.V5633474PT$GS8811-4 phases=3 Bus1=239382673.1.2.3 Bus2=190916600.1.2.3 LineCode=1000_JCN_3PH_12KV_3 Length=0.147468 units=km
New Line.ND174936017$P5300411-1 phases=3 Bus1=174936017.1.2.3 Bus2=196842232.1.2.3 LineCode=2_CLP_3PH_12KV_3 Length=0.062532 units=km
New Line.174936067$P5617708-1 phases=3 Bus1=174936070.1.2.3 Bus2=174936032.1.2.3 LineCode=1/0_JCN_3PH_12KV_3 Length=0.002598 units=km
New Line.RCS7615-4$V5633474PT phases=3 Bus1=190916600.1.2.3 Bus2=190916198.1.2.3 LineCode=1000_JCN_3PH_12KV_3 Length=0.009964 units=km
New Line.GS8811-6$239383331 phases=3 Bus1=239382691.1.2.3 Bus2=239383334.1.2.3 LineCode=1/0_JCN_3PH_12KV_3 Length=0.003844 units=km
New Line.239383331$239383226 phases=3 Bus1=239383333.1.2.3 Bus2=239383228.1.2.3 LineCode=1/0_JCN_3PH_12KV_3 Length=0.085711 units=km
New Line.RCS7615-3$ND179122505 phases=3 Bus1=190916190.1.2.3 Bus2=179122505.1.2.3 LineCode=1000_JCN_3PH_12KV_3 Length=0.217418 units=km
New Line.P5457617-1$ND179122505 phases=3 Bus1=179122505.1.2.3 Bus2=151395517.1.2.3 LineCode=1/0_CLP_3PH_12KV_3 Length=0.065905 units=km
New Line.ND179122505$ND185470780 phases=3 Bus1=179122505.1.2.3 Bus2=185470780.1.2.3 LineCode=1000_JCN_3PH_12KV_3 Length=0.047629 units=km
New Line.RCS7615-2$OS4505-2 phases=3 Bus1=190916174.1.2.3 Bus2=190915979.1.2.3 LineCode=1000_JCN_3PH_12KV_3 Length=1.74101 units=km
New Line.239383226$P5757717-A phases=3 Bus1=239383229.1.2.3 Bus2=239382955.1.2.3 LineCode=1/0_JCN_3PH_12KV_3 Length=0.001474 units=km
New Line.GS7272-4$RCS7615-1 phases=3 Bus1=190916182.1.2.3 Bus2=179122006.1.2.3 LineCode=750_CLP_3PH_12KV_3 Length=0.040363 units=km
New Line.P5457604$ND185470780 phases=3 Bus1=185470780.1.2.3 Bus2=185470763.1.2.3 LineCode=1000_JCN_3PH_12KV_3 Length=0.002268 units=km
New Line.RCS5330-2$ND185470780 phases=3 Bus1=185470780.1.2.3 Bus2=37209669.1.2.3 LineCode=1000_JCN_3PH_12KV_3 Length=0.014805 units=km
New Line.P5757717-B$239383200 phases=3 Bus1=239382973.1.2.3 Bus2=239383203.1.2.3 LineCode=1/0_JCN_3PH_12KV_3 Length=0.001476 units=km
New Line.OS4505-3$ND190916137 phases=3 Bus1=190915995.1.2.3 Bus2=190916137.1.2.3 LineCode=350_CLP_3PH_12KV_3 Length=0.033414 units=km
New Line.RCS5330-3$GS4900-4 phases=3 Bus1=37209651.1.2.3 Bus2=37209899.1.2.3 LineCode=350_CLP_3PH_12KV_3 Length=0.227483 units=km
New Line.OS4505-1$ND99030037 phases=3 Bus1=190915987.1.2.3 Bus2=99030037.1.2.3 LineCode=350_CLP_3PH_12KV_3 Length=0.100725 units=km
New Line.ND190916137$ND107652467 phases=3 Bus1=190916137.1.2.3 Bus2=107652467.1.2.3 LineCode=350_CLP_3PH_12KV_3 Length=0.143752 units=km
New Line.ND190916137$GS1407-1 phases=3 Bus1=190916137.1.2.3 Bus2=150145807.1.2.3 LineCode=750_CLP_3PH_12KV_3 Length=0.072896 units=km
New Line.V5370828$GS4505-4 phases=3 Bus1=190916003.1.2.3 Bus2=187146059.1.2.3 LineCode=350_CLP_3PH_12KV_3 Length=0.192511 units=km
New Line.239383200$239383173 phases=3 Bus1=239383202.1.2.3 Bus2=239383175.1.2.3 LineCode=1/0_JCN_3PH_12KV_3 Length=0.007257 units=km
New Line.RCS5330-4$ND37226524 phases=3 Bus1=37209660.1.2.3 Bus2=37226524.1.2.3 LineCode=1/0_CLP_3PH_12KV_3 Length=0.018237 units=km
New Line.ND99030037$PMC6253-3 phases=3 Bus1=99030037.1.2.3 Bus2=99028735.1.2.3 LineCode=350_CLP_3PH_12KV_3 Length=0.491742 units=km
New Line.ND99030037$PMC6251-4 phases=3 Bus1=99030037.1.2.3 Bus2=99029930.1.2.3 LineCode=350_CLP_3PH_12KV_3 Length=0.043836 units=km
New Line.GS3346-4$ND107652467 phases=3 Bus1=107652467.1.2.3 Bus2=107694905.1.2.3 LineCode=350_CLP_3PH_12KV_3 Length=0.348494 units=km
New Line.ND107652467$P5396959-1 phases=3 Bus1=107652467.1.2.3 Bus2=152257372.1.2.3 LineCode=2_CLP_3PH_12KV_3 Length=0.083045 units=km
New Line.ND37226524$243416264 phases=3 Bus1=37226524.1.2.3 Bus2=243416266.1.2.3 LineCode=1/0_CLP_3PH_12KV_3 Length=0.032064 units=km
New Line.RCS4403-1$V5370828 phases=3 Bus1=187146059.1.2.3 Bus2=29536373.1.2.3 LineCode=350_CLP_3PH_12KV_3 Length=0.005195 units=km
New Line.ND37226524$P5457604T1 phases=1 Bus1=37226524.1 Bus2=37225921.1 LineCode=1/0_CLP_1PH_12KV_1 Length=0.002037 units=km
New Line.239383173$P5757718-A phases=3 Bus1=239383176.1.2.3 Bus2=239383044.1.2.3 LineCode=1/0_JCN_3PH_12KV_3 Length=0.001349 units=km
New Line.GS4900-3$ND37226475 phases=3 Bus1=37209891.1.2.3 Bus2=37226475.1.2.3 LineCode=1/0_CLP_3PH_12KV_3 Length=0.054381 units=km
New Line.243416264$ND37226662 phases=3 Bus1=243416267.1.2.3 Bus2=37226662.1.2.3 LineCode=1/0_CLP_3PH_12KV_3 Length=0.003773 units=km
New Line.PMC6251-3$ND99030078 phases=3 Bus1=99029939.1.2.3 Bus2=99030078.1.2.3 LineCode=1/0_CLP_3PH_12KV_3 Length=0.296789 units=km
New Line.P5337489-1$ND37226475 phases=3 Bus1=37226475.1.2.3 Bus2=151395467.1.2.3 LineCode=1/0_CLP_3PH_12KV_3 Length=0.491871 units=km

! Switches
New Line.5300411:P5300411-1 phases=3 Bus1=196842232.1.2.3 Bus2=196842233.1.2.3 switch=y r1=0.001 x1=0.001 r0=0.001 x0=0.001 Length=0.001 units=km
New Line.5617708:P5617708-1 phases=3 Bus1=174936032.1.2.3 Bus2=174936033.1.2.3 switch=y r1=0.001 x1=0.001 r0=0.001 x0=0.001 Length=0.001 units=km
New Line.5457617:P5457617-1 phases=3 Bus1=151395517.1.2.3 Bus2=151395518.1.2.3 switch=y r1=0.001 x1=0.001 r0=0.001 x0=0.001 Length=0.001 units=km
New Line.5757717:P5757717-A phases=3 Bus1=239382955.1.2.3 Bus2=239382956.1.2.3 switch=y r1=0.001 x1=0.001 r0=0.001 x0=0.001 Length=0.001 units=km
New Line.5757717:P5757717-T phases=3 Bus1=239382956.1.2.3 Bus2=239382964.1.2.3 switch=y r1=0.001 x1=0.001 r0=0.001 x0=0.001 Length=0.001 units=km
New Line.5757717:P5757717-B phases=3 Bus1=239382956.1.2.3 Bus2=239382973.1.2.3 switch=y r1=0.001 x1=0.001 r0=0.001 x0=0.001 Length=0.001 units=km
New Line.5396959:P5396959-1 phases=3 Bus1=152257372.1.2.3 Bus2=152257373.1.2.3 switch=y r1=0.001 x1=0.001 r0=0.001 x0=0.001 Length=0.001 units=km
New Line.5757718:P5757718-A phases=3 Bus1=239383044.1.2.3 Bus2=239383045.1.2.3 switch=y r1=0.001 x1=0.001 r0=0.001 x0=0.001 Length=0.001 units=km
New Line.5757718:P5757718-T phases=3 Bus1=239383045.1.2.3 Bus2=239383053.1.2.3 switch=y r1=0.001 x1=0.001 r0=0.001 x0=0.001 Length=0.001 units=km
New Line.194153731 phases=3 Bus1=194153733.1.2.3 Bus2=194153734.1.2.3 switch=y r1=0.001 x1=0.001 r0=0.001 x0=0.001 Length=0.001 units=km
New Line.236002454 phases=3 Bus1=236002456.1.2.3 Bus2=236002457.1.2.3 switch=y r1=0.001 x1=0.001 r0=0.001 x0=0.001 Length=0.001 units=km
New Line.222670807 phases=3 Bus1=222670810.1.2.3 Bus2=222670809.1.2.3 switch=y r1=0.001 x1=0.001 r0=0.001 x0=0.001 Length=0.001 units=km
New Line.37210839$P5340807 phases=3 Bus1=37210832.1.2.3 Bus2=37210833.1.2.3 switch=y r1=0.001 x1=0.001 r0=0.001 x0=0.001 Length=0.001 units=km
New Line.191583792 phases=3 Bus1=191583795.1.2.3 Bus2=191583794.1.2.3 switch=y r1=0.001 x1=0.001 r0=0.001 x0=0.001 Length=0.001 units=km
New Line.GS2085-3$210985763 phases=3 Bus1=210985734.1.2.3 Bus2=210985728.1.2.3 switch=y r1=0.001 x1=0.001 r0=0.001 x0=0.001 Length=0.001 units=km
New Line.222670780 phases=3 Bus1=222670783.1.2.3 Bus2=222670782.1.2.3 switch=y r1=0.001 x1=0.001 r0=0.001 x0=0.001 Length=0.001 units=km
New Line.256244388 phases=3 Bus1=256244391.1.2.3 Bus2=256244390.1.2.3 switch=y r1=0.001 x1=0.001 r0=0.001 x0=0.001 Length=0.001 units=km
New Line.PME6185-2$PME6185-1 phases=3 Bus1=97327843.1.2.3 Bus2=97327842.1.2.3 switch=y r1=0.001 x1=0.001 r0=0.001 x0=0.001 Length=0.001 units=km
New Line.194153367$194153383 phases=3 Bus1=194153387.1.2.3 Bus2=194153371.1.2.3 switch=y r1=0.001 x1=0.001 r0=0.001 x0=0.001 Length=0.001 units=km
New Line.194153383$194153375 phases=3 Bus1=194153387.1.2.3 Bus2=194153379.1.2.3 switch=y r1=0.001 x1=0.001 r0=0.001 x0=0.001 Length=0.001 units=km
New Line.194153474$194153466 phases=3 Bus1=194153470.1.2.3 Bus2=194153478.1.2.3 switch=y r1=0.001 x1=0.001 r0=0.001 x0=0.001 Length=0.001 units=km
New Line.210985739$GS2085-3 phases=3 Bus1=210985728.1.2.3 Bus2=210985722.1.2.3 switch=y r1=0.001 x1=0.001 r0=0.001 x0=0.001 Length=0.001 units=km
New Line.225190242 phases=3 Bus1=225190244.1.2.3 Bus2=225190245.1.2.3 switch=y r1=0.001 x1=0.001 r0=0.001 x0=0.001 Length=0.001 units=km
New Line.194153458$194153474 phases=3 Bus1=194153478.1.2.3 Bus2=194153462.1.2.3 switch=y r1=0.001 x1=0.001 r0=0.001 x0=0.001 Length=0.001 units=km
New Line.207275076 phases=3 Bus1=207275078.1.2.3 Bus2=207275079.1.2.3 switch=y r1=0.001 x1=0.001 r0=0.001 x0=0.001 Length=0.001 units=km
New Line.GS2085-1$210985739 phases=3 Bus1=210985722.1.2.3 Bus2=210985721.1.2.3 switch=y r1=0.001 x1=0.001 r0=0.001 x0=0.001 Length=0.001 units=km
New Line.225190267 phases=3 Bus1=225190269.1.2.3 Bus2=225190270.1.2.3 switch=y r1=0.001 x1=0.001 r0=0.001 x0=0.001 Length=0.001 units=km
New Line.236002481 phases=3 Bus1=236002484.1.2.3 Bus2=236002483.1.2.3 switch=y r1=0.001 x1=0.001 r0=0.001 x0=0.001 Length=0.001 units=km
New Line.256244361 phases=3 Bus1=256244363.1.2.3 Bus2=256244364.1.2.3 switch=y r1=0.001 x1=0.001 r0=0.001 x0=0.001 Length=0.001 units=km
New Line.5712615:PME8012-1 phases=3 Bus1=200814945.1.2.3 Bus2=200814981.1.2.3 switch=y r1=0.001 x1=0.001 r0=0.001 x0=0.001 Length=0.001 units=km
New Line.5165518:GS2085-4 phases=3 Bus1=210985765.1.2.3 Bus2=210985734.1.2.3 switch=y r1=0.001 x1=0.001 r0=0.001 x0=0.001 Length=0.001 units=km
New Line.181775513 phases=3 Bus1=181775516.1.2.3 Bus2=181775515.1.2.3 switch=y r1=0.001 x1=0.001 r0=0.001 x0=0.001 Length=0.001 units=km
New Line.200815212$P5712617 phases=3 Bus1=200815205.1.2.3 Bus2=200815206.1.2.3 switch=y r1=0.001 x1=0.001 r0=0.001 x0=0.001 Length=0.001 units=km
New Line.194153770 phases=3 Bus1=194153773.1.2.3 Bus2=194153772.1.2.3 switch=y r1=0.001 x1=0.001 r0=0.001 x0=0.001 Length=0.001 units=km
New Line.194153800 phases=3 Bus1=194153803.1.2.3 Bus2=194153802.1.2.3 switch=y r1=0.001 x1=0.001 r0=0.001 x0=0.001 Length=0.001 units=km
New Line.197749029 phases=3 Bus1=197749032.1.2.3 Bus2=197749031.1.2.3 switch=y r1=0.001 x1=0.001 r0=0.001 x0=0.001 Length=0.001 units=km
New Line.200815187$P5712618 phases=3 Bus1=200815180.1.2.3 Bus2=200815181.1.2.3 switch=y r1=0.001 x1=0.001 r0=0.001 x0=0.001 Length=0.001 units=km
New Line.256244332$P5756067 phases=3 Bus1=256244325.1.2.3 Bus2=256244326.1.2.3 switch=y r1=0.001 x1=0.001 r0=0.001 x0=0.001 Length=0.001 units=km
New Line.37210328$P5464183 phases=3 Bus1=37210321.1.2.3 Bus2=37210322.1.2.3 switch=y r1=0.001 x1=0.001 r0=0.001 x0=0.001 Length=0.001 units=km
New Line.54334657$P5165677 phases=3 Bus1=54334650.1.2.3 Bus2=54334651.1.2.3 switch=y r1=0.001 x1=0.001 r0=0.001 x0=0.001 Length=0.001 units=km
New Line.PME5981-2$PME5981-1 phases=3 Bus1=69286853.1.2.3 Bus2=69286852.1.2.3 switch=y r1=0.001 x1=0.001 r0=0.001 x0=0.001 Length=0.001 units=km
New Line.194153691 phases=3 Bus1=194153694.1.2.3 Bus2=194153693.1.2.3 switch=y r1=0.001 x1=0.001 r0=0.001 x0=0.001 Length=0.001 units=km
New Line.97327933$P5574419 phases=3 Bus1=97327926.1.2.3 Bus2=97327927.1.2.3 switch=y r1=0.001 x1=0.001 r0=0.001 x0=0.001 Length=0.001 units=km
New Line.197749049 phases=3 Bus1=197749051.1.2.3 Bus2=197749052.1.2.3 switch=y r1=0.001 x1=0.001 r0=0.001 x0=0.001 Length=0.001 units=km
New Line.54335280 phases=3 Bus1=54335282.1.2.3 Bus2=54335283.1.2.3 switch=y r1=0.001 x1=0.001 r0=0.001 x0=0.001 Length=0.001 units=km
New Line.215899235 phases=3 Bus1=215899238.1.2.3 Bus2=215899237.1.2.3 switch=y r1=0.001 x1=0.001 r0=0.001 x0=0.001 Length=0.001 units=km
New Line.5306538:S5306538-1 phases=1 Bus1=54332362.2 Bus2=54332363.2 switch=y r1=0.001 x1=0.001 r0=0.001 x0=0.001 Length=0.001 units=km
New Line.5574418:PME6185-1 phases=3 Bus1=97327860.1.2.3 Bus2=97327843.1.2.3 switch=y r1=0.001 x1=0.001 r0=0.001 x0=0.001 Length=0.001 units=km
New Line.5162172:J172-2 phases=3 Bus1=194153386.1.2.3 Bus2=194153387.1.2.3 switch=y r1=0.001 x1=0.001 r0=0.001 x0=0.001 Length=0.001 units=km
New Line.5162171:J171-3 phases=3 Bus1=194153469.1.2.3 Bus2=194153470.1.2.3 switch=y r1=0.001 x1=0.001 r0=0.001 x0=0.001 Length=0.001 units=km
New Line.5458193:P5458193-1 phases=3 Bus1=37210402.1.2.3 Bus2=37210403.1.2.3 switch=y r1=0.001 x1=0.001 r0=0.001 x0=0.001 Length=0.001 units=km
New Line.5351072:P5351072-1 phases=3 Bus1=37210985.1.2.3 Bus2=37210986.1.2.3 switch=y r1=0.001 x1=0.001 r0=0.001 x0=0.001 Length=0.001 units=km
New Line.5165518:GS2085-3 phases=3 Bus1=210985728.1.2.3 Bus2=210985757.1.2.3 switch=y r1=0.001 x1=0.001 r0=0.001 x0=0.001 Length=0.001 units=km
New Line.5162172:J172-1 phases=3 Bus1=194153371.1.2.3 Bus2=194153370.1.2.3 switch=y r1=0.001 x1=0.001 r0=0.001 x0=0.001 Length=0.001 units=km
New Line.5162172:J172-3 phases=3 Bus1=194153379.1.2.3 Bus2=194153378.1.2.3 switch=y r1=0.001 x1=0.001 r0=0.001 x0=0.001 Length=0.001 units=km
New Line.5162171:J171-2 phases=3 Bus1=194153478.1.2.3 Bus2=194153477.1.2.3 switch=y r1=0.001 x1=0.001 r0=0.001 x0=0.001 Length=0.001 units=km
New Line.5162171:J171-1 phases=3 Bus1=194153462.1.2.3 Bus2=194153461.1.2.3 switch=y r1=0.001 x1=0.001 r0=0.001 x0=0.001 Length=0.001 units=km
New Line.5165518:GS2085-1 phases=3 Bus1=210985721.1.2.3 Bus2=210985749.1.2.3 switch=y r1=0.001 x1=0.001 r0=0.001 x0=0.001 Length=0.001 units=km
New Line.5540570:PME5981-1 phases=3 Bus1=69286870.1.2.3 Bus2=69286853.1.2.3 switch=y r1=0.001 x1=0.001 r0=0.001 x0=0.001 Length=0.001 units=km
New Line.5540570:PME5981-2 phases=3 Bus1=69286852.1.2.3 Bus2=69286861.1.2.3 switch=y r1=0.001 x1=0.001 r0=0.001 x0=0.001 Length=0.001 units=km
New Line.5165493:P5165493-1 phases=3 Bus1=54332253.1.2.3 Bus2=54332254.1.2.3 switch=y r1=0.001 x1=0.001 r0=0.001 x0=0.001 Length=0.001 units=km
New Line.5712615:PME8012-4 phases=3 Bus1=200814945.1.2.3 Bus2=200814963.1.2.3 switch=y r1=0.001 x1=0.001 r0=0.001 x0=0.001 Length=0.001 units=km
New Line.5756066:PME8667-2 phases=3 Bus1=256244246.1.2.3 Bus2=256244255.1.2.3 switch=y r1=0.001 x1=0.001 r0=0.001 x0=0.001 Length=0.001 units=km
New Line.5464182:PME5174-2 phases=3 Bus1=37210237.1.2.3 Bus2=37210246.1.2.3 switch=y r1=0.001 x1=0.001 r0=0.001 x0=0.001 Length=0.001 units=km
New Line.5397051:PME4480-1 phases=3 Bus1=54332102.1.2.3 Bus2=54332101.1.2.3 switch=y r1=0.001 x1=0.001 r0=0.001 x0=0.001 Length=0.001 units=km
New Line.5574418:PME6185-2 phases=3 Bus1=97327842.1.2.3 Bus2=97327851.1.2.3 switch=y r1=0.001 x1=0.001 r0=0.001 x0=0.001 Length=0.001 units=km
New Line.5165518:GS2085-2 phases=3 Bus1=210985722.1.2.3 Bus2=210985741.1.2.3 switch=y r1=0.001 x1=0.001 r0=0.001 x0=0.001 Length=0.001 units=km enabled=false
New Line.43656893$43656885 phases=3 Bus1=43656867.1.2.3 Bus2=43656868.1.2.3 switch=y r1=0.001 x1=0.001 r0=0.001 x0=0.001 Length=0.001 units=km
New Line.43656885$43656901 phases=3 Bus1=43656868.1.2.3 Bus2=43656874.1.2.3 switch=y r1=0.001 x1=0.001 r0=0.001 x0=0.001 Length=0.001 units=km
New Line.43656901$GS0956-4 phases=3 Bus1=43656874.1.2.3 Bus2=43656880.1.2.3 switch=y r1=0.001 x1=0.001 r0=0.001 x0=0.001 Length=0.001 units=km
New Line.GS8811-2$239382662 phases=3 Bus1=239382620.1.2.3 Bus2=239382614.1.2.3 switch=y r1=0.001 x1=0.001 r0=0.001 x0=0.001 Length=0.001 units=km
New Line.239382662$239382671 phases=3 Bus1=239382620.1.2.3 Bus2=239382626.1.2.3 switch=y r1=0.001 x1=0.001 r0=0.001 x0=0.001 Length=0.001 units=km
New Line.GS8811-1$GS8811-2 phases=3 Bus1=239382614.1.2.3 Bus2=239382613.1.2.3 switch=y r1=0.001 x1=0.001 r0=0.001 x0=0.001 Length=0.001 units=km
New Line.239382671$GS8811-5 phases=3 Bus1=239382626.1.2.3 Bus2=239382632.1.2.3 switch=y r1=0.001 x1=0.001 r0=0.001 x0=0.001 Length=0.001 units=km
New Line.174936067 phases=3 Bus1=174936069.1.2.3 Bus2=174936070.1.2.3 switch=y r1=0.001 x1=0.001 r0=0.001 x0=0.001 Length=0.001 units=km
New Line.GS8811-5$GS8811-6 phases=3 Bus1=239382632.1.2.3 Bus2=239382638.1.2.3 switch=y r1=0.001 x1=0.001 r0=0.001 x0=0.001 Length=0.001 units=km
New Line.190916188$190916196 phases=3 Bus1=190916167.1.2.3 Bus2=190916161.1.2.3 switch=y r1=0.001 x1=0.001 r0=0.001 x0=0.001 Length=0.001 units=km
New Line.239383331 phases=3 Bus1=239383334.1.2.3 Bus2=239383333.1.2.3 switch=y r1=0.001 x1=0.001 r0=0.001 x0=0.001 Length=0.001 units=km
New Line.190916172$190916188 phases=3 Bus1=190916161.1.2.3 Bus2=190916155.1.2.3 switch=y r1=0.001 x1=0.001 r0=0.001 x0=0.001 Length=0.001 units=km
New Line.190916180$190916172 phases=3 Bus1=190916155.1.2.3 Bus2=190916154.1.2.3 switch=y r1=0.001 x1=0.001 r0=0.001 x0=0.001 Length=0.001 units=km
New Line.239383226 phases=3 Bus1=239383228.1.2.3 Bus2=239383229.1.2.3 switch=y r1=0.001 x1=0.001 r0=0.001 x0=0.001 Length=0.001 units=km
New Line.190915985$190915977 phases=3 Bus1=190915960.1.2.3 Bus2=190915959.1.2.3 switch=y r1=0.001 x1=0.001 r0=0.001 x0=0.001 Length=0.001 units=km
New Line.190915977$190915993 phases=3 Bus1=190915960.1.2.3 Bus2=190915966.1.2.3 switch=y r1=0.001 x1=0.001 r0=0.001 x0=0.001 Length=0.001 units=km
New Line.190915993$190916001 phases=3 Bus1=190915966.1.2.3 Bus2=190915972.1.2.3 switch=y r1=0.001 x1=0.001 r0=0.001 x0=0.001 Length=0.001 units=km
New Line.37209667$RCS5330-4 phases=3 Bus1=37209642.1.2.3 Bus2=37209643.1.2.3 switch=y r1=0.001 x1=0.001 r0=0.001 x0=0.001 Length=0.001 units=km
New Line.239383200 phases=3 Bus1=239383203.1.2.3 Bus2=239383202.1.2.3 switch=y r1=0.001 x1=0.001 r0=0.001 x0=0.001 Length=0.001 units=km
New Line.239383173 phases=3 Bus1=239383175.1.2.3 Bus2=239383176.1.2.3 switch=y r1=0.001 x1=0.001 r0=0.001 x0=0.001 Length=0.001 units=km
New Line.GS4900-3$37209897 phases=3 Bus1=37209868.1.2.3 Bus2=37209862.1.2.3 switch=y r1=0.001 x1=0.001 r0=0.001 x0=0.001 Length=0.001 units=km
New Line.150145805$150145797 phases=3 Bus1=150145779.1.2.3 Bus2=150145780.1.2.3 switch=y r1=0.001 x1=0.001 r0=0.001 x0=0.001 Length=0.001 units=km
New Line.243416264 phases=3 Bus1=243416266.1.2.3 Bus2=243416267.1.2.3 switch=y r1=0.001 x1=0.001 r0=0.001 x0=0.001 Length=0.001 units=km
New Line.GS4900-2$GS4900-3 phases=3 Bus1=37209862.1.2.3 Bus2=37209856.1.2.3 switch=y r1=0.001 x1=0.001 r0=0.001 x0=0.001 Length=0.001 units=km
New Line.99029936$PMC6251 phases=3 Bus1=99029915.1.2.3 Bus2=99029916.1.2.3 switch=y r1=0.001 x1=0.001 r0=0.001 x0=0.001 Length=0.001 units=km
New Line.150145797$GS1407-3 phases=3 Bus1=150145780.1.2.3 Bus2=150145786.1.2.3 switch=y r1=0.001 x1=0.001 r0=0.001 x0=0.001 Length=0.001 units=km
New Line.37209881$GS4900-2 phases=3 Bus1=37209856.1.2.3 Bus2=37209855.1.2.3 switch=y r1=0.001 x1=0.001 r0=0.001 x0=0.001 Length=0.001 units=km
New Line.PMC6251$PMC6251-1 phases=3 Bus1=99029916.1.2.3 Bus2=99029922.1.2.3 switch=y r1=0.001 x1=0.001 r0=0.001 x0=0.001 Length=0.001 units=km
New Line.GS1407-3$150145821 phases=3 Bus1=150145786.1.2.3 Bus2=150145792.1.2.3 switch=y r1=0.001 x1=0.001 r0=0.001 x0=0.001 Length=0.001 units=km
New Line.DAIRYMAN$COMET_GS0956-2$GS0956-2 phases=3 Bus1=43656887.1.2.3 Bus2=-77777743656887.1.2.3 switch=y r1=0.001 x1=0.001 r0=0.001 x0=0.001 Length=0.001 units=km
New Line.DAIRYMAN$CALMEN_RCS5330-1$RCS5330-1 phases=3 Bus1=37209678.1.2.3 Bus2=-77777737209678.1.2.3 switch=y r1=0.001 x1=0.001 r0=0.001 x0=0.001 Length=0.001 units=km
New Line.DAIRYMAN$BANDAG_PMC6253-4$PMC6253-4 phases=3 Bus1=99028726.1.2.3 Bus2=-77777799028726.1.2.3 switch=y r1=0.001 x1=0.001 r0=0.001 x0=0.001 Length=0.001 units=km
New Line.5048327:GS0956-1 phases=3 Bus1=43656895.1.2.3 Bus2=43656867.1.2.3 switch=y r1=0.001 x1=0.001 r0=0.001 x0=0.001 Length=0.001 units=km
New Line.5048327:GS0956-3 phases=3 Bus1=43656874.1.2.3 Bus2=43656903.1.2.3 switch=y r1=0.001 x1=0.001 r0=0.001 x0=0.001 Length=0.001 units=km
New Line.5048327:GS0956-4 phases=3 Bus1=43656880.1.2.3 Bus2=43656911.1.2.3 switch=y r1=0.001 x1=0.001 r0=0.001 x0=0.001 Length=0.001 units=km
New Line.5633475:GS8811-3 phases=3 Bus1=239382664.1.2.3 Bus2=239382620.1.2.3 switch=y r1=0.001 x1=0.001 r0=0.001 x0=0.001 Length=0.001 units=km
New Line.5633475:GS8811-4 phases=3 Bus1=239382626.1.2.3 Bus2=239382673.1.2.3 switch=y r1=0.001 x1=0.001 r0=0.001 x0=0.001 Length=0.001 units=km
New Line.5633475:GS8811-6 phases=3 Bus1=239382638.1.2.3 Bus2=239382691.1.2.3 switch=y r1=0.001 x1=0.001 r0=0.001 x0=0.001 Length=0.001 units=km
New Line.5633474:RCS7615-4 phases=3 Bus1=190916198.1.2.3 Bus2=190916167.1.2.3 switch=y r1=0.001 x1=0.001 r0=0.001 x0=0.001 Length=0.001 units=km
New Line.5633474:RCS7615-3 phases=3 Bus1=190916161.1.2.3 Bus2=190916190.1.2.3 switch=y r1=0.001 x1=0.001 r0=0.001 x0=0.001 Length=0.001 units=km
New Line.5633474:RCS7615-2 phases=3 Bus1=190916155.1.2.3 Bus2=190916174.1.2.3 switch=y r1=0.001 x1=0.001 r0=0.001 x0=0.001 Length=0.001 units=km
New Line.5633474:RCS7615-1 phases=3 Bus1=190916154.1.2.3 Bus2=190916182.1.2.3 switch=y r1=0.001 x1=0.001 r0=0.001 x0=0.001 Length=0.001 units=km
New Line.5370495:GS4505-2 phases=3 Bus1=190915979.1.2.3 Bus2=190915960.1.2.3 switch=y r1=0.001 x1=0.001 r0=0.001 x0=0.001 Length=0.001 units=km
New Line.5457604:RCS5330-2 phases=3 Bus1=37209669.1.2.3 Bus2=37209642.1.2.3 switch=y r1=0.001 x1=0.001 r0=0.001 x0=0.001 Length=0.001 units=km
New Line.5370495:GS4505-1 phases=3 Bus1=190915959.1.2.3 Bus2=190915987.1.2.3 switch=y r1=0.001 x1=0.001 r0=0.001 x0=0.001 Length=0.001 units=km
New Line.5370495:GS4505-3 phases=3 Bus1=190915966.1.2.3 Bus2=190915995.1.2.3 switch=y r1=0.001 x1=0.001 r0=0.001 x0=0.001 Length=0.001 units=km
New Line.5457604:RCS5330-3 phases=3 Bus1=37209642.1.2.3 Bus2=37209651.1.2.3 switch=y r1=0.001 x1=0.001 r0=0.001 x0=0.001 Length=0.001 units=km
New Line.5370495:GS4505-4 phases=3 Bus1=190915972.1.2.3 Bus2=190916003.1.2.3 switch=y r1=0.001 x1=0.001 r0=0.001 x0=0.001 Length=0.001 units=km
New Line.5457604:RCS5330-4 phases=3 Bus1=37209643.1.2.3 Bus2=37209660.1.2.3 switch=y r1=0.001 x1=0.001 r0=0.001 x0=0.001 Length=0.001 units=km
New Line.5337488:GS4900-4 phases=3 Bus1=37209899.1.2.3 Bus2=37209868.1.2.3 switch=y r1=0.001 x1=0.001 r0=0.001 x0=0.001 Length=0.001 units=km
New Line.5162173:GS1407-1 phases=3 Bus1=150145807.1.2.3 Bus2=150145779.1.2.3 switch=y r1=0.001 x1=0.001 r0=0.001 x0=0.001 Length=0.001 units=km
New Line.5415607:PMC6253-3 phases=3 Bus1=99028735.1.2.3 Bus2=99028711.1.2.3 switch=y r1=0.001 x1=0.001 r0=0.001 x0=0.001 Length=0.001 units=km enabled=false
New Line.5506715:PMC6251-4 phases=3 Bus1=99029930.1.2.3 Bus2=99029915.1.2.3 switch=y r1=0.001 x1=0.001 r0=0.001 x0=0.001 Length=0.001 units=km
New Line.5337488:GS4900-3 phases=3 Bus1=37209862.1.2.3 Bus2=37209891.1.2.3 switch=y r1=0.001 x1=0.001 r0=0.001 x0=0.001 Length=0.001 units=km
New Line.5506715:PMC6251-3 phases=3 Bus1=99029915.1.2.3 Bus2=99029939.1.2.3 switch=y r1=0.001 x1=0.001 r0=0.001 x0=0.001 Length=0.001 units=km
New Line.5162173:GS1407-2 phases=3 Bus1=150145780.1.2.3 Bus2=150145799.1.2.3 switch=y r1=0.001 x1=0.001 r0=0.001 x0=0.001 Length=0.001 units=km
New Line.5337488:GS4900-2 phases=3 Bus1=37209856.1.2.3 Bus2=37209875.1.2.3 switch=y r1=0.001 x1=0.001 r0=0.001 x0=0.001 Length=0.001 units=km
New Line.5162173:GS1407-3 phases=3 Bus1=150145786.1.2.3 Bus2=150145815.1.2.3 switch=y r1=0.001 x1=0.001 r0=0.001 x0=0.001 Length=0.001 units=km
New Line.5633475:GS8811-2 phases=3 Bus1=239382614.1.2.3 Bus2=239382655.1.2.3 switch=y r1=0.001 x1=0.001 r0=0.001 x0=0.001 Length=0.001 units=km enabled=false
New Line.5633475:GS8811-1 phases=3 Bus1=239382613.1.2.3 Bus2=239382646.1.2.3 switch=y r1=0.001 x1=0.001 r0=0.001 x0=0.001 Length=0.001 units=km enabled=false
New Line.5633475:GS8811-5 phases=3 Bus1=239382632.1.2.3 Bus2=239382682.1.2.3 switch=y r1=0.001 x1=0.001 r0=0.001 x0=0.001 Length=0.001 units=km enabled=false
New Line.5048327:GS0956-2 phases=3 Bus1=43656868.1.2.3 Bus2=43656887.1.2.3 switch=y r1=0.001 x1=0.001 r0=0.001 x0=0.001 Length=0.001 units=km enabled=false
New Line.99028732$PMC6253 phases=3 Bus1=99028711.1.2.3 Bus2=-77777799028711.1.2.3 switch=y r1=0.001 x1=0.001 r0=0.001 x0=0.001 Length=0.001 units=km
New Line.5457604:RCS5330-1 phases=3 Bus1=37209643.1.2.3 Bus2=37209678.1.2.3 switch=y r1=0.001 x1=0.001 r0=0.001 x0=0.001 Length=0.001 units=km enabled=false
New Line.5415607:PMC6253-4 phases=3 Bus1=99028711.1.2.3 Bus2=99028726.1.2.3 switch=y r1=0.001 x1=0.001 r0=0.001 x0=0.001 Length=0.001 units=km
New Line.DAIRYMAN$SPECTRUM_GS2085-2$GS2085-2 phases=3 Bus1=210985741.1.2.3 Bus2=-777777210985741.1.2.3 switch=y r1=0.001 x1=0.001 r0=0.001 x0=0.001 Length=0.001 units=km
New Line.PME7986-2$PME7986-1 phases=3 Bus1=197749063.1.2.3 Bus2=197749062.1.2.3 switch=y r1=0.001 x1=0.001 r0=0.001 x0=0.001 Length=0.001 units=km
New Line.197749039 phases=3 Bus1=197749042.1.2.3 Bus2=197749041.1.2.3 switch=y r1=0.001 x1=0.001 r0=0.001 x0=0.001 Length=0.001 units=km
New Line.197749209 phases=3 Bus1=197749211.1.2.3 Bus2=197749212.1.2.3 switch=y r1=0.001 x1=0.001 r0=0.001 x0=0.001 Length=0.001 units=km
New Line.197749008$P5636503 phases=3 Bus1=197749001.1.2.3 Bus2=197749002.1.2.3 switch=y r1=0.001 x1=0.001 r0=0.001 x0=0.001 Length=0.001 units=km
New Line.243416291 phases=3 Bus1=243416293.1.2.3 Bus2=243416294.1.2.3 switch=y r1=0.001 x1=0.001 r0=0.001 x0=0.001 Length=0.001 units=km
New Line.243416316 phases=3 Bus1=243416319.1.2.3 Bus2=243416318.1.2.3 switch=y r1=0.001 x1=0.001 r0=0.001 x0=0.001 Length=0.001 units=km
New Line.243416341 phases=3 Bus1=243416344.1.2.3 Bus2=243416343.1.2.3 switch=y r1=0.001 x1=0.001 r0=0.001 x0=0.001 Length=0.001 units=km
New Line.239383251 phases=3 Bus1=239383254.1.2.3 Bus2=239383253.1.2.3 switch=y r1=0.001 x1=0.001 r0=0.001 x0=0.001 Length=0.001 units=km
New Line.184917129 phases=3 Bus1=184917131.1.2.3 Bus2=184917132.1.2.3 switch=y r1=0.001 x1=0.001 r0=0.001 x0=0.001 Length=0.001 units=km
New Line.PME6252-2$PME6252-4 phases=3 Bus1=99029726.1.2.3 Bus2=99029725.1.2.3 switch=y r1=0.001 x1=0.001 r0=0.001 x0=0.001 Length=0.001 units=km
New Line.GS8011-3$200814852 phases=3 Bus1=200814820.1.2.3 Bus2=200814814.1.2.3 switch=y r1=0.001 x1=0.001 r0=0.001 x0=0.001 Length=0.001 units=km
New Line.239383276 phases=3 Bus1=239383278.1.2.3 Bus2=239383279.1.2.3 switch=y r1=0.001 x1=0.001 r0=0.001 x0=0.001 Length=0.001 units=km
New Line.37225923 phases=3 Bus1=37225925.1.2.3 Bus2=37225926.1.2.3 switch=y r1=0.001 x1=0.001 r0=0.001 x0=0.001 Length=0.001 units=km
New Line.183037875 phases=3 Bus1=183037878.1.2.3 Bus2=183037877.1.2.3 switch=y r1=0.001 x1=0.001 r0=0.001 x0=0.001 Length=0.001 units=km
New Line.200814834$GS8011-3 phases=3 Bus1=200814814.1.2.3 Bus2=200814808.1.2.3 switch=y r1=0.001 x1=0.001 r0=0.001 x0=0.001 Length=0.001 units=km
New Line.PME4252-3$PME4252-4 phases=3 Bus1=37210448.1.2.3 Bus2=37210447.1.2.3 switch=y r1=0.001 x1=0.001 r0=0.001 x0=0.001 Length=0.001 units=km
New Line.183037915 phases=3 Bus1=183037918.1.2.3 Bus2=183037917.1.2.3 switch=y r1=0.001 x1=0.001 r0=0.001 x0=0.001 Length=0.001 units=km
New Line.200814825$200814834 phases=3 Bus1=200814808.1.2.3 Bus2=200814807.1.2.3 switch=y r1=0.001 x1=0.001 r0=0.001 x0=0.001 Length=0.001 units=km
New Line.207275020 phases=3 Bus1=207275023.1.2.3 Bus2=207275022.1.2.3 switch=y r1=0.001 x1=0.001 r0=0.001 x0=0.001 Length=0.001 units=km
New Line.207275051 phases=3 Bus1=207275054.1.2.3 Bus2=207275053.1.2.3 switch=y r1=0.001 x1=0.001 r0=0.001 x0=0.001 Length=0.001 units=km
New Line.239383138$P5757719 phases=3 Bus1=239383131.1.2.3 Bus2=239383132.1.2.3 switch=y r1=0.001 x1=0.001 r0=0.001 x0=0.001 Length=0.001 units=km
New Line.256244413 phases=3 Bus1=256244415.1.2.3 Bus2=256244416.1.2.3 switch=y r1=0.001 x1=0.001 r0=0.001 x0=0.001 Length=0.001 units=km
New Line.183037848 phases=3 Bus1=183037850.1.2.3 Bus2=183037851.1.2.3 switch=y r1=0.001 x1=0.001 r0=0.001 x0=0.001 Length=0.001 units=km
New Line.110249161$P5506718 phases=3 Bus1=110249154.1.2.3 Bus2=110249155.1.2.3 switch=y r1=0.001 x1=0.001 r0=0.001 x0=0.001 Length=0.001 units=km
New Line.184917156 phases=3 Bus1=184917159.1.2.3 Bus2=184917158.1.2.3 switch=y r1=0.001 x1=0.001 r0=0.001 x0=0.001 Length=0.001 units=km
New Line.37225933 phases=3 Bus1=37225935.1.2.3 Bus2=37225936.1.2.3 switch=y r1=0.001 x1=0.001 r0=0.001 x0=0.001 Length=0.001 units=km
New Line.PME8012-4$PME8012-3 phases=3 Bus1=200814946.1.2.3 Bus2=200814945.1.2.3 switch=y r1=0.001 x1=0.001 r0=0.001 x0=0.001 Length=0.001 units=km
New Line.211475605 phases=3 Bus1=211475607.1.2.3 Bus2=211475608.1.2.3 switch=y r1=0.001 x1=0.001 r0=0.001 x0=0.001 Length=0.001 units=km
New Line.PME8667-2$PME8667-1 phases=3 Bus1=256244247.1.2.3 Bus2=256244246.1.2.3 switch=y r1=0.001 x1=0.001 r0=0.001 x0=0.001 Length=0.001 units=km
New Line.PME5174-2$PME5174-1 phases=3 Bus1=37210238.1.2.3 Bus2=37210237.1.2.3 switch=y r1=0.001 x1=0.001 r0=0.001 x0=0.001 Length=0.001 units=km
New Line.99029884$P5506716 phases=3 Bus1=99029877.1.2.3 Bus2=99029878.1.2.3 switch=y r1=0.001 x1=0.001 r0=0.001 x0=0.001 Length=0.001 units=km
New Line.194153664 phases=3 Bus1=194153666.1.2.3 Bus2=194153667.1.2.3 switch=y r1=0.001 x1=0.001 r0=0.001 x0=0.001 Length=0.001 units=km
New Line.5633474:GS7272-4 phases=3 Bus1=179122006.1.2.3 Bus2=-777777179122006.1.2.3 switch=y r1=0.001 x1=0.001 r0=0.001 x0=0.001 Length=0.001 units=km enabled=false
New Line.5306542:GS3346-4 phases=3 Bus1=107694905.1.2.3 Bus2=-777777107694905.1.2.3 switch=y r1=0.001 x1=0.001 r0=0.001 x0=0.001 Length=0.001 units=km enabled=false
New Line.5370808:B5370808-1 phases=1 Bus1=37210863.1 Bus2=-77777737210863.1 switch=y r1=0.001 x1=0.001 r0=0.001 x0=0.001 Length=0.001 units=km
New Line.5300412:GS5256-2 phases=3 Bus1=28608773.1.2.3 Bus2=-77777728608773.1.2.3 switch=y r1=0.001 x1=0.001 r0=0.001 x0=0.001 Length=0.001 units=km enabled=false
New Line.5306538:S5306538-2 phases=1 Bus1=54332363.2 Bus2=-77777754332363.2 switch=y r1=0.001 x1=0.001 r0=0.001 x0=0.001 Length=0.001 units=km
New Line.5370828:RCS4403-1 phases=3 Bus1=29536373.1.2.3 Bus2=-77777729536373.1.2.3 switch=y r1=0.001 x1=0.001 r0=0.001 x0=0.001 Length=0.001 units=km enabled=false
New Line.5636504:PME7986-1 phases=3 Bus1=197749080.1.2.3 Bus2=197749063.1.2.3 switch=y r1=0.001 x1=0.001 r0=0.001 x0=0.001 Length=0.001 units=km
New Line.5337488:GS4900-1 phases=3 Bus1=37209855.1.2.3 Bus2=37209883.1.2.3 switch=y r1=0.001 x1=0.001 r0=0.001 x0=0.001 Length=0.001 units=km
New Line.5506715:PMC6251-1 phases=3 Bus1=99029922.1.2.3 Bus2=99029948.1.2.3 switch=y r1=0.001 x1=0.001 r0=0.001 x0=0.001 Length=0.001 units=km
New Line.5162173:GS1407-4 phases=3 Bus1=150145792.1.2.3 Bus2=150145823.1.2.3 switch=y r1=0.001 x1=0.001 r0=0.001 x0=0.001 Length=0.001 units=km
New Line.5506717:PME6252-1 phases=3 Bus1=99029761.1.2.3 Bus2=99029726.1.2.3 switch=y r1=0.001 x1=0.001 r0=0.001 x0=0.001 Length=0.001 units=km
New Line.5712614:GS8011-4 phases=3 Bus1=200814855.1.2.3 Bus2=200814820.1.2.3 switch=y r1=0.001 x1=0.001 r0=0.001 x0=0.001 Length=0.001 units=km
New Line.5457616:P5457616-1 phases=3 Bus1=243416203.1.2.3 Bus2=243416204.1.2.3 switch=y r1=0.001 x1=0.001 r0=0.001 x0=0.001 Length=0.001 units=km
New Line.5370809:PME4252-1 phases=3 Bus1=37210483.1.2.3 Bus2=37210448.1.2.3 switch=y r1=0.001 x1=0.001 r0=0.001 x0=0.001 Length=0.001 units=km
New Line.5506717:PME6252-2 phases=3 Bus1=99029725.1.2.3 Bus2=99029752.1.2.3 switch=y r1=0.001 x1=0.001 r0=0.001 x0=0.001 Length=0.001 units=km
New Line.5712614:GS8011-3 phases=3 Bus1=200814814.1.2.3 Bus2=200814846.1.2.3 switch=y r1=0.001 x1=0.001 r0=0.001 x0=0.001 Length=0.001 units=km
New Line.5712614:GS8011-2 phases=3 Bus1=200814808.1.2.3 Bus2=200814837.1.2.3 switch=y r1=0.001 x1=0.001 r0=0.001 x0=0.001 Length=0.001 units=km
New Line.5370809:PME4252-2 phases=3 Bus1=37210447.1.2.3 Bus2=37210474.1.2.3 switch=y r1=0.001 x1=0.001 r0=0.001 x0=0.001 Length=0.001 units=km
New Line.5162171:BS7850-T phases=3 Bus1=197009255.1.2.3 Bus2=197009239.1.2.3 switch=y r1=0.001 x1=0.001 r0=0.001 x0=0.001 Length=0.001 units=km
New Line.5712614:GS8011-1 phases=3 Bus1=200814807.1.2.3 Bus2=200814828.1.2.3 switch=y r1=0.001 x1=0.001 r0=0.001 x0=0.001 Length=0.001 units=km
New Line.5162171:BS7850-L phases=3 Bus1=197009239.1.2.3 Bus2=197009238.1.2.3 switch=y r1=0.001 x1=0.001 r0=0.001 x0=0.001 Length=0.001 units=km
New Line.5162171:BS7850-R phases=3 Bus1=197009239.1.2.3 Bus2=197009247.1.2.3 switch=y r1=0.001 x1=0.001 r0=0.001 x0=0.001 Length=0.001 units=km
New Line.5712615:PME8012-2 phases=3 Bus1=200814972.1.2.3 Bus2=200814946.1.2.3 switch=y r1=0.001 x1=0.001 r0=0.001 x0=0.001 Length=0.001 units=km
New Line.5756066:PME8667-1 phases=3 Bus1=256244264.1.2.3 Bus2=256244247.1.2.3 switch=y r1=0.001 x1=0.001 r0=0.001 x0=0.001 Length=0.001 units=km
New Line.5464182:PME5174-1 phases=3 Bus1=37210255.1.2.3 Bus2=37210238.1.2.3 switch=y r1=0.001 x1=0.001 r0=0.001 x0=0.001 Length=0.001 units=km
New Line.5370808:B5370808-2 phases=1 Bus1=37210871.1 Bus2=37210863.1 switch=y r1=0.001 x1=0.001 r0=0.001 x0=0.001 Length=0.001 units=km
New Line.5352955:P5352955-1 phases=3 Bus1=54332151.1.2.3 Bus2=54332152.1.2.3 switch=y r1=0.001 x1=0.001 r0=0.001 x0=0.001 Length=0.001 units=km
New Line.5309496:P5309496-1 phases=3 Bus1=152257225.1.2.3 Bus2=152257226.1.2.3 switch=y r1=0.001 x1=0.001 r0=0.001 x0=0.001 Length=0.001 units=km
New Line.5757718:P5757718-B phases=3 Bus1=239383045.1.2.3 Bus2=239383062.1.2.3 switch=y r1=0.001 x1=0.001 r0=0.001 x0=0.001 Length=0.001 units=km
New Line.5337489:P5337489-1 phases=3 Bus1=151395467.1.2.3 Bus2=151395468.1.2.3 switch=y r1=0.001 x1=0.001 r0=0.001 x0=0.001 Length=0.001 units=km
New Line.5337490:P5337490-1 phases=3 Bus1=37210037.1.2.3 Bus2=37210038.1.2.3 switch=y r1=0.001 x1=0.001 r0=0.001 x0=0.001 Length=0.001 units=km
New Line.5337491:P5337491-A phases=3 Bus1=151659898.1.2.3 Bus2=151659882.1.2.3 switch=y r1=0.001 x1=0.001 r0=0.001 x0=0.001 Length=0.001 units=km
New Line.5165457:P5165457-1 phases=3 Bus1=152257172.1.2.3 Bus2=152257173.1.2.3 switch=y r1=0.001 x1=0.001 r0=0.001 x0=0.001 Length=0.001 units=km
New Line.5404699:P5404699-1 phases=3 Bus1=151395558.1.2.3 Bus2=151395559.1.2.3 switch=y r1=0.001 x1=0.001 r0=0.001 x0=0.001 Length=0.001 units=km
New Line.5457615:P5457615-1 phases=3 Bus1=151395599.1.2.3 Bus2=151395600.1.2.3 switch=y r1=0.001 x1=0.001 r0=0.001 x0=0.001 Length=0.001 units=km
New Line.5337491:P5337491-B phases=3 Bus1=151659882.1.2.3 Bus2=151659881.1.2.3 switch=y r1=0.001 x1=0.001 r0=0.001 x0=0.001 Length=0.001 units=km
New Line.5337491:P5337491-T phases=3 Bus1=151659882.1.2.3 Bus2=151659890.1.2.3 switch=y r1=0.001 x1=0.001 r0=0.001 x0=0.001 Length=0.001 units=km
New Line.5404670:P5404670-A phases=3 Bus1=151659979.1.2.3 Bus2=151659980.1.2.3 switch=y r1=0.001 x1=0.001 r0=0.001 x0=0.001 Length=0.001 units=km
New Line.5404670:P5404670-T phases=3 Bus1=151659980.1.2.3 Bus2=151659988.1.2.3 switch=y r1=0.001 x1=0.001 r0=0.001 x0=0.001 Length=0.001 units=km
New Line.5404670:P5404670-B phases=3 Bus1=151659980.1.2.3 Bus2=151659997.1.2.3 switch=y r1=0.001 x1=0.001 r0=0.001 x0=0.001 Length=0.001 units=km
New Line.5464482:P5464482-1 phases=3 Bus1=37210354.1.2.3 Bus2=37210355.1.2.3 switch=y r1=0.001 x1=0.001 r0=0.001 x0=0.001 Length=0.001 units=km
New Line.5404671:P5404671-1 phases=3 Bus1=151395414.1.2.3 Bus2=151395415.1.2.3 switch=y r1=0.001 x1=0.001 r0=0.001 x0=0.001 Length=0.001 units=km
New Line.5636504:PME7986-2 phases=3 Bus1=197749062.1.2.3 Bus2=197749071.1.2.3 switch=y r1=0.001 x1=0.001 r0=0.001 x0=0.001 Length=0.001 units=km
New Line.5506717:PME6252-4 phases=3 Bus1=99029726.1.2.3 Bus2=99029743.1.2.3 switch=y r1=0.001 x1=0.001 r0=0.001 x0=0.001 Length=0.001 units=km
New Line.5506717:PME6252-3 phases=3 Bus1=99029725.1.2.3 Bus2=99029734.1.2.3 switch=y r1=0.001 x1=0.001 r0=0.001 x0=0.001 Length=0.001 units=km
New Line.5370809:PME4252-4 phases=3 Bus1=37210448.1.2.3 Bus2=37210465.1.2.3 switch=y r1=0.001 x1=0.001 r0=0.001 x0=0.001 Length=0.001 units=km enabled=false
New Line.5370809:PME4252-3 phases=3 Bus1=37210447.1.2.3 Bus2=37210456.1.2.3 switch=y r1=0.001 x1=0.001 r0=0.001 x0=0.001 Length=0.001 units=km
New Line.5712615:PME8012-3 phases=3 Bus1=200814946.1.2.3 Bus2=200814954.1.2.3 switch=y r1=0.001 x1=0.001 r0=0.001 x0=0.001 Length=0.001 units=km

! Loads
New Load.5300412 Bus1=-99999937225997.3.0 phases=1 kV=0.069282 kW=0 kvar=0 model=1
New Load.5306538 Bus1=-99999954332363.1.0 phases=1 kV=0.138564 kW=0 kvar=0 model=1
New Load.5757718 Bus1=-999999239383053.2.0 phases=1 kV=0.159926 kW=0 kvar=0 model=1
New Load.5457604 Bus1=-999999185470763.2.0 phases=1 kV=0.069282 kW=0 kvar=0 model=1
New Load.5457604_2 Bus1=-99999937225921.1.0 phases=1 kV=0.069282 kW=0 kvar=0 model=1
New Load.5165493_0 Bus1=-99999954332254.1.0 phases=1 kV=0.159926 kW=0 kvar=0 model=1
New Load.5165493_1 Bus1=-99999954332254.2.0 phases=1 kV=0.159926 kW=0 kvar=0 model=1
New Load.5165493_2 Bus1=-99999954332254.3.0 phases=1 kV=0.159926 kW=0 kvar=0 model=1
New Load.5464482_0 Bus1=-99999937210355.1.0 phases=1 kV=0.159926 kW=0 kvar=0 model=1
New Load.5464482_1 Bus1=-99999937210355.2.0 phases=1 kV=0.159926 kW=0 kvar=0 model=1
New Load.5464482_2 Bus1=-99999937210355.3.0 phases=1 kV=0.159926 kW=0 kvar=0 model=1
New Load.5404670_0 Bus1=-999999151659988.1.0 phases=1 kV=0.159926 kW=0 kvar=0 model=1
New Load.5404670_1 Bus1=-999999151659988.2.0 phases=1 kV=0.159926 kW=0 kvar=0 model=1
New Load.5404670_2 Bus1=-999999151659988.3.0 phases=1 kV=0.159926 kW=0 kvar=0 model=1
New Load.5162171 Bus1=-99999954335244.2.0 phases=1 kV=0.069282 kW=0 kvar=0 model=1
New Load.5757719 Bus1=-999999239383132.1.0 phases=1 kV=0.069282 kW=0 kvar=0 model=1
New Load.5370808 Bus1=-99999937210863.1.0 phases=1 kV=0.069282 kW=0 kvar=0 model=1
New Load.5506716_0 Bus1=-99999999029878.1.0 phases=1 kV=0.159926 kW=0 kvar=0 model=1
New Load.5506716_1 Bus1=-99999999029878.2.0 phases=1 kV=0.159926 kW=0 kvar=0 model=1
New Load.5506716_2 Bus1=-99999999029878.3.0 phases=1 kV=0.159926 kW=0 kvar=0 model=1
New Load.5300411_0 Bus1=-999999196842233.1.0 phases=1 kV=0.159926 kW=0 kvar=0 model=1
New Load.5300411_1 Bus1=-999999196842233.2.0 phases=1 kV=0.159926 kW=0 kvar=0 model=1
New Load.5300411_2 Bus1=-999999196842233.3.0 phases=1 kV=0.159926 kW=0 kvar=0 model=1
New Load.5457617_0 Bus1=-999999151395518.1.0 phases=1 kV=0.159926 kW=0 kvar=0 model=1
New Load.5457617_1 Bus1=-999999151395518.2.0 phases=1 kV=0.159926 kW=0 kvar=0 model=1
New Load.5457617_2 Bus1=-999999151395518.3.0 phases=1 kV=0.159926 kW=0 kvar=0 model=1
New Load.5352955_0 Bus1=-99999954332152.1.0 phases=1 kV=0.159926 kW=0 kvar=0 model=1
New Load.5352955_1 Bus1=-99999954332152.2.0 phases=1 kV=0.159926 kW=0 kvar=0 model=1
New Load.5352955_2 Bus1=-99999954332152.3.0 phases=1 kV=0.159926 kW=0 kvar=0 model=1
New Load.5712617_0 Bus1=-999999200815206.1.0 phases=1 kV=0.159926 kW=0 kvar=0 model=1
New Load.5712617_1 Bus1=-999999200815206.2.0 phases=1 kV=0.159926 kW=0 kvar=0 model=1
New Load.5712617_2 Bus1=-999999200815206.3.0 phases=1 kV=0.159926 kW=0 kvar=0 model=1
New Load.5351072_0 Bus1=-99999937210986.1.0 phases=1 kV=0.159926 kW=0 kvar=0 model=1
New Load.5351072_1 Bus1=-99999937210986.2.0 phases=1 kV=0.159926 kW=0 kvar=0 model=1
New Load.5351072_2 Bus1=-99999937210986.3.0 phases=1 kV=0.159926 kW=0 kvar=0 model=1
New Load.5458193_0 Bus1=-99999937210403.1.0 phases=1 kV=0.159926 kW=0 kvar=0 model=1
New Load.5458193_1 Bus1=-99999937210403.2.0 phases=1 kV=0.159926 kW=0 kvar=0 model=1
New Load.5458193_2 Bus1=-99999937210403.3.0 phases=1 kV=0.159926 kW=0 kvar=0 model=1
New Load.5404671_0 Bus1=-999999151395415.1.0 phases=1 kV=0.159926 kW=0 kvar=0 model=1
New Load.5404671_1 Bus1=-999999151395415.2.0 phases=1 kV=0.159926 kW=0 kvar=0 model=1
New Load.5404671_2 Bus1=-999999151395415.3.0 phases=1 kV=0.159926 kW=0 kvar=0 model=1
New Load.5574419_0 Bus1=-99999997327927.1.0 phases=1 kV=0.159926 kW=0 kvar=0 model=1
New Load.5574419_1 Bus1=-99999997327927.2.0 phases=1 kV=0.159926 kW=0 kvar=0 model=1
New Load.5574419_2 Bus1=-99999997327927.3.0 phases=1 kV=0.159926 kW=0 kvar=0 model=1
New Load.5370828 Bus1=-999999187146059.1.0 phases=1 kV=0.069282 kW=0 kvar=0 model=1
New Load.5617708_0 Bus1=-999999174936033.1.0 phases=1 kV=0.159926 kW=0 kvar=0 model=1
New Load.5617708_1 Bus1=-999999174936033.2.0 phases=1 kV=0.159926 kW=0 kvar=0 model=1
New Load.5617708_2 Bus1=-999999174936033.3.0 phases=1 kV=0.159926 kW=0 kvar=0 model=1
New Load.5457615_0 Bus1=-999999151395600.1.0 phases=1 kV=0.159926 kW=0 kvar=0 model=1
New Load.5457615_1 Bus1=-999999151395600.2.0 phases=1 kV=0.159926 kW=0 kvar=0 model=1
New Load.5457615_2 Bus1=-999999151395600.3.0 phases=1 kV=0.159926 kW=0 kvar=0 model=1
New Load.5337491 Bus1=-999999151659890.3.0 phases=1 kV=0.159926 kW=0 kvar=0 model=1
New Load.5404699_0 Bus1=-999999151395559.1.0 phases=1 kV=0.159926 kW=0 kvar=0 model=1
New Load.5404699_1 Bus1=-999999151395559.2.0 phases=1 kV=0.159926 kW=0 kvar=0 model=1
New Load.5404699_2 Bus1=-999999151395559.3.0 phases=1 kV=0.159926 kW=0 kvar=0 model=1
New Load.5457616_0 Bus1=-999999243416204.1.0 phases=1 kV=0.159926 kW=0 kvar=0 model=1
New Load.5457616_1 Bus1=-999999243416204.2.0 phases=1 kV=0.159926 kW=0 kvar=0 model=1
New Load.5457616_2 Bus1=-999999243416204.3.0 phases=1 kV=0.159926 kW=0 kvar=0 model=1
New Load.5165457_0 Bus1=-999999152257173.1.0 phases=1 kV=0.159926 kW=0 kvar=0 model=1
New Load.5165457_1 Bus1=-999999152257173.2.0 phases=1 kV=0.159926 kW=0 kvar=0 model=1
New Load.5165457_2 Bus1=-999999152257173.3.0 phases=1 kV=0.159926 kW=0 kvar=0 model=1
New Load.5337489_0 Bus1=-999999151395468.1.0 phases=1 kV=0.159926 kW=0 kvar=0 model=1
New Load.5337489_1 Bus1=-999999151395468.2.0 phases=1 kV=0.159926 kW=0 kvar=0 model=1
New Load.5337489_2 Bus1=-999999151395468.3.0 phases=1 kV=0.159926 kW=0 kvar=0 model=1
New Load.5337490_0 Bus1=-99999937210038.1.0 phases=1 kV=0.159926 kW=0 kvar=0 model=1
New Load.5337490_1 Bus1=-99999937210038.2.0 phases=1 kV=0.159926 kW=0 kvar=0 model=1
New Load.5337490_2 Bus1=-99999937210038.3.0 phases=1 kV=0.159926 kW=0 kvar=0 model=1
New Load.5337488 Bus1=-99999937210136.1.0 phases=1 kV=0.069282 kW=0 kvar=0 model=1
New Load.5506718_0 Bus1=-999999110249155.1.0 phases=1 kV=0.159926 kW=0 kvar=0 model=1
New Load.5506718_1 Bus1=-999999110249155.2.0 phases=1 kV=0.159926 kW=0 kvar=0 model=1
New Load.5506718_2 Bus1=-999999110249155.3.0 phases=1 kV=0.159926 kW=0 kvar=0 model=1
New Load.5757717 Bus1=-999999239382964.3.0 phases=1 kV=0.159926 kW=0 kvar=0 model=1
New Load.5396959_0 Bus1=-999999152257373.1.0 phases=1 kV=0.159926 kW=0 kvar=0 model=1
New Load.5396959_1 Bus1=-999999152257373.2.0 phases=1 kV=0.159926 kW=0 kvar=0 model=1
New Load.5396959_2 Bus1=-999999152257373.3.0 phases=1 kV=0.159926 kW=0 kvar=0 model=1
New Load.5340807_0 Bus1=-99999937210833.1.0 phases=1 kV=0.159926 kW=0 kvar=0 model=1
New Load.5340807_1 Bus1=-99999937210833.2.0 phases=1 kV=0.159926 kW=0 kvar=0 model=1
New Load.5340807_2 Bus1=-99999937210833.3.0 phases=1 kV=0.159926 kW=0 kvar=0 model=1
New Load.5309496_0 Bus1=-999999152257226.1.0 phases=1 kV=0.159926 kW=0 kvar=0 model=1
New Load.5309496_1 Bus1=-999999152257226.2.0 phases=1 kV=0.159926 kW=0 kvar=0 model=1
New Load.5309496_2 Bus1=-999999152257226.3.0 phases=1 kV=0.159926 kW=0 kvar=0 model=1
New Load.5636503_0 Bus1=-999999197749002.1.0 phases=1 kV=0.159926 kW=0 kvar=0 model=1
New Load.5636503_1 Bus1=-999999197749002.2.0 phases=1 kV=0.159926 kW=0 kvar=0 model=1
New Load.5636503_2 Bus1=-999999197749002.3.0 phases=1 kV=0.159926 kW=0 kvar=0 model=1
New Load.5633474 Bus1=-999999190916600.1.0 phases=1 kV=0.069282 kW=0 kvar=0 model=1
New Load.5165677_0 Bus1=-99999954334651.1.0 phases=1 kV=0.159926 kW=0 kvar=0 model=1
New Load.5165677_1 Bus1=-99999954334651.2.0 phases=1 kV=0.159926 kW=0 kvar=0 model=1
New Load.5165677_2 Bus1=-99999954334651.3.0 phases=1 kV=0.159926 kW=0 kvar=0 model=1
New Load.5464183_0 Bus1=-99999937210322.1.0 phases=1 kV=0.159926 kW=0 kvar=0 model=1
New Load.5464183_1 Bus1=-99999937210322.2.0 phases=1 kV=0.159926 kW=0 kvar=0 model=1
New Load.5464183_2 Bus1=-99999937210322.3.0 phases=1 kV=0.159926 kW=0 kvar=0 model=1
New Load.5315566_0 Bus1=-99999954334683.1.0 phases=1 kV=0.159926 kW=0 kvar=0 model=1
New Load.5315566_1 Bus1=-99999954334683.2.0 phases=1 kV=0.159926 kW=0 kvar=0 model=1
New Load.5315566_2 Bus1=-99999954334683.3.0 phases=1 kV=0.159926 kW=0 kvar=0 model=1
New Load.5712618_0 Bus1=-999999200815181.1.0 phases=1 kV=0.159926 kW=0 kvar=0 model=1
New Load.5712618_1 Bus1=-999999200815181.2.0 phases=1 kV=0.159926 kW=0 kvar=0 model=1
New Load.5712618_2 Bus1=-999999200815181.3.0 phases=1 kV=0.159926 kW=0 kvar=0 model=1
New Load.5756067_0 Bus1=-999999256244326.1.0 phases=1 kV=0.159926 kW=0 kvar=0 model=1
New Load.5756067_1 Bus1=-999999256244326.2.0 phases=1 kV=0.159926 kW=0 kvar=0 model=1
New Load.5756067_2 Bus1=-999999256244326.3.0 phases=1 kV=0.159926 kW=0 kvar=0 model=1
New Load.5048328 Bus1=-999999239382903.1.0 phases=1 kV=0.069282 kW=0 kvar=0 model=1

! Generators
New Generator.SBP-116232_PHOTOVOLTAIC_0 Bus1=-99999937210986.1.0 phases=1 kV=0.159926 kW=0 kvar=0 model=7
New Generator.SBP-116232_PHOTOVOLTAIC_1 Bus1=-99999937210986.2.0 phases=1 kV=0.159926 kW=0 kvar=0 model=7
New Generator.SBP-116232_PHOTOVOLTAIC_2 Bus1=-99999937210986.3.0 phases=1 kV=0.159926 kW=0 kvar=0 model=7
New Generator.500150216_PHOTOVOLTAIC_0 Bus1=-99999954334683.1.0 phases=1 kV=0.159926 kW=0 kvar=0 model=7
New Generator.500150216_PHOTOVOLTAIC_1 Bus1=-99999954334683.2.0 phases=1 kV=0.159926 kW=0 kvar=0 model=7
New Generator.500150216_PHOTOVOLTAIC_2 Bus1=-99999954334683.3.0 phases=1 kV=0.159926 kW=0 kvar=0 model=7

! Transformers
New Transformer.293588B3998DEE34E0637F61810A7CE3_0_0 phases=1 windings=2 xhl=0.5 %R=0.353554 %imag=1e-06 %noloadloss=0
~ wdg=1 bus=99029878.1.2 kV=12 kVA=833.333 conn=delta
~ wdg=2 bus=-99999999029878.1.0 kV=0.159926 kVA=833.333 conn=wye
New Transformer.293588B3998DEE34E0637F61810A7CE3_0_1 phases=1 windings=2 xhl=0.5 %R=0.353554 %imag=1e-06 %noloadloss=0
~ wdg=1 bus=99029878.2.3 kV=12 kVA=833.333 conn=delta
~ wdg=2 bus=-99999999029878.2.0 kV=0.159926 kVA=833.333 conn=wye
New Transformer.293588B3998DEE34E0637F61810A7CE3_0_2 phases=1 windings=2 xhl=0.5 %R=0.353554 %imag=1e-06 %noloadloss=0
~ wdg=1 bus=99029878.3.1 kV=12 kVA=833.333 conn=delta
~ wdg=2 bus=-99999999029878.3.0 kV=0.159926 kVA=833.333 conn=wye
New Transformer.293588B1C40EEE34E0637F61810A7CE3_1_0 phases=1 windings=2 xhl=0.5 %R=0.353554 %imag=1e-06 %noloadloss=0
~ wdg=1 bus=37225997.3.0 kV=6.9282 kVA=50 conn=wye
~ wdg=2 bus=-99999937225997.3.0 kV=0.069282 kVA=50 conn=wye
New Transformer.293588B49AA9EE34E0637F61810A7CE3_2_0 phases=1 windings=2 xhl=0.5 %R=0.353554 %imag=1e-06 %noloadloss=0
~ wdg=1 bus=200815206.1.2 kV=12 kVA=833.333 conn=delta
~ wdg=2 bus=-999999200815206.1.0 kV=0.159926 kVA=833.333 conn=wye
New Transformer.293588B49AA9EE34E0637F61810A7CE3_2_1 phases=1 windings=2 xhl=0.5 %R=0.353554 %imag=1e-06 %noloadloss=0
~ wdg=1 bus=200815206.2.3 kV=12 kVA=833.333 conn=delta
~ wdg=2 bus=-999999200815206.2.0 kV=0.159926 kVA=833.333 conn=wye
New Transformer.293588B49AA9EE34E0637F61810A7CE3_2_2 phases=1 windings=2 xhl=0.5 %R=0.353554 %imag=1e-06 %noloadloss=0
~ wdg=1 bus=200815206.3.1 kV=12 kVA=833.333 conn=delta
~ wdg=2 bus=-999999200815206.3.0 kV=0.159926 kVA=833.333 conn=wye
New Transformer.293588B49AA8EE34E0637F61810A7CE3_3_0 phases=1 windings=2 xhl=0.5 %R=0.353554 %imag=1e-06 %noloadloss=0
~ wdg=1 bus=200815181.1.2 kV=12 kVA=833.333 conn=delta
~ wdg=2 bus=-999999200815181.1.0 kV=0.159926 kVA=833.333 conn=wye
New Transformer.293588B49AA8EE34E0637F61810A7CE3_3_1 phases=1 windings=2 xhl=0.5 %R=0.353554 %imag=1e-06 %noloadloss=0
~ wdg=1 bus=200815181.2.3 kV=12 kVA=833.333 conn=delta
~ wdg=2 bus=-999999200815181.2.0 kV=0.159926 kVA=833.333 conn=wye
New Transformer.293588B49AA8EE34E0637F61810A7CE3_3_2 phases=1 windings=2 xhl=0.5 %R=0.353554 %imag=1e-06 %noloadloss=0
~ wdg=1 bus=200815181.3.1 kV=12 kVA=833.333 conn=delta
~ wdg=2 bus=-999999200815181.3.0 kV=0.159926 kVA=833.333 conn=wye
New Transformer.293588B4FF24EE34E0637F61810A7CE3_4_0 phases=1 windings=2 xhl=0.5 %R=0.353554 %imag=1e-06 %noloadloss=0
~ wdg=1 bus=256244326.1.2 kV=12 kVA=500 conn=delta
~ wdg=2 bus=-999999256244326.1.0 kV=0.159926 kVA=500 conn=wye
New Transformer.293588B4FF24EE34E0637F61810A7CE3_4_1 phases=1 windings=2 xhl=0.5 %R=0.353554 %imag=1e-06 %noloadloss=0
~ wdg=1 bus=256244326.2.3 kV=12 kVA=500 conn=delta
~ wdg=2 bus=-999999256244326.2.0 kV=0.159926 kVA=500 conn=wye
New Transformer.293588B4FF24EE34E0637F61810A7CE3_4_2 phases=1 windings=2 xhl=0.5 %R=0.353554 %imag=1e-06 %noloadloss=0
~ wdg=1 bus=256244326.3.1 kV=12 kVA=500 conn=delta
~ wdg=2 bus=-999999256244326.3.0 kV=0.159926 kVA=500 conn=wye
New Transformer.293588B1C3CBEE34E0637F61810A7CE3_5_0 phases=1 windings=2 xhl=0.5 %R=0.353554 %imag=1e-06 %noloadloss=0
~ wdg=1 bus=37210986.1.2 kV=12 kVA=166.667 conn=delta
~ wdg=2 bus=-99999937210986.1.0 kV=0.159926 kVA=166.667 conn=wye
New Transformer.293588B1C3CBEE34E0637F61810A7CE3_5_1 phases=1 windings=2 xhl=0.5 %R=0.353554 %imag=1e-06 %noloadloss=0
~ wdg=1 bus=37210986.2.3 kV=12 kVA=166.667 conn=delta
~ wdg=2 bus=-99999937210986.2.0 kV=0.159926 kVA=166.667 conn=wye
New Transformer.293588B1C3CBEE34E0637F61810A7CE3_5_2 phases=1 windings=2 xhl=0.5 %R=0.353554 %imag=1e-06 %noloadloss=0
~ wdg=1 bus=37210986.3.1 kV=12 kVA=166.667 conn=delta
~ wdg=2 bus=-99999937210986.3.0 kV=0.159926 kVA=166.667 conn=wye
New Transformer.293588B1C39AEE34E0637F61810A7CE3_6_0 phases=1 windings=2 xhl=0.5 %R=0.353554 %imag=1e-06 %noloadloss=0
~ wdg=1 bus=37210403.1.2 kV=12 kVA=75 conn=delta
~ wdg=2 bus=-99999937210403.1.0 kV=0.159926 kVA=75 conn=wye
New Transformer.293588B1C39AEE34E0637F61810A7CE3_6_1 phases=1 windings=2 xhl=0.5 %R=0.353554 %imag=1e-06 %noloadloss=0
~ wdg=1 bus=37210403.2.3 kV=12 kVA=75 conn=delta
~ wdg=2 bus=-99999937210403.2.0 kV=0.159926 kVA=75 conn=wye
New Transformer.293588B1C39AEE34E0637F61810A7CE3_6_2 phases=1 windings=2 xhl=0.5 %R=0.353554 %imag=1e-06 %noloadloss=0
~ wdg=1 bus=37210403.3.1 kV=12 kVA=75 conn=delta
~ wdg=2 bus=-99999937210403.3.0 kV=0.159926 kVA=75 conn=wye
New Transformer.293588B4041EEE34E0637F61810A7CE3_7_0 phases=1 windings=2 xhl=0.5 %R=0.353554 %imag=1e-06 %noloadloss=0
~ wdg=1 bus=151395415.1.2 kV=12 kVA=166.667 conn=delta
~ wdg=2 bus=-999999151395415.1.0 kV=0.159926 kVA=166.667 conn=wye
New Transformer.293588B4041EEE34E0637F61810A7CE3_7_1 phases=1 windings=2 xhl=0.5 %R=0.353554 %imag=1e-06 %noloadloss=0
~ wdg=1 bus=151395415.2.3 kV=12 kVA=166.667 conn=delta
~ wdg=2 bus=-999999151395415.2.0 kV=0.159926 kVA=166.667 conn=wye
New Transformer.293588B4041EEE34E0637F61810A7CE3_7_2 phases=1 windings=2 xhl=0.5 %R=0.353554 %imag=1e-06 %noloadloss=0
~ wdg=1 bus=151395415.3.1 kV=12 kVA=166.667 conn=delta
~ wdg=2 bus=-999999151395415.3.0 kV=0.159926 kVA=166.667 conn=wye
New Transformer.293588B1C39BEE34E0637F61810A7CE3_8_0 phases=1 windings=2 xhl=0.5 %R=0.353554 %imag=1e-06 %noloadloss=0
~ wdg=1 bus=37210833.1.2 kV=12 kVA=100 conn=delta
~ wdg=2 bus=-99999937210833.1.0 kV=0.159926 kVA=100 conn=wye
New Transformer.293588B1C39BEE34E0637F61810A7CE3_8_1 phases=1 windings=2 xhl=0.5 %R=0.353554 %imag=1e-06 %noloadloss=0
~ wdg=1 bus=37210833.2.3 kV=12 kVA=100 conn=delta
~ wdg=2 bus=-99999937210833.2.0 kV=0.159926 kVA=100 conn=wye
New Transformer.293588B1C39BEE34E0637F61810A7CE3_8_2 phases=1 windings=2 xhl=0.5 %R=0.353554 %imag=1e-06 %noloadloss=0
~ wdg=1 bus=37210833.3.1 kV=12 kVA=100 conn=delta
~ wdg=2 bus=-99999937210833.3.0 kV=0.159926 kVA=100 conn=wye
New Transformer.293588B2B9B6EE34E0637F61810A7CE3_9_0 phases=1 windings=2 xhl=0.5 %R=0.353554 %imag=1e-06 %noloadloss=0
~ wdg=1 bus=54334651.1.2 kV=12 kVA=500 conn=delta
~ wdg=2 bus=-99999954334651.1.0 kV=0.159926 kVA=500 conn=wye
New Transformer.293588B2B9B6EE34E0637F61810A7CE3_9_1 phases=1 windings=2 xhl=0.5 %R=0.353554 %imag=1e-06 %noloadloss=0
~ wdg=1 bus=54334651.2.3 kV=12 kVA=500 conn=delta
~ wdg=2 bus=-99999954334651.2.0 kV=0.159926 kVA=500 conn=wye
New Transformer.293588B2B9B6EE34E0637F61810A7CE3_9_2 phases=1 windings=2 xhl=0.5 %R=0.353554 %imag=1e-06 %noloadloss=0
~ wdg=1 bus=54334651.3.1 kV=12 kVA=500 conn=delta
~ wdg=2 bus=-99999954334651.3.0 kV=0.159926 kVA=500 conn=wye
New Transformer.293588B1C398EE34E0637F61810A7CE3_10_0 phases=1 windings=2 xhl=0.5 %R=0.353554 %imag=1e-06 %noloadloss=0
~ wdg=1 bus=37210322.1.2 kV=12 kVA=500 conn=delta
~ wdg=2 bus=-99999937210322.1.0 kV=0.159926 kVA=500 conn=wye
New Transformer.293588B1C398EE34E0637F61810A7CE3_10_1 phases=1 windings=2 xhl=0.5 %R=0.353554 %imag=1e-06 %noloadloss=0
~ wdg=1 bus=37210322.2.3 kV=12 kVA=500 conn=delta
~ wdg=2 bus=-99999937210322.2.0 kV=0.159926 kVA=500 conn=wye
New Transformer.293588B1C398EE34E0637F61810A7CE3_10_2 phases=1 windings=2 xhl=0.5 %R=0.353554 %imag=1e-06 %noloadloss=0
~ wdg=1 bus=37210322.3.1 kV=12 kVA=500 conn=delta
~ wdg=2 bus=-99999937210322.3.0 kV=0.159926 kVA=500 conn=wye
New Transformer.293588B2B9B7EE34E0637F61810A7CE3_11_0 phases=1 windings=2 xhl=0.5 %R=0.353554 %imag=1e-06 %noloadloss=0
~ wdg=1 bus=54334683.1.2 kV=12 kVA=500 conn=delta
~ wdg=2 bus=-99999954334683.1.0 kV=0.159926 kVA=500 conn=wye
New Transformer.293588B2B9B7EE34E0637F61810A7CE3_11_1 phases=1 windings=2 xhl=0.5 %R=0.353554 %imag=1e-06 %noloadloss=0
~ wdg=1 bus=54334683.2.3 kV=12 kVA=500 conn=delta
~ wdg=2 bus=-99999954334683.2.0 kV=0.159926 kVA=500 conn=wye
New Transformer.293588B2B9B7EE34E0637F61810A7CE3_11_2 phases=1 windings=2 xhl=0.5 %R=0.353554 %imag=1e-06 %noloadloss=0
~ wdg=1 bus=54334683.3.1 kV=12 kVA=500 conn=delta
~ wdg=2 bus=-99999954334683.3.0 kV=0.159926 kVA=500 conn=wye
New Transformer.293588B39B12EE34E0637F61810A7CE3_12_0 phases=1 windings=2 xhl=0.5 %R=0.353554 %imag=1e-06 %noloadloss=0
~ wdg=1 bus=97327927.1.2 kV=12 kVA=500 conn=delta
~ wdg=2 bus=-99999997327927.1.0 kV=0.159926 kVA=500 conn=wye
New Transformer.293588B39B12EE34E0637F61810A7CE3_12_1 phases=1 windings=2 xhl=0.5 %R=0.353554 %imag=1e-06 %noloadloss=0
~ wdg=1 bus=97327927.2.3 kV=12 kVA=500 conn=delta
~ wdg=2 bus=-99999997327927.2.0 kV=0.159926 kVA=500 conn=wye
New Transformer.293588B39B12EE34E0637F61810A7CE3_12_2 phases=1 windings=2 xhl=0.5 %R=0.353554 %imag=1e-06 %noloadloss=0
~ wdg=1 bus=97327927.3.1 kV=12 kVA=500 conn=delta
~ wdg=2 bus=-99999997327927.3.0 kV=0.159926 kVA=500 conn=wye
New Transformer.293588B1C3CAEE34E0637F61810A7CE3_13_0 phases=1 windings=2 xhl=0.5 %R=0.353554 %imag=1e-06 %noloadloss=0
~ wdg=1 bus=37210863.1.0 kV=6.9282 kVA=25 conn=wye
~ wdg=2 bus=-99999937210863.1.0 kV=0.069282 kVA=25 conn=wye
New Transformer.293588B2B9AAEE34E0637F61810A7CE3_14_0 phases=1 windings=2 xhl=0.5 %R=0.353554 %imag=1e-06 %noloadloss=0
~ wdg=1 bus=54332363.1.0 kV=6.9282 kVA=25 conn=wye
~ wdg=2 bus=-99999954332363.1.0 kV=0.138564 kVA=25 conn=wye
New Transformer.293588B48F92EE34E0637F61810A7CE3_15_0 phases=1 windings=2 xhl=0.5 %R=0.353554 %imag=1e-06 %noloadloss=0
~ wdg=1 bus=196842233.1.2 kV=12 kVA=166.667 conn=delta
~ wdg=2 bus=-999999196842233.1.0 kV=0.159926 kVA=166.667 conn=wye
New Transformer.293588B48F92EE34E0637F61810A7CE3_15_1 phases=1 windings=2 xhl=0.5 %R=0.353554 %imag=1e-06 %noloadloss=0
~ wdg=1 bus=196842233.2.3 kV=12 kVA=166.667 conn=delta
~ wdg=2 bus=-999999196842233.2.0 kV=0.159926 kVA=166.667 conn=wye
New Transformer.293588B48F92EE34E0637F61810A7CE3_15_2 phases=1 windings=2 xhl=0.5 %R=0.353554 %imag=1e-06 %noloadloss=0
~ wdg=1 bus=196842233.3.1 kV=12 kVA=166.667 conn=delta
~ wdg=2 bus=-999999196842233.3.0 kV=0.159926 kVA=166.667 conn=wye
New Transformer.293588B45D28EE34E0637F61810A7CE3_16_0 phases=1 windings=2 xhl=0.5 %R=0.353554 %imag=1e-06 %noloadloss=0
~ wdg=1 bus=174936033.1.2 kV=12 kVA=100 conn=delta
~ wdg=2 bus=-999999174936033.1.0 kV=0.159926 kVA=100 conn=wye
New Transformer.293588B45D28EE34E0637F61810A7CE3_16_1 phases=1 windings=2 xhl=0.5 %R=0.353554 %imag=1e-06 %noloadloss=0
~ wdg=1 bus=174936033.2.3 kV=12 kVA=100 conn=delta
~ wdg=2 bus=-999999174936033.2.0 kV=0.159926 kVA=100 conn=wye
New Transformer.293588B45D28EE34E0637F61810A7CE3_16_2 phases=1 windings=2 xhl=0.5 %R=0.353554 %imag=1e-06 %noloadloss=0
~ wdg=1 bus=174936033.3.1 kV=12 kVA=100 conn=delta
~ wdg=2 bus=-999999174936033.3.0 kV=0.159926 kVA=100 conn=wye
New Transformer.293588B312E7EE34E0637F61810A7CE3_17_0 phases=1 windings=2 xhl=0.5 %R=0.353554 %imag=1e-06 %noloadloss=0
~ wdg=1 bus=239382903.1.0 kV=6.9282 kVA=25 conn=wye
~ wdg=2 bus=-999999239382903.1.0 kV=0.069282 kVA=25 conn=wye
New Transformer.293588B1C40DEE34E0637F61810A7CE3_18_0 phases=1 windings=2 xhl=0.5 %R=0.353554 %imag=1e-06 %noloadloss=0
~ wdg=1 bus=37225921.1.0 kV=6.9282 kVA=25 conn=wye
~ wdg=2 bus=-99999937225921.1.0 kV=0.069282 kVA=25 conn=wye
New Transformer.293588B40420EE34E0637F61810A7CE3_19_0 phases=1 windings=2 xhl=0.5 %R=0.353554 %imag=1e-06 %noloadloss=0
~ wdg=1 bus=151395518.1.2 kV=12 kVA=166.667 conn=delta
~ wdg=2 bus=-999999151395518.1.0 kV=0.159926 kVA=166.667 conn=wye
New Transformer.293588B40420EE34E0637F61810A7CE3_19_1 phases=1 windings=2 xhl=0.5 %R=0.353554 %imag=1e-06 %noloadloss=0
~ wdg=1 bus=151395518.2.3 kV=12 kVA=166.667 conn=delta
~ wdg=2 bus=-999999151395518.2.0 kV=0.159926 kVA=166.667 conn=wye
New Transformer.293588B40420EE34E0637F61810A7CE3_19_2 phases=1 windings=2 xhl=0.5 %R=0.353554 %imag=1e-06 %noloadloss=0
~ wdg=1 bus=151395518.3.1 kV=12 kVA=166.667 conn=delta
~ wdg=2 bus=-999999151395518.3.0 kV=0.159926 kVA=166.667 conn=wye
New Transformer.293588B0E896EE34E0637F61810A7CE3_20_0 phases=1 windings=2 xhl=0.5 %R=0.353554 %imag=1e-06 %noloadloss=0
~ wdg=1 bus=239382964.3.0 kV=6.9282 kVA=75 conn=wye
~ wdg=2 bus=-999999239382964.3.0 kV=0.159926 kVA=75 conn=wye
New Transformer.293588B4773DEE34E0637F61810A7CE3_21_0 phases=1 windings=2 xhl=0.5 %R=0.353554 %imag=1e-06 %noloadloss=0
~ wdg=1 bus=187146059.1.0 kV=6.9282 kVA=25 conn=wye
~ wdg=2 bus=-999999187146059.1.0 kV=0.069282 kVA=25 conn=wye
New Transformer.293588B419A9EE34E0637F61810A7CE3_22_0 phases=1 windings=2 xhl=0.5 %R=0.353554 %imag=1e-06 %noloadloss=0
~ wdg=1 bus=152257373.1.2 kV=12 kVA=166.667 conn=delta
~ wdg=2 bus=-999999152257373.1.0 kV=0.159926 kVA=166.667 conn=wye
New Transformer.293588B419A9EE34E0637F61810A7CE3_22_1 phases=1 windings=2 xhl=0.5 %R=0.353554 %imag=1e-06 %noloadloss=0
~ wdg=1 bus=152257373.2.3 kV=12 kVA=166.667 conn=delta
~ wdg=2 bus=-999999152257373.2.0 kV=0.159926 kVA=166.667 conn=wye
New Transformer.293588B419A9EE34E0637F61810A7CE3_22_2 phases=1 windings=2 xhl=0.5 %R=0.353554 %imag=1e-06 %noloadloss=0
~ wdg=1 bus=152257373.3.1 kV=12 kVA=166.667 conn=delta
~ wdg=2 bus=-999999152257373.3.0 kV=0.159926 kVA=166.667 conn=wye
New Transformer.293588B480E0EE34E0637F61810A7CE3_23_0 phases=1 windings=2 xhl=0.5 %R=0.353554 %imag=1e-06 %noloadloss=0
~ wdg=1 bus=190916600.1.0 kV=6.9282 kVA=75 conn=wye
~ wdg=2 bus=-999999190916600.1.0 kV=0.069282 kVA=75 conn=wye
New Transformer.293588B470E7EE34E0637F61810A7CE3_24_0 phases=1 windings=2 xhl=0.5 %R=0.353554 %imag=1e-06 %noloadloss=0
~ wdg=1 bus=185470763.2.0 kV=6.9282 kVA=75 conn=wye
~ wdg=2 bus=-999999185470763.2.0 kV=0.069282 kVA=75 conn=wye
New Transformer.293588B2B9B8EE34E0637F61810A7CE3_25_0 phases=1 windings=2 xhl=0.5 %R=0.353554 %imag=1e-06 %noloadloss=0
~ wdg=1 bus=54335244.2.0 kV=6.9282 kVA=25 conn=wye
~ wdg=2 bus=-99999954335244.2.0 kV=0.069282 kVA=25 conn=wye
New Transformer.293588B1C397EE34E0637F61810A7CE3_26_0 phases=1 windings=2 xhl=0.5 %R=0.353554 %imag=1e-06 %noloadloss=0
~ wdg=1 bus=37210136.1.0 kV=6.9282 kVA=25 conn=wye
~ wdg=2 bus=-99999937210136.1.0 kV=0.069282 kVA=25 conn=wye
New Transformer.293588B4F312EE34E0637F61810A7CE3_27_0 phases=1 windings=2 xhl=0.5 %R=0.353554 %imag=1e-06 %noloadloss=0
~ wdg=1 bus=243416204.1.2 kV=12 kVA=50 conn=delta
~ wdg=2 bus=-999999243416204.1.0 kV=0.159926 kVA=50 conn=wye
New Transformer.293588B4F312EE34E0637F61810A7CE3_27_1 phases=1 windings=2 xhl=0.5 %R=0.353554 %imag=1e-06 %noloadloss=0
~ wdg=1 bus=243416204.2.3 kV=12 kVA=50 conn=delta
~ wdg=2 bus=-999999243416204.2.0 kV=0.159926 kVA=50 conn=wye
New Transformer.293588B4F312EE34E0637F61810A7CE3_27_2 phases=1 windings=2 xhl=0.5 %R=0.353554 %imag=1e-06 %noloadloss=0
~ wdg=1 bus=243416204.3.1 kV=12 kVA=50 conn=delta
~ wdg=2 bus=-999999243416204.3.0 kV=0.159926 kVA=50 conn=wye
New Transformer.293588B4EAE1EE34E0637F61810A7CE3_28_0 phases=1 windings=2 xhl=0.5 %R=0.353554 %imag=1e-06 %noloadloss=0
~ wdg=1 bus=239383132.1.0 kV=6.9282 kVA=25 conn=wye
~ wdg=2 bus=-999999239383132.1.0 kV=0.069282 kVA=25 conn=wye
New Transformer.293588B3DB76EE34E0637F61810A7CE3_29_0 phases=1 windings=2 xhl=0.5 %R=0.353554 %imag=1e-06 %noloadloss=0
~ wdg=1 bus=110249155.1.2 kV=12 kVA=833.333 conn=delta
~ wdg=2 bus=-999999110249155.1.0 kV=0.159926 kVA=833.333 conn=wye
New Transformer.293588B3DB76EE34E0637F61810A7CE3_29_1 phases=1 windings=2 xhl=0.5 %R=0.353554 %imag=1e-06 %noloadloss=0
~ wdg=1 bus=110249155.2.3 kV=12 kVA=833.333 conn=delta
~ wdg=2 bus=-999999110249155.2.0 kV=0.159926 kVA=833.333 conn=wye
New Transformer.293588B3DB76EE34E0637F61810A7CE3_29_2 phases=1 windings=2 xhl=0.5 %R=0.353554 %imag=1e-06 %noloadloss=0
~ wdg=1 bus=110249155.3.1 kV=12 kVA=833.333 conn=delta
~ wdg=2 bus=-999999110249155.3.0 kV=0.159926 kVA=833.333 conn=wye
New Transformer.293588B2B8C2EE34E0637F61810A7CE3_30_0 phases=1 windings=2 xhl=0.5 %R=0.353554 %imag=1e-06 %noloadloss=0
~ wdg=1 bus=54332254.1.2 kV=12 kVA=100 conn=delta
~ wdg=2 bus=-99999954332254.1.0 kV=0.159926 kVA=100 conn=wye
New Transformer.293588B2B8C2EE34E0637F61810A7CE3_30_1 phases=1 windings=2 xhl=0.5 %R=0.353554 %imag=1e-06 %noloadloss=0
~ wdg=1 bus=54332254.2.3 kV=12 kVA=100 conn=delta
~ wdg=2 bus=-99999954332254.2.0 kV=0.159926 kVA=100 conn=wye
New Transformer.293588B2B8C2EE34E0637F61810A7CE3_30_2 phases=1 windings=2 xhl=0.5 %R=0.353554 %imag=1e-06 %noloadloss=0
~ wdg=1 bus=54332254.3.1 kV=12 kVA=100 conn=delta
~ wdg=2 bus=-99999954332254.3.0 kV=0.159926 kVA=100 conn=wye
New Transformer.293588B2B8C1EE34E0637F61810A7CE3_31_0 phases=1 windings=2 xhl=0.5 %R=0.353554 %imag=1e-06 %noloadloss=0
~ wdg=1 bus=54332152.1.2 kV=12 kVA=100 conn=delta
~ wdg=2 bus=-99999954332152.1.0 kV=0.159926 kVA=100 conn=wye
New Transformer.293588B2B8C1EE34E0637F61810A7CE3_31_1 phases=1 windings=2 xhl=0.5 %R=0.353554 %imag=1e-06 %noloadloss=0
~ wdg=1 bus=54332152.2.3 kV=12 kVA=100 conn=delta
~ wdg=2 bus=-99999954332152.2.0 kV=0.159926 kVA=100 conn=wye
New Transformer.293588B2B8C1EE34E0637F61810A7CE3_31_2 phases=1 windings=2 xhl=0.5 %R=0.353554 %imag=1e-06 %noloadloss=0
~ wdg=1 bus=54332152.3.1 kV=12 kVA=100 conn=delta
~ wdg=2 bus=-99999954332152.3.0 kV=0.159926 kVA=100 conn=wye
New Transformer.293588B419A7EE34E0637F61810A7CE3_32_0 phases=1 windings=2 xhl=0.5 %R=0.353554 %imag=1e-06 %noloadloss=0
~ wdg=1 bus=152257226.1.2 kV=12 kVA=833.333 conn=delta
~ wdg=2 bus=-999999152257226.1.0 kV=0.159926 kVA=833.333 conn=wye
New Transformer.293588B419A7EE34E0637F61810A7CE3_32_1 phases=1 windings=2 xhl=0.5 %R=0.353554 %imag=1e-06 %noloadloss=0
~ wdg=1 bus=152257226.2.3 kV=12 kVA=833.333 conn=delta
~ wdg=2 bus=-999999152257226.2.0 kV=0.159926 kVA=833.333 conn=wye
New Transformer.293588B419A7EE34E0637F61810A7CE3_32_2 phases=1 windings=2 xhl=0.5 %R=0.353554 %imag=1e-06 %noloadloss=0
~ wdg=1 bus=152257226.3.1 kV=12 kVA=833.333 conn=delta
~ wdg=2 bus=-999999152257226.3.0 kV=0.159926 kVA=833.333 conn=wye
New Transformer.293588B4920AEE34E0637F61810A7CE3_33_0 phases=1 windings=2 xhl=0.5 %R=0.353554 %imag=1e-06 %noloadloss=0
~ wdg=1 bus=197749002.1.2 kV=12 kVA=833.333 conn=delta
~ wdg=2 bus=-999999197749002.1.0 kV=0.159926 kVA=833.333 conn=wye
New Transformer.293588B4920AEE34E0637F61810A7CE3_33_1 phases=1 windings=2 xhl=0.5 %R=0.353554 %imag=1e-06 %noloadloss=0
~ wdg=1 bus=197749002.2.3 kV=12 kVA=833.333 conn=delta
~ wdg=2 bus=-999999197749002.2.0 kV=0.159926 kVA=833.333 conn=wye
New Transformer.293588B4920AEE34E0637F61810A7CE3_33_2 phases=1 windings=2 xhl=0.5 %R=0.353554 %imag=1e-06 %noloadloss=0
~ wdg=1 bus=197749002.3.1 kV=12 kVA=833.333 conn=delta
~ wdg=2 bus=-999999197749002.3.0 kV=0.159926 kVA=833.333 conn=wye
New Transformer.293588B4EAE0EE34E0637F61810A7CE3_34_0 phases=1 windings=2 xhl=0.5 %R=0.353554 %imag=1e-06 %noloadloss=0
~ wdg=1 bus=239383053.2.0 kV=6.9282 kVA=75 conn=wye
~ wdg=2 bus=-999999239383053.2.0 kV=0.159926 kVA=75 conn=wye
New Transformer.293588B4041FEE34E0637F61810A7CE3_35_0 phases=1 windings=2 xhl=0.5 %R=0.353554 %imag=1e-06 %noloadloss=0
~ wdg=1 bus=151395468.1.2 kV=12 kVA=333.333 conn=delta
~ wdg=2 bus=-999999151395468.1.0 kV=0.159926 kVA=333.333 conn=wye
New Transformer.293588B4041FEE34E0637F61810A7CE3_35_1 phases=1 windings=2 xhl=0.5 %R=0.353554 %imag=1e-06 %noloadloss=0
~ wdg=1 bus=151395468.2.3 kV=12 kVA=333.333 conn=delta
~ wdg=2 bus=-999999151395468.2.0 kV=0.159926 kVA=333.333 conn=wye
New Transformer.293588B4041FEE34E0637F61810A7CE3_35_2 phases=1 windings=2 xhl=0.5 %R=0.353554 %imag=1e-06 %noloadloss=0
~ wdg=1 bus=151395468.3.1 kV=12 kVA=333.333 conn=delta
~ wdg=2 bus=-999999151395468.3.0 kV=0.159926 kVA=333.333 conn=wye
New Transformer.293588B1C396EE34E0637F61810A7CE3_36_0 phases=1 windings=2 xhl=0.5 %R=0.353554 %imag=1e-06 %noloadloss=0
~ wdg=1 bus=37210038.1.2 kV=12 kVA=100 conn=delta
~ wdg=2 bus=-99999937210038.1.0 kV=0.159926 kVA=100 conn=wye
New Transformer.293588B1C396EE34E0637F61810A7CE3_36_1 phases=1 windings=2 xhl=0.5 %R=0.353554 %imag=1e-06 %noloadloss=0
~ wdg=1 bus=37210038.2.3 kV=12 kVA=100 conn=delta
~ wdg=2 bus=-99999937210038.2.0 kV=0.159926 kVA=100 conn=wye
New Transformer.293588B1C396EE34E0637F61810A7CE3_36_2 phases=1 windings=2 xhl=0.5 %R=0.353554 %imag=1e-06 %noloadloss=0
~ wdg=1 bus=37210038.3.1 kV=12 kVA=100 conn=delta
~ wdg=2 bus=-99999937210038.3.0 kV=0.159926 kVA=100 conn=wye
New Transformer.293588B419A6EE34E0637F61810A7CE3_37_0 phases=1 windings=2 xhl=0.5 %R=0.353554 %imag=1e-06 %noloadloss=0
~ wdg=1 bus=152257173.1.2 kV=12 kVA=250 conn=delta
~ wdg=2 bus=-999999152257173.1.0 kV=0.159926 kVA=250 conn=wye
New Transformer.293588B419A6EE34E0637F61810A7CE3_37_1 phases=1 windings=2 xhl=0.5 %R=0.353554 %imag=1e-06 %noloadloss=0
~ wdg=1 bus=152257173.2.3 kV=12 kVA=250 conn=delta
~ wdg=2 bus=-999999152257173.2.0 kV=0.159926 kVA=250 conn=wye
New Transformer.293588B419A6EE34E0637F61810A7CE3_37_2 phases=1 windings=2 xhl=0.5 %R=0.353554 %imag=1e-06 %noloadloss=0
~ wdg=1 bus=152257173.3.1 kV=12 kVA=250 conn=delta
~ wdg=2 bus=-999999152257173.3.0 kV=0.159926 kVA=250 conn=wye
New Transformer.293588B40422EE34E0637F61810A7CE3_38_0 phases=1 windings=2 xhl=0.5 %R=0.353554 %imag=1e-06 %noloadloss=0
~ wdg=1 bus=151395600.1.2 kV=12 kVA=166.667 conn=delta
~ wdg=2 bus=-999999151395600.1.0 kV=0.159926 kVA=166.667 conn=wye
New Transformer.293588B40422EE34E0637F61810A7CE3_38_1 phases=1 windings=2 xhl=0.5 %R=0.353554 %imag=1e-06 %noloadloss=0
~ wdg=1 bus=151395600.2.3 kV=12 kVA=166.667 conn=delta
~ wdg=2 bus=-999999151395600.2.0 kV=0.159926 kVA=166.667 conn=wye
New Transformer.293588B40422EE34E0637F61810A7CE3_38_2 phases=1 windings=2 xhl=0.5 %R=0.353554 %imag=1e-06 %noloadloss=0
~ wdg=1 bus=151395600.3.1 kV=12 kVA=166.667 conn=delta
~ wdg=2 bus=-999999151395600.3.0 kV=0.159926 kVA=166.667 conn=wye
New Transformer.293588B408E7EE34E0637F61810A7CE3_39_0 phases=1 windings=2 xhl=0.5 %R=0.353554 %imag=1e-06 %noloadloss=0
~ wdg=1 bus=151659890.3.0 kV=6.9282 kVA=75 conn=wye
~ wdg=2 bus=-999999151659890.3.0 kV=0.159926 kVA=75 conn=wye
New Transformer.293588B40421EE34E0637F61810A7CE3_40_0 phases=1 windings=2 xhl=0.5 %R=0.353554 %imag=1e-06 %noloadloss=0
~ wdg=1 bus=151395559.1.2 kV=12 kVA=166.667 conn=delta
~ wdg=2 bus=-999999151395559.1.0 kV=0.159926 kVA=166.667 conn=wye
New Transformer.293588B40421EE34E0637F61810A7CE3_40_1 phases=1 windings=2 xhl=0.5 %R=0.353554 %imag=1e-06 %noloadloss=0
~ wdg=1 bus=151395559.2.3 kV=12 kVA=166.667 conn=delta
~ wdg=2 bus=-999999151395559.2.0 kV=0.159926 kVA=166.667 conn=wye
New Transformer.293588B40421EE34E0637F61810A7CE3_40_2 phases=1 windings=2 xhl=0.5 %R=0.353554 %imag=1e-06 %noloadloss=0
~ wdg=1 bus=151395559.3.1 kV=12 kVA=166.667 conn=delta
~ wdg=2 bus=-999999151395559.3.0 kV=0.159926 kVA=166.667 conn=wye
New Transformer.293588B1C399EE34E0637F61810A7CE3_41_0 phases=1 windings=2 xhl=0.5 %R=0.353554 %imag=1e-06 %noloadloss=0
~ wdg=1 bus=37210355.1.2 kV=12 kVA=50 conn=delta
~ wdg=2 bus=-99999937210355.1.0 kV=0.159926 kVA=50 conn=wye
New Transformer.293588B1C399EE34E0637F61810A7CE3_41_1 phases=1 windings=2 xhl=0.5 %R=0.353554 %imag=1e-06 %noloadloss=0
~ wdg=1 bus=37210355.2.3 kV=12 kVA=50 conn=delta
~ wdg=2 bus=-99999937210355.2.0 kV=0.159926 kVA=50 conn=wye
New Transformer.293588B1C399EE34E0637F61810A7CE3_41_2 phases=1 windings=2 xhl=0.5 %R=0.353554 %imag=1e-06 %noloadloss=0
~ wdg=1 bus=37210355.3.1 kV=12 kVA=50 conn=delta
~ wdg=2 bus=-99999937210355.3.0 kV=0.159926 kVA=50 conn=wye
New Transformer.293588B408E8EE34E0637F61810A7CE3_42_0 phases=1 windings=2 xhl=0.5 %R=0.353554 %imag=1e-06 %noloadloss=0
~ wdg=1 bus=151659988.1.2 kV=12 kVA=100 conn=delta
~ wdg=2 bus=-999999151659988.1.0 kV=0.159926 kVA=100 conn=wye
New Transformer.293588B408E8EE34E0637F61810A7CE3_42_1 phases=1 windings=2 xhl=0.5 %R=0.353554 %imag=1e-06 %noloadloss=0
~ wdg=1 bus=151659988.2.3 kV=12 kVA=100 conn=delta
~ wdg=2 bus=-999999151659988.2.0 kV=0.159926 kVA=100 conn=wye
New Transformer.293588B408E8EE34E0637F61810A7CE3_42_2 phases=1 windings=2 xhl=0.5 %R=0.353554 %imag=1e-06 %noloadloss=0
~ wdg=1 bus=151659988.3.1 kV=12 kVA=100 conn=delta
~ wdg=2 bus=-999999151659988.3.0 kV=0.159926 kVA=100 conn=wye

Set voltagebases=[12.0 0.277 0.24 0.12]
CalcVoltageBases
Solve
