! OpenDSS script generated from multiconductor network
Clear

New Circuit.mc_network basekv=4.0 pu=1.000000 angle=0.00 frequency=60.0 phases=3 Mvasc3=15999.2 Mvasc1=5333.07
~ bus1=-8888882179929.1.2.3

! Line codes
New LineCode.4_ACSR_3PH_4_ACSR_N_4KV_4 nphases=4 units=km Rmatrix=[ 0.17592 | 0 0.17592 | 0 0 0.17592 | 0 0 0 0.17592 ] Xmatrix=[ 0.059172 | 0 0.059172 | 0 0 0.059172 | 0 0 0 0.059172 ] Cmatrix=[ 0 | 0 0 | 0 0 0 | 0 0 0 0 ]
New LineCode.1/0_ACSR_3PH_1/0_ACSR_N_4KV_4 nphases=4 units=km Rmatrix=[ 0.047994 | 0 0.047994 | 0 0 0.047994 | 0 0 0 0.047994 ] Xmatrix=[ 0.034685 | 0 0.034685 | 0 0 0.034685 | 0 0 0 0.034685 ] Cmatrix=[ 0 | 0 0 | 0 0 0 | 0 0 0 0 ]
New LineCode.1/0_JCN_3PH_4KV_3 nphases=3 units=km Rmatrix=[ 0.008892 | 0 0.008892 | 0 0 0.008892 ] Xmatrix=[ 0.002718 | 0 0.002718 | 0 0 0.002718 ] Cmatrix=[ 0 | 0 0 | 0 0 0 ]
New LineCode.6_CU_1PH_6_CU_N_4KV_2_N nphases=2 units=km Rmatrix=[ 0.015594 | 0 0.015594 ] Xmatrix=[ 0.005036 | 0 0.005036 ] Cmatrix=[ 0 | 0 0 ]
New LineCode.336_ACSR_3PH_336_ACSR_N_4KV_4 nphases=4 units=km Rmatrix=[ 0.013606 | 0 0.013606 | 0 0 0.013606 | 0 0 0 0.013606 ] Xmatrix=[ 0.027134 | 0 0.027134 | 0 0 0.027134 | 0 0 0 0.027134 ] Cmatrix=[ 0 | 0 0 | 0 0 0 | 0 0 0 0 ]
New LineCode.8_CU_1PH_8_CU_N_4KV_2_N nphases=2 units=km Rmatrix=[ 0.006316 | 0 0.006316 ] Xmatrix=[ 0.00204 | 0 0.00204 ] Cmatrix=[ 0 | 0 0 ]
New LineCode.2_CLP_1PH_4KV_1 nphases=1 units=km Rmatrix=[ 0.330713 ] Xmatrix=[ 0.069708 ] Cmatrix=[ 0 ]
New LineCode.2_CU_3PH_2_CU_N_4KV_4 nphases=4 units=km Rmatrix=[ 0.13126 | 0 0.13126 | 0 0 0.13126 | 0 0 0 0.13126 ] Xmatrix=[ 0.096383 | 0 0.096383 | 0 0 0.096383 | 0 0 0 0.096383 ] Cmatrix=[ 0 | 0 0 | 0 0 0 | 0 0 0 0 ]
New LineCode.6_CU_3PH_6_CU_N_4KV_4 nphases=4 units=km Rmatrix=[ 0.006387 | 0 0.006387 | 0 0 0.006387 | 0 0 0 0.006387 ] Xmatrix=[ 0.002063 | 0 0.002063 | 0 0 0.002063 | 0 0 0 0.002063 ] Cmatrix=[ 0 | 0 0 | 0 0 0 | 0 0 0 0 ]
New LineCode.8_CU_3PH_8_CU_N_4KV_4 nphases=4 units=km Rmatrix=[ 0.148466 | 0 0.148466 | 0 0 0.148466 | 0 0 0 0.148466 ] Xmatrix=[ 0.047948 | 0 0.047948 | 0 0 0.047948 | 0 0 0 0.047948 ] Cmatrix=[ 0 | 0 0 | 0 0 0 | 0 0 0 0 ]
New LineCode.4_CU_3PH_4_CU_N_4KV_4 nphases=4 units=km Rmatrix=[ 0.016133 | 0 0.016133 | 0 0 0.016133 | 0 0 0 0.016133 ] Xmatrix=[ 0.007983 | 0 0.007983 | 0 0 0.007983 | 0 0 0 0.007983 ] Cmatrix=[ 0 | 0 0 | 0 0 0 | 0 0 0 0 ]
New LineCode.4_ACSR_2PH_4_ACSR_N_4KV_3_N nphases=3 units=km Rmatrix=[ 0.131514 | 0 0.131514 | 0 0 0.131514 ] Xmatrix=[ 0.044236 | 0 0.044236 | 0 0 0.044236 ] Cmatrix=[ 0 | 0 0 | 0 0 0 ]
New LineCode.4_ACSR_1PH_4_ACSR_N_4KV_2_N nphases=2 units=km Rmatrix=[ 0.105793 | 0 0.105793 ] Xmatrix=[ 0.035584 | 0 0.035584 ] Cmatrix=[ 0 | 0 0 ]
New LineCode.8_ACSR_1PH_8_ACSR_N_4KV_2_N nphases=2 units=km Rmatrix=[ 0.16392 | 0 0.16392 ] Xmatrix=[ 0.055136 | 0 0.055136 ] Cmatrix=[ 0 | 0 0 ]
New LineCode.4_ACSR_3PH_4_ACSR_N_4KV_2_N nphases=2 units=km Rmatrix=[ 0.17592 | 0 0.17592 ] Xmatrix=[ 0.059172 | 0 0.059172 ] Cmatrix=[ 0 | 0 0 ]

! Lines
New Line.3005488E$2363901E phases=4 Bus1=22807626.0.1.2.3 Bus2=-77777722807626.0.1.2.3 LineCode=4_ACSR_3PH_4_ACSR_N_4KV_4 Length=0.030735 units=km
New Line.1522776E$ND42876768 phases=4 Bus1=42876768.0.1.2.3 Bus2=232700498.0.1.2.3 LineCode=1/0_ACSR_3PH_1/0_ACSR_N_4KV_4 Length=0.004343 units=km
New Line.1522776E$232700527 phases=3 Bus1=232700499.1.2.3 Bus2=232700529.1.2.3 LineCode=1/0_JCN_3PH_4KV_3 Length=0.018608 units=km
New Line.232700527$232700539 phases=3 Bus1=232700530.1.2.3 Bus2=232700542.1.2.3 LineCode=1/0_JCN_3PH_4KV_3 Length=0.012619 units=km
New Line.232700539$232700549 phases=3 Bus1=232700541.1.2.3 Bus2=232700551.1.2.3 LineCode=1/0_JCN_3PH_4KV_3 Length=0.055696 units=km
New Line.80342S$426484S phases=2 Bus1=22808934.0.3 Bus2=69751310.0.3 LineCode=6_CU_1PH_6_CU_N_4KV_2_N Length=0.111706 units=km
New Line.ND22809185$4665156E phases=4 Bus1=22809185.0.1.2.3 Bus2=108276695.0.1.2.3 LineCode=336_ACSR_3PH_336_ACSR_N_4KV_4 Length=0.096012 units=km
New Line.426484S$ND105076474 phases=2 Bus1=69751310.0.3 Bus2=105076474.0.3 LineCode=6_CU_1PH_6_CU_N_4KV_2_N Length=0.080777 units=km
New Line.232700549$P5609473-1 phases=3 Bus1=232700552.1.2.3 Bus2=232700565.1.2.3 LineCode=1/0_JCN_3PH_4KV_3 Length=0.002922 units=km
New Line.ND105076474$2224395E phases=2 Bus1=105076474.0.3 Bus2=22808151.0.3 LineCode=6_CU_1PH_6_CU_N_4KV_2_N Length=0.15659 units=km
New Line.367473S$4832577E phases=4 Bus1=42875948.0.1.2.3 Bus2=188332757.0.1.2.3 LineCode=1/0_ACSR_3PH_1/0_ACSR_N_4KV_4 Length=0.07476 units=km
New Line.2122417E$4200421E phases=2 Bus1=22808757.0.1 Bus2=22808076.0.1 LineCode=8_CU_1PH_8_CU_N_4KV_2_N Length=0.476322 units=km
New Line.5519940E$P5519941-1 phases=1 Bus1=89999560.3 Bus2=89999604.3 LineCode=2_CLP_1PH_4KV_1 Length=0.295671 units=km
New Line.ND42876248$ND148180940 phases=4 Bus1=42876184.0.1.2.3 Bus2=148180868.0.1.2.3 LineCode=1/0_ACSR_3PH_1/0_ACSR_N_4KV_4 Length=0.069541 units=km
New Line.ND148180938$ND42876573 phases=4 Bus1=148180886.0.1.2.3 Bus2=42876573.0.1.2.3 LineCode=1/0_ACSR_3PH_1/0_ACSR_N_4KV_4 Length=0.145901 units=km
New Line.266129ST1$ND22808713 phases=4 Bus1=22808713.0.1.2.3 Bus2=106419548.0.1.2.3 LineCode=4_ACSR_3PH_4_ACSR_N_4KV_4 Length=0.066147 units=km
New Line.ND108276653$ND22808713 phases=4 Bus1=22808713.0.1.2.3 Bus2=108276653.0.1.2.3 LineCode=2_CU_3PH_2_CU_N_4KV_4 Length=0.085291 units=km
New Line.ND22809314$427764S phases=4 Bus1=22809314.0.1.2.3 Bus2=22808384.0.1.2.3 LineCode=6_CU_3PH_6_CU_N_4KV_4 Length=0.043273 units=km
New Line.ND22809314$363344S phases=4 Bus1=22809314.0.1.2.3 Bus2=22808409.0.1.2.3 LineCode=8_CU_3PH_8_CU_N_4KV_4 Length=0.010504 units=km
New Line.4200421E$4862094E phases=2 Bus1=22808076.0.1 Bus2=22808600.0.1 LineCode=8_CU_1PH_8_CU_N_4KV_2_N Length=0.029952 units=km
New Line.366129S$ND22808713 phases=4 Bus1=22808713.0.1.2.3 Bus2=22808907.0.1.2.3 LineCode=4_ACSR_3PH_4_ACSR_N_4KV_4 Length=0.066147 units=km
New Line.4928060E$ND108276653 phases=4 Bus1=108276653.0.1.2.3 Bus2=215013999.0.1.2.3 LineCode=2_CU_3PH_2_CU_N_4KV_4 Length=0.037842 units=km
New Line.ND42876573$4928090E phases=4 Bus1=42876573.0.1.2.3 Bus2=42876112.0.1.2.3 LineCode=4_CU_3PH_4_CU_N_4KV_4 Length=0.200083 units=km
New Line.PD0432$ND42876573 phases=4 Bus1=42876573.0.1.2.3 Bus2=42876275.0.1.2.3 LineCode=1/0_ACSR_3PH_1/0_ACSR_N_4KV_4 Length=0.291921 units=km
New Line.PS0434$4928090E phases=4 Bus1=42876112.0.1.2.3 Bus2=42876309.0.1.2.3 LineCode=4_CU_3PH_4_CU_N_4KV_4 Length=0.389956 units=km
New Line.PD0432$4416821E phases=4 Bus1=42876274.0.1.2.3 Bus2=69399284.0.1.2.3 LineCode=4_ACSR_3PH_4_ACSR_N_4KV_4 Length=1.6664 units=km
New Line.PS0434$ND259789357 phases=4 Bus1=42876308.0.1.2.3 Bus2=259789357.0.1.2.3 LineCode=4_CU_3PH_4_CU_N_4KV_4 Length=0.005978 units=km
New Line.ND259789357$ND42876672 phases=4 Bus1=259789357.0.1.2.3 Bus2=42876672.0.1.2.3 LineCode=4_CU_3PH_4_CU_N_4KV_4 Length=0.19049 units=km
New Line.366140S$ND42876672 phases=4 Bus1=42876672.0.1.2.3 Bus2=42876430.0.1.2.3 LineCode=4_ACSR_3PH_4_ACSR_N_4KV_4 Length=0.004181 units=km
New Line.ND42876672$ND42876745 phases=4 Bus1=42876672.0.1.2.3 Bus2=42876745.0.1.2.3 LineCode=2_CU_3PH_2_CU_N_4KV_4 Length=0.221218 units=km
New Line.80364S$ND42876745 phases=4 Bus1=42876745.0.1.2.3 Bus2=42876392.0.1.2.3 LineCode=6_CU_3PH_6_CU_N_4KV_4 Length=0.00283 units=km
New Line.ND42876606$ND42876745 phases=4 Bus1=42876745.0.1.2.3 Bus2=42876606.0.1.2.3 LineCode=2_CU_3PH_2_CU_N_4KV_4 Length=0.932529 units=km
New Line.4928070E$ND42876606 phases=4 Bus1=42876606.0.1.2.3 Bus2=42875867.0.1.2.3 LineCode=2_CU_3PH_2_CU_N_4KV_4 Length=0.400728 units=km
New Line.80352S$ND42876606 phases=2 Bus1=42876606.0.1 Bus2=42876404.0.1 LineCode=6_CU_1PH_6_CU_N_4KV_2_N Length=0.010466 units=km
New Line.366140S$ND42876768 phases=4 Bus1=42876431.0.1.2.3 Bus2=42876768.0.1.2.3 LineCode=4_ACSR_3PH_4_ACSR_N_4KV_4 Length=0.097741 units=km
New Line.4928070E$ND241256652 phases=4 Bus1=42875867.0.1.2.3 Bus2=241256652.0.1.2.3 LineCode=2_CU_3PH_2_CU_N_4KV_4 Length=0.037536 units=km
New Line.ND42876768$1552777E phases=4 Bus1=42876768.0.1.2.3 Bus2=42871196.0.1.2.3 LineCode=4_ACSR_3PH_4_ACSR_N_4KV_4 Length=0.105707 units=km
New Line.ND42876768$2342755E phases=4 Bus1=42876768.0.1.2.3 Bus2=42871221.0.1.2.3 LineCode=1/0_ACSR_3PH_1/0_ACSR_N_4KV_4 Length=0.455686 units=km
New Line.80364S$4615495E phases=4 Bus1=42876391.0.1.2.3 Bus2=42875790.0.1.2.3 LineCode=6_CU_3PH_6_CU_N_4KV_4 Length=0.107202 units=km
New Line.4615495E$63273S phases=4 Bus1=42875790.0.1.2.3 Bus2=42875765.0.1.2.3 LineCode=6_CU_3PH_6_CU_N_4KV_4 Length=0.078785 units=km
New Line.80352S$227843S phases=2 Bus1=42876405.0.1 Bus2=42875894.0.1 LineCode=6_CU_1PH_6_CU_N_4KV_2_N Length=0.067191 units=km
New Line.ND241256652$ND42876523 phases=4 Bus1=241256652.0.1.2.3 Bus2=42876523.0.1.2.3 LineCode=2_CU_3PH_2_CU_N_4KV_4 Length=0.04709 units=km
New Line.ND42876523$4716206E phases=3 Bus1=42876523.0.2.3 Bus2=103283839.0.2.3 LineCode=4_ACSR_2PH_4_ACSR_N_4KV_3_N Length=0.395217 units=km
New Line.ND42876523$RCS0087 phases=4 Bus1=42876523.0.1.2.3 Bus2=22808946.0.1.2.3 LineCode=2_CU_3PH_2_CU_N_4KV_4 Length=0.173553 units=km
New Line.PD0258$ND42876523 phases=4 Bus1=42876523.0.1.2.3 Bus2=42876363.0.1.2.3 LineCode=4_CU_3PH_4_CU_N_4KV_4 Length=0.041559 units=km
New Line.ND22808856$RCS0087 phases=4 Bus1=22808977.0.1.2.3 Bus2=22808856.0.1.2.3 LineCode=2_CU_3PH_2_CU_N_4KV_4 Length=0.235755 units=km
New Line.PD0258$4832996E phases=4 Bus1=42876362.0.1.2.3 Bus2=42875921.0.1.2.3 LineCode=4_CU_3PH_4_CU_N_4KV_4 Length=0.187991 units=km
New Line.80342ST1$ND22808856 phases=2 Bus1=22808856.0.3 Bus2=106419513.0.3 LineCode=4_ACSR_1PH_4_ACSR_N_4KV_2_N Length=0.01013 units=km
New Line.80340S$ND22808856 phases=4 Bus1=22808856.0.1.2.3 Bus2=22808573.0.1.2.3 LineCode=2_CU_3PH_2_CU_N_4KV_4 Length=0.089205 units=km
New Line.80342S$ND22808856 phases=2 Bus1=22808856.0.3 Bus2=22808933.0.3 LineCode=6_CU_1PH_6_CU_N_4KV_2_N Length=0.005975 units=km
New Line.4832996E$4512798E phases=4 Bus1=42875921.0.1.2.3 Bus2=243200893.0.1.2.3 LineCode=4_CU_3PH_4_CU_N_4KV_4 Length=0.334411 units=km
New Line.366134S$80340S phases=4 Bus1=22808573.0.1.2.3 Bus2=22808257.0.1.2.3 LineCode=2_CU_3PH_2_CU_N_4KV_4 Length=0.267809 units=km
New Line.4512798E$ND42876531 phases=4 Bus1=243200893.0.1.2.3 Bus2=42876531.0.1.2.3 LineCode=4_CU_3PH_4_CU_N_4KV_4 Length=0.143776 units=km
New Line.4847393E$4928067E phases=4 Bus1=22808257.0.1.2.3 Bus2=216890059.0.1.2.3 LineCode=2_CU_3PH_2_CU_N_4KV_4 Length=0.133981 units=km
New Line.2002127E$80342ST1 phases=2 Bus1=106419514.0.3 Bus2=22808126.0.3 LineCode=4_ACSR_1PH_4_ACSR_N_4KV_2_N Length=0.081883 units=km
New Line.426324ST1$ND42876531 phases=4 Bus1=42876531.0.1.2.3 Bus2=42876418.0.1.2.3 LineCode=4_CU_3PH_4_CU_N_4KV_4 Length=0.065898 units=km
New Line.4245904E$ND42876531 phases=4 Bus1=42876531.0.1.2.3 Bus2=42876471.0.1.2.3 LineCode=6_CU_3PH_6_CU_N_4KV_4 Length=0.105034 units=km
New Line.ND42876531$ND42876637 phases=4 Bus1=42876531.0.1.2.3 Bus2=42876637.0.1.2.3 LineCode=6_CU_3PH_6_CU_N_4KV_4 Length=0.081234 units=km
New Line.366129S$426310S phases=4 Bus1=22808908.0.1.2.3 Bus2=22808309.0.1.2.3 LineCode=4_ACSR_3PH_4_ACSR_N_4KV_4 Length=0.119165 units=km
New Line.27471S$266129ST1 phases=4 Bus1=106419549.0.1.2.3 Bus2=22808334.0.1.2.3 LineCode=4_ACSR_3PH_4_ACSR_N_4KV_4 Length=0.06313 units=km
New Line.ND22808704$4928060E phases=4 Bus1=215013999.0.1.2.3 Bus2=22808704.0.1.2.3 LineCode=2_CU_3PH_2_CU_N_4KV_4 Length=0.003608 units=km
New Line.4928060ET1T1$ND22808704 phases=2 Bus1=22808704.0.3 Bus2=106419478.0.3 LineCode=4_ACSR_1PH_4_ACSR_N_4KV_2_N Length=0.015782 units=km
New Line.426310S$1591598E phases=4 Bus1=22808309.0.1.2.3 Bus2=22808051.0.1.2.3 LineCode=4_ACSR_3PH_4_ACSR_N_4KV_4 Length=0.365022 units=km
New Line.PD0016$ND22808704 phases=4 Bus1=22808704.0.1.2.3 Bus2=22808729.0.1.2.3 LineCode=2_CU_3PH_2_CU_N_4KV_4 Length=0.188858 units=km
New Line.27471S$ND22809358 phases=4 Bus1=22808334.0.1.2.3 Bus2=22809358.0.1.2.3 LineCode=4_ACSR_3PH_4_ACSR_N_4KV_4 Length=0.146267 units=km
New Line.1591598E$4646010E phases=4 Bus1=22808051.0.1.2.3 Bus2=101196729.0.1.2.3 LineCode=4_ACSR_3PH_4_ACSR_N_4KV_4 Length=0.072511 units=km
New Line.ND22809358$1738428E phases=4 Bus1=22809358.0.1.2.3 Bus2=22807976.0.1.2.3 LineCode=4_ACSR_3PH_4_ACSR_N_4KV_4 Length=0.064344 units=km
New Line.ND22809358$26723S phases=2 Bus1=22809358.0.1 Bus2=22808359.0.1 LineCode=4_ACSR_1PH_4_ACSR_N_4KV_2_N Length=0.06364 units=km
New Line.PD0016$ND102514878 phases=4 Bus1=22808728.0.1.2.3 Bus2=102514878.0.1.2.3 LineCode=2_CU_3PH_2_CU_N_4KV_4 Length=0.043732 units=km
New Line.4928060ET1T1$2377493E phases=2 Bus1=106419479.0.3 Bus2=22807951.0.3 LineCode=8_ACSR_1PH_8_ACSR_N_4KV_2_N Length=0.106377 units=km
New Line.4646010E$ND22809185 phases=4 Bus1=101196729.0.1.2.3 Bus2=22809185.0.1.2.3 LineCode=4_ACSR_3PH_4_ACSR_N_4KV_4 Length=0.26198 units=km
New Line.ND102514878$4665171E phases=3 Bus1=102514878.0.2.3 Bus2=102514865.0.2.3 LineCode=4_ACSR_2PH_4_ACSR_N_4KV_3_N Length=0.048372 units=km
New Line.2377493E$1906728E phases=2 Bus1=22807951.0.3 Bus2=22807926.0.3 LineCode=4_ACSR_1PH_4_ACSR_N_4KV_2_N Length=0.162406 units=km
New Line.ND22809185$4200471E phases=4 Bus1=22809185.0.1.2.3 Bus2=22808001.0.1.2.3 LineCode=4_ACSR_3PH_4_ACSR_N_4KV_4 Length=0.33173 units=km
New Line.ND22809185$1784716E phases=4 Bus1=22809185.0.1.2.3 Bus2=22808026.0.1.2.3 LineCode=4_ACSR_3PH_4_ACSR_N_4KV_4 Length=0.028457 units=km
New Line.ND102514878$ND22809203 phases=4 Bus1=102514878.0.1.2.3 Bus2=22809203.0.1.2.3 LineCode=2_CU_3PH_2_CU_N_4KV_4 Length=0.080498 units=km
New Line.ND110724025$ND22809203 phases=4 Bus1=22809203.0.1.2.3 Bus2=110723979.0.1.2.3 LineCode=2_CU_3PH_2_CU_N_4KV_4 Length=0.105045 units=km
New Line.2156517E$ND22809203 phases=2 Bus1=22809203.0.1 Bus2=22808691.0.1 LineCode=4_ACSR_1PH_4_ACSR_N_4KV_2_N Length=0.00835 units=km
New Line.ND22808920$4847393E phases=4 Bus1=216890059.0.1.2.3 Bus2=22808920.0.1.2.3 LineCode=2_CU_3PH_2_CU_N_4KV_4 Length=0.070125 units=km
New Line.ND42876637$4234962E phases=4 Bus1=42876637.0.1.2.3 Bus2=42876083.0.1.2.3 LineCode=6_CU_3PH_6_CU_N_4KV_4 Length=0.12239 units=km
New Line.300513CIT$ND42876637 phases=4 Bus1=42876637.0.1.2.3 Bus2=42876443.0.1.2.3 LineCode=4_ACSR_3PH_4_ACSR_N_4KV_4 Length=0.010135 units=km
New Line.366133S$ND22808920 phases=2 Bus1=22808920.0.2 Bus2=106419409.0.2 LineCode=4_ACSR_1PH_4_ACSR_N_4KV_2_N Length=0.035452 units=km
New Line.ND105076474$426485S phases=2 Bus1=105076474.0.3 Bus2=211265154.0.3 LineCode=6_CU_1PH_6_CU_N_4KV_2_N Length=0.207264 units=km
New Line.366131S$ND22808920 phases=4 Bus1=22808920.0.1.2.3 Bus2=22808228.0.1.2.3 LineCode=2_CU_3PH_2_CU_N_4KV_4 Length=0.316795 units=km
New Line.4245904E$4565156E phases=4 Bus1=42876470.0.1.2.3 Bus2=42876139.0.1.2.3 LineCode=6_CU_3PH_6_CU_N_4KV_4 Length=0.105034 units=km
New Line.4234962E$ND42876459 phases=4 Bus1=42876083.0.1.2.3 Bus2=42876459.0.1.2.3 LineCode=6_CU_3PH_6_CU_N_4KV_4 Length=0.067691 units=km
New Line.426324ST1$ND42876512 phases=4 Bus1=42876417.0.1.2.3 Bus2=42876512.0.1.2.3 LineCode=4_CU_3PH_4_CU_N_4KV_4 Length=0.136911 units=km
New Line.426485S$4715305E phases=2 Bus1=211265154.0.3 Bus2=105076461.0.3 LineCode=6_CU_1PH_6_CU_N_4KV_2_N Length=0.132479 units=km
New Line.ND42876459$4234964E phases=4 Bus1=42876459.0.1.2.3 Bus2=154833406.0.1.2.3 LineCode=6_CU_3PH_6_CU_N_4KV_4 Length=0.243925 units=km
New Line.366130S$366131S phases=4 Bus1=22808228.0.1.2.3 Bus2=22808436.0.1.2.3 LineCode=2_CU_3PH_2_CU_N_4KV_4 Length=0.041972 units=km
New Line.ND42876512$65310S phases=4 Bus1=42876512.0.1.2.3 Bus2=269126257.0.1.2.3 LineCode=4_CU_3PH_4_CU_N_4KV_4 Length=0.510993 units=km
New Line.4565156E$2171329E phases=4 Bus1=42876139.0.1.2.3 Bus2=42875590.0.1.2.3 LineCode=6_CU_3PH_6_CU_N_4KV_4 Length=0.292428 units=km
New Line.ND42876512$2285423E phases=4 Bus1=42876512.0.1.2.3 Bus2=42875640.0.1.2.3 LineCode=4_CU_3PH_4_CU_N_4KV_4 Length=0.233982 units=km
New Line.300513CIT$367473S phases=4 Bus1=42876444.0.1.2.3 Bus2=42875948.0.1.2.3 LineCode=1/0_ACSR_3PH_1/0_ACSR_N_4KV_4 Length=0.217619 units=km
New Line.2156517E$2156518E phases=2 Bus1=22808690.0.1 Bus2=22807901.0.1 LineCode=4_ACSR_1PH_4_ACSR_N_4KV_2_N Length=0.019076 units=km
New Line.4963154E$ND110724027 phases=4 Bus1=110723961.0.1.2.3 Bus2=242325236.0.1.2.3 LineCode=2_CU_3PH_2_CU_N_4KV_4 Length=0.416675 units=km
New Line.ND22809367$4963154E phases=4 Bus1=242325236.0.1.2.3 Bus2=22809367.0.1.2.3 LineCode=2_CU_3PH_2_CU_N_4KV_4 Length=0.308612 units=km
New Line.4052798E$366133S phases=2 Bus1=106419410.0.2 Bus2=22808101.0.2 LineCode=4_ACSR_1PH_4_ACSR_N_4KV_2_N Length=0.113162 units=km
New Line.ND22809095$366130S phases=4 Bus1=22808436.0.1.2.3 Bus2=22809095.0.1.2.3 LineCode=2_CU_3PH_2_CU_N_4KV_4 Length=0.104646 units=km
New Line.2171329E$1600831E phases=4 Bus1=42875590.0.1.2.3 Bus2=42871246.0.1.2.3 LineCode=6_CU_3PH_6_CU_N_4KV_4 Length=0.171716 units=km
New Line.65310S$2084986E phases=4 Bus1=269126257.0.1.2.3 Bus2=42875740.0.1.2.3 LineCode=4_CU_3PH_4_CU_N_4KV_4 Length=0.1039 units=km
New Line.1756745E$2285423E phases=4 Bus1=42875640.0.1.2.3 Bus2=42876031.0.1.2.3 LineCode=6_CU_3PH_6_CU_N_4KV_4 Length=0.031055 units=km
New Line.4928063E$ND22809095 phases=4 Bus1=22809095.0.1.2.3 Bus2=215616814.0.1.2.3 LineCode=2_CU_3PH_2_CU_N_4KV_4 Length=0.179788 units=km
New Line.2122417E$ND22809095 phases=2 Bus1=22809095.0.1 Bus2=22808758.0.1 LineCode=8_CU_1PH_8_CU_N_4KV_2_N Length=0.004239 units=km
New Line.RCS0227$ND22809367 phases=4 Bus1=22809367.0.1.2.3 Bus2=108276499.0.1.2.3 LineCode=2_CU_3PH_2_CU_N_4KV_4 Length=0.065915 units=km
New Line.ND22809367$ND138160197 phases=4 Bus1=22809367.0.1.2.3 Bus2=138160197.0.1.2.3 LineCode=4_ACSR_3PH_4_ACSR_N_4KV_4 Length=0.054922 units=km
New Line.266640S$ND22809367 phases=4 Bus1=22809367.0.1.2.3 Bus2=22808843.0.1.2.3 LineCode=6_CU_3PH_6_CU_N_4KV_4 Length=0.038038 units=km
New Line.ND138160197$PS0382 phases=4 Bus1=138160197.0.1.2.3 Bus2=22808661.0.1.2.3 LineCode=4_ACSR_3PH_4_ACSR_N_4KV_4 Length=0.052525 units=km
New Line.266640S$427141S phases=4 Bus1=22808842.0.1.2.3 Bus2=22808517.0.1.2.3 LineCode=6_CU_3PH_6_CU_N_4KV_4 Length=0.317945 units=km
New Line.427141S$3005488E phases=4 Bus1=22808517.0.1.2.3 Bus2=22807626.0.1.2.3 LineCode=4_ACSR_3PH_4_ACSR_N_4KV_4 Length=0.296333 units=km
New Line.PS0382$1959134E phases=4 Bus1=22808662.0.1.2.3 Bus2=22808201.0.1.2.3 LineCode=4_ACSR_3PH_4_ACSR_N_4KV_4 Length=0.106119 units=km
New Line.1959134E$ND22809559 phases=4 Bus1=22808201.0.1.2.3 Bus2=22809559.0.1.2.3 LineCode=4_ACSR_3PH_4_ACSR_N_4KV_4 Length=0.018225 units=km
New Line.ND22809559$ND22809192 phases=4 Bus1=22809559.0.1.2.3 Bus2=22809192.0.1.2.3 LineCode=4_ACSR_3PH_4_ACSR_N_4KV_4 Length=0.202444 units=km
New Line.ND22809559$2342453E phases=3 Bus1=22809559.0.1.2 Bus2=69454973.0.1.2 LineCode=4_ACSR_2PH_4_ACSR_N_4KV_3_N Length=0.191949 units=km
New Line.ND22809192$1959137E phases=4 Bus1=22809192.0.1.2.3 Bus2=108276764.0.1.2.3 LineCode=4_ACSR_3PH_4_ACSR_N_4KV_4 Length=0.090976 units=km
New Line.2342453E$2342455E phases=3 Bus1=69454973.0.1.2 Bus2=22807701.0.1.2 LineCode=4_ACSR_2PH_4_ACSR_N_4KV_3_N Length=0.20373 units=km
New Line.ND22809192$4715223E phases=2 Bus1=22809192.0.2 Bus2=22807726.0.2 LineCode=4_ACSR_1PH_4_ACSR_N_4KV_2_N Length=0.195064 units=km
New Line.ND22809192$4029814E phases=2 Bus1=22809192.0.2 Bus2=22807801.0.2 LineCode=4_ACSR_1PH_4_ACSR_N_4KV_2_N Length=0.040232 units=km
New Line.4715223E$4715224E phases=2 Bus1=22807726.0.2 Bus2=105671889.0.2 LineCode=4_ACSR_1PH_4_ACSR_N_4KV_2_N Length=0.099449 units=km
New Line.1959137E$1959138E phases=4 Bus1=108276764.0.1.2.3 Bus2=22808492.0.1.2.3 LineCode=4_ACSR_3PH_4_ACSR_N_4KV_4 Length=0.114164 units=km
New Line.2342455E$4029830E phases=3 Bus1=22807701.0.1.2 Bus2=239915524.0.1.2 LineCode=4_ACSR_2PH_4_ACSR_N_4KV_3_N Length=0.279998 units=km
New Line.4029830E$4029832E phases=3 Bus1=239915524.0.1.2 Bus2=22807676.0.1.2 LineCode=4_ACSR_2PH_4_ACSR_N_4KV_3_N Length=0.085702 units=km
New Line.2122417ET1$ND22809095 phases=4 Bus1=22809095.0.1.2.3 Bus2=22808771.0.1.2.3 LineCode=6_CU_3PH_6_CU_N_4KV_4 Length=0.001939 units=km
New Line.1600831E$1906587E phases=4 Bus1=42871246.0.1.2.3 Bus2=42871271.0.1.2.3 LineCode=6_CU_3PH_6_CU_N_4KV_4 Length=0.245932 units=km
New Line.4665687E$2084986E phases=4 Bus1=42875740.0.1.2.3 Bus2=42875815.0.1.2.3 LineCode=4_CU_3PH_4_CU_N_4KV_4 Length=0.404238 units=km
New Line.27030S$1756745E phases=4 Bus1=42876031.0.1.2.3 Bus2=42875840.0.1.2.3 LineCode=6_CU_3PH_6_CU_N_4KV_4 Length=0.187596 units=km
New Line.4928062E$4928063E phases=4 Bus1=215616814.0.1.2.3 Bus2=22808544.0.1.2.3 LineCode=2_CU_3PH_2_CU_N_4KV_4 Length=0.151409 units=km
New Line.1906587E$4344366E phases=4 Bus1=42871271.0.1.2.3 Bus2=42876056.0.1.2.3 LineCode=6_CU_3PH_6_CU_N_4KV_4 Length=0.27147 units=km
New Line.ND22808713$80327S phases=4 Bus1=22808544.0.1.2.3 Bus2=22808713.0.1.2.3 LineCode=2_CU_3PH_2_CU_N_4KV_4 Length=0.242699 units=km
New Line.2122417ET1$ND22809314 phases=4 Bus1=22808770.0.1.2.3 Bus2=22809314.0.1.2.3 LineCode=6_CU_3PH_6_CU_N_4KV_4 Length=0.044457 units=km
New Line.1959138E$ND22809006 phases=4 Bus1=22808492.0.1.2.3 Bus2=22809006.0.1.2.3 LineCode=4_ACSR_3PH_4_ACSR_N_4KV_4 Length=0.090895 units=km
New Line.4029832E$4029836E phases=3 Bus1=22807676.0.1.2 Bus2=22807651.0.1.2 LineCode=4_ACSR_2PH_4_ACSR_N_4KV_3_N Length=0.242337 units=km
New Line.ND22809006$ND22809007 phases=2 Bus1=22809006.0.3 Bus2=22809007.0.3 LineCode=4_ACSR_3PH_4_ACSR_N_4KV_2_N Length=0.094259 units=km
New Line.ND22809006$ND89999586 phases=4 Bus1=22809006.0.1.2.3 Bus2=89999586.0.1.2.3 LineCode=4_ACSR_3PH_4_ACSR_N_4KV_4 Length=1.82012 units=km
New Line.4029836E$4616814E phases=3 Bus1=22807651.0.1.2 Bus2=108276730.0.1.2 LineCode=4_ACSR_2PH_4_ACSR_N_4KV_3_N Length=0.223119 units=km
New Line.ND22809007$4029820E phases=2 Bus1=22809007.0.3 Bus2=22807751.0.3 LineCode=4_ACSR_1PH_4_ACSR_N_4KV_2_N Length=0.10149 units=km
New Line.ND22809007$2290116E phases=2 Bus1=22809007.0.3 Bus2=22807776.0.3 LineCode=4_ACSR_3PH_4_ACSR_N_4KV_2_N Length=0.038671 units=km
New Line.ND89999586$1959198E phases=4 Bus1=89999586.0.1.2.3 Bus2=22807826.0.1.2.3 LineCode=4_ACSR_3PH_4_ACSR_N_4KV_4 Length=0.012556 units=km
New Line.ND89999586$5519940E phases=4 Bus1=89999586.0.1.2.3 Bus2=89999559.0.1.2.3 LineCode=4_ACSR_3PH_4_ACSR_N_4KV_4 Length=0.023841 units=km
New Line.1959198E$4715428E phases=4 Bus1=22807826.0.1.2.3 Bus2=102514913.0.1.2.3 LineCode=4_ACSR_3PH_4_ACSR_N_4KV_4 Length=0.628783 units=km
New Line.4029820E$4715214E phases=2 Bus1=22807751.0.3 Bus2=105238130.0.3 LineCode=4_ACSR_1PH_4_ACSR_N_4KV_2_N Length=0.315154 units=km
New Line.4715428E$ND22809648 phases=4 Bus1=102514913.0.1.2.3 Bus2=22809648.0.1.2.3 LineCode=4_ACSR_3PH_4_ACSR_N_4KV_4 Length=0.068056 units=km
New Line.ND22809648$3005954E phases=2 Bus1=22809648.0.3 Bus2=22807851.0.3 LineCode=4_ACSR_1PH_4_ACSR_N_4KV_2_N Length=0.084894 units=km
New Line.ND22809648$2360549E phases=4 Bus1=22809648.0.1.2.3 Bus2=22807876.0.1.2.3 LineCode=4_ACSR_3PH_4_ACSR_N_4KV_4 Length=1.24601 units=km
New Line.11446$ND42876246 phases=4 Bus1=-8888882179929.0.1.2.3 Bus2=42876166.0.1.2.3 LineCode=2_CU_3PH_2_CU_N_4KV_4 Length=0.085602 units=km

! Switches
New Line.MC_CLARY$SAGEBRUSH_RCS0227$RCS0227 phases=3 Bus1=108276498.1.2.3 Bus2=-777777108276498.1.2.3 switch=y r1=0.001 x1=0.001 r0=0.001 x0=0.001 Length=0.001 units=km
New Line.5519941:P5519941-2 phases=1 Bus1=89999605.3 Bus2=-77777789999605.3 switch=y r1=0.001 x1=0.001 r0=0.001 x0=0.001 Length=0.001 units=km
New Line.266129ST1:266129ST1 phases=3 Bus1=106419548.1.2.3 Bus2=106419549.1.2.3 switch=y r1=0.001 x1=0.001 r0=0.001 x0=0.001 Length=0.001 units=km
New Line.80364S:80364S phases=3 Bus1=42876392.1.2.3 Bus2=42876391.1.2.3 switch=y r1=0.001 x1=0.001 r0=0.001 x0=0.001 Length=0.001 units=km
New Line.80352S:80352S phases=1 Bus1=42876404.1 Bus2=42876405.1 switch=y r1=0.001 x1=0.001 r0=0.001 x0=0.001 Length=0.001 units=km
New Line.80342ST1:80342ST1 phases=1 Bus1=106419513.3 Bus2=106419514.3 switch=y r1=0.001 x1=0.001 r0=0.001 x0=0.001 Length=0.001 units=km
New Line.80342S:80342S phases=1 Bus1=22808933.3 Bus2=22808934.3 switch=y r1=0.001 x1=0.001 r0=0.001 x0=0.001 Length=0.001 units=km
New Line.366129S:366129S phases=3 Bus1=22808907.1.2.3 Bus2=22808908.1.2.3 switch=y r1=0.001 x1=0.001 r0=0.001 x0=0.001 Length=0.001 units=km
New Line.426324S:426324ST1 phases=3 Bus1=42876418.1.2.3 Bus2=42876417.1.2.3 switch=y r1=0.001 x1=0.001 r0=0.001 x0=0.001 Length=0.001 units=km
New Line.4245904E:4245904E phases=3 Bus1=42876471.1.2.3 Bus2=42876470.1.2.3 switch=y r1=0.001 x1=0.001 r0=0.001 x0=0.001 Length=0.001 units=km
New Line.366133S:366133S phases=1 Bus1=106419409.2 Bus2=106419410.2 switch=y r1=0.001 x1=0.001 r0=0.001 x0=0.001 Length=0.001 units=km
New Line.2156517E:2156517E phases=1 Bus1=22808691.1 Bus2=22808690.1 switch=y r1=0.001 x1=0.001 r0=0.001 x0=0.001 Length=0.001 units=km
New Line.266640S:266640S phases=3 Bus1=22808843.1.2.3 Bus2=22808842.1.2.3 switch=y r1=0.001 x1=0.001 r0=0.001 x0=0.001 Length=0.001 units=km
New Line.2122417E:2122417E phases=1 Bus1=22808758.1 Bus2=22808757.1 switch=y r1=0.001 x1=0.001 r0=0.001 x0=0.001 Length=0.001 units=km
New Line.4960864E:RAR0195 phases=3 Bus1=42876148.1.2.3 Bus2=42876149.1.2.3 switch=y r1=0.001 x1=0.001 r0=0.001 x0=0.001 Length=0.001 units=km
New Line.4606000E:RAR0745 phases=3 Bus1=110723944.1.2.3 Bus2=110723943.1.2.3 switch=y r1=0.001 x1=0.001 r0=0.001 x0=0.001 Length=0.001 units=km
New Line.4234964E:4234964E phases=3 Bus1=154833406.1.2.3 Bus2=-777777154833406.1.2.3 switch=y r1=0.001 x1=0.001 r0=0.001 x0=0.001 Length=0.001 units=km enabled=false
New Line.42876206$B phases=3 Bus1=42876166.1.2.3 Bus2=42876154.1.2.3 switch=y r1=0.001 x1=0.001 r0=0.001 x0=0.001 Length=0.001 units=km
New Line.42876206$C phases=3 Bus1=42876166.1.2.3 Bus2=42876167.1.2.3 switch=y r1=0.001 x1=0.001 r0=0.001 x0=0.001 Length=0.001 units=km
New Line.42876210$C phases=3 Bus1=42876185.1.2.3 Bus2=42876184.1.2.3 switch=y r1=0.001 x1=0.001 r0=0.001 x0=0.001 Length=0.001 units=km
New Line.42876210$D phases=3 Bus1=42876184.1.2.3 Bus2=42876160.1.2.3 switch=y r1=0.001 x1=0.001 r0=0.001 x0=0.001 Length=0.001 units=km
New Line.148180910$PDREG0703-B phases=3 Bus1=148180868.1.2.3 Bus2=148180856.1.2.3 switch=y r1=0.001 x1=0.001 r0=0.001 x0=0.001 Length=0.001 units=km
New Line.148180910$PDREG0703-C phases=3 Bus1=148180868.1.2.3 Bus2=148180869.1.2.3 switch=y r1=0.001 x1=0.001 r0=0.001 x0=0.001 Length=0.001 units=km
New Line.PDREG0703-B$4735563E phases=3 Bus1=148180857.1.2.3 Bus2=148180881.1.2.3 switch=y r1=0.001 x1=0.001 r0=0.001 x0=0.001 Length=0.001 units=km
New Line.148180914$PDREG0703-C phases=3 Bus1=148180887.1.2.3 Bus2=148180886.1.2.3 switch=y r1=0.001 x1=0.001 r0=0.001 x0=0.001 Length=0.001 units=km
New Line.148180914$PDREG0703-D phases=3 Bus1=148180886.1.2.3 Bus2=148180862.1.2.3 switch=y r1=0.001 x1=0.001 r0=0.001 x0=0.001 Length=0.001 units=km
New Line.PDREG0703-D$4735563E phases=3 Bus1=148180893.1.2.3 Bus2=148180863.1.2.3 switch=y r1=0.001 x1=0.001 r0=0.001 x0=0.001 Length=0.001 units=km
New Line.232700527 phases=3 Bus1=232700529.1.2.3 Bus2=232700530.1.2.3 switch=y r1=0.001 x1=0.001 r0=0.001 x0=0.001 Length=0.001 units=km
New Line.232700539 phases=3 Bus1=232700542.1.2.3 Bus2=232700541.1.2.3 switch=y r1=0.001 x1=0.001 r0=0.001 x0=0.001 Length=0.001 units=km
New Line.232700549 phases=3 Bus1=232700551.1.2.3 Bus2=232700552.1.2.3 switch=y r1=0.001 x1=0.001 r0=0.001 x0=0.001 Length=0.001 units=km
New Line.110724005$PDRAR0745-D phases=3 Bus1=110723979.1.2.3 Bus2=110723955.1.2.3 switch=y r1=0.001 x1=0.001 r0=0.001 x0=0.001 Length=0.001 units=km
New Line.110724005$PDRAR0745-C phases=3 Bus1=110723979.1.2.3 Bus2=110723980.1.2.3 switch=y r1=0.001 x1=0.001 r0=0.001 x0=0.001 Length=0.001 units=km
New Line.110724001$PDRAR0745-C phases=3 Bus1=110723962.1.2.3 Bus2=110723961.1.2.3 switch=y r1=0.001 x1=0.001 r0=0.001 x0=0.001 Length=0.001 units=km
New Line.110724001$PDRAR0745-B phases=3 Bus1=110723961.1.2.3 Bus2=110723949.1.2.3 switch=y r1=0.001 x1=0.001 r0=0.001 x0=0.001 Length=0.001 units=km
New Line.27030S:42875822 phases=3 Bus1=42875824.1.2.3 Bus2=42875825.1.2.3 switch=y r1=0.001 x1=0.001 r0=0.001 x0=0.001 Length=0.001 units=km
New Line.4928062E:22808524 phases=3 Bus1=22808526.1.2.3 Bus2=22808527.1.2.3 switch=y r1=0.001 x1=0.001 r0=0.001 x0=0.001 Length=0.001 units=km
New Line.4344366E:42876038 phases=3 Bus1=42876040.1.2.3 Bus2=42876041.1.2.3 switch=y r1=0.001 x1=0.001 r0=0.001 x0=0.001 Length=0.001 units=km
New Line.4200421E:22808058 phases=1 Bus1=22808060.1 Bus2=22808061.1 switch=y r1=0.001 x1=0.001 r0=0.001 x0=0.001 Length=0.001 units=km
New Line.4928090E:42876092 phases=3 Bus1=42876094.1.2.3 Bus2=42876095.1.2.3 switch=y r1=0.001 x1=0.001 r0=0.001 x0=0.001 Length=0.001 units=km
New Line.4416821E:69399265 phases=3 Bus1=69399267.1.2.3 Bus2=69399268.1.2.3 switch=y r1=0.001 x1=0.001 r0=0.001 x0=0.001 Length=0.001 units=km
New Line.4928070E:42875847 phases=3 Bus1=42875849.1.2.3 Bus2=42875850.1.2.3 switch=y r1=0.001 x1=0.001 r0=0.001 x0=0.001 Length=0.001 units=km
New Line.1552777E:42871178 phases=3 Bus1=42871180.1.2.3 Bus2=42871181.1.2.3 switch=y r1=0.001 x1=0.001 r0=0.001 x0=0.001 Length=0.001 units=km
New Line.2342755E:42871203 phases=3 Bus1=42871205.1.2.3 Bus2=42871206.1.2.3 switch=y r1=0.001 x1=0.001 r0=0.001 x0=0.001 Length=0.001 units=km
New Line.4615495E:42875772 phases=3 Bus1=42875774.1.2.3 Bus2=42875775.1.2.3 switch=y r1=0.001 x1=0.001 r0=0.001 x0=0.001 Length=0.001 units=km
New Line.63273S:42875747 phases=3 Bus1=42875749.1.2.3 Bus2=42875750.1.2.3 switch=y r1=0.001 x1=0.001 r0=0.001 x0=0.001 Length=0.001 units=km
New Line.227843S:42875876 phases=1 Bus1=42875878.1 Bus2=42875879.1 switch=y r1=0.001 x1=0.001 r0=0.001 x0=0.001 Length=0.001 units=km
New Line.4716206E:103283820 phases=2 Bus1=103283822.2.3 Bus2=103283823.2.3 switch=y r1=0.001 x1=0.001 r0=0.001 x0=0.001 Length=0.001 units=km
New Line.4832996E:42875901 phases=3 Bus1=42875903.1.2.3 Bus2=42875904.1.2.3 switch=y r1=0.001 x1=0.001 r0=0.001 x0=0.001 Length=0.001 units=km
New Line.4928068E:22808553 phases=3 Bus1=22808555.1.2.3 Bus2=22808556.1.2.3 switch=y r1=0.001 x1=0.001 r0=0.001 x0=0.001 Length=0.001 units=km
New Line.4512798E:243200874 phases=3 Bus1=243200876.1.2.3 Bus2=243200877.1.2.3 switch=y r1=0.001 x1=0.001 r0=0.001 x0=0.001 Length=0.001 units=km
New Line.427764S:22808366 phases=3 Bus1=22808368.1.2.3 Bus2=22808369.1.2.3 switch=y r1=0.001 x1=0.001 r0=0.001 x0=0.001 Length=0.001 units=km
New Line.363344S:22808391 phases=3 Bus1=22808393.1.2.3 Bus2=22808394.1.2.3 switch=y r1=0.001 x1=0.001 r0=0.001 x0=0.001 Length=0.001 units=km
New Line.4862094E:22808582 phases=1 Bus1=22808584.1 Bus2=22808585.1 switch=y r1=0.001 x1=0.001 r0=0.001 x0=0.001 Length=0.001 units=km
New Line.4928060E:215013980 phases=3 Bus1=215013982.1.2.3 Bus2=215013983.1.2.3 switch=y r1=0.001 x1=0.001 r0=0.001 x0=0.001 Length=0.001 units=km
New Line.426310S:22808291 phases=3 Bus1=22808293.1.2.3 Bus2=22808294.1.2.3 switch=y r1=0.001 x1=0.001 r0=0.001 x0=0.001 Length=0.001 units=km
New Line.27471S:22808316 phases=3 Bus1=22808318.1.2.3 Bus2=22808319.1.2.3 switch=y r1=0.001 x1=0.001 r0=0.001 x0=0.001 Length=0.001 units=km
New Line.1591598E:22808033 phases=3 Bus1=22808035.1.2.3 Bus2=22808036.1.2.3 switch=y r1=0.001 x1=0.001 r0=0.001 x0=0.001 Length=0.001 units=km
New Line.4646010E:101196710 phases=3 Bus1=101196712.1.2.3 Bus2=101196713.1.2.3 switch=y r1=0.001 x1=0.001 r0=0.001 x0=0.001 Length=0.001 units=km
New Line.1738428E:22807958 phases=3 Bus1=22807960.1.2.3 Bus2=22807961.1.2.3 switch=y r1=0.001 x1=0.001 r0=0.001 x0=0.001 Length=0.001 units=km
New Line.26723S:22808341 phases=1 Bus1=22808343.1 Bus2=22808344.1 switch=y r1=0.001 x1=0.001 r0=0.001 x0=0.001 Length=0.001 units=km
New Line.2377493E:22807933 phases=1 Bus1=22807935.3 Bus2=22807936.3 switch=y r1=0.001 x1=0.001 r0=0.001 x0=0.001 Length=0.001 units=km
New Line.4665171E:102514846 phases=2 Bus1=102514848.2.3 Bus2=102514849.2.3 switch=y r1=0.001 x1=0.001 r0=0.001 x0=0.001 Length=0.001 units=km
New Line.4665156E:108276676 phases=3 Bus1=108276678.1.2.3 Bus2=108276679.1.2.3 switch=y r1=0.001 x1=0.001 r0=0.001 x0=0.001 Length=0.001 units=km
New Line.4928067E:22808237 phases=3 Bus1=22808239.1.2.3 Bus2=22808240.1.2.3 switch=y r1=0.001 x1=0.001 r0=0.001 x0=0.001 Length=0.001 units=km
New Line.4847393E:216890040 phases=3 Bus1=216890042.1.2.3 Bus2=216890043.1.2.3 switch=y r1=0.001 x1=0.001 r0=0.001 x0=0.001 Length=0.001 units=km
New Line.2002127E:22808108 phases=1 Bus1=22808110.3 Bus2=22808111.3 switch=y r1=0.001 x1=0.001 r0=0.001 x0=0.001 Length=0.001 units=km
New Line.426484S:69751291 phases=1 Bus1=69751293.3 Bus2=69751294.3 switch=y r1=0.001 x1=0.001 r0=0.001 x0=0.001 Length=0.001 units=km
New Line.4234962E:42876063 phases=3 Bus1=42876065.1.2.3 Bus2=42876066.1.2.3 switch=y r1=0.001 x1=0.001 r0=0.001 x0=0.001 Length=0.001 units=km
New Line.1906728E:22807908 phases=1 Bus1=22807910.3 Bus2=22807911.3 switch=y r1=0.001 x1=0.001 r0=0.001 x0=0.001 Length=0.001 units=km
New Line.4200471E:22807983 phases=3 Bus1=22807985.1.2.3 Bus2=22807986.1.2.3 switch=y r1=0.001 x1=0.001 r0=0.001 x0=0.001 Length=0.001 units=km
New Line.1784716E:22808008 phases=3 Bus1=22808010.1.2.3 Bus2=22808011.1.2.3 switch=y r1=0.001 x1=0.001 r0=0.001 x0=0.001 Length=0.001 units=km
New Line.2156518E:22807883 phases=1 Bus1=22807885.1 Bus2=22807886.1 switch=y r1=0.001 x1=0.001 r0=0.001 x0=0.001 Length=0.001 units=km
New Line.426485S:211265135 phases=1 Bus1=211265137.3 Bus2=211265138.3 switch=y r1=0.001 x1=0.001 r0=0.001 x0=0.001 Length=0.001 units=km
New Line.2224395E:22808133 phases=1 Bus1=22808135.3 Bus2=22808136.3 switch=y r1=0.001 x1=0.001 r0=0.001 x0=0.001 Length=0.001 units=km
New Line.4928064E:22808208 phases=3 Bus1=22808210.1.2.3 Bus2=22808211.1.2.3 switch=y r1=0.001 x1=0.001 r0=0.001 x0=0.001 Length=0.001 units=km
New Line.4565156E:42876121 phases=3 Bus1=42876123.1.2.3 Bus2=42876124.1.2.3 switch=y r1=0.001 x1=0.001 r0=0.001 x0=0.001 Length=0.001 units=km
New Line.4715305E:105076442 phases=1 Bus1=105076444.3 Bus2=105076445.3 switch=y r1=0.001 x1=0.001 r0=0.001 x0=0.001 Length=0.001 units=km
New Line.366130S:22808416 phases=3 Bus1=22808418.1.2.3 Bus2=22808419.1.2.3 switch=y r1=0.001 x1=0.001 r0=0.001 x0=0.001 Length=0.001 units=km
New Line.4963154E:242325217 phases=3 Bus1=242325219.1.2.3 Bus2=242325220.1.2.3 switch=y r1=0.001 x1=0.001 r0=0.001 x0=0.001 Length=0.001 units=km
New Line.427141S:22808499 phases=3 Bus1=22808501.1.2.3 Bus2=22808502.1.2.3 switch=y r1=0.001 x1=0.001 r0=0.001 x0=0.001 Length=0.001 units=km
New Line.3005488E:22807608 phases=3 Bus1=22807610.1.2.3 Bus2=22807611.1.2.3 switch=y r1=0.001 x1=0.001 r0=0.001 x0=0.001 Length=0.001 units=km
New Line.1959134E:22808183 phases=3 Bus1=22808185.1.2.3 Bus2=22808186.1.2.3 switch=y r1=0.001 x1=0.001 r0=0.001 x0=0.001 Length=0.001 units=km
New Line.2342453E:69454954 phases=2 Bus1=69454956.1.2 Bus2=69454957.1.2 switch=y r1=0.001 x1=0.001 r0=0.001 x0=0.001 Length=0.001 units=km
New Line.1959137E:108276745 phases=3 Bus1=108276747.1.2.3 Bus2=108276748.1.2.3 switch=y r1=0.001 x1=0.001 r0=0.001 x0=0.001 Length=0.001 units=km
New Line.2342455E:22807683 phases=2 Bus1=22807685.1.2 Bus2=22807686.1.2 switch=y r1=0.001 x1=0.001 r0=0.001 x0=0.001 Length=0.001 units=km
New Line.63510S:269126238 phases=3 Bus1=269126240.1.2.3 Bus2=269126241.1.2.3 switch=y r1=0.001 x1=0.001 r0=0.001 x0=0.001 Length=0.001 units=km
New Line.2171329E:42871278 phases=3 Bus1=42871280.1.2.3 Bus2=42871281.1.2.3 switch=y r1=0.001 x1=0.001 r0=0.001 x0=0.001 Length=0.001 units=km
New Line.2285423E:42875622 phases=3 Bus1=42875624.1.2.3 Bus2=42875625.1.2.3 switch=y r1=0.001 x1=0.001 r0=0.001 x0=0.001 Length=0.001 units=km
New Line.367473S:42875930 phases=3 Bus1=42875932.1.2.3 Bus2=42875933.1.2.3 switch=y r1=0.001 x1=0.001 r0=0.001 x0=0.001 Length=0.001 units=km
New Line.4832577E:188332762 phases=3 Bus1=188332764.1.2.3 Bus2=188332765.1.2.3 switch=y r1=0.001 x1=0.001 r0=0.001 x0=0.001 Length=0.001 units=km
New Line.4052798E:22808083 phases=1 Bus1=22808085.2 Bus2=22808086.2 switch=y r1=0.001 x1=0.001 r0=0.001 x0=0.001 Length=0.001 units=km
New Line.1600831E:42871228 phases=3 Bus1=42871230.1.2.3 Bus2=42871231.1.2.3 switch=y r1=0.001 x1=0.001 r0=0.001 x0=0.001 Length=0.001 units=km
New Line.2084986E:42875722 phases=3 Bus1=42875724.1.2.3 Bus2=42875725.1.2.3 switch=y r1=0.001 x1=0.001 r0=0.001 x0=0.001 Length=0.001 units=km
New Line.1756745E:42876013 phases=3 Bus1=42876015.1.2.3 Bus2=42876016.1.2.3 switch=y r1=0.001 x1=0.001 r0=0.001 x0=0.001 Length=0.001 units=km
New Line.4928063E:215616795 phases=3 Bus1=215616797.1.2.3 Bus2=215616798.1.2.3 switch=y r1=0.001 x1=0.001 r0=0.001 x0=0.001 Length=0.001 units=km
New Line.1906587E:42871253 phases=3 Bus1=42871255.1.2.3 Bus2=42871256.1.2.3 switch=y r1=0.001 x1=0.001 r0=0.001 x0=0.001 Length=0.001 units=km
New Line.4665687E:42875797 phases=3 Bus1=42875799.1.2.3 Bus2=42875800.1.2.3 switch=y r1=0.001 x1=0.001 r0=0.001 x0=0.001 Length=0.001 units=km
New Line.4715223E:22807708 phases=1 Bus1=22807710.2 Bus2=22807711.2 switch=y r1=0.001 x1=0.001 r0=0.001 x0=0.001 Length=0.001 units=km
New Line.4029814E:22807783 phases=1 Bus1=22807785.2 Bus2=22807786.2 switch=y r1=0.001 x1=0.001 r0=0.001 x0=0.001 Length=0.001 units=km
New Line.4715224E:105671870 phases=1 Bus1=105671872.2 Bus2=105671873.2 switch=y r1=0.001 x1=0.001 r0=0.001 x0=0.001 Length=0.001 units=km
New Line.1959138E:22808474 phases=3 Bus1=22808476.1.2.3 Bus2=22808477.1.2.3 switch=y r1=0.001 x1=0.001 r0=0.001 x0=0.001 Length=0.001 units=km
New Line.4029830E:239915505 phases=2 Bus1=239915507.1.2 Bus2=239915508.1.2 switch=y r1=0.001 x1=0.001 r0=0.001 x0=0.001 Length=0.001 units=km
New Line.4029832E:22807658 phases=2 Bus1=22807660.1.2 Bus2=22807661.1.2 switch=y r1=0.001 x1=0.001 r0=0.001 x0=0.001 Length=0.001 units=km
New Line.4029836E:22807633 phases=2 Bus1=22807635.1.2 Bus2=22807636.1.2 switch=y r1=0.001 x1=0.001 r0=0.001 x0=0.001 Length=0.001 units=km
New Line.4616814E:108276711 phases=2 Bus1=108276713.1.2 Bus2=108276714.1.2 switch=y r1=0.001 x1=0.001 r0=0.001 x0=0.001 Length=0.001 units=km
New Line.4029820E:22807733 phases=1 Bus1=22807735.3 Bus2=22807736.3 switch=y r1=0.001 x1=0.001 r0=0.001 x0=0.001 Length=0.001 units=km
New Line.2290116E:22807758 phases=1 Bus1=22807760.3 Bus2=22807761.3 switch=y r1=0.001 x1=0.001 r0=0.001 x0=0.001 Length=0.001 units=km
New Line.1959198E:22807808 phases=3 Bus1=22807810.1.2.3 Bus2=22807811.1.2.3 switch=y r1=0.001 x1=0.001 r0=0.001 x0=0.001 Length=0.001 units=km
New Line.4715428E:102514894 phases=3 Bus1=102514896.1.2.3 Bus2=102514897.1.2.3 switch=y r1=0.001 x1=0.001 r0=0.001 x0=0.001 Length=0.001 units=km
New Line.4715214E:105238111 phases=1 Bus1=105238113.3 Bus2=105238114.3 switch=y r1=0.001 x1=0.001 r0=0.001 x0=0.001 Length=0.001 units=km
New Line.3005954E:22807833 phases=1 Bus1=22807835.3 Bus2=22807836.3 switch=y r1=0.001 x1=0.001 r0=0.001 x0=0.001 Length=0.001 units=km
New Line.2360549E:22807858 phases=3 Bus1=22807860.1.2.3 Bus2=22807861.1.2.3 switch=y r1=0.001 x1=0.001 r0=0.001 x0=0.001 Length=0.001 units=km
New Line.4960864E:RAR0195_B phases=3 Bus1=42876154.1.2.3 Bus2=42876155.1.2.3 switch=y r1=0.001 x1=0.001 r0=0.001 x0=0.001 Length=0.001 units=km
New Line.4960864E:RAR0195_C phases=3 Bus1=42876167.1.2.3 Bus2=42876185.1.2.3 switch=y r1=0.001 x1=0.001 r0=0.001 x0=0.001 Length=0.001 units=km enabled=false
New Line.4960864E:RAR0195_D phases=3 Bus1=42876160.1.2.3 Bus2=42876161.1.2.3 switch=y r1=0.001 x1=0.001 r0=0.001 x0=0.001 Length=0.001 units=km
New Line.4735563E:PDREG0703-B phases=3 Bus1=148180856.1.2.3 Bus2=148180857.1.2.3 switch=y r1=0.001 x1=0.001 r0=0.001 x0=0.001 Length=0.001 units=km
New Line.4735563E:PDREG0703-C phases=3 Bus1=148180869.1.2.3 Bus2=148180887.1.2.3 switch=y r1=0.001 x1=0.001 r0=0.001 x0=0.001 Length=0.001 units=km enabled=false
New Line.4735563E:PDREG0703-D phases=3 Bus1=148180862.1.2.3 Bus2=148180863.1.2.3 switch=y r1=0.001 x1=0.001 r0=0.001 x0=0.001 Length=0.001 units=km
New Line.4186090E:PD0432 phases=3 Bus1=42876275.1.2.3 Bus2=42876274.1.2.3 switch=y r1=0.001 x1=0.001 r0=0.001 x0=0.001 Length=0.001 units=km
New Line.4928086E:PS0434 phases=3 Bus1=42876309.1.2.3 Bus2=42876308.1.2.3 switch=y r1=0.001 x1=0.001 r0=0.001 x0=0.001 Length=0.001 units=km
New Line.366140S:366140S phases=3 Bus1=42876430.1.2.3 Bus2=42876431.1.2.3 switch=y r1=0.001 x1=0.001 r0=0.001 x0=0.001 Length=0.001 units=km
New Line.4928069E:RCS0087 phases=3 Bus1=22808946.1.2.3 Bus2=22808977.1.2.3 switch=y r1=0.001 x1=0.001 r0=0.001 x0=0.001 Length=0.001 units=km
New Line.8954CIT:PD0258 phases=3 Bus1=42876363.1.2.3 Bus2=42876362.1.2.3 switch=y r1=0.001 x1=0.001 r0=0.001 x0=0.001 Length=0.001 units=km
New Line.4928060ET1:4928060ET1T1 phases=1 Bus1=106419478.3 Bus2=106419479.3 switch=y r1=0.001 x1=0.001 r0=0.001 x0=0.001 Length=0.001 units=km
New Line.4928058E:PS0016 phases=3 Bus1=22808729.1.2.3 Bus2=22808728.1.2.3 switch=y r1=0.001 x1=0.001 r0=0.001 x0=0.001 Length=0.001 units=km
New Line.300513CI:300513CIT phases=3 Bus1=42876443.1.2.3 Bus2=42876444.1.2.3 switch=y r1=0.001 x1=0.001 r0=0.001 x0=0.001 Length=0.001 units=km
New Line.4606000E:PDRAR0745-D phases=3 Bus1=110723955.1.2.3 Bus2=110723956.1.2.3 switch=y r1=0.001 x1=0.001 r0=0.001 x0=0.001 Length=0.001 units=km
New Line.4606000E:PDRAR0745-C phases=3 Bus1=110723980.1.2.3 Bus2=110723962.1.2.3 switch=y r1=0.001 x1=0.001 r0=0.001 x0=0.001 Length=0.001 units=km enabled=false
New Line.4606000E:PDRAR0745-B phases=3 Bus1=110723949.1.2.3 Bus2=110723950.1.2.3 switch=y r1=0.001 x1=0.001 r0=0.001 x0=0.001 Length=0.001 units=km
New Line.1959133E:PS0382 phases=3 Bus1=22808661.1.2.3 Bus2=22808662.1.2.3 switch=y r1=0.001 x1=0.001 r0=0.001 x0=0.001 Length=0.001 units=km
New Line.2122417E:2122417ET1 phases=3 Bus1=22808771.1.2.3 Bus2=22808770.1.2.3 switch=y r1=0.001 x1=0.001 r0=0.001 x0=0.001 Length=0.001 units=km
New Line.5609473:P5609473-1 phases=3 Bus1=232700565.1.2.3 Bus2=232700566.1.2.3 switch=y r1=0.001 x1=0.001 r0=0.001 x0=0.001 Length=0.001 units=km
New Line.5519941:P5519941-1 phases=1 Bus1=89999604.3 Bus2=89999605.3 switch=y r1=0.001 x1=0.001 r0=0.001 x0=0.001 Length=0.001 units=km
New Line.1522776E:1522776E phases=3 Bus1=232700498.1.2.3 Bus2=232700499.1.2.3 switch=y r1=0.001 x1=0.001 r0=0.001 x0=0.001 Length=0.001 units=km
New Line.5519940E:5519940E phases=3 Bus1=89999559.1.2.3 Bus2=89999560.1.2.3 switch=y r1=0.001 x1=0.001 r0=0.001 x0=0.001 Length=0.001 units=km
New Line.CAB_2342755E:2342755E phases=3 Bus1=42871221.1.2.3 Bus2=42871205.1.2.3 switch=y r1=0.001 x1=0.001 r0=0.001 x0=0.001 Length=0.001 units=km
New Line.CAB_4928068E:4928068E phases=3 Bus1=22808573.1.2.3 Bus2=22808555.1.2.3 switch=y r1=0.001 x1=0.001 r0=0.001 x0=0.001 Length=0.001 units=km
New Line.CAB_4928067E:4928067E phases=3 Bus1=22808257.1.2.3 Bus2=22808239.1.2.3 switch=y r1=0.001 x1=0.001 r0=0.001 x0=0.001 Length=0.001 units=km
New Line.CAB_427764S:427764S phases=3 Bus1=22808384.1.2.3 Bus2=22808368.1.2.3 switch=y r1=0.001 x1=0.001 r0=0.001 x0=0.001 Length=0.001 units=km
New Line.CAB_363344S:363344S phases=3 Bus1=22808409.1.2.3 Bus2=22808393.1.2.3 switch=y r1=0.001 x1=0.001 r0=0.001 x0=0.001 Length=0.001 units=km
New Line.CAB_4862094E:4862094E phases=3 Bus1=22808600.1.2.3 Bus2=22808584.1.2.3 switch=y r1=0.001 x1=0.001 r0=0.001 x0=0.001 Length=0.001 units=km
New Line.CAB_4928060E:4928060E phases=3 Bus1=215013999.1.2.3 Bus2=215013982.1.2.3 switch=y r1=0.001 x1=0.001 r0=0.001 x0=0.001 Length=0.001 units=km
New Line.CAB_1591598E:1591598E phases=3 Bus1=22808051.1.2.3 Bus2=22808035.1.2.3 switch=y r1=0.001 x1=0.001 r0=0.001 x0=0.001 Length=0.001 units=km
New Line.CAB_4646010E:4646010E phases=3 Bus1=101196729.1.2.3 Bus2=101196712.1.2.3 switch=y r1=0.001 x1=0.001 r0=0.001 x0=0.001 Length=0.001 units=km
New Line.CAB_426484S:426484S phases=3 Bus1=69751310.1.2.3 Bus2=69751293.1.2.3 switch=y r1=0.001 x1=0.001 r0=0.001 x0=0.001 Length=0.001 units=km
New Line.CAB_426485S:426485S phases=3 Bus1=211265154.1.2.3 Bus2=211265137.1.2.3 switch=y r1=0.001 x1=0.001 r0=0.001 x0=0.001 Length=0.001 units=km
New Line.CAB_4565156E:4565156E phases=3 Bus1=42876139.1.2.3 Bus2=42876123.1.2.3 switch=y r1=0.001 x1=0.001 r0=0.001 x0=0.001 Length=0.001 units=km
New Line.CAB_366130S:366130S phases=3 Bus1=22808436.1.2.3 Bus2=22808418.1.2.3 switch=y r1=0.001 x1=0.001 r0=0.001 x0=0.001 Length=0.001 units=km
New Line.CAB_63510S:63510S phases=3 Bus1=269126257.1.2.3 Bus2=269126240.1.2.3 switch=y r1=0.001 x1=0.001 r0=0.001 x0=0.001 Length=0.001 units=km
New Line.CAB_2171329E:2171329E phases=3 Bus1=42875590.1.2.3 Bus2=42871280.1.2.3 switch=y r1=0.001 x1=0.001 r0=0.001 x0=0.001 Length=0.001 units=km
New Line.CAB_2285423E:2285423E phases=3 Bus1=42875640.1.2.3 Bus2=42875624.1.2.3 switch=y r1=0.001 x1=0.001 r0=0.001 x0=0.001 Length=0.001 units=km
New Line.CAB_4832577E:4832577E phases=3 Bus1=188332757.1.2.3 Bus2=188332764.1.2.3 switch=y r1=0.001 x1=0.001 r0=0.001 x0=0.001 Length=0.001 units=km
New Line.CAB_1600831E:1600831E phases=3 Bus1=42871246.1.2.3 Bus2=42871230.1.2.3 switch=y r1=0.001 x1=0.001 r0=0.001 x0=0.001 Length=0.001 units=km
New Line.CAB_2084986E:2084986E phases=3 Bus1=42875740.1.2.3 Bus2=42875724.1.2.3 switch=y r1=0.001 x1=0.001 r0=0.001 x0=0.001 Length=0.001 units=km
New Line.CAB_4928063E:4928063E phases=3 Bus1=215616814.1.2.3 Bus2=215616797.1.2.3 switch=y r1=0.001 x1=0.001 r0=0.001 x0=0.001 Length=0.001 units=km
New Line.CAB_4029836E:4029836E phases=3 Bus1=22807651.1.2.3 Bus2=22807635.1.2.3 switch=y r1=0.001 x1=0.001 r0=0.001 x0=0.001 Length=0.001 units=km
New Line.CAB_2360549E:2360549E phases=3 Bus1=22807876.1.2.3 Bus2=22807860.1.2.3 switch=y r1=0.001 x1=0.001 r0=0.001 x0=0.001 Length=0.001 units=km
New Line.CAB_4344366E:4344366E phases=3 Bus1=42876056.1.2.3 Bus2=42876040.1.2.3 switch=y r1=0.001 x1=0.001 r0=0.001 x0=0.001 Length=0.001 units=km
New Line.CAB_4200421E:4200421E phases=3 Bus1=22808076.1.2.3 Bus2=22808060.1.2.3 switch=y r1=0.001 x1=0.001 r0=0.001 x0=0.001 Length=0.001 units=km
New Line.CAB_4928090E:4928090E phases=3 Bus1=42876112.1.2.3 Bus2=42876094.1.2.3 switch=y r1=0.001 x1=0.001 r0=0.001 x0=0.001 Length=0.001 units=km
New Line.CAB_4416821E:4416821E phases=3 Bus1=69399284.1.2.3 Bus2=69399267.1.2.3 switch=y r1=0.001 x1=0.001 r0=0.001 x0=0.001 Length=0.001 units=km
New Line.CAB_4928070E:4928070E phases=3 Bus1=42875867.1.2.3 Bus2=42875849.1.2.3 switch=y r1=0.001 x1=0.001 r0=0.001 x0=0.001 Length=0.001 units=km
New Line.CAB_1552777E:1552777E phases=3 Bus1=42871196.1.2.3 Bus2=42871180.1.2.3 switch=y r1=0.001 x1=0.001 r0=0.001 x0=0.001 Length=0.001 units=km
New Line.CAB_4615495E:4615495E phases=3 Bus1=42875790.1.2.3 Bus2=42875774.1.2.3 switch=y r1=0.001 x1=0.001 r0=0.001 x0=0.001 Length=0.001 units=km
New Line.CAB_63273S:63273S phases=3 Bus1=42875765.1.2.3 Bus2=42875749.1.2.3 switch=y r1=0.001 x1=0.001 r0=0.001 x0=0.001 Length=0.001 units=km
New Line.CAB_227843S:227843S phases=3 Bus1=42875894.1.2.3 Bus2=42875878.1.2.3 switch=y r1=0.001 x1=0.001 r0=0.001 x0=0.001 Length=0.001 units=km
New Line.CAB_4716206E:4716206E phases=3 Bus1=103283839.1.2.3 Bus2=103283822.1.2.3 switch=y r1=0.001 x1=0.001 r0=0.001 x0=0.001 Length=0.001 units=km
New Line.CAB_4832996E:4832996E phases=3 Bus1=42875921.1.2.3 Bus2=42875903.1.2.3 switch=y r1=0.001 x1=0.001 r0=0.001 x0=0.001 Length=0.001 units=km
New Line.CAB_4512798E:4512798E phases=3 Bus1=243200893.1.2.3 Bus2=243200876.1.2.3 switch=y r1=0.001 x1=0.001 r0=0.001 x0=0.001 Length=0.001 units=km
New Line.CAB_426310S:426310S phases=3 Bus1=22808309.1.2.3 Bus2=22808293.1.2.3 switch=y r1=0.001 x1=0.001 r0=0.001 x0=0.001 Length=0.001 units=km
New Line.CAB_27471S:27471S phases=3 Bus1=22808334.1.2.3 Bus2=22808318.1.2.3 switch=y r1=0.001 x1=0.001 r0=0.001 x0=0.001 Length=0.001 units=km
New Line.CAB_1738428E:1738428E phases=3 Bus1=22807976.1.2.3 Bus2=22807960.1.2.3 switch=y r1=0.001 x1=0.001 r0=0.001 x0=0.001 Length=0.001 units=km
New Line.CAB_26723S:26723S phases=3 Bus1=22808359.1.2.3 Bus2=22808343.1.2.3 switch=y r1=0.001 x1=0.001 r0=0.001 x0=0.001 Length=0.001 units=km
New Line.CAB_2377493E:2377493E phases=3 Bus1=22807951.1.2.3 Bus2=22807935.1.2.3 switch=y r1=0.001 x1=0.001 r0=0.001 x0=0.001 Length=0.001 units=km
New Line.CAB_4665171E:4665171E phases=3 Bus1=102514865.1.2.3 Bus2=102514848.1.2.3 switch=y r1=0.001 x1=0.001 r0=0.001 x0=0.001 Length=0.001 units=km
New Line.CAB_4665156E:4665156E phases=3 Bus1=108276695.1.2.3 Bus2=108276678.1.2.3 switch=y r1=0.001 x1=0.001 r0=0.001 x0=0.001 Length=0.001 units=km
New Line.CAB_1906728E:1906728E phases=3 Bus1=22807926.1.2.3 Bus2=22807910.1.2.3 switch=y r1=0.001 x1=0.001 r0=0.001 x0=0.001 Length=0.001 units=km
New Line.CAB_4200471E:4200471E phases=3 Bus1=22808001.1.2.3 Bus2=22807985.1.2.3 switch=y r1=0.001 x1=0.001 r0=0.001 x0=0.001 Length=0.001 units=km
New Line.CAB_1784716E:1784716E phases=3 Bus1=22808026.1.2.3 Bus2=22808010.1.2.3 switch=y r1=0.001 x1=0.001 r0=0.001 x0=0.001 Length=0.001 units=km
New Line.CAB_4847393E:4847393E phases=3 Bus1=216890059.1.2.3 Bus2=216890042.1.2.3 switch=y r1=0.001 x1=0.001 r0=0.001 x0=0.001 Length=0.001 units=km
New Line.CAB_2002127E:2002127E phases=3 Bus1=22808126.1.2.3 Bus2=22808110.1.2.3 switch=y r1=0.001 x1=0.001 r0=0.001 x0=0.001 Length=0.001 units=km
New Line.CAB_4234962E:4234962E phases=3 Bus1=42876083.1.2.3 Bus2=42876065.1.2.3 switch=y r1=0.001 x1=0.001 r0=0.001 x0=0.001 Length=0.001 units=km
New Line.CAB_2224395E:2224395E phases=3 Bus1=22808151.1.2.3 Bus2=22808135.1.2.3 switch=y r1=0.001 x1=0.001 r0=0.001 x0=0.001 Length=0.001 units=km
New Line.CAB_4928064E:4928064E phases=3 Bus1=22808228.1.2.3 Bus2=22808210.1.2.3 switch=y r1=0.001 x1=0.001 r0=0.001 x0=0.001 Length=0.001 units=km
New Line.CAB_4715305E:4715305E phases=3 Bus1=105076461.1.2.3 Bus2=105076444.1.2.3 switch=y r1=0.001 x1=0.001 r0=0.001 x0=0.001 Length=0.001 units=km
New Line.CAB_2156518E:2156518E phases=3 Bus1=22807901.1.2.3 Bus2=22807885.1.2.3 switch=y r1=0.001 x1=0.001 r0=0.001 x0=0.001 Length=0.001 units=km
New Line.CAB_367473S:367473S phases=3 Bus1=42875948.1.2.3 Bus2=42875932.1.2.3 switch=y r1=0.001 x1=0.001 r0=0.001 x0=0.001 Length=0.001 units=km
New Line.CAB_4052798E:4052798E phases=3 Bus1=22808101.1.2.3 Bus2=22808085.1.2.3 switch=y r1=0.001 x1=0.001 r0=0.001 x0=0.001 Length=0.001 units=km
New Line.CAB_4963154E:4963154E phases=3 Bus1=242325236.1.2.3 Bus2=242325219.1.2.3 switch=y r1=0.001 x1=0.001 r0=0.001 x0=0.001 Length=0.001 units=km
New Line.CAB_427141S:427141S phases=3 Bus1=22808517.1.2.3 Bus2=22808501.1.2.3 switch=y r1=0.001 x1=0.001 r0=0.001 x0=0.001 Length=0.001 units=km
New Line.CAB_3005488E:3005488E phases=3 Bus1=22807626.1.2.3 Bus2=22807610.1.2.3 switch=y r1=0.001 x1=0.001 r0=0.001 x0=0.001 Length=0.001 units=km
New Line.CAB_1959134E:1959134E phases=3 Bus1=22808201.1.2.3 Bus2=22808185.1.2.3 switch=y r1=0.001 x1=0.001 r0=0.001 x0=0.001 Length=0.001 units=km
New Line.CAB_2342453E:2342453E phases=3 Bus1=69454973.1.2.3 Bus2=69454956.1.2.3 switch=y r1=0.001 x1=0.001 r0=0.001 x0=0.001 Length=0.001 units=km
New Line.CAB_1959137E:1959137E phases=3 Bus1=108276764.1.2.3 Bus2=108276747.1.2.3 switch=y r1=0.001 x1=0.001 r0=0.001 x0=0.001 Length=0.001 units=km
New Line.CAB_2342455E:2342455E phases=3 Bus1=22807701.1.2.3 Bus2=22807685.1.2.3 switch=y r1=0.001 x1=0.001 r0=0.001 x0=0.001 Length=0.001 units=km
New Line.CAB_4715223E:4715223E phases=3 Bus1=22807726.1.2.3 Bus2=22807710.1.2.3 switch=y r1=0.001 x1=0.001 r0=0.001 x0=0.001 Length=0.001 units=km
New Line.CAB_4029814E:4029814E phases=3 Bus1=22807801.1.2.3 Bus2=22807785.1.2.3 switch=y r1=0.001 x1=0.001 r0=0.001 x0=0.001 Length=0.001 units=km
New Line.CAB_4715224E:4715224E phases=3 Bus1=105671889.1.2.3 Bus2=105671872.1.2.3 switch=y r1=0.001 x1=0.001 r0=0.001 x0=0.001 Length=0.001 units=km
New Line.CAB_1756745E:1756745E phases=3 Bus1=42876031.1.2.3 Bus2=42876015.1.2.3 switch=y r1=0.001 x1=0.001 r0=0.001 x0=0.001 Length=0.001 units=km
New Line.CAB_1906587E:1906587E phases=3 Bus1=42871271.1.2.3 Bus2=42871255.1.2.3 switch=y r1=0.001 x1=0.001 r0=0.001 x0=0.001 Length=0.001 units=km
New Line.CAB_4665687E:4665687E phases=3 Bus1=42875815.1.2.3 Bus2=42875799.1.2.3 switch=y r1=0.001 x1=0.001 r0=0.001 x0=0.001 Length=0.001 units=km
New Line.CAB_27030S:27030S phases=3 Bus1=42875840.1.2.3 Bus2=42875824.1.2.3 switch=y r1=0.001 x1=0.001 r0=0.001 x0=0.001 Length=0.001 units=km
New Line.CAB_4928062E:4928062E phases=3 Bus1=22808544.1.2.3 Bus2=22808526.1.2.3 switch=y r1=0.001 x1=0.001 r0=0.001 x0=0.001 Length=0.001 units=km
New Line.CAB_1959138E:1959138E phases=3 Bus1=22808492.1.2.3 Bus2=22808476.1.2.3 switch=y r1=0.001 x1=0.001 r0=0.001 x0=0.001 Length=0.001 units=km
New Line.CAB_4029830E:4029830E phases=3 Bus1=239915524.1.2.3 Bus2=239915507.1.2.3 switch=y r1=0.001 x1=0.001 r0=0.001 x0=0.001 Length=0.001 units=km
New Line.CAB_4029832E:4029832E phases=3 Bus1=22807676.1.2.3 Bus2=22807660.1.2.3 switch=y r1=0.001 x1=0.001 r0=0.001 x0=0.001 Length=0.001 units=km
New Line.CAB_4616814E:4616814E phases=3 Bus1=108276730.1.2.3 Bus2=108276713.1.2.3 switch=y r1=0.001 x1=0.001 r0=0.001 x0=0.001 Length=0.001 units=km
New Line.CAB_4029820E:4029820E phases=3 Bus1=22807751.1.2.3 Bus2=22807735.1.2.3 switch=y r1=0.001 x1=0.001 r0=0.001 x0=0.001 Length=0.001 units=km
New Line.CAB_2290116E:2290116E phases=3 Bus1=22807776.1.2.3 Bus2=22807760.1.2.3 switch=y r1=0.001 x1=0.001 r0=0.001 x0=0.001 Length=0.001 units=km
New Line.CAB_1959198E:1959198E phases=3 Bus1=22807826.1.2.3 Bus2=22807810.1.2.3 switch=y r1=0.001 x1=0.001 r0=0.001 x0=0.001 Length=0.001 units=km
New Line.CAB_4715428E:4715428E phases=3 Bus1=102514913.1.2.3 Bus2=102514896.1.2.3 switch=y r1=0.001 x1=0.001 r0=0.001 x0=0.001 Length=0.001 units=km
New Line.CAB_4715214E:4715214E phases=3 Bus1=105238130.1.2.3 Bus2=105238113.1.2.3 switch=y r1=0.001 x1=0.001 r0=0.001 x0=0.001 Length=0.001 units=km
New Line.CAB_3005954E:3005954E phases=3 Bus1=22807851.1.2.3 Bus2=22807835.1.2.3 switch=y r1=0.001 x1=0.001 r0=0.001 x0=0.001 Length=0.001 units=km
New Line.B$RAR0195 phases=3 Bus1=42876155.1.2.3 Bus2=42876148.1.2.3 switch=y r1=0.001 x1=0.001 r0=0.001 x0=0.001 Length=0.001 units=km
New Line.RAR0195$D phases=3 Bus1=42876149.1.2.3 Bus2=42876161.1.2.3 switch=y r1=0.001 x1=0.001 r0=0.001 x0=0.001 Length=0.001 units=km
New Line.RAR0745$PDRAR0745-D phases=3 Bus1=110723956.1.2.3 Bus2=110723944.1.2.3 switch=y r1=0.001 x1=0.001 r0=0.001 x0=0.001 Length=0.001 units=km
New Line.PDRAR0745-B$RAR0745 phases=3 Bus1=110723943.1.2.3 Bus2=110723950.1.2.3 switch=y r1=0.001 x1=0.001 r0=0.001 x0=0.001 Length=0.001 units=km
New Line.4730852E:RCS0227 phases=3 Bus1=108276499.1.2.3 Bus2=108276498.1.2.3 switch=y r1=0.001 x1=0.001 r0=0.001 x0=0.001 Length=0.001 units=km enabled=false

! Loads
New Load.363344S Bus1=-99999922808394.3.0 phases=1 kV=0.069282 kW=0 kvar=0 model=1
New Load.427764S_0 Bus1=-99999922808369.1.2 phases=1 kV=0.138564 kW=0 kvar=0 model=1
New Load.427764S_1 Bus1=-99999922808369.2.3 phases=1 kV=0.138564 kW=0 kvar=0 model=1
New Load.427764S_2 Bus1=-99999922808369.3.1 phases=1 kV=0.138564 kW=0 kvar=0 model=1
New Load.4862094E Bus1=-99999922808585.1.0 phases=1 kV=0.069282 kW=0 kvar=0 model=1
New Load.1959134E Bus1=-99999922808186.2.0 phases=1 kV=0.069282 kW=0 kvar=0 model=1
New Load.3005488E_0 Bus1=-99999922807611.1.2 phases=1 kV=0.069282 kW=0 kvar=0 model=1
New Load.3005488E_1 Bus1=-99999922807611.2.3 phases=1 kV=0.069282 kW=0 kvar=0 model=1
New Load.3005488E_2 Bus1=-99999922807611.3.1 phases=1 kV=0.069282 kW=0 kvar=0 model=1
New Load.4832996E Bus1=-99999942875904.2.0 phases=1 kV=0.069282 kW=0 kvar=0 model=1
New Load.4715428E Bus1=-999999102514897.1.0 phases=1 kV=0.069282 kW=0 kvar=0 model=1
New Load.4715214E Bus1=-999999105238114.2.0 phases=1 kV=0.069282 kW=0 kvar=0 model=1
New Load.5519941 Bus1=-99999989999605.2.0 phases=1 kV=0.069282 kW=0 kvar=0 model=1
New Load.1959138E Bus1=-99999922808477.3.0 phases=1 kV=0.069282 kW=0 kvar=0 model=1
New Load.4715224E Bus1=-999999105671873.3.0 phases=1 kV=0.069282 kW=0 kvar=0 model=1
New Load.4029830E Bus1=-999999239915508.2.0 phases=1 kV=0.069282 kW=0 kvar=0 model=1
New Load.2156518E Bus1=-99999922807886.1.0 phases=1 kV=0.069282 kW=0 kvar=0 model=1
New Load.1959198E Bus1=-99999922807811.1.0 phases=1 kV=0.069282 kW=0 kvar=0 model=1
New Load.4616814E Bus1=-999999108276714.2.0 phases=1 kV=0.069282 kW=0 kvar=0 model=1
New Load.4029820E Bus1=-99999922807736.2.0 phases=1 kV=0.069282 kW=0 kvar=0 model=1
New Load.2290116E Bus1=-99999922807761.2.0 phases=1 kV=0.069282 kW=0 kvar=0 model=1
New Load.27471S Bus1=-99999922808319.2.0 phases=1 kV=0.069282 kW=0 kvar=0 model=1
New Load.426310S_0 Bus1=-99999922808294.1.2 phases=1 kV=0.069282 kW=0 kvar=0 model=1
New Load.426310S_1 Bus1=-99999922808294.2.3 phases=1 kV=0.069282 kW=0 kvar=0 model=1
New Load.426310S_2 Bus1=-99999922808294.3.1 phases=1 kV=0.069282 kW=0 kvar=0 model=1
New Load.4344366E_0 Bus1=-99999942876041.1.2 phases=1 kV=0.069282 kW=0 kvar=0 model=1
New Load.4344366E_1 Bus1=-99999942876041.2.3 phases=1 kV=0.069282 kW=0 kvar=0 model=1
New Load.4344366E_2 Bus1=-99999942876041.3.1 phases=1 kV=0.069282 kW=0 kvar=0 model=1
New Load.4928062E Bus1=-99999922808527.2.0 phases=1 kV=0.069282 kW=0 kvar=0 model=1
New Load.4512798E Bus1=-999999243200877.3.0 phases=1 kV=0.069282 kW=0 kvar=0 model=1
New Load.4715305E Bus1=-999999105076445.3.0 phases=1 kV=0.069282 kW=0 kvar=0 model=1
New Load.367473S_0 Bus1=-99999942875933.1.2 phases=1 kV=0.069282 kW=0 kvar=0 model=1
New Load.367473S_1 Bus1=-99999942875933.2.3 phases=1 kV=0.069282 kW=0 kvar=0 model=1
New Load.367473S_2 Bus1=-99999942875933.3.1 phases=1 kV=0.069282 kW=0 kvar=0 model=1
New Load.4928068E Bus1=-99999922808556.3.0 phases=1 kV=0.069282 kW=0 kvar=0 model=1
New Load.2171329E_0 Bus1=-99999942871281.1.2 phases=1 kV=0.069282 kW=0 kvar=0 model=1
New Load.2171329E_1 Bus1=-99999942871281.2.3 phases=1 kV=0.069282 kW=0 kvar=0 model=1
New Load.2171329E_2 Bus1=-99999942871281.3.1 phases=1 kV=0.069282 kW=0 kvar=0 model=1
New Load.366130S Bus1=-99999922808419.3.0 phases=1 kV=0.069282 kW=0 kvar=0 model=1
New Load.63510S_0 Bus1=-999999269126241.1.2 phases=1 kV=0.069282 kW=0 kvar=0 model=1
New Load.63510S_1 Bus1=-999999269126241.2.3 phases=1 kV=0.069282 kW=0 kvar=0 model=1
New Load.63510S_2 Bus1=-999999269126241.3.1 phases=1 kV=0.069282 kW=0 kvar=0 model=1
New Load.2285423E_0 Bus1=-99999942875625.1.0 phases=1 kV=0.159926 kW=0 kvar=0 model=1
New Load.2285423E_1 Bus1=-99999942875625.2.0 phases=1 kV=0.159926 kW=0 kvar=0 model=1
New Load.2285423E_2 Bus1=-99999942875625.3.0 phases=1 kV=0.159926 kW=0 kvar=0 model=1
New Load.4715223E Bus1=-99999922807711.3.0 phases=1 kV=0.069282 kW=0 kvar=0 model=1
New Load.4029814E Bus1=-99999922807786.1.0 phases=1 kV=0.069282 kW=0 kvar=0 model=1
New Load.2342455E Bus1=-99999922807686.2.0 phases=1 kV=0.069282 kW=0 kvar=0 model=1
New Load.1959137E Bus1=-999999108276748.1.0 phases=1 kV=0.069282 kW=0 kvar=0 model=1
New Load.4234962E Bus1=-99999942876066.2.0 phases=1 kV=0.069282 kW=0 kvar=0 model=1
New Load.1552777E Bus1=-99999942871181.3.0 phases=1 kV=0.069282 kW=0 kvar=0 model=1
New Load.4615495E Bus1=-99999942875775.3.0 phases=1 kV=0.069282 kW=0 kvar=0 model=1
New Load.2342755E_0 Bus1=-99999942871206.1.2 phases=1 kV=0.069282 kW=0 kvar=0 model=1
New Load.2342755E_1 Bus1=-99999942871206.2.3 phases=1 kV=0.069282 kW=0 kvar=0 model=1
New Load.2342755E_2 Bus1=-99999942871206.3.1 phases=1 kV=0.069282 kW=0 kvar=0 model=1
New Load.2224395E Bus1=-99999922808136.3.0 phases=1 kV=0.069282 kW=0 kvar=0 model=1
New Load.4928064E Bus1=-99999922808211.2.0 phases=1 kV=0.069282 kW=0 kvar=0 model=1
New Load.4565156E Bus1=-99999942876124.2.0 phases=1 kV=0.069282 kW=0 kvar=0 model=1
New Load.426485S Bus1=-999999211265138.3.0 phases=1 kV=0.069282 kW=0 kvar=0 model=1
New Load.5609473 Bus1=-999999232700566.2.0 phases=1 kV=0.069282 kW=0 kvar=0 model=1
New Load.4847393E Bus1=-999999216890043.3.0 phases=1 kV=0.069282 kW=0 kvar=0 model=1
New Load.2002127E Bus1=-99999922808111.1.0 phases=1 kV=0.069282 kW=0 kvar=0 model=1
New Load.426484S Bus1=-99999969751294.3.0 phases=1 kV=0.069282 kW=0 kvar=0 model=1
New Load.4928063E Bus1=-999999215616798.3.0 phases=1 kV=0.069282 kW=0 kvar=0 model=1
New Load.27030S_0 Bus1=-99999942875825.1.0 phases=1 kV=0.159926 kW=0 kvar=0 model=1
New Load.27030S_1 Bus1=-99999942875825.2.0 phases=1 kV=0.159926 kW=0 kvar=0 model=1
New Load.27030S_2 Bus1=-99999942875825.3.0 phases=1 kV=0.159926 kW=0 kvar=0 model=1
New Load.4665687E_0 Bus1=-99999942875800.1.2 phases=1 kV=0.069282 kW=0 kvar=0 model=1
New Load.4665687E_1 Bus1=-99999942875800.2.3 phases=1 kV=0.069282 kW=0 kvar=0 model=1
New Load.4665687E_2 Bus1=-99999942875800.3.1 phases=1 kV=0.069282 kW=0 kvar=0 model=1
New Load.1906587E_0 Bus1=-99999942871256.1.2 phases=1 kV=0.069282 kW=0 kvar=0 model=1
New Load.1906587E_1 Bus1=-99999942871256.2.3 phases=1 kV=0.069282 kW=0 kvar=0 model=1
New Load.1906587E_2 Bus1=-99999942871256.3.1 phases=1 kV=0.069282 kW=0 kvar=0 model=1
New Load.4029832E Bus1=-99999922807661.3.0 phases=1 kV=0.069282 kW=0 kvar=0 model=1
New Load.2377493E Bus1=-99999922807936.1.0 phases=1 kV=0.069282 kW=0 kvar=0 model=1
New Load.427141S_0 Bus1=-99999922808502.1.2 phases=1 kV=0.069282 kW=0 kvar=0 model=1
New Load.427141S_1 Bus1=-99999922808502.2.3 phases=1 kV=0.069282 kW=0 kvar=0 model=1
New Load.427141S_2 Bus1=-99999922808502.3.1 phases=1 kV=0.069282 kW=0 kvar=0 model=1
New Load.4716206E Bus1=-999999103283823.3.0 phases=1 kV=0.069282 kW=0 kvar=0 model=1
New Load.4928090E Bus1=-99999942876095.1.0 phases=1 kV=0.069282 kW=0 kvar=0 model=1
New Load.1738428E_0 Bus1=-99999922807961.1.2 phases=1 kV=0.069282 kW=0 kvar=0 model=1
New Load.1738428E_1 Bus1=-99999922807961.2.3 phases=1 kV=0.069282 kW=0 kvar=0 model=1
New Load.1738428E_2 Bus1=-99999922807961.3.1 phases=1 kV=0.069282 kW=0 kvar=0 model=1
New Load.26723S Bus1=-99999922808344.2.0 phases=1 kV=0.069282 kW=0 kvar=0 model=1
New Load.4646010E Bus1=-999999101196713.2.0 phases=1 kV=0.069282 kW=0 kvar=0 model=1
New Load.2342453E Bus1=-99999969454957.3.0 phases=1 kV=0.069282 kW=0 kvar=0 model=1
New Load.4416821E_0 Bus1=-99999969399268.1.2 phases=1 kV=0.069282 kW=0 kvar=0 model=1
New Load.4416821E_1 Bus1=-99999969399268.2.3 phases=1 kV=0.069282 kW=0 kvar=0 model=1
New Load.4416821E_2 Bus1=-99999969399268.3.1 phases=1 kV=0.069282 kW=0 kvar=0 model=1
New Load.4963154E Bus1=-999999242325220.1.0 phases=1 kV=0.069282 kW=0 kvar=0 model=1
New Load.2084986E Bus1=-99999942875725.1.0 phases=1 kV=0.069282 kW=0 kvar=0 model=1
New Load.1591598E Bus1=-99999922808036.3.0 phases=1 kV=0.069282 kW=0 kvar=0 model=1
New Load.4200471E Bus1=-99999922807986.1.0 phases=1 kV=0.069282 kW=0 kvar=0 model=1
New Load.4665156E Bus1=-999999108276679.1.0 phases=1 kV=0.069282 kW=0 kvar=0 model=1
New Load.1784716E_0 Bus1=-99999922808011.1.2 phases=1 kV=0.069282 kW=0 kvar=0 model=1
New Load.1784716E_1 Bus1=-99999922808011.2.3 phases=1 kV=0.069282 kW=0 kvar=0 model=1
New Load.1784716E_2 Bus1=-99999922808011.3.1 phases=1 kV=0.069282 kW=0 kvar=0 model=1
New Load.4665171E Bus1=-999999102514849.3.0 phases=1 kV=0.069282 kW=0 kvar=0 model=1
New Load.1906728E Bus1=-99999922807911.1.0 phases=1 kV=0.069282 kW=0 kvar=0 model=1
New Load.4928070E Bus1=-99999942875850.1.0 phases=1 kV=0.069282 kW=0 kvar=0 model=1
New Load.3005954E Bus1=-99999922807836.1.0 phases=1 kV=0.069282 kW=0 kvar=0 model=1
New Load.2360549E Bus1=-99999922807861.1.0 phases=1 kV=0.069282 kW=0 kvar=0 model=1
New Load.4052798E Bus1=-99999922808086.1.0 phases=1 kV=0.069282 kW=0 kvar=0 model=1
New Load.1756745E Bus1=-99999942876016.1.0 phases=1 kV=0.069282 kW=0 kvar=0 model=1
New Load.1600831E_0 Bus1=-99999942871231.1.0 phases=1 kV=0.159926 kW=0 kvar=0 model=1
New Load.1600831E_1 Bus1=-99999942871231.2.0 phases=1 kV=0.159926 kW=0 kvar=0 model=1
New Load.1600831E_2 Bus1=-99999942871231.3.0 phases=1 kV=0.159926 kW=0 kvar=0 model=1
New Load.4832577E_0 Bus1=-999999188332765.1.0 phases=1 kV=0.159926 kW=0 kvar=0 model=1
New Load.4832577E_1 Bus1=-999999188332765.2.0 phases=1 kV=0.159926 kW=0 kvar=0 model=1
New Load.4832577E_2 Bus1=-999999188332765.3.0 phases=1 kV=0.159926 kW=0 kvar=0 model=1
New Load.4928067E Bus1=-99999922808240.3.0 phases=1 kV=0.069282 kW=0 kvar=0 model=1
New Load.227843S Bus1=-99999942875879.1.0 phases=1 kV=0.069282 kW=0 kvar=0 model=1
New Load.63273S_0 Bus1=-99999942875750.1.2 phases=1 kV=0.069282 kW=0 kvar=0 model=1
New Load.63273S_1 Bus1=-99999942875750.2.3 phases=1 kV=0.069282 kW=0 kvar=0 model=1
New Load.63273S_2 Bus1=-99999942875750.3.1 phases=1 kV=0.069282 kW=0 kvar=0 model=1
New Load.4200421E Bus1=-99999922808061.1.0 phases=1 kV=0.069282 kW=0 kvar=0 model=1
New Load.4928060E Bus1=-999999215013983.2.0 phases=1 kV=0.069282 kW=0 kvar=0 model=1
New Load.4029836E Bus1=-99999922807636.3.0 phases=1 kV=0.069282 kW=0 kvar=0 model=1

! Generators
New Generator.NST-193836_PHOTOVOLTAIC Bus1=-999999232700566.2.0 phases=1 kV=0.069282 kW=0 kvar=0 model=7
New Generator.NST-200466_PHOTOVOLTAIC Bus1=-99999922808111.1.0 phases=1 kV=0.069282 kW=0 kvar=0 model=7
New Generator.NST-200466_BATTERY Bus1=-99999922808111.1.0 phases=1 kV=0.069282 kW=1.727 kvar=0 model=7
New Generator.SBP-76310_BATTERY Bus1=-99999922807986.1.0 phases=1 kV=0.069282 kW=7.944 kvar=0 model=7
New Generator.SBP-76310_PHOTOVOLTAIC Bus1=-99999922807986.1.0 phases=1 kV=0.069282 kW=0 kvar=0 model=7
New Generator.NST-60318_PHOTOVOLTAIC Bus1=-99999969454957.3.0 phases=1 kV=0.069282 kW=0 kvar=0 model=7
New Generator.NST-393763_PHOTOVOLTAIC Bus1=-99999969454957.3.0 phases=1 kV=0.069282 kW=0 kvar=0 model=7
New Generator.500578761_PHOTOVOLTAIC Bus1=-99999922807761.2.0 phases=1 kV=0.069282 kW=0 kvar=0 model=7
New Generator.NST-437207_PHOTOVOLTAIC Bus1=-999999108276714.2.0 phases=1 kV=0.069282 kW=0 kvar=0 model=7
New Generator.SBP-146951_PHOTOVOLTAIC Bus1=-999999239915508.2.0 phases=1 kV=0.069282 kW=0 kvar=0 model=7
New Generator.SBP-146951_BATTERY Bus1=-999999239915508.2.0 phases=1 kV=0.069282 kW=0 kvar=0 model=7
New Generator.NST-37198_PHOTOVOLTAIC Bus1=-999999103283823.3.0 phases=1 kV=0.069282 kW=0 kvar=0 model=7

! Transformers
New Transformer.293588A4D9C3EE34E0637F61810A7CE3_0_0 phases=1 windings=2 xhl=0.5 %R=0.353554 %imag=1e-06 %noloadloss=0
~ wdg=1 bus=215616798.3.0 kV=2.3094 kVA=15 conn=wye
~ wdg=2 bus=-999999215616798.3.0 kV=0.00855091 kVA=15 conn=wye
New Transformer.293588A5F690EE34E0637F61810A7CE3_1_0 phases=1 windings=2 xhl=0.5 %R=0.353554 %imag=1e-06 %noloadloss=0
~ wdg=1 bus=215013983.2.0 kV=2.3094 kVA=25 conn=wye
~ wdg=2 bus=-999999215013983.2.0 kV=0.00855091 kVA=25 conn=wye
New Transformer.293588A6F135EE34E0637F61810A7CE3_2_0 phases=1 windings=2 xhl=0.5 %R=0.353554 %imag=1e-06 %noloadloss=0
~ wdg=1 bus=101196713.2.0 kV=2.3094 kVA=25 conn=wye
~ wdg=2 bus=-999999101196713.2.0 kV=0.00855091 kVA=25 conn=wye
New Transformer.293588A7498DEE34E0637F61810A7CE3_3_0 phases=1 windings=2 xhl=0.5 %R=0.353554 %imag=1e-06 %noloadloss=0
~ wdg=1 bus=22808556.3.0 kV=2.3094 kVA=25 conn=wye
~ wdg=2 bus=-99999922808556.3.0 kV=0.00855091 kVA=25 conn=wye
New Transformer.293588A74983EE34E0637F61810A7CE3_4_0 phases=1 windings=2 xhl=0.5 %R=0.353554 %imag=1e-06 %noloadloss=0
~ wdg=1 bus=22808240.3.0 kV=2.3094 kVA=37.5 conn=wye
~ wdg=2 bus=-99999922808240.3.0 kV=0.00855091 kVA=37.5 conn=wye
New Transformer.293588A51453EE34E0637F61810A7CE3_5_0 phases=1 windings=2 xhl=0.5 %R=0.353554 %imag=1e-06 %noloadloss=0
~ wdg=1 bus=42876124.2.0 kV=2.3094 kVA=15 conn=wye
~ wdg=2 bus=-99999942876124.2.0 kV=0.00855091 kVA=15 conn=wye
New Transformer.293588A74989EE34E0637F61810A7CE3_6_0 phases=1 windings=2 xhl=0.5 %R=0.353554 %imag=1e-06 %noloadloss=0
~ wdg=1 bus=22808419.3.0 kV=2.3094 kVA=15 conn=wye
~ wdg=2 bus=-99999922808419.3.0 kV=0.00855091 kVA=15 conn=wye
New Transformer.293588A74CC5EE34E0637F61810A7CE3_7_0 phases=1 windings=2 xhl=0.5 %R=0.353554 %imag=1e-06 %noloadloss=0
~ wdg=1 bus=22807861.1.0 kV=2.3094 kVA=15 conn=wye
~ wdg=2 bus=-99999922807861.1.0 kV=0.00855091 kVA=15 conn=wye
New Transformer.293588A5144FEE34E0637F61810A7CE3_8_0 phases=1 windings=2 xhl=0.5 %R=0.353554 %imag=1e-06 %noloadloss=0
~ wdg=1 bus=42876016.1.0 kV=2.3094 kVA=10 conn=wye
~ wdg=2 bus=-99999942876016.1.0 kV=0.00855091 kVA=10 conn=wye
New Transformer.293588A51452EE34E0637F61810A7CE3_9_0 phases=1 windings=2 xhl=0.5 %R=0.353554 %imag=1e-06 %noloadloss=0
~ wdg=1 bus=42876095.1.0 kV=2.3094 kVA=15 conn=wye
~ wdg=2 bus=-99999942876095.1.0 kV=0.00855091 kVA=15 conn=wye
New Transformer.293588A5144AEE34E0637F61810A7CE3_10_0 phases=1 windings=2 xhl=0.5 %R=0.353554 %imag=1e-06 %noloadloss=0
~ wdg=1 bus=42875850.1.0 kV=2.3094 kVA=25 conn=wye
~ wdg=2 bus=-99999942875850.1.0 kV=0.00855091 kVA=25 conn=wye
New Transformer.293588A51366EE34E0637F61810A7CE3_11_0 phases=1 windings=2 xhl=0.5 %R=0.353554 %imag=1e-06 %noloadloss=0
~ wdg=1 bus=42871181.3.0 kV=2.3094 kVA=37.5 conn=wye
~ wdg=2 bus=-99999942871181.3.0 kV=0.00855091 kVA=37.5 conn=wye
New Transformer.293588A51447EE34E0637F61810A7CE3_12_0 phases=1 windings=2 xhl=0.5 %R=0.353554 %imag=1e-06 %noloadloss=0
~ wdg=1 bus=42875775.3.0 kV=2.3094 kVA=50 conn=wye
~ wdg=2 bus=-99999942875775.3.0 kV=0.00855091 kVA=50 conn=wye
New Transformer.293588A5144CEE34E0637F61810A7CE3_13_0 phases=1 windings=2 xhl=0.5 %R=0.353554 %imag=1e-06 %noloadloss=0
~ wdg=1 bus=42875904.2.0 kV=2.3094 kVA=25 conn=wye
~ wdg=2 bus=-99999942875904.2.0 kV=0.00855091 kVA=25 conn=wye
New Transformer.293588A7498CEE34E0637F61810A7CE3_14_0 phases=1 windings=2 xhl=0.5 %R=0.353554 %imag=1e-06 %noloadloss=0
~ wdg=1 bus=22808527.2.0 kV=2.3094 kVA=25 conn=wye
~ wdg=2 bus=-99999922808527.2.0 kV=0.00855091 kVA=25 conn=wye
New Transformer.293588A74985EE34E0637F61810A7CE3_15_0 phases=1 windings=2 xhl=0.5 %R=0.353554 %imag=1e-06 %noloadloss=0
~ wdg=1 bus=22808319.2.0 kV=2.3094 kVA=25 conn=wye
~ wdg=2 bus=-99999922808319.2.0 kV=0.00855091 kVA=25 conn=wye
New Transformer.293588A87C99EE34E0637F61810A7CE3_16_0 phases=1 windings=2 xhl=0.5 %R=0.353554 %imag=1e-06 %noloadloss=0
~ wdg=1 bus=243200877.3.0 kV=2.3094 kVA=25 conn=wye
~ wdg=2 bus=-999999243200877.3.0 kV=0.00855091 kVA=25 conn=wye
New Transformer.293588B4D559EE34E0637F61810A7CE3_17_0 phases=1 windings=2 xhl=0.5 %R=0.353554 %imag=1e-06 %noloadloss=0
~ wdg=1 bus=232700566.2.0 kV=2.3094 kVA=75 conn=wye
~ wdg=2 bus=-999999232700566.2.0 kV=0.00855091 kVA=75 conn=wye
New Transformer.293588A664A7EE34E0637F61810A7CE3_18_0 phases=1 windings=2 xhl=0.5 %R=0.353554 %imag=1e-06 %noloadloss=0
~ wdg=1 bus=216890043.3.0 kV=2.3094 kVA=50 conn=wye
~ wdg=2 bus=-999999216890043.3.0 kV=0.00855091 kVA=50 conn=wye
New Transformer.293588A74CCAEE34E0637F61810A7CE3_19_0 phases=1 windings=2 xhl=0.5 %R=0.353554 %imag=1e-06 %noloadloss=0
~ wdg=1 bus=22807986.1.0 kV=2.3094 kVA=25 conn=wye
~ wdg=2 bus=-99999922807986.1.0 kV=0.00855091 kVA=25 conn=wye
New Transformer.293588A82C98EE34E0637F61810A7CE3_20_0 phases=1 windings=2 xhl=0.5 %R=0.353554 %imag=1e-06 %noloadloss=0
~ wdg=1 bus=108276679.1.0 kV=2.3094 kVA=25 conn=wye
~ wdg=2 bus=-999999108276679.1.0 kV=0.00855091 kVA=25 conn=wye
New Transformer.293588A51451EE34E0637F61810A7CE3_21_0 phases=1 windings=2 xhl=0.5 %R=0.353554 %imag=1e-06 %noloadloss=0
~ wdg=1 bus=42876066.2.0 kV=2.3094 kVA=15 conn=wye
~ wdg=2 bus=-99999942876066.2.0 kV=0.00855091 kVA=15 conn=wye
New Transformer.293588A88113EE34E0637F61810A7CE3_22_0 phases=1 windings=2 xhl=0.5 %R=0.353554 %imag=1e-06 %noloadloss=0
~ wdg=1 bus=242325220.1.0 kV=2.3094 kVA=37.5 conn=wye
~ wdg=2 bus=-999999242325220.1.0 kV=0.00855091 kVA=37.5 conn=wye
New Transformer.293588A74981EE34E0637F61810A7CE3_23_0 phases=1 windings=2 xhl=0.5 %R=0.353554 %imag=1e-06 %noloadloss=0
~ wdg=1 bus=22808186.2.0 kV=2.3094 kVA=15 conn=wye
~ wdg=2 bus=-99999922808186.2.0 kV=0.00855091 kVA=15 conn=wye
New Transformer.293588A74982EE34E0637F61810A7CE3_24_0 phases=1 windings=2 xhl=0.5 %R=0.353554 %imag=1e-06 %noloadloss=0
~ wdg=1 bus=22808211.2.0 kV=2.3094 kVA=25 conn=wye
~ wdg=2 bus=-99999922808211.2.0 kV=0.00855091 kVA=25 conn=wye
New Transformer.293588A82C9AEE34E0637F61810A7CE3_25_0 phases=1 windings=2 xhl=0.5 %R=0.353554 %imag=1e-06 %noloadloss=0
~ wdg=1 bus=108276748.1.0 kV=2.3094 kVA=25 conn=wye
~ wdg=2 bus=-999999108276748.1.0 kV=0.00855091 kVA=25 conn=wye
New Transformer.293588A7498AEE34E0637F61810A7CE3_26_0 phases=1 windings=2 xhl=0.5 %R=0.353554 %imag=1e-06 %noloadloss=0
~ wdg=1 bus=22808477.3.0 kV=2.3094 kVA=37.5 conn=wye
~ wdg=2 bus=-99999922808477.3.0 kV=0.00855091 kVA=37.5 conn=wye
New Transformer.293588A74CC3EE34E0637F61810A7CE3_27_0 phases=1 windings=2 xhl=0.5 %R=0.353554 %imag=1e-06 %noloadloss=0
~ wdg=1 bus=22807811.1.0 kV=2.3094 kVA=15 conn=wye
~ wdg=2 bus=-99999922807811.1.0 kV=0.00855091 kVA=15 conn=wye
New Transformer.293588A86D87EE34E0637F61810A7CE3_28_0 phases=1 windings=2 xhl=0.5 %R=0.353554 %imag=1e-06 %noloadloss=0
~ wdg=1 bus=102514897.1.0 kV=2.3094 kVA=25 conn=wye
~ wdg=2 bus=-999999102514897.1.0 kV=0.00855091 kVA=25 conn=wye
New Transformer.293588A51368EE34E0637F61810A7CE3_29_0 phases=1 windings=2 xhl=0.5 %R=0.353554 %imag=1e-06 %noloadloss=0
~ wdg=1 bus=42871231.1.0 kV=2.3094 kVA=50 conn=wye
~ wdg=2 bus=-99999942871231.1.0 kV=0.0197383 kVA=50 conn=wye
New Transformer.293588A51368EE34E0637F61810A7CE3_29_1 phases=1 windings=2 xhl=0.5 %R=0.353554 %imag=1e-06 %noloadloss=0
~ wdg=1 bus=42871231.2.0 kV=2.3094 kVA=50 conn=wye
~ wdg=2 bus=-99999942871231.2.0 kV=0.0197383 kVA=50 conn=wye
New Transformer.293588A51368EE34E0637F61810A7CE3_29_2 phases=1 windings=2 xhl=0.5 %R=0.353554 %imag=1e-06 %noloadloss=0
~ wdg=1 bus=42871231.3.0 kV=2.3094 kVA=50 conn=wye
~ wdg=2 bus=-99999942871231.3.0 kV=0.0197383 kVA=50 conn=wye
New Transformer.293588A826CDEE34E0637F61810A7CE3_30_0 phases=1 windings=2 xhl=0.5 %R=0.353554 %imag=1e-06 %noloadloss=0
~ wdg=1 bus=188332765.1.0 kV=2.3094 kVA=50 conn=wye
~ wdg=2 bus=-999999188332765.1.0 kV=0.0197383 kVA=50 conn=wye
New Transformer.293588A826CDEE34E0637F61810A7CE3_30_1 phases=1 windings=2 xhl=0.5 %R=0.353554 %imag=1e-06 %noloadloss=0
~ wdg=1 bus=188332765.2.0 kV=2.3094 kVA=50 conn=wye
~ wdg=2 bus=-999999188332765.2.0 kV=0.0197383 kVA=50 conn=wye
New Transformer.293588A826CDEE34E0637F61810A7CE3_30_2 phases=1 windings=2 xhl=0.5 %R=0.353554 %imag=1e-06 %noloadloss=0
~ wdg=1 bus=188332765.3.0 kV=2.3094 kVA=50 conn=wye
~ wdg=2 bus=-999999188332765.3.0 kV=0.0197383 kVA=50 conn=wye
New Transformer.293588A51367EE34E0637F61810A7CE3_31_0 phases=1 windings=2 xhl=0.5 %R=0.353554 %imag=1e-06 %noloadloss=0
~ wdg=1 bus=42871206.1.0 kV=2.3094 kVA=10 conn=wye
~ wdg=2 bus=-99999942871206.1.2 kV=0.00855091 kVA=10 conn=delta
New Transformer.293588A51367EE34E0637F61810A7CE3_31_1 phases=1 windings=2 xhl=0.5 %R=0.353554 %imag=1e-06 %noloadloss=0
~ wdg=1 bus=42871206.2.0 kV=2.3094 kVA=10 conn=wye
~ wdg=2 bus=-99999942871206.2.3 kV=0.00855091 kVA=10 conn=delta
New Transformer.293588A51367EE34E0637F61810A7CE3_31_2 phases=1 windings=2 xhl=0.5 %R=0.353554 %imag=1e-06 %noloadloss=0
~ wdg=1 bus=42871206.3.0 kV=2.3094 kVA=10 conn=wye
~ wdg=2 bus=-99999942871206.3.1 kV=0.00855091 kVA=10 conn=delta
New Transformer.293588A74987EE34E0637F61810A7CE3_32_0 phases=1 windings=2 xhl=0.5 %R=0.353554 %imag=1e-06 %noloadloss=0
~ wdg=1 bus=22808369.1.0 kV=2.3094 kVA=10 conn=wye
~ wdg=2 bus=-99999922808369.1.2 kV=0.0171018 kVA=10 conn=delta
New Transformer.293588A74987EE34E0637F61810A7CE3_32_1 phases=1 windings=2 xhl=0.5 %R=0.353554 %imag=1e-06 %noloadloss=0
~ wdg=1 bus=22808369.2.0 kV=2.3094 kVA=10 conn=wye
~ wdg=2 bus=-99999922808369.2.3 kV=0.0171018 kVA=10 conn=delta
New Transformer.293588A74987EE34E0637F61810A7CE3_32_2 phases=1 windings=2 xhl=0.5 %R=0.353554 %imag=1e-06 %noloadloss=0
~ wdg=1 bus=22808369.3.0 kV=2.3094 kVA=10 conn=wye
~ wdg=2 bus=-99999922808369.3.1 kV=0.0171018 kVA=10 conn=delta
New Transformer.293588A749C9EE34E0637F61810A7CE3_33_0 phases=1 windings=2 xhl=0.5 %R=0.353554 %imag=1e-06 %noloadloss=0
~ wdg=1 bus=22808585.1.0 kV=2.3094 kVA=25 conn=wye
~ wdg=2 bus=-99999922808585.1.0 kV=0.00855091 kVA=25 conn=wye
New Transformer.293588A852C8EE34E0637F61810A7CE3_34_0 phases=1 windings=2 xhl=0.5 %R=0.353554 %imag=1e-06 %noloadloss=0
~ wdg=1 bus=69751294.3.0 kV=2.3094 kVA=15 conn=wye
~ wdg=2 bus=-99999969751294.3.0 kV=0.00855091 kVA=15 conn=wye
New Transformer.293588A5136AEE34E0637F61810A7CE3_35_0 phases=1 windings=2 xhl=0.5 %R=0.353554 %imag=1e-06 %noloadloss=0
~ wdg=1 bus=42871281.1.0 kV=2.3094 kVA=25 conn=wye
~ wdg=2 bus=-99999942871281.1.2 kV=0.00855091 kVA=25 conn=delta
New Transformer.293588A5136AEE34E0637F61810A7CE3_35_1 phases=1 windings=2 xhl=0.5 %R=0.353554 %imag=1e-06 %noloadloss=0
~ wdg=1 bus=42871281.2.0 kV=2.3094 kVA=25 conn=wye
~ wdg=2 bus=-99999942871281.2.3 kV=0.00855091 kVA=25 conn=delta
New Transformer.293588A5136AEE34E0637F61810A7CE3_35_2 phases=1 windings=2 xhl=0.5 %R=0.353554 %imag=1e-06 %noloadloss=0
~ wdg=1 bus=42871281.3.0 kV=2.3094 kVA=25 conn=wye
~ wdg=2 bus=-99999942871281.3.1 kV=0.00855091 kVA=25 conn=delta
New Transformer.2BA3CC22DD3AD4FBE0637F61810A82A3_36_0 phases=1 windings=2 xhl=0.5 %R=0.353554 %imag=1e-06 %noloadloss=0
~ wdg=1 bus=269126241.1.0 kV=2.3094 kVA=25 conn=wye
~ wdg=2 bus=-999999269126241.1.2 kV=0.00855091 kVA=25 conn=delta
New Transformer.2BA3CC22DD3AD4FBE0637F61810A82A3_36_1 phases=1 windings=2 xhl=0.5 %R=0.353554 %imag=1e-06 %noloadloss=0
~ wdg=1 bus=269126241.2.0 kV=2.3094 kVA=25 conn=wye
~ wdg=2 bus=-999999269126241.2.3 kV=0.00855091 kVA=25 conn=delta
New Transformer.2BA3CC22DD3AD4FBE0637F61810A82A3_36_2 phases=1 windings=2 xhl=0.5 %R=0.353554 %imag=1e-06 %noloadloss=0
~ wdg=1 bus=269126241.3.0 kV=2.3094 kVA=25 conn=wye
~ wdg=2 bus=-999999269126241.3.1 kV=0.00855091 kVA=25 conn=delta
New Transformer.293588A5136BEE34E0637F61810A7CE3_37_0 phases=1 windings=2 xhl=0.5 %R=0.353554 %imag=1e-06 %noloadloss=0
~ wdg=1 bus=42875625.1.0 kV=2.3094 kVA=50 conn=wye
~ wdg=2 bus=-99999942875625.1.0 kV=0.0197383 kVA=50 conn=wye
New Transformer.293588A5136BEE34E0637F61810A7CE3_37_1 phases=1 windings=2 xhl=0.5 %R=0.353554 %imag=1e-06 %noloadloss=0
~ wdg=1 bus=42875625.2.0 kV=2.3094 kVA=50 conn=wye
~ wdg=2 bus=-99999942875625.2.0 kV=0.0197383 kVA=50 conn=wye
New Transformer.293588A5136BEE34E0637F61810A7CE3_37_2 phases=1 windings=2 xhl=0.5 %R=0.353554 %imag=1e-06 %noloadloss=0
~ wdg=1 bus=42875625.3.0 kV=2.3094 kVA=50 conn=wye
~ wdg=2 bus=-99999942875625.3.0 kV=0.0197383 kVA=50 conn=wye
New Transformer.293588A74C91EE34E0637F61810A7CE3_38_0 phases=1 windings=2 xhl=0.5 %R=0.353554 %imag=1e-06 %noloadloss=0
~ wdg=1 bus=22807636.3.0 kV=2.3094 kVA=15 conn=wye
~ wdg=2 bus=-99999922807636.3.0 kV=0.00855091 kVA=15 conn=wye
New Transformer.293588A74CCEEE34E0637F61810A7CE3_39_0 phases=1 windings=2 xhl=0.5 %R=0.353554 %imag=1e-06 %noloadloss=0
~ wdg=1 bus=22808086.1.0 kV=2.3094 kVA=15 conn=wye
~ wdg=2 bus=-99999922808086.1.0 kV=0.00855091 kVA=15 conn=wye
New Transformer.293588A51449EE34E0637F61810A7CE3_40_0 phases=1 windings=2 xhl=0.5 %R=0.353554 %imag=1e-06 %noloadloss=0
~ wdg=1 bus=42875825.1.0 kV=2.3094 kVA=50 conn=wye
~ wdg=2 bus=-99999942875825.1.0 kV=0.0197383 kVA=50 conn=wye
New Transformer.293588A51449EE34E0637F61810A7CE3_40_1 phases=1 windings=2 xhl=0.5 %R=0.353554 %imag=1e-06 %noloadloss=0
~ wdg=1 bus=42875825.2.0 kV=2.3094 kVA=50 conn=wye
~ wdg=2 bus=-99999942875825.2.0 kV=0.0197383 kVA=50 conn=wye
New Transformer.293588A51449EE34E0637F61810A7CE3_40_2 phases=1 windings=2 xhl=0.5 %R=0.353554 %imag=1e-06 %noloadloss=0
~ wdg=1 bus=42875825.3.0 kV=2.3094 kVA=50 conn=wye
~ wdg=2 bus=-99999942875825.3.0 kV=0.0197383 kVA=50 conn=wye
New Transformer.293588A51448EE34E0637F61810A7CE3_41_0 phases=1 windings=2 xhl=0.5 %R=0.353554 %imag=1e-06 %noloadloss=0
~ wdg=1 bus=42875800.1.0 kV=2.3094 kVA=15 conn=wye
~ wdg=2 bus=-99999942875800.1.2 kV=0.00855091 kVA=15 conn=delta
New Transformer.293588A51448EE34E0637F61810A7CE3_41_1 phases=1 windings=2 xhl=0.5 %R=0.353554 %imag=1e-06 %noloadloss=0
~ wdg=1 bus=42875800.2.0 kV=2.3094 kVA=15 conn=wye
~ wdg=2 bus=-99999942875800.2.3 kV=0.00855091 kVA=15 conn=delta
New Transformer.293588A51448EE34E0637F61810A7CE3_41_2 phases=1 windings=2 xhl=0.5 %R=0.353554 %imag=1e-06 %noloadloss=0
~ wdg=1 bus=42875800.3.0 kV=2.3094 kVA=15 conn=wye
~ wdg=2 bus=-99999942875800.3.1 kV=0.00855091 kVA=15 conn=delta
New Transformer.293588A51369EE34E0637F61810A7CE3_42_0 phases=1 windings=2 xhl=0.5 %R=0.353554 %imag=1e-06 %noloadloss=0
~ wdg=1 bus=42871256.1.0 kV=2.3094 kVA=6.66667 conn=wye
~ wdg=2 bus=-99999942871256.1.2 kV=0.00855091 kVA=6.66667 conn=delta
New Transformer.293588A51369EE34E0637F61810A7CE3_42_1 phases=1 windings=2 xhl=0.5 %R=0.353554 %imag=1e-06 %noloadloss=0
~ wdg=1 bus=42871256.2.0 kV=2.3094 kVA=6.66667 conn=wye
~ wdg=2 bus=-99999942871256.2.3 kV=0.00855091 kVA=6.66667 conn=delta
New Transformer.293588A51369EE34E0637F61810A7CE3_42_2 phases=1 windings=2 xhl=0.5 %R=0.353554 %imag=1e-06 %noloadloss=0
~ wdg=1 bus=42871256.3.0 kV=2.3094 kVA=6.66667 conn=wye
~ wdg=2 bus=-99999942871256.3.1 kV=0.00855091 kVA=6.66667 conn=delta
New Transformer.293588A8F14EEE34E0637F61810A7CE3_43_0 phases=1 windings=2 xhl=0.5 %R=0.353554 %imag=1e-06 %noloadloss=0
~ wdg=1 bus=69399268.1.0 kV=2.3094 kVA=25 conn=wye
~ wdg=2 bus=-99999969399268.1.2 kV=0.00855091 kVA=25 conn=delta
New Transformer.293588A8F14EEE34E0637F61810A7CE3_43_1 phases=1 windings=2 xhl=0.5 %R=0.353554 %imag=1e-06 %noloadloss=0
~ wdg=1 bus=69399268.2.0 kV=2.3094 kVA=25 conn=wye
~ wdg=2 bus=-99999969399268.2.3 kV=0.00855091 kVA=25 conn=delta
New Transformer.293588A8F14EEE34E0637F61810A7CE3_43_2 phases=1 windings=2 xhl=0.5 %R=0.353554 %imag=1e-06 %noloadloss=0
~ wdg=1 bus=69399268.3.0 kV=2.3094 kVA=25 conn=wye
~ wdg=2 bus=-99999969399268.3.1 kV=0.00855091 kVA=25 conn=delta
New Transformer.293588A5144BEE34E0637F61810A7CE3_44_0 phases=1 windings=2 xhl=0.5 %R=0.353554 %imag=1e-06 %noloadloss=0
~ wdg=1 bus=42875879.1.0 kV=2.3094 kVA=25 conn=wye
~ wdg=2 bus=-99999942875879.1.0 kV=0.00855091 kVA=25 conn=wye
New Transformer.293588A51446EE34E0637F61810A7CE3_45_0 phases=1 windings=2 xhl=0.5 %R=0.353554 %imag=1e-06 %noloadloss=0
~ wdg=1 bus=42875750.1.0 kV=2.3094 kVA=13.3333 conn=wye
~ wdg=2 bus=-99999942875750.1.2 kV=0.00855091 kVA=13.3333 conn=delta
New Transformer.293588A51446EE34E0637F61810A7CE3_45_1 phases=1 windings=2 xhl=0.5 %R=0.353554 %imag=1e-06 %noloadloss=0
~ wdg=1 bus=42875750.2.0 kV=2.3094 kVA=13.3333 conn=wye
~ wdg=2 bus=-99999942875750.2.3 kV=0.00855091 kVA=13.3333 conn=delta
New Transformer.293588A51446EE34E0637F61810A7CE3_45_2 phases=1 windings=2 xhl=0.5 %R=0.353554 %imag=1e-06 %noloadloss=0
~ wdg=1 bus=42875750.3.0 kV=2.3094 kVA=13.3333 conn=wye
~ wdg=2 bus=-99999942875750.3.1 kV=0.00855091 kVA=13.3333 conn=delta
New Transformer.293588A6F37BEE34E0637F61810A7CE3_46_0 phases=1 windings=2 xhl=0.5 %R=0.353554 %imag=1e-06 %noloadloss=0
~ wdg=1 bus=103283823.3.0 kV=2.3094 kVA=25 conn=wye
~ wdg=2 bus=-999999103283823.3.0 kV=0.00855091 kVA=25 conn=wye
New Transformer.293588A51450EE34E0637F61810A7CE3_47_0 phases=1 windings=2 xhl=0.5 %R=0.353554 %imag=1e-06 %noloadloss=0
~ wdg=1 bus=42876041.1.0 kV=2.3094 kVA=10 conn=wye
~ wdg=2 bus=-99999942876041.1.2 kV=0.00855091 kVA=10 conn=delta
New Transformer.293588A51450EE34E0637F61810A7CE3_47_1 phases=1 windings=2 xhl=0.5 %R=0.353554 %imag=1e-06 %noloadloss=0
~ wdg=1 bus=42876041.2.0 kV=2.3094 kVA=10 conn=wye
~ wdg=2 bus=-99999942876041.2.3 kV=0.00855091 kVA=10 conn=delta
New Transformer.293588A51450EE34E0637F61810A7CE3_47_2 phases=1 windings=2 xhl=0.5 %R=0.353554 %imag=1e-06 %noloadloss=0
~ wdg=1 bus=42876041.3.0 kV=2.3094 kVA=10 conn=wye
~ wdg=2 bus=-99999942876041.3.1 kV=0.00855091 kVA=10 conn=delta
New Transformer.293588A74CCDEE34E0637F61810A7CE3_48_0 phases=1 windings=2 xhl=0.5 %R=0.353554 %imag=1e-06 %noloadloss=0
~ wdg=1 bus=22808061.1.0 kV=2.3094 kVA=25 conn=wye
~ wdg=2 bus=-99999922808061.1.0 kV=0.00855091 kVA=25 conn=wye
New Transformer.293588A74984EE34E0637F61810A7CE3_49_0 phases=1 windings=2 xhl=0.5 %R=0.353554 %imag=1e-06 %noloadloss=0
~ wdg=1 bus=22808294.1.0 kV=2.3094 kVA=16.6667 conn=wye
~ wdg=2 bus=-99999922808294.1.2 kV=0.00855091 kVA=16.6667 conn=delta
New Transformer.293588A74984EE34E0637F61810A7CE3_49_1 phases=1 windings=2 xhl=0.5 %R=0.353554 %imag=1e-06 %noloadloss=0
~ wdg=1 bus=22808294.2.0 kV=2.3094 kVA=16.6667 conn=wye
~ wdg=2 bus=-99999922808294.2.3 kV=0.00855091 kVA=16.6667 conn=delta
New Transformer.293588A74984EE34E0637F61810A7CE3_49_2 phases=1 windings=2 xhl=0.5 %R=0.353554 %imag=1e-06 %noloadloss=0
~ wdg=1 bus=22808294.3.0 kV=2.3094 kVA=16.6667 conn=wye
~ wdg=2 bus=-99999922808294.3.1 kV=0.00855091 kVA=16.6667 conn=delta
New Transformer.293588A74CC9EE34E0637F61810A7CE3_50_0 phases=1 windings=2 xhl=0.5 %R=0.353554 %imag=1e-06 %noloadloss=0
~ wdg=1 bus=22807961.1.0 kV=2.3094 kVA=25 conn=wye
~ wdg=2 bus=-99999922807961.1.2 kV=0.00855091 kVA=25 conn=delta
New Transformer.293588A74CC9EE34E0637F61810A7CE3_50_1 phases=1 windings=2 xhl=0.5 %R=0.353554 %imag=1e-06 %noloadloss=0
~ wdg=1 bus=22807961.2.0 kV=2.3094 kVA=25 conn=wye
~ wdg=2 bus=-99999922807961.2.3 kV=0.00855091 kVA=25 conn=delta
New Transformer.293588A74CC9EE34E0637F61810A7CE3_50_2 phases=1 windings=2 xhl=0.5 %R=0.353554 %imag=1e-06 %noloadloss=0
~ wdg=1 bus=22807961.3.0 kV=2.3094 kVA=25 conn=wye
~ wdg=2 bus=-99999922807961.3.1 kV=0.00855091 kVA=25 conn=delta
New Transformer.293588A74986EE34E0637F61810A7CE3_51_0 phases=1 windings=2 xhl=0.5 %R=0.353554 %imag=1e-06 %noloadloss=0
~ wdg=1 bus=22808344.2.0 kV=2.3094 kVA=50 conn=wye
~ wdg=2 bus=-99999922808344.2.0 kV=0.00855091 kVA=50 conn=wye
New Transformer.293588A74CCFEE34E0637F61810A7CE3_52_0 phases=1 windings=2 xhl=0.5 %R=0.353554 %imag=1e-06 %noloadloss=0
~ wdg=1 bus=22808111.1.0 kV=2.3094 kVA=15 conn=wye
~ wdg=2 bus=-99999922808111.1.0 kV=0.00855091 kVA=15 conn=wye
New Transformer.293588A74CC8EE34E0637F61810A7CE3_53_0 phases=1 windings=2 xhl=0.5 %R=0.353554 %imag=1e-06 %noloadloss=0
~ wdg=1 bus=22807936.1.0 kV=2.3094 kVA=15 conn=wye
~ wdg=2 bus=-99999922807936.1.0 kV=0.00855091 kVA=15 conn=wye
New Transformer.293588A74CCBEE34E0637F61810A7CE3_54_0 phases=1 windings=2 xhl=0.5 %R=0.353554 %imag=1e-06 %noloadloss=0
~ wdg=1 bus=22808011.1.0 kV=2.3094 kVA=25 conn=wye
~ wdg=2 bus=-99999922808011.1.2 kV=0.00855091 kVA=25 conn=delta
New Transformer.293588A74CCBEE34E0637F61810A7CE3_54_1 phases=1 windings=2 xhl=0.5 %R=0.353554 %imag=1e-06 %noloadloss=0
~ wdg=1 bus=22808011.2.0 kV=2.3094 kVA=25 conn=wye
~ wdg=2 bus=-99999922808011.2.3 kV=0.00855091 kVA=25 conn=delta
New Transformer.293588A74CCBEE34E0637F61810A7CE3_54_2 phases=1 windings=2 xhl=0.5 %R=0.353554 %imag=1e-06 %noloadloss=0
~ wdg=1 bus=22808011.3.0 kV=2.3094 kVA=25 conn=wye
~ wdg=2 bus=-99999922808011.3.1 kV=0.00855091 kVA=25 conn=delta
New Transformer.293588A86D86EE34E0637F61810A7CE3_55_0 phases=1 windings=2 xhl=0.5 %R=0.353554 %imag=1e-06 %noloadloss=0
~ wdg=1 bus=102514849.3.0 kV=2.3094 kVA=25 conn=wye
~ wdg=2 bus=-999999102514849.3.0 kV=0.00855091 kVA=25 conn=wye
New Transformer.293588A74CC7EE34E0637F61810A7CE3_56_0 phases=1 windings=2 xhl=0.5 %R=0.353554 %imag=1e-06 %noloadloss=0
~ wdg=1 bus=22807911.1.0 kV=2.3094 kVA=25 conn=wye
~ wdg=2 bus=-99999922807911.1.0 kV=0.00855091 kVA=25 conn=wye
New Transformer.293588A74CC6EE34E0637F61810A7CE3_57_0 phases=1 windings=2 xhl=0.5 %R=0.353554 %imag=1e-06 %noloadloss=0
~ wdg=1 bus=22807886.1.0 kV=2.3094 kVA=10 conn=wye
~ wdg=2 bus=-99999922807886.1.0 kV=0.00855091 kVA=10 conn=wye
New Transformer.293588A7498BEE34E0637F61810A7CE3_58_0 phases=1 windings=2 xhl=0.5 %R=0.353554 %imag=1e-06 %noloadloss=0
~ wdg=1 bus=22808502.1.0 kV=2.3094 kVA=25 conn=wye
~ wdg=2 bus=-99999922808502.1.2 kV=0.00855091 kVA=25 conn=delta
New Transformer.293588A7498BEE34E0637F61810A7CE3_58_1 phases=1 windings=2 xhl=0.5 %R=0.353554 %imag=1e-06 %noloadloss=0
~ wdg=1 bus=22808502.2.0 kV=2.3094 kVA=25 conn=wye
~ wdg=2 bus=-99999922808502.2.3 kV=0.00855091 kVA=25 conn=delta
New Transformer.293588A7498BEE34E0637F61810A7CE3_58_2 phases=1 windings=2 xhl=0.5 %R=0.353554 %imag=1e-06 %noloadloss=0
~ wdg=1 bus=22808502.3.0 kV=2.3094 kVA=25 conn=wye
~ wdg=2 bus=-99999922808502.3.1 kV=0.00855091 kVA=25 conn=delta
New Transformer.293588A74C90EE34E0637F61810A7CE3_59_0 phases=1 windings=2 xhl=0.5 %R=0.353554 %imag=1e-06 %noloadloss=0
~ wdg=1 bus=22807611.1.0 kV=2.3094 kVA=10 conn=wye
~ wdg=2 bus=-99999922807611.1.2 kV=0.00855091 kVA=10 conn=delta
New Transformer.293588A74C90EE34E0637F61810A7CE3_59_1 phases=1 windings=2 xhl=0.5 %R=0.353554 %imag=1e-06 %noloadloss=0
~ wdg=1 bus=22807611.2.0 kV=2.3094 kVA=10 conn=wye
~ wdg=2 bus=-99999922807611.2.3 kV=0.00855091 kVA=10 conn=delta
New Transformer.293588A74C90EE34E0637F61810A7CE3_59_2 phases=1 windings=2 xhl=0.5 %R=0.353554 %imag=1e-06 %noloadloss=0
~ wdg=1 bus=22807611.3.0 kV=2.3094 kVA=10 conn=wye
~ wdg=2 bus=-99999922807611.3.1 kV=0.00855091 kVA=10 conn=delta
New Transformer.293588A74980EE34E0637F61810A7CE3_60_0 phases=1 windings=2 xhl=0.5 %R=0.353554 %imag=1e-06 %noloadloss=0
~ wdg=1 bus=22808136.3.0 kV=2.3094 kVA=25 conn=wye
~ wdg=2 bus=-99999922808136.3.0 kV=0.00855091 kVA=25 conn=wye
New Transformer.293588A86875EE34E0637F61810A7CE3_61_0 phases=1 windings=2 xhl=0.5 %R=0.353554 %imag=1e-06 %noloadloss=0
~ wdg=1 bus=105076445.3.0 kV=2.3094 kVA=25 conn=wye
~ wdg=2 bus=-999999105076445.3.0 kV=0.00855091 kVA=25 conn=wye
New Transformer.293588A5144DEE34E0637F61810A7CE3_62_0 phases=1 windings=2 xhl=0.5 %R=0.353554 %imag=1e-06 %noloadloss=0
~ wdg=1 bus=42875933.1.0 kV=2.3094 kVA=13.3333 conn=wye
~ wdg=2 bus=-99999942875933.1.2 kV=0.00855091 kVA=13.3333 conn=delta
New Transformer.293588A5144DEE34E0637F61810A7CE3_62_1 phases=1 windings=2 xhl=0.5 %R=0.353554 %imag=1e-06 %noloadloss=0
~ wdg=1 bus=42875933.2.0 kV=2.3094 kVA=13.3333 conn=wye
~ wdg=2 bus=-99999942875933.2.3 kV=0.00855091 kVA=13.3333 conn=delta
New Transformer.293588A5144DEE34E0637F61810A7CE3_62_2 phases=1 windings=2 xhl=0.5 %R=0.353554 %imag=1e-06 %noloadloss=0
~ wdg=1 bus=42875933.3.0 kV=2.3094 kVA=13.3333 conn=wye
~ wdg=2 bus=-99999942875933.3.1 kV=0.00855091 kVA=13.3333 conn=delta
New Transformer.293588A8F236EE34E0637F61810A7CE3_63_0 phases=1 windings=2 xhl=0.5 %R=0.353554 %imag=1e-06 %noloadloss=0
~ wdg=1 bus=69454957.3.0 kV=2.3094 kVA=50 conn=wye
~ wdg=2 bus=-99999969454957.3.0 kV=0.00855091 kVA=50 conn=wye
New Transformer.293588A74C94EE34E0637F61810A7CE3_64_0 phases=1 windings=2 xhl=0.5 %R=0.353554 %imag=1e-06 %noloadloss=0
~ wdg=1 bus=22807711.3.0 kV=2.3094 kVA=25 conn=wye
~ wdg=2 bus=-99999922807711.3.0 kV=0.00855091 kVA=25 conn=wye
New Transformer.293588A74CC2EE34E0637F61810A7CE3_65_0 phases=1 windings=2 xhl=0.5 %R=0.353554 %imag=1e-06 %noloadloss=0
~ wdg=1 bus=22807786.1.0 kV=2.3094 kVA=15 conn=wye
~ wdg=2 bus=-99999922807786.1.0 kV=0.00855091 kVA=15 conn=wye
New Transformer.293588A74C93EE34E0637F61810A7CE3_66_0 phases=1 windings=2 xhl=0.5 %R=0.353554 %imag=1e-06 %noloadloss=0
~ wdg=1 bus=22807686.2.0 kV=2.3094 kVA=15 conn=wye
~ wdg=2 bus=-99999922807686.2.0 kV=0.00855091 kVA=15 conn=wye
New Transformer.293588A82B18EE34E0637F61810A7CE3_67_0 phases=1 windings=2 xhl=0.5 %R=0.353554 %imag=1e-06 %noloadloss=0
~ wdg=1 bus=105671873.3.0 kV=2.3094 kVA=25 conn=wye
~ wdg=2 bus=-999999105671873.3.0 kV=0.00855091 kVA=25 conn=wye
New Transformer.293588A5E64DEE34E0637F61810A7CE3_68_0 phases=1 windings=2 xhl=0.5 %R=0.353554 %imag=1e-06 %noloadloss=0
~ wdg=1 bus=239915508.2.0 kV=2.3094 kVA=37.5 conn=wye
~ wdg=2 bus=-999999239915508.2.0 kV=0.00855091 kVA=37.5 conn=wye
New Transformer.293588A74C92EE34E0637F61810A7CE3_69_0 phases=1 windings=2 xhl=0.5 %R=0.353554 %imag=1e-06 %noloadloss=0
~ wdg=1 bus=22807661.3.0 kV=2.3094 kVA=10 conn=wye
~ wdg=2 bus=-99999922807661.3.0 kV=0.00855091 kVA=10 conn=wye
New Transformer.293588A82C99EE34E0637F61810A7CE3_70_0 phases=1 windings=2 xhl=0.5 %R=0.353554 %imag=1e-06 %noloadloss=0
~ wdg=1 bus=108276714.2.0 kV=2.3094 kVA=37.5 conn=wye
~ wdg=2 bus=-999999108276714.2.0 kV=0.00855091 kVA=37.5 conn=wye
New Transformer.293588A74C95EE34E0637F61810A7CE3_71_0 phases=1 windings=2 xhl=0.5 %R=0.353554 %imag=1e-06 %noloadloss=0
~ wdg=1 bus=22807736.2.0 kV=2.3094 kVA=15 conn=wye
~ wdg=2 bus=-99999922807736.2.0 kV=0.00855091 kVA=15 conn=wye
New Transformer.293588A74C96EE34E0637F61810A7CE3_72_0 phases=1 windings=2 xhl=0.5 %R=0.353554 %imag=1e-06 %noloadloss=0
~ wdg=1 bus=22807761.2.0 kV=2.3094 kVA=15 conn=wye
~ wdg=2 bus=-99999922807761.2.0 kV=0.00855091 kVA=15 conn=wye
New Transformer.293588A6F2CBEE34E0637F61810A7CE3_73_0 phases=1 windings=2 xhl=0.5 %R=0.353554 %imag=1e-06 %noloadloss=0
~ wdg=1 bus=105238114.2.0 kV=2.3094 kVA=25 conn=wye
~ wdg=2 bus=-999999105238114.2.0 kV=0.00855091 kVA=25 conn=wye
New Transformer.293588B37AC4EE34E0637F61810A7CE3_74_0 phases=1 windings=2 xhl=0.5 %R=0.353554 %imag=1e-06 %noloadloss=0
~ wdg=1 bus=89999605.2.0 kV=2.3094 kVA=50 conn=wye
~ wdg=2 bus=-99999989999605.2.0 kV=0.00855091 kVA=50 conn=wye
New Transformer.293588A74CC4EE34E0637F61810A7CE3_75_0 phases=1 windings=2 xhl=0.5 %R=0.353554 %imag=1e-06 %noloadloss=0
~ wdg=1 bus=22807836.1.0 kV=2.3094 kVA=25 conn=wye
~ wdg=2 bus=-99999922807836.1.0 kV=0.00855091 kVA=25 conn=wye
New Transformer.4735563E:REG0703_76_0 phases=1 windings=2 xhl=0.5 %R=0.353554 %imag=1e-06 %noloadloss=0
~ wdg=1 bus=148180881.1.0 kV=0.28503 kVA=16.6667 conn=wye
~ wdg=2 bus=148180893.1.0 kV=2.3094 kVA=16.6667 conn=wye
New Transformer.4735563E:REG0703_76_1 phases=1 windings=2 xhl=0.5 %R=0.353554 %imag=1e-06 %noloadloss=0
~ wdg=1 bus=148180881.2.0 kV=0.28503 kVA=16.6667 conn=wye
~ wdg=2 bus=148180893.2.0 kV=2.3094 kVA=16.6667 conn=wye
New Transformer.4735563E:REG0703_76_2 phases=1 windings=2 xhl=0.5 %R=0.353554 %imag=1e-06 %noloadloss=0
~ wdg=1 bus=148180881.3.0 kV=0.28503 kVA=16.6667 conn=wye
~ wdg=2 bus=148180893.3.0 kV=2.3094 kVA=16.6667 conn=wye
New Transformer.293588A5136CEE34E0637F61810A7CE3_77_0 phases=1 windings=2 xhl=0.5 %R=0.353554 %imag=1e-06 %noloadloss=0
~ wdg=1 bus=42875725.1.0 kV=2.3094 kVA=75 conn=wye
~ wdg=2 bus=-99999942875725.1.0 kV=0.00855091 kVA=75 conn=wye
New Transformer.293588A74988EE34E0637F61810A7CE3_78_0 phases=1 windings=2 xhl=0.5 %R=0.353554 %imag=1e-06 %noloadloss=0
~ wdg=1 bus=22808394.3.0 kV=2.3094 kVA=75 conn=wye
~ wdg=2 bus=-99999922808394.3.0 kV=0.00855091 kVA=75 conn=wye
New Transformer.293588A74CCCEE34E0637F61810A7CE3_79_0 phases=1 windings=2 xhl=0.5 %R=0.353554 %imag=1e-06 %noloadloss=0
~ wdg=1 bus=22808036.3.0 kV=2.3094 kVA=75 conn=wye
~ wdg=2 bus=-99999922808036.3.0 kV=0.00855091 kVA=75 conn=wye
New Transformer.293588A8C5F3EE34E0637F61810A7CE3_80_0 phases=1 windings=2 xhl=0.5 %R=0.353554 %imag=1e-06 %noloadloss=0
~ wdg=1 bus=211265138.3.0 kV=2.3094 kVA=75 conn=wye
~ wdg=2 bus=-999999211265138.3.0 kV=0.00855091 kVA=75 conn=wye

Set voltagebases=[4.0 0.277 0.24 0.12]
CalcVoltageBases
Solve
