! OpenDSS script generated from multiconductor network
Clear

New Circuit.mc_network basekv=33.0 pu=1.000000 angle=0.00 frequency=60.0 phases=3 Mvasc3=1.08895e+06 Mvasc1=362982
~ bus1=-8888882155175.1.2.3

! Line codes
New LineCode.1500_JCN_3PH_33KV_3 nphases=3 units=km Rmatrix=[ 0.022169 | 0 0.022169 | 0 0 0.022169 ] Xmatrix=[ 0.040224 | 0 0.040224 | 0 0 0.040224 ] Cmatrix=[ 0 | 0 0 | 0 0 0 ]
New LineCode.1000_JCN_3PH_33KV_3 nphases=3 units=km Rmatrix=[ 1e-05 | 0 1e-05 | 0 0 1e-05 ] Xmatrix=[ 1e-05 | 0 1e-05 | 0 0 1e-05 ] Cmatrix=[ 0 | 0 0 | 0 0 0 ]
New LineCode.350_EPR_3PH_33KV_3 nphases=3 units=km Rmatrix=[ 1e-05 | 0 1e-05 | 0 0 1e-05 ] Xmatrix=[ 1e-05 | 0 1e-05 | 0 0 1e-05 ] Cmatrix=[ 0 | 0 0 | 0 0 0 ]
New LineCode.350_JCN_3PH_33KV_3 nphases=3 units=km Rmatrix=[ 1e-05 | 0 1e-05 | 0 0 1e-05 ] Xmatrix=[ 1e-05 | 0 1e-05 | 0 0 1e-05 ] Cmatrix=[ 0 | 0 0 | 0 0 0 ]
New LineCode.1/0_ACSR_3PH_33KV_3 nphases=3 units=km Rmatrix=[ 0.029017 | 0 0.029017 | 0 0 0.029017 ] Xmatrix=[ 0.023103 | 0 0.023103 | 0 0 0.023103 ] Cmatrix=[ 0 | 0 0 | 0 0 0 ]
New LineCode.336_ACSR_3PH_33KV_3 nphases=3 units=km Rmatrix=[ 0.071426 | 0 0.071426 | 0 0 0.071426 ] Xmatrix=[ 0.159949 | 0 0.159949 | 0 0 0.159949 ] Cmatrix=[ 0 | 0 0 | 0 0 0 ]
New LineCode.4/0_JCN_3PH_33KV_3 nphases=3 units=km Rmatrix=[ 0.15111 | 0 0.15111 | 0 0 0.15111 ] Xmatrix=[ 0.075172 | 0 0.075172 | 0 0 0.075172 ] Cmatrix=[ 0 | 0 0 | 0 0 0 ]
New LineCode.1/0_JCN_3PH_33KV_3 nphases=3 units=km Rmatrix=[ 0.103997 | 0 0.103997 | 0 0 0.103997 ] Xmatrix=[ 0.031693 | 0 0.031693 | 0 0 0.031693 ] Cmatrix=[ 0 | 0 0 | 0 0 0 ]
New LineCode.4/0_CLP_3PH_33KV_3 nphases=3 units=km Rmatrix=[ 0.04463 | 0 0.04463 | 0 0 0.04463 ] Xmatrix=[ 0.022202 | 0 0.022202 | 0 0 0.022202 ] Cmatrix=[ 0 | 0 0 | 0 0 0 ]
New LineCode.4/0_JCN_2PH_33KV_2 nphases=2 units=km Rmatrix=[ 0.061448 | 0 0.061448 ] Xmatrix=[ 0.030568 | 0 0.030568 ] Cmatrix=[ 0 | 0 0 ]
New LineCode.4_ACSR_3PH_33KV_3 nphases=3 units=km Rmatrix=[ 0.175289 | 0 0.175289 | 0 0 0.175289 ] Xmatrix=[ 0.064321 | 0 0.064321 | 0 0 0.064321 ] Cmatrix=[ 0 | 0 0 | 0 0 0 ]
New LineCode.4/0_CU_3PH_33KV_3 nphases=3 units=km Rmatrix=[ 0.130534 | 0 0.130534 | 0 0 0.130534 ] Xmatrix=[ 0.307305 | 0 0.307305 | 0 0 0.307305 ] Cmatrix=[ 0 | 0 0 | 0 0 0 ]
New LineCode.4/0_ACSR_3PH_33KV_3 nphases=3 units=km Rmatrix=[ 2.69124 | 0 2.69124 | 0 0 2.69124 ] Xmatrix=[ 3.803373 | 0 3.803373 | 0 0 3.803373 ] Cmatrix=[ 0 | 0 0 | 0 0 0 ]
New LineCode.477_ACSR_3PH_33KV_3 nphases=3 units=km Rmatrix=[ 0.002708 | 0 0.002708 | 0 0 0.002708 ] Xmatrix=[ 0.008336 | 0 0.008336 | 0 0 0.008336 ] Cmatrix=[ 0 | 0 0 | 0 0 0 ]

! Lines
New Line.4750783E$03263 phases=3 Bus1=-8888882155175.1.2.3 Bus2=18554142.1.2.3 LineCode=1500_JCN_3PH_33KV_3 Length=0.34864 units=km
New Line.4832592E$GS3163-4 phases=3 Bus1=218903885.1.2.3 Bus2=218903979.1.2.3 LineCode=1000_JCN_3PH_33KV_3 Length=0.282633 units=km
New Line.GS3163-1$218904242 phases=3 Bus1=218903948.1.2.3 Bus2=218904244.1.2.3 LineCode=1000_JCN_3PH_33KV_3 Length=0.571565 units=km
New Line.218904242$ND218904280 phases=3 Bus1=218904245.1.2.3 Bus2=218904262.1.2.3 LineCode=1000_JCN_3PH_33KV_3 Length=0.015495 units=km
New Line.GS2441-1$4620534E phases=3 Bus1=107693634.1.2.3 Bus2=107693543.1.2.3 LineCode=350_EPR_3PH_33KV_3 Length=0.190176 units=km
New Line.4914253E$4914254E phases=3 Bus1=206373063.1.2.3 Bus2=206373037.1.2.3 LineCode=350_JCN_3PH_33KV_3 Length=0.421826 units=km
New Line.4613994E$GS2441-3 phases=3 Bus1=18554368.1.2.3 Bus2=107693650.1.2.3 LineCode=350_EPR_3PH_33KV_3 Length=0.828728 units=km
New Line.ND173865070$173865274 phases=3 Bus1=173865022.1.2.3 Bus2=173865253.1.2.3 LineCode=1/0_ACSR_3PH_33KV_3 Length=0.096167 units=km
New Line.ND173864955$173865260 phases=3 Bus1=173864909.1.2.3 Bus2=173865248.1.2.3 LineCode=1/0_ACSR_3PH_33KV_3 Length=0.090788 units=km
New Line.4832592E$ND218903907 phases=3 Bus1=218903907.1.2.3 Bus2=218903884.1.2.3 LineCode=1/0_ACSR_3PH_33KV_3 Length=0.004909 units=km
New Line.RCS0460$ND155572175 phases=3 Bus1=141495966.1.2.3 Bus2=155572175.1.2.3 LineCode=336_ACSR_3PH_33KV_3 Length=0.038377 units=km
New Line.ND237029293$PS1335 phases=3 Bus1=237029293.1.2.3 Bus2=237029325.1.2.3 LineCode=1/0_ACSR_3PH_33KV_3 Length=1.57898 units=km
New Line.140690823$ND155572175 phases=3 Bus1=155572175.1.2.3 Bus2=155572147.1.2.3 LineCode=336_ACSR_3PH_33KV_3 Length=0.00192 units=km
New Line.ND155572175$4735571E phases=3 Bus1=155572175.1.2.3 Bus2=155572157.1.2.3 LineCode=336_ACSR_3PH_33KV_3 Length=0.01784 units=km
New Line.140690823$ND155572317 phases=3 Bus1=155572147.1.2.3 Bus2=155572271.1.2.3 LineCode=336_ACSR_3PH_33KV_3 Length=1.35701 units=km
New Line.4963099E$PS1335 phases=3 Bus1=237029326.1.2.3 Bus2=237029305.1.2.3 LineCode=1/0_ACSR_3PH_33KV_3 Length=0.221834 units=km
New Line.GS4052-1$4963099E phases=3 Bus1=237029306.1.2.3 Bus2=237029408.1.2.3 LineCode=4/0_JCN_3PH_33KV_3 Length=0.183051 units=km
New Line.GS3163-3$VFI3164-1 phases=3 Bus1=218903972.1.2.3 Bus2=218904180.1.2.3 LineCode=1/0_JCN_3PH_33KV_3 Length=0.14925 units=km
New Line.VFI3164-1$GS3163-2 phases=3 Bus1=218903956.1.2.3 Bus2=218904179.1.2.3 LineCode=1/0_JCN_3PH_33KV_3 Length=0.147922 units=km
New Line.GS4052-2$VFI4053-1 phases=3 Bus1=237029416.1.2.3 Bus2=237029922.1.2.3 LineCode=4/0_JCN_3PH_33KV_3 Length=0.191054 units=km
New Line.GS4052-3$VFI4053-2 phases=3 Bus1=237029432.1.2.3 Bus2=237029928.1.2.3 LineCode=4/0_JCN_3PH_33KV_3 Length=0.048006 units=km
New Line.4832261E$ND173546615 phases=3 Bus1=173546622.1.2.3 Bus2=173546597.1.2.3 LineCode=4/0_JCN_3PH_33KV_3 Length=0.465086 units=km
New Line.ND237029590$GS4052-4 phases=3 Bus1=237029439.1.2.3 Bus2=237029572.1.2.3 LineCode=4/0_JCN_3PH_33KV_3 Length=0.196539 units=km
New Line.4743117E$ND161605501 phases=3 Bus1=161605456.1.2.3 Bus2=161605506.1.2.3 LineCode=4/0_JCN_3PH_33KV_3 Length=0.038405 units=km
New Line.ND177242021$4832264E phases=3 Bus1=177242021.1.2.3 Bus2=177242000.1.2.3 LineCode=1/0_ACSR_3PH_33KV_3 Length=0.17891 units=km
New Line.ND95017724$4186204E phases=3 Bus1=95017673.1.2.3 Bus2=95017706.1.2.3 LineCode=4/0_CLP_3PH_33KV_3 Length=0.024072 units=km
New Line.ND155168488$ND229677523 phases=3 Bus1=229677523.1.2.3 Bus2=155168488.1.2.3 LineCode=336_ACSR_3PH_33KV_3 Length=0.943902 units=km
New Line.ND206373100$ND206373087 phases=3 Bus1=206373087.1.2.3 Bus2=206373100.1.2.3 LineCode=336_ACSR_3PH_33KV_3 Length=0.04473 units=km
New Line.ND206373100$PS1658 phases=3 Bus1=206373100.1.2.3 Bus2=241606915.1.2.3 LineCode=336_ACSR_3PH_33KV_3 Length=0.005366 units=km
New Line.PS1658$4914253E phases=3 Bus1=241606916.1.2.3 Bus2=206373062.1.2.3 LineCode=336_ACSR_3PH_33KV_3 Length=0.006661 units=km
New Line.4620534E$4620535E phases=3 Bus1=107693542.1.2.3 Bus2=107693593.1.2.3 LineCode=336_ACSR_3PH_33KV_3 Length=0.139179 units=km
New Line.FD2263$4832264E phases=3 Bus1=177241999.1.2.3 Bus2=177242055.1.2.3 LineCode=1/0_ACSR_3PH_33KV_3 Length=0.175749 units=km
New Line.ND199916992$PH934 phases=3 Bus1=18554234.1.2.3 Bus2=199916974.1.2.3 LineCode=4/0_CLP_3PH_33KV_3 Length=0.137511 units=km
New Line.FD2263$RCSG954-3 phases=3 Bus1=177242056.1.2.3 Bus2=177242108.1.2.3 LineCode=4/0_JCN_3PH_33KV_3 Length=0.380899 units=km
New Line.ND177242343$RCSG954-2 phases=3 Bus1=177242100.1.2.3 Bus2=177242343.1.2.3 LineCode=4/0_JCN_3PH_33KV_3 Length=0.302816 units=km
New Line.RCSG954-1$P5573175-1 phases=2 Bus1=177242092.1.3 Bus2=177242227.1.3 LineCode=4/0_JCN_2PH_33KV_2 Length=0.190548 units=km
New Line.ND177242296$ND177242343 phases=3 Bus1=177242343.1.2.3 Bus2=177242301.1.2.3 LineCode=4/0_JCN_3PH_33KV_3 Length=0.009157 units=km
New Line.ND173865238$4620535E phases=3 Bus1=107693593.1.2.3 Bus2=173865238.1.2.3 LineCode=4_ACSR_3PH_33KV_3 Length=0.239678 units=km
New Line.ND173864807$4620537E phases=3 Bus1=173864761.1.2.3 Bus2=173864807.1.2.3 LineCode=336_ACSR_3PH_33KV_3 Length=0.133442 units=km
New Line.ND173864807$ND173864837 phases=3 Bus1=173864807.1.2.3 Bus2=173864837.1.2.3 LineCode=336_ACSR_3PH_33KV_3 Length=0.294205 units=km
New Line.ND173864807$ND173864821 phases=3 Bus1=173864807.1.2.3 Bus2=173865117.1.2.3 LineCode=1/0_ACSR_3PH_33KV_3 Length=0.255468 units=km
New Line.RCS1655$ND240355845 phases=3 Bus1=240355845.1.2.3 Bus2=240355833.1.2.3 LineCode=336_ACSR_3PH_33KV_3 Length=0.02655 units=km
New Line.ND173864837$ND173864831 phases=3 Bus1=173864837.1.2.3 Bus2=173865004.1.2.3 LineCode=1/0_ACSR_3PH_33KV_3 Length=0.073772 units=km
New Line.ND173864837$ND173865217 phases=3 Bus1=173864837.1.2.3 Bus2=173865217.1.2.3 LineCode=336_ACSR_3PH_33KV_3 Length=0.3118 units=km
New Line.ND186583797$ND102277881 phases=3 Bus1=102277881.1.2.3 Bus2=186583731.1.2.3 LineCode=4_ACSR_3PH_33KV_3 Length=0.167296 units=km
New Line.ND173864868$ND173865217 phases=3 Bus1=173865217.1.2.3 Bus2=173864891.1.2.3 LineCode=1/0_ACSR_3PH_33KV_3 Length=0.068547 units=km
New Line.ND173865181$173865288 phases=3 Bus1=173865135.1.2.3 Bus2=173865258.1.2.3 LineCode=1/0_ACSR_3PH_33KV_3 Length=0.089679 units=km
New Line.173865288$GFID5562 phases=3 Bus1=173865258.1.2.3 Bus2=-777777173865258.1.2.3 LineCode=1/0_ACSR_3PH_33KV_3 Length=0.148195 units=km
New Line.173865274$WDT650 phases=3 Bus1=173865253.1.2.3 Bus2=-777777173865253.1.2.3 LineCode=1/0_ACSR_3PH_33KV_3 Length=0.149058 units=km
New Line.173865260$WDT651 phases=3 Bus1=173865248.1.2.3 Bus2=-777777173865248.1.2.3 LineCode=1/0_ACSR_3PH_33KV_3 Length=0.155511 units=km
New Line.161605590$ND197421039 phases=3 Bus1=197421039.1.2.3 Bus2=-777777197421039.1.2.3 LineCode=4_ACSR_3PH_33KV_3 Length=0.079896 units=km
New Line.CITY_OF$ND155572319 phases=3 Bus1=155572253.1.2.3 Bus2=-777777155572253.1.2.3 LineCode=336_ACSR_3PH_33KV_3 Length=0.058351 units=km
New Line.GFID2895$ND177242343 phases=3 Bus1=177242343.1.2.3 Bus2=-777777177242343.1.2.3 LineCode=4/0_JCN_3PH_33KV_3 Length=0.162898 units=km
New Line.ND186583795$4346573E phases=3 Bus1=186583749.1.2.3 Bus2=137655941.1.2.3 LineCode=4_ACSR_3PH_33KV_3 Length=0.413851 units=km
New Line.PS0343$RCS0310 phases=3 Bus1=18572814.1.2.3 Bus2=18572910.1.2.3 LineCode=4/0_CU_3PH_33KV_3 Length=0.985758 units=km
New Line.4346573E$4832591E phases=3 Bus1=137655941.1.2.3 Bus2=18571718.1.2.3 LineCode=4_ACSR_3PH_33KV_3 Length=1.30982 units=km
New Line.4333357E$ND18573492 phases=3 Bus1=140690876.1.2.3 Bus2=18573492.1.2.3 LineCode=1/0_ACSR_3PH_33KV_3 Length=0.045336 units=km
New Line.ND18573492$RCS0460 phases=3 Bus1=18573492.1.2.3 Bus2=141495967.1.2.3 LineCode=336_ACSR_3PH_33KV_3 Length=0.045336 units=km
New Line.4832591E$ND218903907 phases=3 Bus1=18571718.1.2.3 Bus2=218903907.1.2.3 LineCode=4_ACSR_3PH_33KV_3 Length=0.084579 units=km
New Line.ND218903907$ND237029293 phases=3 Bus1=218903907.1.2.3 Bus2=237029293.1.2.3 LineCode=4_ACSR_3PH_33KV_3 Length=0.114091 units=km
New Line.ND237029293$PS1002 phases=3 Bus1=237029293.1.2.3 Bus2=161605542.1.2.3 LineCode=4_ACSR_3PH_33KV_3 Length=0.152387 units=km
New Line.ND197421039$PS1002 phases=3 Bus1=161605541.1.2.3 Bus2=197421039.1.2.3 LineCode=1/0_ACSR_3PH_33KV_3 Length=0.078502 units=km
New Line.PS0508$4750783E phases=3 Bus1=18554141.1.2.3 Bus2=18572719.1.2.3 LineCode=4/0_ACSR_3PH_33KV_3 Length=0.282068 units=km
New Line.PS0508$ND157426640 phases=3 Bus1=18572718.1.2.3 Bus2=157426640.1.2.3 LineCode=4/0_ACSR_3PH_33KV_3 Length=2.56832 units=km
New Line.ND157426640$4652224E phases=3 Bus1=157426640.1.2.3 Bus2=157660144.1.2.3 LineCode=4/0_ACSR_3PH_33KV_3 Length=2.9164 units=km
New Line.4652224E$ND240561406 phases=3 Bus1=157660144.1.2.3 Bus2=240561354.1.2.3 LineCode=4/0_ACSR_3PH_33KV_3 Length=1.90568 units=km
New Line.4613990E$ND240561408 phases=3 Bus1=240561336.1.2.3 Bus2=18572149.1.2.3 LineCode=4/0_ACSR_3PH_33KV_3 Length=7.96598 units=km
New Line.PS0348$4613990E phases=3 Bus1=18572149.1.2.3 Bus2=18572753.1.2.3 LineCode=4/0_ACSR_3PH_33KV_3 Length=0.173384 units=km
New Line.ND177241601$ND197421039 phases=3 Bus1=197421039.1.2.3 Bus2=177241601.1.2.3 LineCode=1/0_ACSR_3PH_33KV_3 Length=0.451386 units=km
New Line.ND177241601$PS1095 phases=3 Bus1=177241601.1.2.3 Bus2=177241507.1.2.3 LineCode=1/0_ACSR_3PH_33KV_3 Length=0.112599 units=km
New Line.ND177241601$PSDC2222 phases=3 Bus1=177241601.1.2.3 Bus2=177241542.1.2.3 LineCode=1/0_ACSR_3PH_33KV_3 Length=0.008874 units=km
New Line.PSDC2222$177241561 phases=3 Bus1=177241543.1.2.3 Bus2=177241566.1.2.3 LineCode=1/0_ACSR_3PH_33KV_3 Length=0.040677 units=km
New Line.PS0348$ND18573183 phases=3 Bus1=18572752.1.2.3 Bus2=18573183.1.2.3 LineCode=336_ACSR_3PH_33KV_3 Length=0.135043 units=km
New Line.1737893E$ND18573183 phases=3 Bus1=18573183.1.2.3 Bus2=18572869.1.2.3 LineCode=1/0_ACSR_3PH_33KV_3 Length=0.031948 units=km
New Line.ND18573183$ND206380354 phases=3 Bus1=18573183.1.2.3 Bus2=206380354.1.2.3 LineCode=336_ACSR_3PH_33KV_3 Length=0.066057 units=km
New Line.ND206380354$ND18573194 phases=3 Bus1=206380354.1.2.3 Bus2=18573194.1.2.3 LineCode=336_ACSR_3PH_33KV_3 Length=0.060926 units=km
New Line.ND18573194$4613994E phases=3 Bus1=18573194.1.2.3 Bus2=18554367.1.2.3 LineCode=477_ACSR_3PH_33KV_3 Length=0.022451 units=km
New Line.1737893E$ND18573391 phases=3 Bus1=18572868.1.2.3 Bus2=18573391.1.2.3 LineCode=1/0_ACSR_3PH_33KV_3 Length=0.109713 units=km
New Line.ND18573194$RCS0059 phases=3 Bus1=18573194.1.2.3 Bus2=69722782.1.2.3 LineCode=336_ACSR_3PH_33KV_3 Length=0.633389 units=km
New Line.ND18573391$2343728E phases=3 Bus1=18573391.1.2.3 Bus2=18554221.1.2.3 LineCode=1/0_ACSR_3PH_33KV_3 Length=0.223127 units=km
New Line.ND18573391$ND18573165 phases=3 Bus1=18573391.1.2.3 Bus2=18573165.1.2.3 LineCode=1/0_ACSR_3PH_33KV_3 Length=0.234489 units=km
New Line.RCS0059$ND229677523 phases=3 Bus1=69722781.1.2.3 Bus2=229677523.1.2.3 LineCode=336_ACSR_3PH_33KV_3 Length=0.537773 units=km
New Line.ND177241619$PS1095 phases=3 Bus1=177241506.1.2.3 Bus2=177241619.1.2.3 LineCode=1/0_ACSR_3PH_33KV_3 Length=0.118149 units=km
New Line.ND173546645$ND177241619 phases=3 Bus1=177241619.1.2.3 Bus2=173546645.1.2.3 LineCode=4_ACSR_3PH_33KV_3 Length=0.158082 units=km
New Line.ND177241619$PSDC1111 phases=3 Bus1=177241619.1.2.3 Bus2=177241526.1.2.3 LineCode=1/0_ACSR_3PH_33KV_3 Length=0.012152 units=km
New Line.PSDC1111$177241561 phases=3 Bus1=177241566.1.2.3 Bus2=177241527.1.2.3 LineCode=1/0_ACSR_3PH_33KV_3 Length=0.039592 units=km
New Line.ND173546645$ND161605484 phases=3 Bus1=173546645.1.2.3 Bus2=161605484.1.2.3 LineCode=4_ACSR_3PH_33KV_3 Length=0.508635 units=km
New Line.4832261E$ND173546645 phases=3 Bus1=173546645.1.2.3 Bus2=173546621.1.2.3 LineCode=4_ACSR_3PH_33KV_3 Length=0.088044 units=km
New Line.4743117E$ND161605484 phases=3 Bus1=161605484.1.2.3 Bus2=161605455.1.2.3 LineCode=4_ACSR_3PH_33KV_3 Length=0.06538 units=km
New Line.ND161605484$ND95017696 phases=3 Bus1=161605484.1.2.3 Bus2=95017696.1.2.3 LineCode=4_ACSR_3PH_33KV_3 Length=0.081924 units=km
New Line.ND95017696$ND177242021 phases=3 Bus1=95017696.1.2.3 Bus2=177242021.1.2.3 LineCode=4_ACSR_3PH_33KV_3 Length=0.039502 units=km
New Line.4186204E$ND95017696 phases=3 Bus1=95017696.1.2.3 Bus2=95017672.1.2.3 LineCode=4_ACSR_3PH_33KV_3 Length=0.065777 units=km
New Line.ND177242021$ND177241734 phases=3 Bus1=177242021.1.2.3 Bus2=177241734.1.2.3 LineCode=4_ACSR_3PH_33KV_3 Length=0.264157 units=km
New Line.PH934$ND177241734 phases=3 Bus1=177241734.1.2.3 Bus2=18554233.1.2.3 LineCode=4_ACSR_3PH_33KV_3 Length=0.01178 units=km
New Line.ND229677552$ND229677523 phases=3 Bus1=229677523.1.2.3 Bus2=229677552.1.2.3 LineCode=336_ACSR_3PH_33KV_3 Length=0.04681 units=km
New Line.RCS0900$ND229677552 phases=3 Bus1=229677552.1.2.3 Bus2=155168430.1.2.3 LineCode=336_ACSR_3PH_33KV_3 Length=0.010111 units=km
New Line.ND206373087$ND155168488 phases=3 Bus1=155168488.1.2.3 Bus2=206373087.1.2.3 LineCode=336_ACSR_3PH_33KV_3 Length=0.032329 units=km
New Line.ND173865238$ND173864744 phases=3 Bus1=173865238.1.2.3 Bus2=173864744.1.2.3 LineCode=4/0_ACSR_3PH_33KV_3 Length=0.123913 units=km
New Line.4620537E$ND173865238 phases=3 Bus1=173865238.1.2.3 Bus2=173864755.1.2.3 LineCode=4/0_ACSR_3PH_33KV_3 Length=0.00928 units=km
New Line.ND173864744$RCS0010 phases=3 Bus1=173864744.1.2.3 Bus2=102277900.1.2.3 LineCode=4/0_ACSR_3PH_33KV_3 Length=1.87791 units=km
New Line.ND144533624$4914254E phases=3 Bus1=206373036.1.2.3 Bus2=144533624.1.2.3 LineCode=336_ACSR_3PH_33KV_3 Length=0.383012 units=km
New Line.ND240355845$ND144533624 phases=3 Bus1=144533624.1.2.3 Bus2=240355845.1.2.3 LineCode=336_ACSR_3PH_33KV_3 Length=0.138233 units=km
New Line.RCS0010$ND102277881 phases=3 Bus1=102277899.1.2.3 Bus2=102277881.1.2.3 LineCode=4/0_ACSR_3PH_33KV_3 Length=0.210491 units=km
New Line.ND144533641$ND240355845 phases=3 Bus1=240355845.1.2.3 Bus2=144533641.1.2.3 LineCode=1/0_ACSR_3PH_33KV_3 Length=0.029572 units=km
New Line.PS0339$ND102277881 phases=3 Bus1=102277881.1.2.3 Bus2=104765024.1.2.3 LineCode=4/0_CU_3PH_33KV_3 Length=0.06996 units=km
New Line.4333357ET2$ND144533641 phases=3 Bus1=144533641.1.2.3 Bus2=140691111.1.2.3 LineCode=1/0_ACSR_3PH_33KV_3 Length=0.15119 units=km
New Line.4333357ET2$ND140690805 phases=3 Bus1=140691110.1.2.3 Bus2=140690805.1.2.3 LineCode=1/0_ACSR_3PH_33KV_3 Length=0.019671 units=km
New Line.PS0343$PS0339 phases=3 Bus1=104765025.1.2.3 Bus2=18572815.1.2.3 LineCode=4/0_CU_3PH_33KV_3 Length=0.692313 units=km
New Line.ND140690805$4333357E phases=3 Bus1=140690805.1.2.3 Bus2=140690875.1.2.3 LineCode=1/0_ACSR_3PH_33KV_3 Length=0.019671 units=km
New Line.ND18573165$ND274786943 phases=3 Bus1=18573165.1.2.3 Bus2=-77777718573165.1.2.3 LineCode=1/0_ACSR_3PH_33KV_3 Length=0.091573 units=km
New Line.ND18573165$ND18573529 phases=3 Bus1=18573165.1.2.3 Bus2=-77777718573165.1.2.3 LineCode=1/0_ACSR_3PH_33KV_3 Length=0.240495 units=km
New Line.ND11193547$ND140690805 phases=3 Bus1=140690805.1.2.3 Bus2=-777777140690805.1.2.3 LineCode=336_ACSR_3PH_33KV_3 Length=0.05524 units=km

! Switches
New Line.1737893E:1737893E phases=3 Bus1=18572869.1.2.3 Bus2=18572868.1.2.3 switch=y r1=0.001 x1=0.001 r0=0.001 x0=0.001 Length=0.001 units=km
New Line.4620537E:4620537E phases=3 Bus1=173864755.1.2.3 Bus2=173864761.1.2.3 switch=y r1=0.001 x1=0.001 r0=0.001 x0=0.001 Length=0.001 units=km
New Line.4333357E:4333357ET2 phases=3 Bus1=140691111.1.2.3 Bus2=140691110.1.2.3 switch=y r1=0.001 x1=0.001 r0=0.001 x0=0.001 Length=0.001 units=km
New Line.4333357E:4333357E phases=3 Bus1=140690875.1.2.3 Bus2=140690876.1.2.3 switch=y r1=0.001 x1=0.001 r0=0.001 x0=0.001 Length=0.001 units=km
New Line.2156902E:RAR1021 phases=3 Bus1=186583713.1.2.3 Bus2=186583714.1.2.3 switch=y r1=0.001 x1=0.001 r0=0.001 x0=0.001 Length=0.001 units=km
New Line.4780444E:RAR1065 phases=3 Bus1=173864873.1.2.3 Bus2=173864874.1.2.3 switch=y r1=0.001 x1=0.001 r0=0.001 x0=0.001 Length=0.001 units=km
New Line.CUSTOMER:AR phases=3 Bus1=155572236.1.2.3 Bus2=155572235.1.2.3 switch=y r1=0.001 x1=0.001 r0=0.001 x0=0.001 Length=0.001 units=km
New Line.4780448E:RAR1067 phases=3 Bus1=173865099.1.2.3 Bus2=173865100.1.2.3 switch=y r1=0.001 x1=0.001 r0=0.001 x0=0.001 Length=0.001 units=km
New Line.4780446E:RAR1066 phases=3 Bus1=173864986.1.2.3 Bus2=173864987.1.2.3 switch=y r1=0.001 x1=0.001 r0=0.001 x0=0.001 Length=0.001 units=km
New Line.293588A3E54AEE34E0637F61810A7CE3 phases=3 Bus1=177242000.1.2.3 Bus2=177241999.1.2.3 switch=y r1=0.001 x1=0.001 r0=0.001 x0=0.001 Length=0.001 units=km
New Line.CEMENT$OLD_TRAILS_RCS0310$RCS0310 phases=3 Bus1=18572911.1.2.3 Bus2=-77777718572911.1.2.3 switch=y r1=0.001 x1=0.001 r0=0.001 x0=0.001 Length=0.001 units=km
New Line.CEMENT$PORTLAND_RCS0900$RCS0900 phases=3 Bus1=155168429.1.2.3 Bus2=-777777155168429.1.2.3 switch=y r1=0.001 x1=0.001 r0=0.001 x0=0.001 Length=0.001 units=km
New Line.CEMENT$PORTLAND_RCS1655$RCS1655 phases=3 Bus1=240355791.1.2.3 Bus2=-777777240355791.1.2.3 switch=y r1=0.001 x1=0.001 r0=0.001 x0=0.001 Length=0.001 units=km
New Line.186583775$PDRAR1021-D phases=3 Bus1=186583749.1.2.3 Bus2=186583725.1.2.3 switch=y r1=0.001 x1=0.001 r0=0.001 x0=0.001 Length=0.001 units=km
New Line.173864935$PDRAR1065-D phases=3 Bus1=173864909.1.2.3 Bus2=173864885.1.2.3 switch=y r1=0.001 x1=0.001 r0=0.001 x0=0.001 Length=0.001 units=km
New Line.RAR1066$PDRAR1066-D phases=3 Bus1=173864987.1.2.3 Bus2=173864999.1.2.3 switch=y r1=0.001 x1=0.001 r0=0.001 x0=0.001 Length=0.001 units=km
New Line.RAR1021$PDRAR1021-D phases=3 Bus1=186583714.1.2.3 Bus2=186583726.1.2.3 switch=y r1=0.001 x1=0.001 r0=0.001 x0=0.001 Length=0.001 units=km
New Line.RAR1065$PDRAR1065-D phases=3 Bus1=173864874.1.2.3 Bus2=173864886.1.2.3 switch=y r1=0.001 x1=0.001 r0=0.001 x0=0.001 Length=0.001 units=km
New Line.155572297$PDAR-D phases=3 Bus1=155572271.1.2.3 Bus2=155572247.1.2.3 switch=y r1=0.001 x1=0.001 r0=0.001 x0=0.001 Length=0.001 units=km
New Line.240561382$PDREG01195-D phases=3 Bus1=240561354.1.2.3 Bus2=240561330.1.2.3 switch=y r1=0.001 x1=0.001 r0=0.001 x0=0.001 Length=0.001 units=km
New Line.240561382$PDREG01195-C phases=3 Bus1=240561354.1.2.3 Bus2=240561355.1.2.3 switch=y r1=0.001 x1=0.001 r0=0.001 x0=0.001 Length=0.001 units=km
New Line.240561378$PDREG01195-C phases=3 Bus1=240561337.1.2.3 Bus2=240561336.1.2.3 switch=y r1=0.001 x1=0.001 r0=0.001 x0=0.001 Length=0.001 units=km
New Line.PDREG01195-D$4526654E phases=3 Bus1=240561331.1.2.3 Bus2=240561361.1.2.3 switch=y r1=0.001 x1=0.001 r0=0.001 x0=0.001 Length=0.001 units=km
New Line.240561378$PDREG01195-B phases=3 Bus1=240561336.1.2.3 Bus2=240561324.1.2.3 switch=y r1=0.001 x1=0.001 r0=0.001 x0=0.001 Length=0.001 units=km
New Line.155572297$PDAR-C phases=3 Bus1=155572271.1.2.3 Bus2=155572272.1.2.3 switch=y r1=0.001 x1=0.001 r0=0.001 x0=0.001 Length=0.001 units=km
New Line.GS3163-T$GS3163-4 phases=3 Bus1=218903942.1.2.3 Bus2=218903941.1.2.3 switch=y r1=0.001 x1=0.001 r0=0.001 x0=0.001 Length=0.001 units=km
New Line.AR$PDAR-D phases=3 Bus1=155572248.1.2.3 Bus2=155572236.1.2.3 switch=y r1=0.001 x1=0.001 r0=0.001 x0=0.001 Length=0.001 units=km
New Line.155572293$PDAR-C phases=3 Bus1=155572254.1.2.3 Bus2=155572253.1.2.3 switch=y r1=0.001 x1=0.001 r0=0.001 x0=0.001 Length=0.001 units=km
New Line.GS3163-1$GS3163-T phases=3 Bus1=218903936.1.2.3 Bus2=218903935.1.2.3 switch=y r1=0.001 x1=0.001 r0=0.001 x0=0.001 Length=0.001 units=km
New Line.155572293$PDAR-B phases=3 Bus1=155572253.1.2.3 Bus2=155572241.1.2.3 switch=y r1=0.001 x1=0.001 r0=0.001 x0=0.001 Length=0.001 units=km
New Line.PDREG01195-B$4526654E phases=3 Bus1=240561349.1.2.3 Bus2=240561325.1.2.3 switch=y r1=0.001 x1=0.001 r0=0.001 x0=0.001 Length=0.001 units=km
New Line.GS4052-1$GS4052-T phases=3 Bus1=237029395.1.2.3 Bus2=237029396.1.2.3 switch=y r1=0.001 x1=0.001 r0=0.001 x0=0.001 Length=0.001 units=km
New Line.PDAR-B$AR phases=3 Bus1=155572235.1.2.3 Bus2=155572242.1.2.3 switch=y r1=0.001 x1=0.001 r0=0.001 x0=0.001 Length=0.001 units=km
New Line.218904242 phases=3 Bus1=218904244.1.2.3 Bus2=218904245.1.2.3 switch=y r1=0.001 x1=0.001 r0=0.001 x0=0.001 Length=0.001 units=km
New Line.GS4052-T$GS4052-4 phases=3 Bus1=237029401.1.2.3 Bus2=237029402.1.2.3 switch=y r1=0.001 x1=0.001 r0=0.001 x0=0.001 Length=0.001 units=km
New Line.218904269$P5568859 phases=3 Bus1=218904262.1.2.3 Bus2=218904263.1.2.3 switch=y r1=0.001 x1=0.001 r0=0.001 x0=0.001 Length=0.001 units=km
New Line.173546604$P5578527 phases=3 Bus1=173546597.1.2.3 Bus2=173546598.1.2.3 switch=y r1=0.001 x1=0.001 r0=0.001 x0=0.001 Length=0.001 units=km
New Line.237029579$P5573639 phases=3 Bus1=237029572.1.2.3 Bus2=237029573.1.2.3 switch=y r1=0.001 x1=0.001 r0=0.001 x0=0.001 Length=0.001 units=km
New Line.161605513$P5633625 phases=3 Bus1=161605506.1.2.3 Bus2=161605507.1.2.3 switch=y r1=0.001 x1=0.001 r0=0.001 x0=0.001 Length=0.001 units=km
New Line.GS2441-2$107693648 phases=3 Bus1=107693627.1.2.3 Bus2=107693621.1.2.3 switch=y r1=0.001 x1=0.001 r0=0.001 x0=0.001 Length=0.001 units=km
New Line.107693632$GS2441-2 phases=3 Bus1=107693621.1.2.3 Bus2=107693620.1.2.3 switch=y r1=0.001 x1=0.001 r0=0.001 x0=0.001 Length=0.001 units=km
New Line.95017713$P5424791 phases=3 Bus1=95017706.1.2.3 Bus2=95017707.1.2.3 switch=y r1=0.001 x1=0.001 r0=0.001 x0=0.001 Length=0.001 units=km
New Line.199916981$P5050432 phases=3 Bus1=199916974.1.2.3 Bus2=199916975.1.2.3 switch=y r1=0.001 x1=0.001 r0=0.001 x0=0.001 Length=0.001 units=km
New Line.177242098$177242106 phases=3 Bus1=177242085.1.2.3 Bus2=177242079.1.2.3 switch=y r1=0.001 x1=0.001 r0=0.001 x0=0.001 Length=0.001 units=km
New Line.RCSG954-1$177242098 phases=3 Bus1=177242079.1.2.3 Bus2=177242078.1.2.3 switch=y r1=0.001 x1=0.001 r0=0.001 x0=0.001 Length=0.001 units=km
New Line.177242308$P5573176 phases=3 Bus1=177242301.1.2.3 Bus2=177242302.1.2.3 switch=y r1=0.001 x1=0.001 r0=0.001 x0=0.001 Length=0.001 units=km
New Line.173865157$PDRAR1067-B phases=3 Bus1=173865117.1.2.3 Bus2=173865105.1.2.3 switch=y r1=0.001 x1=0.001 r0=0.001 x0=0.001 Length=0.001 units=km
New Line.173865157$PDRAR1067-C phases=3 Bus1=173865117.1.2.3 Bus2=173865118.1.2.3 switch=y r1=0.001 x1=0.001 r0=0.001 x0=0.001 Length=0.001 units=km
New Line.173865044$PDRAR1066-B phases=3 Bus1=173865004.1.2.3 Bus2=173864992.1.2.3 switch=y r1=0.001 x1=0.001 r0=0.001 x0=0.001 Length=0.001 units=km
New Line.173865044$PDRAR1066-C phases=3 Bus1=173865004.1.2.3 Bus2=173865005.1.2.3 switch=y r1=0.001 x1=0.001 r0=0.001 x0=0.001 Length=0.001 units=km
New Line.186583771$PDRAR1021-B phases=3 Bus1=186583731.1.2.3 Bus2=186583719.1.2.3 switch=y r1=0.001 x1=0.001 r0=0.001 x0=0.001 Length=0.001 units=km
New Line.186583771$PDRAR1021-C phases=3 Bus1=186583731.1.2.3 Bus2=186583732.1.2.3 switch=y r1=0.001 x1=0.001 r0=0.001 x0=0.001 Length=0.001 units=km
New Line.173864931$PDRAR1065-B phases=3 Bus1=173864891.1.2.3 Bus2=173864879.1.2.3 switch=y r1=0.001 x1=0.001 r0=0.001 x0=0.001 Length=0.001 units=km
New Line.173864931$PDRAR1065-C phases=3 Bus1=173864891.1.2.3 Bus2=173864892.1.2.3 switch=y r1=0.001 x1=0.001 r0=0.001 x0=0.001 Length=0.001 units=km
New Line.PDRAR1067-B$RAR1067 phases=3 Bus1=173865106.1.2.3 Bus2=173865099.1.2.3 switch=y r1=0.001 x1=0.001 r0=0.001 x0=0.001 Length=0.001 units=km
New Line.173865161$PDRAR1067-C phases=3 Bus1=173865136.1.2.3 Bus2=173865135.1.2.3 switch=y r1=0.001 x1=0.001 r0=0.001 x0=0.001 Length=0.001 units=km
New Line.PDRAR1066-B$RAR1066 phases=3 Bus1=173864993.1.2.3 Bus2=173864986.1.2.3 switch=y r1=0.001 x1=0.001 r0=0.001 x0=0.001 Length=0.001 units=km
New Line.173865048$PDRAR1066-C phases=3 Bus1=173865023.1.2.3 Bus2=173865022.1.2.3 switch=y r1=0.001 x1=0.001 r0=0.001 x0=0.001 Length=0.001 units=km
New Line.173865161$PDRAR1067-D phases=3 Bus1=173865135.1.2.3 Bus2=173865111.1.2.3 switch=y r1=0.001 x1=0.001 r0=0.001 x0=0.001 Length=0.001 units=km
New Line.PDRAR1021-B$RAR1021 phases=3 Bus1=186583720.1.2.3 Bus2=186583713.1.2.3 switch=y r1=0.001 x1=0.001 r0=0.001 x0=0.001 Length=0.001 units=km
New Line.186583775$PDRAR1021-C phases=3 Bus1=186583750.1.2.3 Bus2=186583749.1.2.3 switch=y r1=0.001 x1=0.001 r0=0.001 x0=0.001 Length=0.001 units=km
New Line.PDRAR1065-B$RAR1065 phases=3 Bus1=173864880.1.2.3 Bus2=173864873.1.2.3 switch=y r1=0.001 x1=0.001 r0=0.001 x0=0.001 Length=0.001 units=km
New Line.173864935$PDRAR1065-C phases=3 Bus1=173864910.1.2.3 Bus2=173864909.1.2.3 switch=y r1=0.001 x1=0.001 r0=0.001 x0=0.001 Length=0.001 units=km
New Line.173865048$PDRAR1066-D phases=3 Bus1=173865022.1.2.3 Bus2=173864998.1.2.3 switch=y r1=0.001 x1=0.001 r0=0.001 x0=0.001 Length=0.001 units=km
New Line.RAR1067$PDRAR1067-D phases=3 Bus1=173865100.1.2.3 Bus2=173865112.1.2.3 switch=y r1=0.001 x1=0.001 r0=0.001 x0=0.001 Length=0.001 units=km
New Line.4780446E:PDRAR1066-D phases=3 Bus1=173864998.1.2.3 Bus2=173864999.1.2.3 switch=y r1=0.001 x1=0.001 r0=0.001 x0=0.001 Length=0.001 units=km
New Line.273085S:RCS0310 phases=3 Bus1=18572910.1.2.3 Bus2=18572911.1.2.3 switch=y r1=0.001 x1=0.001 r0=0.001 x0=0.001 Length=0.001 units=km enabled=false
New Line.2156902E:PDRAR1021-D phases=3 Bus1=186583725.1.2.3 Bus2=186583726.1.2.3 switch=y r1=0.001 x1=0.001 r0=0.001 x0=0.001 Length=0.001 units=km
New Line.4780444E:PDRAR1065-D phases=3 Bus1=173864885.1.2.3 Bus2=173864886.1.2.3 switch=y r1=0.001 x1=0.001 r0=0.001 x0=0.001 Length=0.001 units=km
New Line.4735569E:RCS0460 phases=3 Bus1=141495967.1.2.3 Bus2=141495966.1.2.3 switch=y r1=0.001 x1=0.001 r0=0.001 x0=0.001 Length=0.001 units=km
New Line.4832595E:PS1002 phases=3 Bus1=161605542.1.2.3 Bus2=161605541.1.2.3 switch=y r1=0.001 x1=0.001 r0=0.001 x0=0.001 Length=0.001 units=km
New Line.4963098E:PS1335 phases=3 Bus1=237029325.1.2.3 Bus2=237029326.1.2.3 switch=y r1=0.001 x1=0.001 r0=0.001 x0=0.001 Length=0.001 units=km
New Line.5568857:GS3163-4 phases=3 Bus1=218903979.1.2.3 Bus2=218903942.1.2.3 switch=y r1=0.001 x1=0.001 r0=0.001 x0=0.001 Length=0.001 units=km
New Line.273003S:PS0508 phases=3 Bus1=18572719.1.2.3 Bus2=18572718.1.2.3 switch=y r1=0.001 x1=0.001 r0=0.001 x0=0.001 Length=0.001 units=km
New Line.CUSTOMER:PDAR-D phases=3 Bus1=155572247.1.2.3 Bus2=155572248.1.2.3 switch=y r1=0.001 x1=0.001 r0=0.001 x0=0.001 Length=0.001 units=km
New Line.CUSTOMER:PDAR-C phases=3 Bus1=155572272.1.2.3 Bus2=155572254.1.2.3 switch=y r1=0.001 x1=0.001 r0=0.001 x0=0.001 Length=0.001 units=km enabled=false
New Line.5568857:GS3163-T phases=3 Bus1=218903941.1.2.3 Bus2=218903936.1.2.3 switch=y r1=0.001 x1=0.001 r0=0.001 x0=0.001 Length=0.001 units=km enabled=false
New Line.5568857:GS3163-3 phases=3 Bus1=218903941.1.2.3 Bus2=218903972.1.2.3 switch=y r1=0.001 x1=0.001 r0=0.001 x0=0.001 Length=0.001 units=km
New Line.4832257E:PS1095 phases=3 Bus1=177241507.1.2.3 Bus2=177241506.1.2.3 switch=y r1=0.001 x1=0.001 r0=0.001 x0=0.001 Length=0.001 units=km enabled=false
New Line.DISCONNECT2:PSDC2222 phases=3 Bus1=177241542.1.2.3 Bus2=177241543.1.2.3 switch=y r1=0.001 x1=0.001 r0=0.001 x0=0.001 Length=0.001 units=km
New Line.5568857:GS3163-2 phases=3 Bus1=218903936.1.2.3 Bus2=218903956.1.2.3 switch=y r1=0.001 x1=0.001 r0=0.001 x0=0.001 Length=0.001 units=km
New Line.5573637:GS4052-1 phases=3 Bus1=237029408.1.2.3 Bus2=237029395.1.2.3 switch=y r1=0.001 x1=0.001 r0=0.001 x0=0.001 Length=0.001 units=km
New Line.4613992E:PS0348 phases=3 Bus1=18572753.1.2.3 Bus2=18572752.1.2.3 switch=y r1=0.001 x1=0.001 r0=0.001 x0=0.001 Length=0.001 units=km
New Line.4531653E:RCS0059 phases=3 Bus1=69722782.1.2.3 Bus2=69722781.1.2.3 switch=y r1=0.001 x1=0.001 r0=0.001 x0=0.001 Length=0.001 units=km
New Line.5568857:GS3163-1 phases=3 Bus1=218903935.1.2.3 Bus2=218903948.1.2.3 switch=y r1=0.001 x1=0.001 r0=0.001 x0=0.001 Length=0.001 units=km
New Line.CUSTOMER:PDAR-B phases=3 Bus1=155572241.1.2.3 Bus2=155572242.1.2.3 switch=y r1=0.001 x1=0.001 r0=0.001 x0=0.001 Length=0.001 units=km
New Line.5573637:GS4052-T phases=3 Bus1=237029396.1.2.3 Bus2=237029401.1.2.3 switch=y r1=0.001 x1=0.001 r0=0.001 x0=0.001 Length=0.001 units=km enabled=false
New Line.5573637:GS4052-2 phases=3 Bus1=237029396.1.2.3 Bus2=237029416.1.2.3 switch=y r1=0.001 x1=0.001 r0=0.001 x0=0.001 Length=0.001 units=km
New Line.DISCONNECT1:PSDC1111 phases=3 Bus1=177241527.1.2.3 Bus2=177241526.1.2.3 switch=y r1=0.001 x1=0.001 r0=0.001 x0=0.001 Length=0.001 units=km
New Line.5573637:GS4052-3 phases=3 Bus1=237029401.1.2.3 Bus2=237029432.1.2.3 switch=y r1=0.001 x1=0.001 r0=0.001 x0=0.001 Length=0.001 units=km
New Line.5573637:GS4052-4 phases=3 Bus1=237029402.1.2.3 Bus2=237029439.1.2.3 switch=y r1=0.001 x1=0.001 r0=0.001 x0=0.001 Length=0.001 units=km
New Line.5573638:VFI4053-1 phases=3 Bus1=237029922.1.2.3 Bus2=237029923.1.2.3 switch=y r1=0.001 x1=0.001 r0=0.001 x0=0.001 Length=0.001 units=km
New Line.5527681:GS2441-3 phases=3 Bus1=107693650.1.2.3 Bus2=107693627.1.2.3 switch=y r1=0.001 x1=0.001 r0=0.001 x0=0.001 Length=0.001 units=km
New Line.5527681:GS2441-1 phases=3 Bus1=107693620.1.2.3 Bus2=107693634.1.2.3 switch=y r1=0.001 x1=0.001 r0=0.001 x0=0.001 Length=0.001 units=km
New Line.4914253E:PS1658 phases=3 Bus1=241606915.1.2.3 Bus2=241606916.1.2.3 switch=y r1=0.001 x1=0.001 r0=0.001 x0=0.001 Length=0.001 units=km
New Line.5573174:RCSG954-3 phases=3 Bus1=177242108.1.2.3 Bus2=177242085.1.2.3 switch=y r1=0.001 x1=0.001 r0=0.001 x0=0.001 Length=0.001 units=km
New Line.5573174:RCSG954-2 phases=3 Bus1=177242079.1.2.3 Bus2=177242100.1.2.3 switch=y r1=0.001 x1=0.001 r0=0.001 x0=0.001 Length=0.001 units=km
New Line.5573174:RCSG954-1 phases=3 Bus1=177242078.1.2.3 Bus2=177242092.1.2.3 switch=y r1=0.001 x1=0.001 r0=0.001 x0=0.001 Length=0.001 units=km
New Line.5573175:P5573175-1 phases=2 Bus1=177242227.1.3 Bus2=177242228.1.3 switch=y r1=0.001 x1=0.001 r0=0.001 x0=0.001 Length=0.001 units=km
New Line.4620547E:RCS0010 phases=3 Bus1=102277900.1.2.3 Bus2=102277899.1.2.3 switch=y r1=0.001 x1=0.001 r0=0.001 x0=0.001 Length=0.001 units=km
New Line.4988788E:RCS1655 phases=3 Bus1=240355833.1.2.3 Bus2=240355791.1.2.3 switch=y r1=0.001 x1=0.001 r0=0.001 x0=0.001 Length=0.001 units=km enabled=false
New Line.4620550E:PS0339 phases=3 Bus1=104765024.1.2.3 Bus2=104765025.1.2.3 switch=y r1=0.001 x1=0.001 r0=0.001 x0=0.001 Length=0.001 units=km
New Line.4780448E:PDRAR1067-B phases=3 Bus1=173865105.1.2.3 Bus2=173865106.1.2.3 switch=y r1=0.001 x1=0.001 r0=0.001 x0=0.001 Length=0.001 units=km
New Line.4780448E:PDRAR1067-C phases=3 Bus1=173865118.1.2.3 Bus2=173865136.1.2.3 switch=y r1=0.001 x1=0.001 r0=0.001 x0=0.001 Length=0.001 units=km enabled=false
New Line.4780446E:PDRAR1066-B phases=3 Bus1=173864992.1.2.3 Bus2=173864993.1.2.3 switch=y r1=0.001 x1=0.001 r0=0.001 x0=0.001 Length=0.001 units=km
New Line.4780446E:PDRAR1066-C phases=3 Bus1=173865005.1.2.3 Bus2=173865023.1.2.3 switch=y r1=0.001 x1=0.001 r0=0.001 x0=0.001 Length=0.001 units=km enabled=false
New Line.2156902E:PDRAR1021-B phases=3 Bus1=186583719.1.2.3 Bus2=186583720.1.2.3 switch=y r1=0.001 x1=0.001 r0=0.001 x0=0.001 Length=0.001 units=km
New Line.2156902E:PDRAR1021-C phases=3 Bus1=186583732.1.2.3 Bus2=186583750.1.2.3 switch=y r1=0.001 x1=0.001 r0=0.001 x0=0.001 Length=0.001 units=km enabled=false
New Line.4780444E:PDRAR1065-B phases=3 Bus1=173864879.1.2.3 Bus2=173864880.1.2.3 switch=y r1=0.001 x1=0.001 r0=0.001 x0=0.001 Length=0.001 units=km
New Line.4780444E:PDRAR1065-C phases=3 Bus1=173864892.1.2.3 Bus2=173864910.1.2.3 switch=y r1=0.001 x1=0.001 r0=0.001 x0=0.001 Length=0.001 units=km enabled=false
New Line.2293205E:PS0343 phases=3 Bus1=18572815.1.2.3 Bus2=18572814.1.2.3 switch=y r1=0.001 x1=0.001 r0=0.001 x0=0.001 Length=0.001 units=km
New Line.4780448E:PDRAR1067-D phases=3 Bus1=173865111.1.2.3 Bus2=173865112.1.2.3 switch=y r1=0.001 x1=0.001 r0=0.001 x0=0.001 Length=0.001 units=km
New Line.4526654E:PDREG01195-D phases=3 Bus1=240561330.1.2.3 Bus2=240561331.1.2.3 switch=y r1=0.001 x1=0.001 r0=0.001 x0=0.001 Length=0.001 units=km
New Line.4526654E:PDREG01195-C phases=3 Bus1=240561355.1.2.3 Bus2=240561337.1.2.3 switch=y r1=0.001 x1=0.001 r0=0.001 x0=0.001 Length=0.001 units=km enabled=false
New Line.4526654E:PDREG01195-B phases=3 Bus1=240561324.1.2.3 Bus2=240561325.1.2.3 switch=y r1=0.001 x1=0.001 r0=0.001 x0=0.001 Length=0.001 units=km
New Line.5568858:VFI3164-1 phases=3 Bus1=218904180.1.2.3 Bus2=218904179.1.2.3 switch=y r1=0.001 x1=0.001 r0=0.001 x0=0.001 Length=0.001 units=km
New Line.5573638:VFI4053-2 phases=3 Bus1=237029928.1.2.3 Bus2=237029923.1.2.3 switch=y r1=0.001 x1=0.001 r0=0.001 x0=0.001 Length=0.001 units=km
New Line.4635538E:RCS0900 phases=3 Bus1=155168430.1.2.3 Bus2=155168429.1.2.3 switch=y r1=0.001 x1=0.001 r0=0.001 x0=0.001 Length=0.001 units=km enabled=false
New Line.4832592E:4832592E phases=3 Bus1=218903884.1.2.3 Bus2=218903885.1.2.3 switch=y r1=0.001 x1=0.001 r0=0.001 x0=0.001 Length=0.001 units=km
New Line.4750783E:4750783E phases=3 Bus1=18554142.1.2.3 Bus2=18554141.1.2.3 switch=y r1=0.001 x1=0.001 r0=0.001 x0=0.001 Length=0.001 units=km
New Line.4963099E:4963099E phases=3 Bus1=237029305.1.2.3 Bus2=237029306.1.2.3 switch=y r1=0.001 x1=0.001 r0=0.001 x0=0.001 Length=0.001 units=km
New Line.4613994E:4613994E phases=3 Bus1=18554367.1.2.3 Bus2=18554368.1.2.3 switch=y r1=0.001 x1=0.001 r0=0.001 x0=0.001 Length=0.001 units=km
New Line.4832261E:4832261E phases=3 Bus1=173546621.1.2.3 Bus2=173546622.1.2.3 switch=y r1=0.001 x1=0.001 r0=0.001 x0=0.001 Length=0.001 units=km
New Line.4743117E:4743117E phases=3 Bus1=161605455.1.2.3 Bus2=161605456.1.2.3 switch=y r1=0.001 x1=0.001 r0=0.001 x0=0.001 Length=0.001 units=km
New Line.4186204E:4186204E phases=3 Bus1=95017672.1.2.3 Bus2=95017673.1.2.3 switch=y r1=0.001 x1=0.001 r0=0.001 x0=0.001 Length=0.001 units=km
New Line.4620534E:4620534E phases=3 Bus1=107693543.1.2.3 Bus2=107693542.1.2.3 switch=y r1=0.001 x1=0.001 r0=0.001 x0=0.001 Length=0.001 units=km
New Line.4832268E:PH934 phases=3 Bus1=18554233.1.2.3 Bus2=18554234.1.2.3 switch=y r1=0.001 x1=0.001 r0=0.001 x0=0.001 Length=0.001 units=km
New Line.4832263E:FD2263 phases=3 Bus1=177242055.1.2.3 Bus2=177242056.1.2.3 switch=y r1=0.001 x1=0.001 r0=0.001 x0=0.001 Length=0.001 units=km
New Line.4914253E:4914253E phases=3 Bus1=206373062.1.2.3 Bus2=206373063.1.2.3 switch=y r1=0.001 x1=0.001 r0=0.001 x0=0.001 Length=0.001 units=km
New Line.4914254EP2:4914254E phases=3 Bus1=206373037.1.2.3 Bus2=206373036.1.2.3 switch=y r1=0.001 x1=0.001 r0=0.001 x0=0.001 Length=0.001 units=km
New Line.4346573E:137655922 phases=3 Bus1=137655924.1.2.3 Bus2=137655925.1.2.3 switch=y r1=0.001 x1=0.001 r0=0.001 x0=0.001 Length=0.001 units=km
New Line.4832591E:18571700 phases=3 Bus1=18571702.1.2.3 Bus2=18571703.1.2.3 switch=y r1=0.001 x1=0.001 r0=0.001 x0=0.001 Length=0.001 units=km
New Line.4652224E:140618336 phases=3 Bus1=140618338.1.2.3 Bus2=140618339.1.2.3 switch=y r1=0.001 x1=0.001 r0=0.001 x0=0.001 Length=0.001 units=km
New Line.4613990E:18572129 phases=3 Bus1=18572131.1.2.3 Bus2=18572132.1.2.3 switch=y r1=0.001 x1=0.001 r0=0.001 x0=0.001 Length=0.001 units=km
New Line.2343728E:18554203 phases=3 Bus1=18554205.1.2.3 Bus2=18554206.1.2.3 switch=y r1=0.001 x1=0.001 r0=0.001 x0=0.001 Length=0.001 units=km
New Line.4620535E:107693574 phases=3 Bus1=107693576.1.2.3 Bus2=107693577.1.2.3 switch=y r1=0.001 x1=0.001 r0=0.001 x0=0.001 Length=0.001 units=km
New Line.CAB_4346573E:4346573E phases=3 Bus1=137655941.1.2.3 Bus2=137655924.1.2.3 switch=y r1=0.001 x1=0.001 r0=0.001 x0=0.001 Length=0.001 units=km
New Line.CAB_4832591E:4832591E phases=3 Bus1=18571718.1.2.3 Bus2=18571702.1.2.3 switch=y r1=0.001 x1=0.001 r0=0.001 x0=0.001 Length=0.001 units=km
New Line.CAB_4652224E:4652224E phases=3 Bus1=157660144.1.2.3 Bus2=140618338.1.2.3 switch=y r1=0.001 x1=0.001 r0=0.001 x0=0.001 Length=0.001 units=km
New Line.CAB_4620535E:4620535E phases=3 Bus1=107693593.1.2.3 Bus2=107693576.1.2.3 switch=y r1=0.001 x1=0.001 r0=0.001 x0=0.001 Length=0.001 units=km
New Line.CAB_4613990E:4613990E phases=3 Bus1=18572149.1.2.3 Bus2=18572131.1.2.3 switch=y r1=0.001 x1=0.001 r0=0.001 x0=0.001 Length=0.001 units=km
New Line.CAB_2343728E:2343728E phases=3 Bus1=18554221.1.2.3 Bus2=18554205.1.2.3 switch=y r1=0.001 x1=0.001 r0=0.001 x0=0.001 Length=0.001 units=km
New Line.4735571E:4735571E phases=3 Bus1=155572157.1.2.3 Bus2=-777777155572157.1.2.3 switch=y r1=0.001 x1=0.001 r0=0.001 x0=0.001 Length=0.001 units=km enabled=false
New Line.5527681:GS2441-2 phases=3 Bus1=107693621.1.2.3 Bus2=107693642.1.2.3 switch=y r1=0.001 x1=0.001 r0=0.001 x0=0.001 Length=0.001 units=km enabled=false

! Loads
New Load.4832591E_0 Bus1=-99999918571703.3.0 phases=1 kV=0.069282 kW=0 kvar=0 model=1
New Load.4832591E_1 Bus1=-99999918571703.1.0 phases=1 kV=0.069282 kW=0 kvar=0 model=1
New Load.5573639_0 Bus1=-999999237029573.1.0 phases=1 kV=0.159926 kW=0 kvar=0 model=1
New Load.5573639_1 Bus1=-999999237029573.2.0 phases=1 kV=0.159926 kW=0 kvar=0 model=1
New Load.5573639_2 Bus1=-999999237029573.3.0 phases=1 kV=0.159926 kW=0 kvar=0 model=1
New Load.5633625_0 Bus1=-999999161605507.1.0 phases=1 kV=0.159926 kW=0 kvar=0 model=1
New Load.5633625_1 Bus1=-999999161605507.2.0 phases=1 kV=0.159926 kW=0 kvar=0 model=1
New Load.5633625_2 Bus1=-999999161605507.3.0 phases=1 kV=0.159926 kW=0 kvar=0 model=1
New Load.4613990E_0 Bus1=-99999918572132.2.0 phases=1 kV=0.069282 kW=0 kvar=0 model=1
New Load.4613990E_1 Bus1=-99999918572132.3.0 phases=1 kV=0.069282 kW=0 kvar=0 model=1
New Load.2343728E_0 Bus1=-99999918554206.1.0 phases=1 kV=0.159926 kW=0 kvar=0 model=1
New Load.2343728E_1 Bus1=-99999918554206.2.0 phases=1 kV=0.159926 kW=0 kvar=0 model=1
New Load.2343728E_2 Bus1=-99999918554206.3.0 phases=1 kV=0.159926 kW=0 kvar=0 model=1
New Load.5578527_0 Bus1=-999999173546598.1.0 phases=1 kV=0.159926 kW=0 kvar=0 model=1
New Load.5578527_1 Bus1=-999999173546598.2.0 phases=1 kV=0.159926 kW=0 kvar=0 model=1
New Load.5578527_2 Bus1=-999999173546598.3.0 phases=1 kV=0.159926 kW=0 kvar=0 model=1
New Load.4346573E_0 Bus1=-999999137655925.1.0 phases=1 kV=0.159926 kW=0 kvar=0 model=1
New Load.4346573E_1 Bus1=-999999137655925.2.0 phases=1 kV=0.159926 kW=0 kvar=0 model=1
New Load.4346573E_2 Bus1=-999999137655925.3.0 phases=1 kV=0.159926 kW=0 kvar=0 model=1
New Load.5424791_0 Bus1=-99999995017707.1.0 phases=1 kV=0.159926 kW=0 kvar=0 model=1
New Load.5424791_1 Bus1=-99999995017707.2.0 phases=1 kV=0.159926 kW=0 kvar=0 model=1
New Load.5424791_2 Bus1=-99999995017707.3.0 phases=1 kV=0.159926 kW=0 kvar=0 model=1
New Load.4652224E_0 Bus1=-999999140618339.2.0 phases=1 kV=0.069282 kW=0 kvar=0 model=1
New Load.4652224E_1 Bus1=-999999140618339.3.0 phases=1 kV=0.069282 kW=0 kvar=0 model=1
New Load.5050432_0 Bus1=-999999199916975.1.0 phases=1 kV=0.159926 kW=0 kvar=0 model=1
New Load.5050432_1 Bus1=-999999199916975.2.0 phases=1 kV=0.159926 kW=0 kvar=0 model=1
New Load.5050432_2 Bus1=-999999199916975.3.0 phases=1 kV=0.159926 kW=0 kvar=0 model=1
New Load.5573176_0 Bus1=-999999177242302.1.0 phases=1 kV=0.159926 kW=0 kvar=0 model=1
New Load.5573176_1 Bus1=-999999177242302.2.0 phases=1 kV=0.159926 kW=0 kvar=0 model=1
New Load.5573176_2 Bus1=-999999177242302.3.0 phases=1 kV=0.159926 kW=0 kvar=0 model=1
New Load.5573175_0 Bus1=-999999177242228.1.0 phases=1 kV=0.069282 kW=0 kvar=0 model=1
New Load.5573175_1 Bus1=-999999177242228.2.0 phases=1 kV=0.069282 kW=0 kvar=0 model=1
New Load.5568859_0 Bus1=-999999218904263.1.0 phases=1 kV=0.159926 kW=0 kvar=0 model=1
New Load.5568859_1 Bus1=-999999218904263.2.0 phases=1 kV=0.159926 kW=0 kvar=0 model=1
New Load.5568859_2 Bus1=-999999218904263.3.0 phases=1 kV=0.159926 kW=0 kvar=0 model=1
New Load.4620535E_0 Bus1=-999999107693577.3.0 phases=1 kV=0.069282 kW=0 kvar=0 model=1
New Load.4620535E_1 Bus1=-999999107693577.1.0 phases=1 kV=0.069282 kW=0 kvar=0 model=1

! Transformers
New Transformer.293588A5FAE6EE34E0637F61810A7CE3_0_0 phases=1 windings=2 xhl=0.5 %R=0.353554 %imag=1e-06 %noloadloss=0
~ wdg=1 bus=18571703.3.0 kV=19.0526 kVA=12.5 conn=wye
~ wdg=2 bus=-99999918571703.3.0 kV=0.0182442 kVA=12.5 conn=wye
New Transformer.293588A5FAE6EE34E0637F61810A7CE3_0_1 phases=1 windings=2 xhl=0.5 %R=0.353554 %imag=1e-06 %noloadloss=0
~ wdg=1 bus=18571703.1.0 kV=19.0526 kVA=12.5 conn=wye
~ wdg=2 bus=-99999918571703.1.0 kV=0.0182442 kVA=12.5 conn=wye
New Transformer.293588A54526EE34E0637F61810A7CE3_1_0 phases=1 windings=2 xhl=0.5 %R=0.353554 %imag=1e-06 %noloadloss=0
~ wdg=1 bus=140618339.2.0 kV=19.0526 kVA=12.5 conn=wye
~ wdg=2 bus=-999999140618339.2.0 kV=0.0182442 kVA=12.5 conn=wye
New Transformer.293588A54526EE34E0637F61810A7CE3_1_1 phases=1 windings=2 xhl=0.5 %R=0.353554 %imag=1e-06 %noloadloss=0
~ wdg=1 bus=140618339.3.0 kV=19.0526 kVA=12.5 conn=wye
~ wdg=2 bus=-999999140618339.3.0 kV=0.0182442 kVA=12.5 conn=wye
New Transformer.293588B4BCD5EE34E0637F61810A7CE3_2_0 phases=1 windings=2 xhl=0.5 %R=0.353554 %imag=1e-06 %noloadloss=0
~ wdg=1 bus=218904263.1.2 kV=33 kVA=833.333 conn=delta
~ wdg=2 bus=-999999218904263.1.0 kV=0.0421137 kVA=833.333 conn=wye
New Transformer.293588B4BCD5EE34E0637F61810A7CE3_2_1 phases=1 windings=2 xhl=0.5 %R=0.353554 %imag=1e-06 %noloadloss=0
~ wdg=1 bus=218904263.2.3 kV=33 kVA=833.333 conn=delta
~ wdg=2 bus=-999999218904263.2.0 kV=0.0421137 kVA=833.333 conn=wye
New Transformer.293588B4BCD5EE34E0637F61810A7CE3_2_2 phases=1 windings=2 xhl=0.5 %R=0.353554 %imag=1e-06 %noloadloss=0
~ wdg=1 bus=218904263.3.1 kV=33 kVA=833.333 conn=delta
~ wdg=2 bus=-999999218904263.3.0 kV=0.0421137 kVA=833.333 conn=wye
New Transformer.293588B4626EEE34E0637F61810A7CE3_3_0 phases=1 windings=2 xhl=0.5 %R=0.353554 %imag=1e-06 %noloadloss=0
~ wdg=1 bus=173546598.1.2 kV=33 kVA=250 conn=delta
~ wdg=2 bus=-999999173546598.1.0 kV=0.0421137 kVA=250 conn=wye
New Transformer.293588B4626EEE34E0637F61810A7CE3_3_1 phases=1 windings=2 xhl=0.5 %R=0.353554 %imag=1e-06 %noloadloss=0
~ wdg=1 bus=173546598.2.3 kV=33 kVA=250 conn=delta
~ wdg=2 bus=-999999173546598.2.0 kV=0.0421137 kVA=250 conn=wye
New Transformer.293588B4626EEE34E0637F61810A7CE3_3_2 phases=1 windings=2 xhl=0.5 %R=0.353554 %imag=1e-06 %noloadloss=0
~ wdg=1 bus=173546598.3.1 kV=33 kVA=250 conn=delta
~ wdg=2 bus=-999999173546598.3.0 kV=0.0421137 kVA=250 conn=wye
New Transformer.293588B43F2BEE34E0637F61810A7CE3_4_0 phases=1 windings=2 xhl=0.5 %R=0.353554 %imag=1e-06 %noloadloss=0
~ wdg=1 bus=161605507.1.2 kV=33 kVA=333.333 conn=delta
~ wdg=2 bus=-999999161605507.1.0 kV=0.0421137 kVA=333.333 conn=wye
New Transformer.293588B43F2BEE34E0637F61810A7CE3_4_1 phases=1 windings=2 xhl=0.5 %R=0.353554 %imag=1e-06 %noloadloss=0
~ wdg=1 bus=161605507.2.3 kV=33 kVA=333.333 conn=delta
~ wdg=2 bus=-999999161605507.2.0 kV=0.0421137 kVA=333.333 conn=wye
New Transformer.293588B43F2BEE34E0637F61810A7CE3_4_2 phases=1 windings=2 xhl=0.5 %R=0.353554 %imag=1e-06 %noloadloss=0
~ wdg=1 bus=161605507.3.1 kV=33 kVA=333.333 conn=delta
~ wdg=2 bus=-999999161605507.3.0 kV=0.0421137 kVA=333.333 conn=wye
New Transformer.293588B38E90EE34E0637F61810A7CE3_5_0 phases=1 windings=2 xhl=0.5 %R=0.353554 %imag=1e-06 %noloadloss=0
~ wdg=1 bus=95017707.1.2 kV=33 kVA=250 conn=delta
~ wdg=2 bus=-99999995017707.1.0 kV=0.0421137 kVA=250 conn=wye
New Transformer.293588B38E90EE34E0637F61810A7CE3_5_1 phases=1 windings=2 xhl=0.5 %R=0.353554 %imag=1e-06 %noloadloss=0
~ wdg=1 bus=95017707.2.3 kV=33 kVA=250 conn=delta
~ wdg=2 bus=-99999995017707.2.0 kV=0.0421137 kVA=250 conn=wye
New Transformer.293588B38E90EE34E0637F61810A7CE3_5_2 phases=1 windings=2 xhl=0.5 %R=0.353554 %imag=1e-06 %noloadloss=0
~ wdg=1 bus=95017707.3.1 kV=33 kVA=250 conn=delta
~ wdg=2 bus=-99999995017707.3.0 kV=0.0421137 kVA=250 conn=wye
New Transformer.293588B497EAEE34E0637F61810A7CE3_6_0 phases=1 windings=2 xhl=0.5 %R=0.353554 %imag=1e-06 %noloadloss=0
~ wdg=1 bus=199916975.1.2 kV=33 kVA=500 conn=delta
~ wdg=2 bus=-999999199916975.1.0 kV=0.0421137 kVA=500 conn=wye
New Transformer.293588B497EAEE34E0637F61810A7CE3_6_1 phases=1 windings=2 xhl=0.5 %R=0.353554 %imag=1e-06 %noloadloss=0
~ wdg=1 bus=199916975.2.3 kV=33 kVA=500 conn=delta
~ wdg=2 bus=-999999199916975.2.0 kV=0.0421137 kVA=500 conn=wye
New Transformer.293588B497EAEE34E0637F61810A7CE3_6_2 phases=1 windings=2 xhl=0.5 %R=0.353554 %imag=1e-06 %noloadloss=0
~ wdg=1 bus=199916975.3.1 kV=33 kVA=500 conn=delta
~ wdg=2 bus=-999999199916975.3.0 kV=0.0421137 kVA=500 conn=wye
New Transformer.293588A8319EEE34E0637F61810A7CE3_7_0 phases=1 windings=2 xhl=0.5 %R=0.353554 %imag=1e-06 %noloadloss=0
~ wdg=1 bus=107693577.3.0 kV=19.0526 kVA=12.5 conn=wye
~ wdg=2 bus=-999999107693577.3.0 kV=0.0182442 kVA=12.5 conn=wye
New Transformer.293588A8319EEE34E0637F61810A7CE3_7_1 phases=1 windings=2 xhl=0.5 %R=0.353554 %imag=1e-06 %noloadloss=0
~ wdg=1 bus=107693577.1.0 kV=19.0526 kVA=12.5 conn=wye
~ wdg=2 bus=-999999107693577.1.0 kV=0.0182442 kVA=12.5 conn=wye
New Transformer.293588B45F31EE34E0637F61810A7CE3_8_0 phases=1 windings=2 xhl=0.5 %R=0.353554 %imag=1e-06 %noloadloss=0
~ wdg=1 bus=177242302.1.2 kV=33 kVA=833.333 conn=delta
~ wdg=2 bus=-999999177242302.1.0 kV=0.0421137 kVA=833.333 conn=wye
New Transformer.293588B45F31EE34E0637F61810A7CE3_8_1 phases=1 windings=2 xhl=0.5 %R=0.353554 %imag=1e-06 %noloadloss=0
~ wdg=1 bus=177242302.2.3 kV=33 kVA=833.333 conn=delta
~ wdg=2 bus=-999999177242302.2.0 kV=0.0421137 kVA=833.333 conn=wye
New Transformer.293588B45F31EE34E0637F61810A7CE3_8_2 phases=1 windings=2 xhl=0.5 %R=0.353554 %imag=1e-06 %noloadloss=0
~ wdg=1 bus=177242302.3.1 kV=33 kVA=833.333 conn=delta
~ wdg=2 bus=-999999177242302.3.0 kV=0.0421137 kVA=833.333 conn=wye
New Transformer.293588A5FAE7EE34E0637F61810A7CE3_9_0 phases=1 windings=2 xhl=0.5 %R=0.353554 %imag=1e-06 %noloadloss=0
~ wdg=1 bus=18572132.2.0 kV=19.0526 kVA=12.5 conn=wye
~ wdg=2 bus=-99999918572132.2.0 kV=0.0182442 kVA=12.5 conn=wye
New Transformer.293588A5FAE7EE34E0637F61810A7CE3_9_1 phases=1 windings=2 xhl=0.5 %R=0.353554 %imag=1e-06 %noloadloss=0
~ wdg=1 bus=18572132.3.0 kV=19.0526 kVA=12.5 conn=wye
~ wdg=2 bus=-99999918572132.3.0 kV=0.0182442 kVA=12.5 conn=wye
New Transformer.293588B4D348EE34E0637F61810A7CE3_10_0 phases=1 windings=2 xhl=0.5 %R=0.353554 %imag=1e-06 %noloadloss=0
~ wdg=1 bus=237029573.1.2 kV=33 kVA=833.333 conn=delta
~ wdg=2 bus=-999999237029573.1.0 kV=0.0421137 kVA=833.333 conn=wye
New Transformer.293588B4D348EE34E0637F61810A7CE3_10_1 phases=1 windings=2 xhl=0.5 %R=0.353554 %imag=1e-06 %noloadloss=0
~ wdg=1 bus=237029573.2.3 kV=33 kVA=833.333 conn=delta
~ wdg=2 bus=-999999237029573.2.0 kV=0.0421137 kVA=833.333 conn=wye
New Transformer.293588B4D348EE34E0637F61810A7CE3_10_2 phases=1 windings=2 xhl=0.5 %R=0.353554 %imag=1e-06 %noloadloss=0
~ wdg=1 bus=237029573.3.1 kV=33 kVA=833.333 conn=delta
~ wdg=2 bus=-999999237029573.3.0 kV=0.0421137 kVA=833.333 conn=wye
New Transformer.293588A793E2EE34E0637F61810A7CE3_11_0 phases=1 windings=2 xhl=0.5 %R=0.353554 %imag=1e-06 %noloadloss=0
~ wdg=1 bus=137655925.1.2 kV=33 kVA=50 conn=delta
~ wdg=2 bus=-999999137655925.1.0 kV=0.0421137 kVA=50 conn=wye
New Transformer.293588A793E2EE34E0637F61810A7CE3_11_1 phases=1 windings=2 xhl=0.5 %R=0.353554 %imag=1e-06 %noloadloss=0
~ wdg=1 bus=137655925.2.3 kV=33 kVA=50 conn=delta
~ wdg=2 bus=-999999137655925.2.0 kV=0.0421137 kVA=50 conn=wye
New Transformer.293588A793E2EE34E0637F61810A7CE3_11_2 phases=1 windings=2 xhl=0.5 %R=0.353554 %imag=1e-06 %noloadloss=0
~ wdg=1 bus=137655925.3.1 kV=33 kVA=50 conn=delta
~ wdg=2 bus=-999999137655925.3.0 kV=0.0421137 kVA=50 conn=wye
New Transformer.293588B45F30EE34E0637F61810A7CE3_12_0 phases=1 windings=2 xhl=0.5 %R=0.353554 %imag=1e-06 %noloadloss=0
~ wdg=1 bus=177242228.1.0 kV=19.0526 kVA=12.5 conn=wye
~ wdg=2 bus=-999999177242228.1.0 kV=0.0182442 kVA=12.5 conn=wye
New Transformer.293588B45F30EE34E0637F61810A7CE3_12_1 phases=1 windings=2 xhl=0.5 %R=0.353554 %imag=1e-06 %noloadloss=0
~ wdg=1 bus=177242228.2.0 kV=19.0526 kVA=12.5 conn=wye
~ wdg=2 bus=-999999177242228.2.0 kV=0.0182442 kVA=12.5 conn=wye
New Transformer.293588A5F95FEE34E0637F61810A7CE3_13_0 phases=1 windings=2 xhl=0.5 %R=0.353554 %imag=1e-06 %noloadloss=0
~ wdg=1 bus=18554206.1.2 kV=33 kVA=100 conn=delta
~ wdg=2 bus=-99999918554206.1.0 kV=0.0421137 kVA=100 conn=wye
New Transformer.293588A5F95FEE34E0637F61810A7CE3_13_1 phases=1 windings=2 xhl=0.5 %R=0.353554 %imag=1e-06 %noloadloss=0
~ wdg=1 bus=18554206.2.3 kV=33 kVA=100 conn=delta
~ wdg=2 bus=-99999918554206.2.0 kV=0.0421137 kVA=100 conn=wye
New Transformer.293588A5F95FEE34E0637F61810A7CE3_13_2 phases=1 windings=2 xhl=0.5 %R=0.353554 %imag=1e-06 %noloadloss=0
~ wdg=1 bus=18554206.3.1 kV=33 kVA=100 conn=delta
~ wdg=2 bus=-99999918554206.3.0 kV=0.0421137 kVA=100 conn=wye
New Transformer.4526654E:REG01195_14_0 phases=1 windings=2 xhl=0.5 %R=0.353554 %imag=1e-06 %noloadloss=0
~ wdg=1 bus=240561361.1.0 kV=5.01716 kVA=333.333 conn=wye
~ wdg=2 bus=240561349.1.0 kV=19.0526 kVA=333.333 conn=wye
New Transformer.4526654E:REG01195_14_1 phases=1 windings=2 xhl=0.5 %R=0.353554 %imag=1e-06 %noloadloss=0
~ wdg=1 bus=240561361.2.0 kV=5.01716 kVA=333.333 conn=wye
~ wdg=2 bus=240561349.2.0 kV=19.0526 kVA=333.333 conn=wye
New Transformer.4526654E:REG01195_14_2 phases=1 windings=2 xhl=0.5 %R=0.353554 %imag=1e-06 %noloadloss=0
~ wdg=1 bus=240561361.3.0 kV=5.01716 kVA=333.333 conn=wye
~ wdg=2 bus=240561349.3.0 kV=19.0526 kVA=333.333 conn=wye

Set voltagebases=[33.0 0.277 0.12]
CalcVoltageBases
Solve
