! OpenDSS script generated from multiconductor network
Clear

New Circuit.mc_network basekv=33.0 pu=1.000000 angle=0.00 frequency=60.0 phases=3 Mvasc3=1.08895e+06 Mvasc1=362982
~ bus1=-8888882163152.1.2.3

! Line codes
New LineCode.336_ACSR_3PH_33KV_3 nphases=3 units=km Rmatrix=[ 0.046091 | 0 0.046091 | 0 0 0.046091 ] Xmatrix=[ 0.103214 | 0 0.103214 | 0 0 0.103214 ] Cmatrix=[ 0 | 0 0 | 0 0 0 ]
New LineCode.4/0_ACSR_3PH_33KV_3 nphases=3 units=km Rmatrix=[ 0.005255 | 0 0.005255 | 0 0 0.005255 ] Xmatrix=[ 0.007427 | 0 0.007427 | 0 0 0.007427 ] Cmatrix=[ 0 | 0 0 | 0 0 0 ]
New LineCode.1500_CLP_3PH_33KV_3 nphases=3 units=km Rmatrix=[ 0.018542 | 0 0.018542 | 0 0 0.018542 ] Xmatrix=[ 0.033644 | 0 0.033644 | 0 0 0.033644 ] Cmatrix=[ 0 | 0 0 | 0 0 0 ]
New LineCode.4/0_CLP_3PH_33KV_3 nphases=3 units=km Rmatrix=[ 0.215096 | 0 0.215096 | 0 0 0.215096 ] Xmatrix=[ 0.107003 | 0 0.107003 | 0 0 0.107003 ] Cmatrix=[ 0 | 0 0 | 0 0 0 ]
New LineCode.4/0_JCN_3PH_33KV_3 nphases=3 units=km Rmatrix=[ 0.068246 | 0 0.068246 | 0 0 0.068246 ] Xmatrix=[ 0.03395 | 0 0.03395 | 0 0 0.03395 ] Cmatrix=[ 0 | 0 0 | 0 0 0 ]
New LineCode.350_AL_3PH_33KV_3 nphases=3 units=km Rmatrix=[ 1e-05 | 0 1e-05 | 0 0 1e-05 ] Xmatrix=[ 1e-05 | 0 1e-05 | 0 0 1e-05 ] Cmatrix=[ 0 | 0 0 | 0 0 0 ]
New LineCode.4/0_CU_3PH_33KV_3 nphases=3 units=km Rmatrix=[ 0.000861 | 0 0.000861 | 0 0 0.000861 ] Xmatrix=[ 0.002026 | 0 0.002026 | 0 0 0.002026 ] Cmatrix=[ 0 | 0 0 | 0 0 0 ]
New LineCode.2_ACSR_2PH_33KV_2 nphases=2 units=km Rmatrix=[ 0.124581 | 0 0.124581 ] Xmatrix=[ 0.066976 | 0 0.066976 ] Cmatrix=[ 0 | 0 0 ]

! Lines
New Line.ND232508945$ND232508994 phases=3 Bus1=232508945.1.2.3 Bus2=-777777232508945.1.2.3 LineCode=336_ACSR_3PH_33KV_3 Length=0.124383 units=km
New Line.09619$PS0069 phases=3 Bus1=-8888882163152.1.2.3 Bus2=37080147.1.2.3 LineCode=4/0_ACSR_3PH_33KV_3 Length=0.130081 units=km
New Line.ND98381371$PS0772 phases=3 Bus1=73247715.1.2.3 Bus2=-77777773247715.1.2.3 LineCode=4/0_ACSR_3PH_33KV_3 Length=0.201525 units=km
New Line.RCS1060$237141111 phases=3 Bus1=237141128.1.2.3 Bus2=-777777237141128.1.2.3 LineCode=336_ACSR_3PH_33KV_3 Length=0.24685 units=km
New Line.ND205257879$4838454E phases=3 Bus1=205258123.1.2.3 Bus2=205257815.1.2.3 LineCode=336_ACSR_3PH_33KV_3 Length=0.167974 units=km
New Line.PS0069$ND188717260 phases=3 Bus1=37080146.1.2.3 Bus2=188717260.1.2.3 LineCode=4/0_ACSR_3PH_33KV_3 Length=0.206371 units=km
New Line.4838510E$ND188717260 phases=3 Bus1=188717260.1.2.3 Bus2=188717215.1.2.3 LineCode=4/0_ACSR_3PH_33KV_3 Length=2.77672 units=km
New Line.4626894E$4838510E phases=3 Bus1=188717214.1.2.3 Bus2=109229232.1.2.3 LineCode=4/0_ACSR_3PH_33KV_3 Length=0.206447 units=km
New Line.ND98637011$4626894E phases=3 Bus1=109229232.1.2.3 Bus2=98637011.1.2.3 LineCode=4/0_ACSR_3PH_33KV_3 Length=0.399655 units=km
New Line.RCS0955$PS0936 phases=3 Bus1=205258153.1.2.3 Bus2=188343762.1.2.3 LineCode=4/0_ACSR_3PH_33KV_3 Length=5.07173 units=km
New Line.ND200918537$RCS0955 phases=3 Bus1=188343761.1.2.3 Bus2=200918537.1.2.3 LineCode=4/0_ACSR_3PH_33KV_3 Length=2.54749 units=km
New Line.4872229E$4872230E phases=3 Bus1=205257919.1.2.3 Bus2=205257934.1.2.3 LineCode=1500_CLP_3PH_33KV_3 Length=0.290332 units=km
New Line.4872230E$ND232509116 phases=3 Bus1=205257933.1.2.3 Bus2=232509116.1.2.3 LineCode=336_ACSR_3PH_33KV_3 Length=0.434106 units=km
New Line.ND37080342$4248916E phases=3 Bus1=37080342.1.2.3 Bus2=37079961.1.2.3 LineCode=4/0_CLP_3PH_33KV_3 Length=0.563481 units=km
New Line.FD60234$PS0935 phases=3 Bus1=205257969.1.2.3 Bus2=205257995.1.2.3 LineCode=336_ACSR_3PH_33KV_3 Length=0.006582 units=km
New Line.FD60246$ND232509042 phases=3 Bus1=232509068.1.2.3 Bus2=232509024.1.2.3 LineCode=4/0_JCN_3PH_33KV_3 Length=0.2022 units=km
New Line.FD60234$ND232509017 phases=3 Bus1=205257996.1.2.3 Bus2=232508999.1.2.3 LineCode=4/0_JCN_3PH_33KV_3 Length=0.211618 units=km
New Line.ND37080342$1997742EPH1 phases=3 Bus1=37080342.1.2.3 Bus2=37079948.1.2.3 LineCode=350_AL_3PH_33KV_3 Length=0.118917 units=km
New Line.4838454E$ND205257899 phases=3 Bus1=205257899.1.2.3 Bus2=205258124.1.2.3 LineCode=336_ACSR_3PH_33KV_3 Length=0.00501 units=km
New Line.ND205257881$4872229E phases=3 Bus1=205257833.1.2.3 Bus2=205257918.1.2.3 LineCode=336_ACSR_3PH_33KV_3 Length=0.319409 units=km
New Line.ND232509116$ND232508945 phases=3 Bus1=232509116.1.2.3 Bus2=232508945.1.2.3 LineCode=336_ACSR_3PH_33KV_3 Length=0.220572 units=km
New Line.PS1035$ND232509116 phases=3 Bus1=232509116.1.2.3 Bus2=232509049.1.2.3 LineCode=336_ACSR_3PH_33KV_3 Length=0.045855 units=km
New Line.ND232508945$PS0935 phases=3 Bus1=232508945.1.2.3 Bus2=205257970.1.2.3 LineCode=336_ACSR_3PH_33KV_3 Length=0.053199 units=km
New Line.ND37080342$4629919E phases=3 Bus1=99068934.1.2.3 Bus2=37080342.1.2.3 LineCode=4/0_CLP_3PH_33KV_3 Length=1.73949 units=km
New Line.PS1035$FD60246 phases=3 Bus1=232509048.1.2.3 Bus2=232509067.1.2.3 LineCode=336_ACSR_3PH_33KV_3 Length=0.016375 units=km
New Line.PS0045$ND99068999 phases=3 Bus1=37080177.1.2.3 Bus2=99068999.1.2.3 LineCode=4/0_CU_3PH_33KV_3 Length=0.102766 units=km
New Line.PS0796$ND99068999 phases=3 Bus1=99068999.1.2.3 Bus2=99068954.1.2.3 LineCode=4/0_ACSR_3PH_33KV_3 Length=0.015469 units=km
New Line.1997742EPH1$RCS1060 phases=3 Bus1=37079947.1.2.3 Bus2=237141127.1.2.3 LineCode=336_ACSR_3PH_33KV_3 Length=1.67029 units=km
New Line.ND205257899$ND98637011 phases=3 Bus1=98637011.1.2.3 Bus2=205257899.1.2.3 LineCode=4/0_ACSR_3PH_33KV_3 Length=7.14835 units=km
New Line.ND98637011$4418867E phases=2 Bus1=98637011.1.3 Bus2=98636998.1.3 LineCode=2_ACSR_2PH_33KV_2 Length=0.024458 units=km
New Line.PS0936$ND205257899 phases=3 Bus1=205257899.1.2.3 Bus2=205258154.1.2.3 LineCode=4/0_ACSR_3PH_33KV_3 Length=0.152478 units=km
New Line.RCS5457$ND200918537 phases=3 Bus1=200918537.1.2.3 Bus2=200918506.1.2.3 LineCode=4/0_ACSR_3PH_33KV_3 Length=0.05526 units=km
New Line.PS0045$ND200918537 phases=3 Bus1=200918537.1.2.3 Bus2=37080178.1.2.3 LineCode=4/0_ACSR_3PH_33KV_3 Length=0.179755 units=km
New Line.4629919E$PS0796 phases=3 Bus1=99068955.1.2.3 Bus2=99068933.1.2.3 LineCode=4/0_CU_3PH_33KV_3 Length=0.003788 units=km
New Line.4248916E$PS0772 phases=3 Bus1=37079960.1.2.3 Bus2=73247716.1.2.3 LineCode=4/0_ACSR_3PH_33KV_3 Length=0.004807 units=km

! Switches
New Line.4872209E:RAR0937 phases=3 Bus1=205257797.1.2.3 Bus2=205257798.1.2.3 switch=y r1=0.001 x1=0.001 r0=0.001 x0=0.001 Length=0.001 units=km
New Line.4838510E:4838510E phases=3 Bus1=188717215.1.2.3 Bus2=188717214.1.2.3 switch=y r1=0.001 x1=0.001 r0=0.001 x0=0.001 Length=0.001 units=km
New Line.4838454E:4838454E phases=3 Bus1=205258124.1.2.3 Bus2=205258123.1.2.3 switch=y r1=0.001 x1=0.001 r0=0.001 x0=0.001 Length=0.001 units=km
New Line.4629919E:PS0796 phases=3 Bus1=99068954.1.2.3 Bus2=99068955.1.2.3 switch=y r1=0.001 x1=0.001 r0=0.001 x0=0.001 Length=0.001 units=km
New Line.PDRAR0937-B$RAR0937 phases=3 Bus1=205257804.1.2.3 Bus2=205257797.1.2.3 switch=y r1=0.001 x1=0.001 r0=0.001 x0=0.001 Length=0.001 units=km
New Line.205257859$PDRAR0937-C phases=3 Bus1=205257834.1.2.3 Bus2=205257833.1.2.3 switch=y r1=0.001 x1=0.001 r0=0.001 x0=0.001 Length=0.001 units=km
New Line.205257859$PDRAR0937-D phases=3 Bus1=205257833.1.2.3 Bus2=205257809.1.2.3 switch=y r1=0.001 x1=0.001 r0=0.001 x0=0.001 Length=0.001 units=km
New Line.4390734E:PS0936 phases=3 Bus1=205258154.1.2.3 Bus2=205258153.1.2.3 switch=y r1=0.001 x1=0.001 r0=0.001 x0=0.001 Length=0.001 units=km
New Line.KENNEDY$HULSEY_RCS5457$RCS5457 phases=3 Bus1=200918498.1.2.3 Bus2=-777777200918498.1.2.3 switch=y r1=0.001 x1=0.001 r0=0.001 x0=0.001 Length=0.001 units=km
New Line.4872229E:4872229E phases=3 Bus1=205257918.1.2.3 Bus2=205257919.1.2.3 switch=y r1=0.001 x1=0.001 r0=0.001 x0=0.001 Length=0.001 units=km
New Line.4872230E:4872230E phases=3 Bus1=205257934.1.2.3 Bus2=205257933.1.2.3 switch=y r1=0.001 x1=0.001 r0=0.001 x0=0.001 Length=0.001 units=km
New Line.4872239E:FD60246 phases=3 Bus1=232509067.1.2.3 Bus2=232509068.1.2.3 switch=y r1=0.001 x1=0.001 r0=0.001 x0=0.001 Length=0.001 units=km
New Line.1997742E:1997742EPH1 phases=3 Bus1=37079948.1.2.3 Bus2=37079947.1.2.3 switch=y r1=0.001 x1=0.001 r0=0.001 x0=0.001 Length=0.001 units=km
New Line.4248916E:4248916E phases=3 Bus1=37079961.1.2.3 Bus2=37079960.1.2.3 switch=y r1=0.001 x1=0.001 r0=0.001 x0=0.001 Length=0.001 units=km
New Line.4872249E:FD60234 phases=3 Bus1=205257995.1.2.3 Bus2=205257996.1.2.3 switch=y r1=0.001 x1=0.001 r0=0.001 x0=0.001 Length=0.001 units=km
New Line.1744518E:RCS5457 phases=3 Bus1=200918506.1.2.3 Bus2=200918498.1.2.3 switch=y r1=0.001 x1=0.001 r0=0.001 x0=0.001 Length=0.001 units=km enabled=false
New Line.1615619E:PS0045 phases=3 Bus1=37080178.1.2.3 Bus2=37080177.1.2.3 switch=y r1=0.001 x1=0.001 r0=0.001 x0=0.001 Length=0.001 units=km
New Line.4872209E:PDRAR0937-D phases=3 Bus1=205257809.1.2.3 Bus2=205257810.1.2.3 switch=y r1=0.001 x1=0.001 r0=0.001 x0=0.001 Length=0.001 units=km
New Line.CAB_4418867E:4418867E phases=3 Bus1=98636998.1.2.3 Bus2=98636981.1.2.3 switch=y r1=0.001 x1=0.001 r0=0.001 x0=0.001 Length=0.001 units=km
New Line.4626894E:109229213 phases=3 Bus1=109229215.1.2.3 Bus2=109229216.1.2.3 switch=y r1=0.001 x1=0.001 r0=0.001 x0=0.001 Length=0.001 units=km
New Line.4418867E:98636979 phases=2 Bus1=98636981.1.3 Bus2=98636982.1.3 switch=y r1=0.001 x1=0.001 r0=0.001 x0=0.001 Length=0.001 units=km
New Line.4872239E:PS1035 phases=3 Bus1=232509049.1.2.3 Bus2=232509048.1.2.3 switch=y r1=0.001 x1=0.001 r0=0.001 x0=0.001 Length=0.001 units=km
New Line.4872249E:PS0935 phases=3 Bus1=205257970.1.2.3 Bus2=205257969.1.2.3 switch=y r1=0.001 x1=0.001 r0=0.001 x0=0.001 Length=0.001 units=km
New Line.4629919E:4629919E phases=3 Bus1=99068933.1.2.3 Bus2=99068934.1.2.3 switch=y r1=0.001 x1=0.001 r0=0.001 x0=0.001 Length=0.001 units=km
New Line.205257855$PDRAR0937-B phases=3 Bus1=205257815.1.2.3 Bus2=205257803.1.2.3 switch=y r1=0.001 x1=0.001 r0=0.001 x0=0.001 Length=0.001 units=km
New Line.205257855$PDRAR0937-C phases=3 Bus1=205257815.1.2.3 Bus2=205257816.1.2.3 switch=y r1=0.001 x1=0.001 r0=0.001 x0=0.001 Length=0.001 units=km
New Line.CAB_4626894E:4626894E phases=3 Bus1=109229232.1.2.3 Bus2=109229215.1.2.3 switch=y r1=0.001 x1=0.001 r0=0.001 x0=0.001 Length=0.001 units=km
New Line.4241550E:PS0069 phases=3 Bus1=37080147.1.2.3 Bus2=37080146.1.2.3 switch=y r1=0.001 x1=0.001 r0=0.001 x0=0.001 Length=0.001 units=km
New Line.4838417E:RCS0955 phases=3 Bus1=188343762.1.2.3 Bus2=188343761.1.2.3 switch=y r1=0.001 x1=0.001 r0=0.001 x0=0.001 Length=0.001 units=km
New Line.4872209E:PDRAR0937-B phases=3 Bus1=205257803.1.2.3 Bus2=205257804.1.2.3 switch=y r1=0.001 x1=0.001 r0=0.001 x0=0.001 Length=0.001 units=km
New Line.4872209E:PDRAR0937-C phases=3 Bus1=205257816.1.2.3 Bus2=205257834.1.2.3 switch=y r1=0.001 x1=0.001 r0=0.001 x0=0.001 Length=0.001 units=km enabled=false
New Line.RAR0937$PDRAR0937-D phases=3 Bus1=205257798.1.2.3 Bus2=205257810.1.2.3 switch=y r1=0.001 x1=0.001 r0=0.001 x0=0.001 Length=0.001 units=km
New Line.232509031$P5484391 phases=3 Bus1=232509024.1.2.3 Bus2=232509025.1.2.3 switch=y r1=0.001 x1=0.001 r0=0.001 x0=0.001 Length=0.001 units=km
New Line.232509006$P5471163 phases=3 Bus1=232508999.1.2.3 Bus2=232509000.1.2.3 switch=y r1=0.001 x1=0.001 r0=0.001 x0=0.001 Length=0.001 units=km
New Line.4952555E:RCS1060 phases=3 Bus1=237141127.1.2.3 Bus2=237141128.1.2.3 switch=y r1=0.001 x1=0.001 r0=0.001 x0=0.001 Length=0.001 units=km
New Line.1778694E:PS0772 phases=3 Bus1=73247716.1.2.3 Bus2=73247715.1.2.3 switch=y r1=0.001 x1=0.001 r0=0.001 x0=0.001 Length=0.001 units=km

! Loads
New Load.4418867E_0 Bus1=-99999998636982.3.0 phases=1 kV=0.069282 kW=0 kvar=0 model=1
New Load.4418867E_1 Bus1=-99999998636982.1.0 phases=1 kV=0.069282 kW=0 kvar=0 model=1
New Load.4626894E_0 Bus1=-999999109229216.2.0 phases=1 kV=0.069282 kW=0 kvar=0 model=1
New Load.4626894E_1 Bus1=-999999109229216.3.0 phases=1 kV=0.069282 kW=0 kvar=0 model=1
New Load.5484391_0 Bus1=-999999232509025.1.0 phases=1 kV=0.159926 kW=0 kvar=0 model=1
New Load.5484391_1 Bus1=-999999232509025.2.0 phases=1 kV=0.159926 kW=0 kvar=0 model=1
New Load.5484391_2 Bus1=-999999232509025.3.0 phases=1 kV=0.159926 kW=0 kvar=0 model=1
New Load.5471163_0 Bus1=-999999232509000.1.0 phases=1 kV=0.159926 kW=0 kvar=0 model=1
New Load.5471163_1 Bus1=-999999232509000.2.0 phases=1 kV=0.159926 kW=0 kvar=0 model=1
New Load.5471163_2 Bus1=-999999232509000.3.0 phases=1 kV=0.159926 kW=0 kvar=0 model=1

! Generators
New Generator.NST-194276_PHOTOVOLTAIC_0 Bus1=-999999232509025.1.0 phases=1 kV=0.159926 kW=0 kvar=0 model=7
New Generator.NST-194276_PHOTOVOLTAIC_1 Bus1=-999999232509025.2.0 phases=1 kV=0.159926 kW=0 kvar=0 model=7
New Generator.NST-194276_PHOTOVOLTAIC_2 Bus1=-999999232509025.3.0 phases=1 kV=0.159926 kW=0 kvar=0 model=7

! Transformers
New Transformer.293588A962BFEE34E0637F61810A7CE3_0_0 phases=1 windings=2 xhl=0.5 %R=0.353554 %imag=1e-06 %noloadloss=0
~ wdg=1 bus=98636982.3.0 kV=19.0526 kVA=12.5 conn=wye
~ wdg=2 bus=-99999998636982.3.0 kV=0.069282 kVA=12.5 conn=wye
New Transformer.293588A962BFEE34E0637F61810A7CE3_0_1 phases=1 windings=2 xhl=0.5 %R=0.353554 %imag=1e-06 %noloadloss=0
~ wdg=1 bus=98636982.1.0 kV=19.0526 kVA=12.5 conn=wye
~ wdg=2 bus=-99999998636982.1.0 kV=0.069282 kVA=12.5 conn=wye
New Transformer.293588A69862EE34E0637F61810A7CE3_1_0 phases=1 windings=2 xhl=0.5 %R=0.353554 %imag=1e-06 %noloadloss=0
~ wdg=1 bus=109229216.2.0 kV=19.0526 kVA=25 conn=wye
~ wdg=2 bus=-999999109229216.2.0 kV=0.069282 kVA=25 conn=wye
New Transformer.293588A69862EE34E0637F61810A7CE3_1_1 phases=1 windings=2 xhl=0.5 %R=0.353554 %imag=1e-06 %noloadloss=0
~ wdg=1 bus=109229216.3.0 kV=19.0526 kVA=25 conn=wye
~ wdg=2 bus=-999999109229216.3.0 kV=0.069282 kVA=25 conn=wye
New Transformer.293588B4D561EE34E0637F61810A7CE3_2_0 phases=1 windings=2 xhl=0.5 %R=0.353554 %imag=1e-06 %noloadloss=0
~ wdg=1 bus=232509000.1.2 kV=33 kVA=250 conn=delta
~ wdg=2 bus=-999999232509000.1.0 kV=0.159926 kVA=250 conn=wye
New Transformer.293588B4D561EE34E0637F61810A7CE3_2_1 phases=1 windings=2 xhl=0.5 %R=0.353554 %imag=1e-06 %noloadloss=0
~ wdg=1 bus=232509000.2.3 kV=33 kVA=250 conn=delta
~ wdg=2 bus=-999999232509000.2.0 kV=0.159926 kVA=250 conn=wye
New Transformer.293588B4D561EE34E0637F61810A7CE3_2_2 phases=1 windings=2 xhl=0.5 %R=0.353554 %imag=1e-06 %noloadloss=0
~ wdg=1 bus=232509000.3.1 kV=33 kVA=250 conn=delta
~ wdg=2 bus=-999999232509000.3.0 kV=0.159926 kVA=250 conn=wye
New Transformer.293588B4D562EE34E0637F61810A7CE3_3_0 phases=1 windings=2 xhl=0.5 %R=0.353554 %imag=1e-06 %noloadloss=0
~ wdg=1 bus=232509025.1.2 kV=33 kVA=250 conn=delta
~ wdg=2 bus=-999999232509025.1.0 kV=0.159926 kVA=250 conn=wye
New Transformer.293588B4D562EE34E0637F61810A7CE3_3_1 phases=1 windings=2 xhl=0.5 %R=0.353554 %imag=1e-06 %noloadloss=0
~ wdg=1 bus=232509025.2.3 kV=33 kVA=250 conn=delta
~ wdg=2 bus=-999999232509025.2.0 kV=0.159926 kVA=250 conn=wye
New Transformer.293588B4D562EE34E0637F61810A7CE3_3_2 phases=1 windings=2 xhl=0.5 %R=0.353554 %imag=1e-06 %noloadloss=0
~ wdg=1 bus=232509025.3.1 kV=33 kVA=250 conn=delta
~ wdg=2 bus=-999999232509025.3.0 kV=0.159926 kVA=250 conn=wye

Set voltagebases=[33.0 0.277 0.12]
CalcVoltageBases
Solve
