! OpenDSS script generated from multiconductor network
Clear

New Circuit.mc_network basekv=12.0 pu=1.000000 angle=0.00 frequency=60.0 phases=3 Mvasc3=143993 Mvasc1=47997.6
~ bus1=-8888882187044.1.2.3

! Line codes
New LineCode.2_CLP_3PH_12KV_3 nphases=3 units=km Rmatrix=[ 0.0588 | 0 0.0588 | 0 0 0.0588 ] Xmatrix=[ 0.012394 | 0 0.012394 | 0 0 0.012394 ] Cmatrix=[ 0 | 0 0 | 0 0 0 ]
New LineCode.350_AL_3PH_12KV_3 nphases=3 units=km Rmatrix=[ 0.000608 | 0 0.000608 | 0 0 0.000608 ] Xmatrix=[ 0.000462 | 0 0.000462 | 0 0 0.000462 ] Cmatrix=[ 0 | 0 0 | 0 0 0 ]
New LineCode.1/0_CLP_3PH_12KV_3 nphases=3 units=km Rmatrix=[ 0.068075 | 0 0.068075 | 0 0 0.068075 ] Xmatrix=[ 0.020807 | 0 0.020807 | 0 0 0.020807 ] Cmatrix=[ 0 | 0 0 | 0 0 0 ]
New LineCode.1/0_JCN_3PH_12KV_3 nphases=3 units=km Rmatrix=[ 0.001464 | 0 0.001464 | 0 0 0.001464 ] Xmatrix=[ 0.000447 | 0 0.000447 | 0 0 0.000447 ] Cmatrix=[ 0 | 0 0 | 0 0 0 ]
New LineCode.1000_CLP_3PH_12KV_3 nphases=3 units=km Rmatrix=[ 0.001709 | 0 0.001709 | 0 0 0.001709 ] Xmatrix=[ 0.002586 | 0 0.002586 | 0 0 0.002586 ] Cmatrix=[ 0 | 0 0 | 0 0 0 ]
New LineCode.2_CLP_1PH_12KV_1 nphases=1 units=km Rmatrix=[ 0.001151 ] Xmatrix=[ 0.000243 ] Cmatrix=[ 0 ]
New LineCode.350_JCN_3PH_12KV_3 nphases=3 units=km Rmatrix=[ 0.031884 | 0 0.031884 | 0 0 0.031884 ] Xmatrix=[ 0.024225 | 0 0.024225 | 0 0 0.024225 ] Cmatrix=[ 0 | 0 0 | 0 0 0 ]
New LineCode.1000_JCN_3PH_12KV_3 nphases=3 units=km Rmatrix=[ 0.031474 | 0 0.031474 | 0 0 0.031474 ] Xmatrix=[ 0.047642 | 0 0.047642 | 0 0 0.047642 ] Cmatrix=[ 0 | 0 0 | 0 0 0 ]
New LineCode.750_CLP_3PH_12KV_3 nphases=3 units=km Rmatrix=[ 0.005143 | 0 0.005143 | 0 0 0.005143 ] Xmatrix=[ 0.006316 | 0 0.006316 | 0 0 0.006316 ] Cmatrix=[ 0 | 0 0 | 0 0 0 ]
New LineCode.336_ACSR_3PH_12KV_4 nphases=4 units=km Rmatrix=[ 0.005094 | 0 0.005094 | 0 0 0.005094 | 0 0 0 0.005094 ] Xmatrix=[ 0.010158 | 0 0.010158 | 0 0 0.010158 | 0 0 0 0.010158 ] Cmatrix=[ 0 | 0 0 | 0 0 0 | 0 0 0 0 ]
New LineCode.1/0_ACSR_3PH_12KV_3 nphases=3 units=km Rmatrix=[ 0.035357 | 0 0.035357 | 0 0 0.035357 ] Xmatrix=[ 0.028151 | 0 0.028151 | 0 0 0.028151 ] Cmatrix=[ 0 | 0 0 | 0 0 0 ]
New LineCode.336_ACSR_3PH_12KV_3 nphases=3 units=km Rmatrix=[ 0.005094 | 0 0.005094 | 0 0 0.005094 ] Xmatrix=[ 0.010158 | 0 0.010158 | 0 0 0.010158 ] Cmatrix=[ 0 | 0 0 | 0 0 0 ]
New LineCode.954_ACSR_3PH_12KV_3 nphases=3 units=km Rmatrix=[ 1e-05 | 0 1e-05 | 0 0 1e-05 ] Xmatrix=[ 1e-05 | 0 1e-05 | 0 0 1e-05 ] Cmatrix=[ 0 | 0 0 | 0 0 0 ]

! Lines
New Line.201527708$P5510832-1 phases=3 Bus1=201527711.1.2.3 Bus2=60509303.1.2.3 LineCode=2_CLP_3PH_12KV_3 Length=0.002481 units=km
New Line.1839602E$60510108 phases=3 Bus1=60463076.1.2.3 Bus2=60510110.1.2.3 LineCode=350_AL_3PH_12KV_3 Length=0.063741 units=km
New Line.98552607$P5529103-1 phases=3 Bus1=98552610.1.2.3 Bus2=98552530.1.2.3 LineCode=1/0_CLP_3PH_12KV_3 Length=0.002749 units=km
New Line.P5188445-1$P5084472-B phases=3 Bus1=154339797.1.2.3 Bus2=154339896.1.2.3 LineCode=1/0_CLP_3PH_12KV_3 Length=0.007692 units=km
New Line.1839605E$166629378 phases=3 Bus1=60463015.1.2.3 Bus2=166629380.1.2.3 LineCode=1/0_JCN_3PH_12KV_3 Length=0.113972 units=km
New Line.GS5833-3$ND138158142 phases=3 Bus1=230962013.1.2.3 Bus2=138158142.1.2.3 LineCode=1000_CLP_3PH_12KV_3 Length=0.024812 units=km
New Line.ND107865304$GS5833-2 phases=3 Bus1=230962004.1.2.3 Bus2=107865304.1.2.3 LineCode=1/0_CLP_3PH_12KV_3 Length=0.197698 units=km
New Line.ND138158142$V5187973 phases=1 Bus1=138158142.1 Bus2=138158136.1 LineCode=2_CLP_1PH_12KV_1 Length=0.001033 units=km
New Line.ND138158142$GS2566-4 phases=3 Bus1=138158142.1.2.3 Bus2=231769288.1.2.3 LineCode=1000_CLP_3PH_12KV_3 Length=0.15435 units=km
New Line.ND107865304$ND107865339 phases=3 Bus1=107865304.1.2.3 Bus2=107865339.1.2.3 LineCode=1/0_CLP_3PH_12KV_3 Length=0.122713 units=km
New Line.ND201527364$GS5833-1 phases=3 Bus1=230961995.1.2.3 Bus2=201527364.1.2.3 LineCode=1000_CLP_3PH_12KV_3 Length=0.218659 units=km
New Line.P5472523-1$ND107865304 phases=3 Bus1=107865304.1.2.3 Bus2=95361389.1.2.3 LineCode=2_CLP_3PH_12KV_3 Length=0.199772 units=km
New Line.GS4403-4$ND201527364 phases=3 Bus1=201527364.1.2.3 Bus2=170147890.1.2.3 LineCode=1000_CLP_3PH_12KV_3 Length=0.047961 units=km
New Line.ND107865339$200362566 phases=3 Bus1=107865339.1.2.3 Bus2=200362568.1.2.3 LineCode=1/0_CLP_3PH_12KV_3 Length=0.106521 units=km
New Line.60510108$P5082503-1 phases=3 Bus1=60510111.1.2.3 Bus2=60463092.1.2.3 LineCode=350_AL_3PH_12KV_3 Length=0.003669 units=km
New Line.1839597E$P5188464-1 phases=3 Bus1=60507251.1.2.3 Bus2=60507030.1.2.3 LineCode=1/0_CLP_3PH_12KV_3 Length=0.019511 units=km
New Line.181844144$1914921E phases=3 Bus1=60463524.1.2.3 Bus2=181844146.1.2.3 LineCode=1/0_CLP_3PH_12KV_3 Length=0.101222 units=km
New Line.1839606E$PME3649-3 phases=3 Bus1=60463467.1.2.3 Bus2=28291471.1.2.3 LineCode=350_AL_3PH_12KV_3 Length=0.012136 units=km
New Line.GS4814-3$133384588 phases=3 Bus1=60507141.1.2.3 Bus2=133384590.1.2.3 LineCode=2_CLP_3PH_12KV_3 Length=0.033254 units=km
New Line.166629378$P5641824-1 phases=3 Bus1=166629381.1.2.3 Bus2=166629334.1.2.3 LineCode=1/0_JCN_3PH_12KV_3 Length=0.002258 units=km
New Line.98291293$ND107865339 phases=3 Bus1=107865339.1.2.3 Bus2=98291295.1.2.3 LineCode=1/0_CLP_3PH_12KV_3 Length=0.052997 units=km
New Line.98291293$P5143705-1 phases=3 Bus1=98291296.1.2.3 Bus2=110276302.1.2.3 LineCode=1/0_CLP_3PH_12KV_3 Length=0.002897 units=km
New Line.110276611$GS2566-3 phases=3 Bus1=231769279.1.2.3 Bus2=110276613.1.2.3 LineCode=1/0_CLP_3PH_12KV_3 Length=0.243989 units=km
New Line.200362566$P5143704-A phases=3 Bus1=200362569.1.2.3 Bus2=148779190.1.2.3 LineCode=1/0_CLP_3PH_12KV_3 Length=0.002649 units=km
New Line.164138330$GS2566-2 phases=3 Bus1=231769270.1.2.3 Bus2=164138332.1.2.3 LineCode=1/0_JCN_3PH_12KV_3 Length=0.105068 units=km
New Line.110276611$P5530850-1 phases=3 Bus1=110276614.1.2.3 Bus2=110276231.1.2.3 LineCode=1/0_CLP_3PH_12KV_3 Length=0.003513 units=km
New Line.GS6451-1$ND191379543 phases=3 Bus1=187570827.1.2.3 Bus2=191379543.1.2.3 LineCode=350_JCN_3PH_12KV_3 Length=0.143844 units=km
New Line.164138330$ND164138208 phases=3 Bus1=164138333.1.2.3 Bus2=164138208.1.2.3 LineCode=1/0_JCN_3PH_12KV_3 Length=0.003753 units=km
New Line.ND191379543$191379614 phases=3 Bus1=191379543.1.2.3 Bus2=191379616.1.2.3 LineCode=1/0_JCN_3PH_12KV_3 Length=0.034583 units=km
New Line.ND191379543$191379641 phases=3 Bus1=191379543.1.2.3 Bus2=191379643.1.2.3 LineCode=1/0_JCN_3PH_12KV_3 Length=0.036464 units=km
New Line.200362593$P5143704-B phases=3 Bus1=148779208.1.2.3 Bus2=200362596.1.2.3 LineCode=1/0_CLP_3PH_12KV_3 Length=0.178816 units=km
New Line.GS6451-4$ND201527637 phases=3 Bus1=187570854.1.2.3 Bus2=201527637.1.2.3 LineCode=1000_JCN_3PH_12KV_3 Length=0.371877 units=km
New Line.ND164138208$164138249 phases=3 Bus1=164138208.1.2.3 Bus2=164138252.1.2.3 LineCode=1/0_JCN_3PH_12KV_3 Length=0.003151 units=km
New Line.ND164138208$164138303 phases=3 Bus1=164138208.1.2.3 Bus2=164138306.1.2.3 LineCode=1/0_JCN_3PH_12KV_3 Length=0.003125 units=km
New Line.GS6451-5$ND187571023 phases=3 Bus1=187570863.1.2.3 Bus2=187571023.1.2.3 LineCode=1/0_CLP_3PH_12KV_3 Length=0.016487 units=km
New Line.ND201527637$RCS2005-4 phases=3 Bus1=201527637.1.2.3 Bus2=60462585.1.2.3 LineCode=750_CLP_3PH_12KV_3 Length=0.219375 units=km
New Line.143587237$200362593 phases=3 Bus1=200362595.1.2.3 Bus2=143587239.1.2.3 LineCode=1/0_CLP_3PH_12KV_3 Length=0.16581 units=km
New Line.148779136$ND187571023 phases=3 Bus1=187571023.1.2.3 Bus2=148779138.1.2.3 LineCode=1/0_CLP_3PH_12KV_3 Length=0.008682 units=km
New Line.191379614$P5654051-1 phases=3 Bus1=191379617.1.2.3 Bus2=191379449.1.2.3 LineCode=1/0_JCN_3PH_12KV_3 Length=0.002076 units=km
New Line.191379641$P5654052-1 phases=3 Bus1=191379644.1.2.3 Bus2=191379490.1.2.3 LineCode=1/0_JCN_3PH_12KV_3 Length=0.006993 units=km
New Line.ND187571023$89894117 phases=3 Bus1=187571023.1.2.3 Bus2=89894119.1.2.3 LineCode=1/0_CLP_3PH_12KV_3 Length=0.361412 units=km
New Line.164138249$164138222 phases=3 Bus1=164138251.1.2.3 Bus2=164138224.1.2.3 LineCode=1/0_JCN_3PH_12KV_3 Length=0.008512 units=km
New Line.164138303$164138276 phases=3 Bus1=164138305.1.2.3 Bus2=164138278.1.2.3 LineCode=1/0_JCN_3PH_12KV_3 Length=0.078079 units=km
New Line.143587237$P5143703-1 phases=3 Bus1=143587240.1.2.3 Bus2=110276352.1.2.3 LineCode=1/0_CLP_3PH_12KV_3 Length=0.012621 units=km
New Line.RCS2005-1$ND139109732 phases=3 Bus1=60462603.1.2.3 Bus2=139109732.1.2.3 LineCode=750_CLP_3PH_12KV_3 Length=0.045823 units=km
New Line.P5593779-1$148779136 phases=3 Bus1=148779139.1.2.3 Bus2=148779090.1.2.3 LineCode=1/0_CLP_3PH_12KV_3 Length=0.002488 units=km
New Line.89894117$J101A-4P phases=3 Bus1=89894120.1.2.3 Bus2=89893941.1.2.3 LineCode=1/0_CLP_3PH_12KV_3 Length=0.001557 units=km
New Line.RCS2005-2$ND139109758 phases=3 Bus1=60462594.1.2.3 Bus2=139109758.1.2.3 LineCode=1000_CLP_3PH_12KV_3 Length=0.020262 units=km
New Line.164138276$P5603754-1 phases=3 Bus1=164138279.1.2.3 Bus2=139147902.1.2.3 LineCode=1/0_JCN_3PH_12KV_3 Length=0.007104 units=km
New Line.164138222$P5639639-1 phases=3 Bus1=164138225.1.2.3 Bus2=164138164.1.2.3 LineCode=1/0_JCN_3PH_12KV_3 Length=0.003127 units=km
New Line.0221274$RCS2005-3 phases=3 Bus1=60462576.1.2.3 Bus2=215352738.1.2.3 LineCode=1/0_JCN_3PH_12KV_3 Length=0.035957 units=km
New Line.ND139109732$1916576E phases=3 Bus1=139109732.1.2.3 Bus2=60462985.1.2.3 LineCode=750_CLP_3PH_12KV_3 Length=0.039071 units=km
New Line.ND139109758$S5188319 phases=1 Bus1=139109758.2 Bus2=139109748.2 LineCode=2_CLP_1PH_12KV_1 Length=0.001204 units=km
New Line.PME2177-3$ND139109758 phases=3 Bus1=139109758.1.2.3 Bus2=60509130.1.2.3 LineCode=1000_CLP_3PH_12KV_3 Length=0.298078 units=km
New Line.ND60510683$1839589E phases=3 Bus1=60510683.1.2.3 Bus2=60507694.1.2.3 LineCode=1/0_CLP_3PH_12KV_3 Length=0.002735 units=km
New Line.P5084465-1$181844144 phases=3 Bus1=181844147.1.2.3 Bus2=60463031.1.2.3 LineCode=1/0_CLP_3PH_12KV_3 Length=0.002684 units=km
New Line.133384588$P5385500-A phases=3 Bus1=133384591.1.2.3 Bus2=154339697.1.2.3 LineCode=2_CLP_3PH_12KV_3 Length=0.007272 units=km
New Line.1839589E$BS2328-T phases=3 Bus1=60507695.1.2.3 Bus2=60507455.1.2.3 LineCode=1/0_CLP_3PH_12KV_3 Length=0.04423 units=km
New Line.1839590E$PMH3430-2 phases=3 Bus1=60507708.1.2.3 Bus2=60507321.1.2.3 LineCode=350_AL_3PH_12KV_3 Length=0.034258 units=km
New Line.J101A-2P$89894149 phases=3 Bus1=89893949.1.2.3 Bus2=89894152.1.2.3 LineCode=1/0_CLP_3PH_12KV_3 Length=0.001462 units=km
New Line.FD00827$ND108697141 phases=3 Bus1=60508107.1.2.3 Bus2=108697123.1.2.3 LineCode=1/0_CLP_3PH_12KV_3 Length=0.119257 units=km
New Line.P5082369-1$BS2328-L phases=3 Bus1=60507464.1.2.3 Bus2=108697227.1.2.3 LineCode=1/0_CLP_3PH_12KV_3 Length=0.105328 units=km
New Line.P5081881-1$BS2328-R phases=3 Bus1=60507447.1.2.3 Bus2=108697392.1.2.3 LineCode=1/0_CLP_3PH_12KV_3 Length=0.023709 units=km
New Line.133384556$P5385500-B phases=3 Bus1=154339715.1.2.3 Bus2=133384559.1.2.3 LineCode=1/0_CLP_3PH_12KV_3 Length=0.002426 units=km
New Line.P5188314-1$PME2177-4 phases=3 Bus1=60509139.1.2.3 Bus2=60463636.1.2.3 LineCode=1/0_CLP_3PH_12KV_3 Length=0.003869 units=km
New Line.PME2177-1$ND60510589 phases=3 Bus1=60509157.1.2.3 Bus2=60510589.1.2.3 LineCode=1/0_CLP_3PH_12KV_3 Length=0.070881 units=km
New Line.ND181941178$ND60510898 phases=4 Bus1=181941178.0.1.2.3 Bus2=60510898.0.1.2.3 LineCode=336_ACSR_3PH_12KV_4 Length=0.270539 units=km
New Line.J101A-1P$98552580 phases=3 Bus1=89893925.1.2.3 Bus2=98552583.1.2.3 LineCode=1/0_CLP_3PH_12KV_3 Length=0.001242 units=km
New Line.P5188318-1$ND60510589 phases=3 Bus1=60510589.1.2.3 Bus2=60463540.1.2.3 LineCode=1/0_CLP_3PH_12KV_3 Length=0.156106 units=km
New Line.P5188316-1$ND60510589 phases=3 Bus1=60510589.1.2.3 Bus2=60463588.1.2.3 LineCode=1/0_CLP_3PH_12KV_3 Length=0.004438 units=km
New Line.1916578EPH$ND60510583 phases=3 Bus1=60463249.1.2.3 Bus2=60510583.1.2.3 LineCode=350_AL_3PH_12KV_3 Length=0.010476 units=km
New Line.89894149$89894085 phases=3 Bus1=89894151.1.2.3 Bus2=89894087.1.2.3 LineCode=1/0_CLP_3PH_12KV_3 Length=0.073677 units=km
New Line.201527708$ND60510583 phases=3 Bus1=60510583.1.2.3 Bus2=201527710.1.2.3 LineCode=2_CLP_3PH_12KV_3 Length=0.040479 units=km
New Line.ND60510583$P5124761-1 phases=3 Bus1=60510583.1.2.3 Bus2=60463409.1.2.3 LineCode=350_AL_3PH_12KV_3 Length=0.216433 units=km
New Line.98552580$98552607 phases=3 Bus1=98552582.1.2.3 Bus2=98552609.1.2.3 LineCode=1/0_CLP_3PH_12KV_3 Length=0.119995 units=km
New Line.P5084472-A$1839600E phases=3 Bus1=60463454.1.2.3 Bus2=154339814.1.2.3 LineCode=1/0_CLP_3PH_12KV_3 Length=0.102206 units=km
New Line.1916583E$GS4814-1 phases=3 Bus1=60507075.1.2.3 Bus2=60507125.1.2.3 LineCode=750_CLP_3PH_12KV_3 Length=0.0261 units=km
New Line.ND60510711$ND60510730 phases=4 Bus1=60510711.0.1.2.3 Bus2=60510730.0.1.2.3 LineCode=336_ACSR_3PH_12KV_4 Length=0.055158 units=km
New Line.89894085$P5529100-1 phases=3 Bus1=89894088.1.2.3 Bus2=91329148.1.2.3 LineCode=1/0_CLP_3PH_12KV_3 Length=0.003039 units=km
New Line.PMH3430-3$P5312549-1 phases=3 Bus1=60507303.1.2.3 Bus2=108697282.1.2.3 LineCode=350_AL_3PH_12KV_3 Length=0.035735 units=km
New Line.GS3194-1$1839048E phases=3 Bus1=60507264.1.2.3 Bus2=54593337.1.2.3 LineCode=1000_CLP_3PH_12KV_3 Length=0.006821 units=km
New Line.P5124763-1$PMH3430-4 phases=3 Bus1=60507312.1.2.3 Bus2=108697337.1.2.3 LineCode=1/0_CLP_3PH_12KV_3 Length=0.134044 units=km
New Line.133384556$133384529 phases=3 Bus1=133384558.1.2.3 Bus2=133384531.1.2.3 LineCode=1/0_CLP_3PH_12KV_3 Length=0.134162 units=km
New Line.PMH3430-1$ND91309750 phases=3 Bus1=60507330.1.2.3 Bus2=91309750.1.2.3 LineCode=350_AL_3PH_12KV_3 Length=0.057813 units=km
New Line.1810027E$142152871 phases=3 Bus1=60508146.1.2.3 Bus2=142152873.1.2.3 LineCode=1/0_CLP_3PH_12KV_3 Length=0.145993 units=km
New Line.P5124826-A$1810029E phases=3 Bus1=60508813.1.2.3 Bus2=167036789.1.2.3 LineCode=1/0_CLP_3PH_12KV_3 Length=0.084257 units=km
New Line.ND91309750$P5472684 phases=3 Bus1=91309750.1.2.3 Bus2=60507868.1.2.3 LineCode=350_AL_3PH_12KV_3 Length=0.037337 units=km
New Line.ND91309750$91309683 phases=3 Bus1=91309750.1.2.3 Bus2=91309685.1.2.3 LineCode=350_AL_3PH_12KV_3 Length=0.0847 units=km
New Line.FD00830$136406913 phases=3 Bus1=60508120.1.2.3 Bus2=136406915.1.2.3 LineCode=1/0_CLP_3PH_12KV_3 Length=0.032736 units=km
New Line.1810034E$P5083085-1 phases=3 Bus1=60508133.1.2.3 Bus2=136406960.1.2.3 LineCode=1/0_CLP_3PH_12KV_3 Length=0.027828 units=km
New Line.133384529$P5385501-1 phases=3 Bus1=133384532.1.2.3 Bus2=60463684.1.2.3 LineCode=1/0_CLP_3PH_12KV_3 Length=0.007593 units=km
New Line.142152871$P5142890-1 phases=3 Bus1=142152874.1.2.3 Bus2=136407010.1.2.3 LineCode=1/0_CLP_3PH_12KV_3 Length=0.003218 units=km
New Line.91309683$P5125049-A phases=3 Bus1=91309686.1.2.3 Bus2=154339936.1.2.3 LineCode=350_AL_3PH_12KV_3 Length=0.002742 units=km
New Line.P5124480-1$136406913 phases=3 Bus1=136406916.1.2.3 Bus2=136406869.1.2.3 LineCode=1/0_CLP_3PH_12KV_3 Length=0.003555 units=km
New Line.P5124826-B$BS1318-T phases=3 Bus1=167036807.1.2.3 Bus2=60508314.1.2.3 LineCode=1/0_CLP_3PH_12KV_3 Length=0.005812 units=km
New Line.91309710$P5125049-B phases=3 Bus1=154339954.1.2.3 Bus2=91309713.1.2.3 LineCode=350_AL_3PH_12KV_3 Length=0.002561 units=km
New Line.BS1318-R$ND167036955 phases=3 Bus1=60508306.1.2.3 Bus2=167036955.1.2.3 LineCode=1/0_CLP_3PH_12KV_3 Length=0.018369 units=km
New Line.BS1318-L$P5188578-1 phases=3 Bus1=60508323.1.2.3 Bus2=167036992.1.2.3 LineCode=1/0_JCN_3PH_12KV_3 Length=0.008737 units=km
New Line.ND167036955$138297404 phases=3 Bus1=167036955.1.2.3 Bus2=138297406.1.2.3 LineCode=1/0_CLP_3PH_12KV_3 Length=0.069098 units=km
New Line.91309710$P5142691-1 phases=3 Bus1=91309712.1.2.3 Bus2=154340036.1.2.3 LineCode=350_AL_3PH_12KV_3 Length=0.076955 units=km
New Line.ND167036955$P5124827-A phases=3 Bus1=167036955.1.2.3 Bus2=154340088.1.2.3 LineCode=1/0_CLP_3PH_12KV_3 Length=0.108745 units=km
New Line.138297404$ND167036901 phases=3 Bus1=138297407.1.2.3 Bus2=167036901.1.2.3 LineCode=1/0_CLP_3PH_12KV_3 Length=0.006478 units=km
New Line.ND167036901$138297431 phases=3 Bus1=167036901.1.2.3 Bus2=138297434.1.2.3 LineCode=1/0_CLP_3PH_12KV_3 Length=0.006458 units=km
New Line.P5143136-1$ND167036901 phases=3 Bus1=167036901.1.2.3 Bus2=167036749.1.2.3 LineCode=1/0_CLP_3PH_12KV_3 Length=0.003442 units=km
New Line.60508728$138297431 phases=3 Bus1=138297433.1.2.3 Bus2=60508730.1.2.3 LineCode=1/0_CLP_3PH_12KV_3 Length=0.083083 units=km
New Line.60508728$P5487157-1 phases=3 Bus1=60508731.1.2.3 Bus2=167036708.1.2.3 LineCode=1/0_CLP_3PH_12KV_3 Length=0.001715 units=km
New Line.GS4814-2$GS4814CG phases=3 Bus1=60507133.1.2.3 Bus2=-77777760507133.1.2.3 LineCode=750_CLP_3PH_12KV_3 Length=0.019974 units=km
New Line.ND60510730$1839597E phases=3 Bus1=60510730.1.2.3 Bus2=60507250.1.2.3 LineCode=1/0_ACSR_3PH_12KV_3 Length=0.044061 units=km
New Line.ND60510610$ND60510611 phases=4 Bus1=60510610.0.1.2.3 Bus2=60510611.0.1.2.3 LineCode=336_ACSR_3PH_12KV_4 Length=0.0645 units=km
New Line.ND60510611$1839606E phases=3 Bus1=60510611.1.2.3 Bus2=60463466.1.2.3 LineCode=336_ACSR_3PH_12KV_3 Length=0.0645 units=km
New Line.ND60510611$1914921E phases=3 Bus1=60510611.1.2.3 Bus2=60463523.1.2.3 LineCode=1/0_ACSR_3PH_12KV_3 Length=0.085848 units=km
New Line.PS2213$1839599E phases=4 Bus1=206506112.0.1.2.3 Bus2=60510291.0.1.2.3 LineCode=336_ACSR_3PH_12KV_4 Length=0.020351 units=km
New Line.PS2213$ND60510683 phases=4 Bus1=60510290.0.1.2.3 Bus2=60510683.0.1.2.3 LineCode=336_ACSR_3PH_12KV_4 Length=0.050931 units=km
New Line.ND60510683$ND60510996 phases=4 Bus1=60510683.0.1.2.3 Bus2=60510996.0.1.2.3 LineCode=336_ACSR_3PH_12KV_4 Length=0.061085 units=km
New Line.ND60510996$1839590E phases=3 Bus1=60510996.1.2.3 Bus2=60507707.1.2.3 LineCode=336_ACSR_3PH_12KV_3 Length=0.061085 units=km
New Line.ND60510996$ND60510328 phases=3 Bus1=60510996.1.2.3 Bus2=60510328.1.2.3 LineCode=336_ACSR_3PH_12KV_3 Length=0.058245 units=km
New Line.ND60510328$ND60510646 phases=3 Bus1=60510328.1.2.3 Bus2=60510646.1.2.3 LineCode=336_ACSR_3PH_12KV_3 Length=0.045643 units=km
New Line.1916576E$ND60541147 phases=4 Bus1=60462984.0.1.2.3 Bus2=60541147.0.1.2.3 LineCode=336_ACSR_3PH_12KV_4 Length=0.056124 units=km
New Line.ND60541147$ND215352764 phases=4 Bus1=60541147.0.1.2.3 Bus2=215352764.0.1.2.3 LineCode=336_ACSR_3PH_12KV_4 Length=0.027402 units=km
New Line.ND60541147$ND60510069 phases=4 Bus1=60541147.0.1.2.3 Bus2=60510069.0.1.2.3 LineCode=336_ACSR_3PH_12KV_4 Length=0.028651 units=km
New Line.ND60510069$ND181941178 phases=4 Bus1=60510069.0.1.2.3 Bus2=181941178.0.1.2.3 LineCode=336_ACSR_3PH_12KV_4 Length=0.032221 units=km
New Line.ND215352764$1916575E phases=4 Bus1=215352764.0.1.2.3 Bus2=60463155.0.1.2.3 LineCode=336_ACSR_3PH_12KV_4 Length=0.00594 units=km
New Line.ND60510069$1916578EPH phases=3 Bus1=60510069.1.2.3 Bus2=60463248.1.2.3 LineCode=336_ACSR_3PH_12KV_3 Length=0.032221 units=km
New Line.ND60510646$FD00827 phases=3 Bus1=60510646.1.2.3 Bus2=60508106.1.2.3 LineCode=336_ACSR_3PH_12KV_3 Length=0.058662 units=km
New Line.ND60510646$ND60510647 phases=3 Bus1=60510646.1.2.3 Bus2=60510647.1.2.3 LineCode=336_ACSR_3PH_12KV_3 Length=0.217818 units=km
New Line.ND60510647$1839048E phases=3 Bus1=60510647.1.2.3 Bus2=60507263.1.2.3 LineCode=336_ACSR_3PH_12KV_3 Length=0.061 units=km
New Line.ND60510647$ND60510754 phases=3 Bus1=60510647.1.2.3 Bus2=60510754.1.2.3 LineCode=336_ACSR_3PH_12KV_3 Length=0.132641 units=km
New Line.ND60510754$ND60510625 phases=3 Bus1=60510754.1.2.3 Bus2=60510625.1.2.3 LineCode=336_ACSR_3PH_12KV_3 Length=0.058402 units=km
New Line.ND60510754$ND60510811 phases=3 Bus1=60510754.1.2.3 Bus2=60510811.1.2.3 LineCode=336_ACSR_3PH_12KV_3 Length=0.01814 units=km
New Line.1916575E$ND60541245 phases=4 Bus1=60463155.0.1.2.3 Bus2=60541245.0.1.2.3 LineCode=336_ACSR_3PH_12KV_4 Length=0.034662 units=km
New Line.ND60510898$PS1731 phases=4 Bus1=60510898.0.1.2.3 Bus2=27564036.0.1.2.3 LineCode=336_ACSR_3PH_12KV_4 Length=0.09722 units=km
New Line.ND60541245$1839600E phases=3 Bus1=60541245.1.2.3 Bus2=60463453.1.2.3 LineCode=1/0_ACSR_3PH_12KV_3 Length=0.051012 units=km
New Line.ND60541245$ND60510537 phases=4 Bus1=60541245.0.1.2.3 Bus2=60510537.0.1.2.3 LineCode=336_ACSR_3PH_12KV_4 Length=0.044819 units=km
New Line.ND60510537$1839602E phases=3 Bus1=60510537.1.2.3 Bus2=60463075.1.2.3 LineCode=336_ACSR_3PH_12KV_3 Length=0.044819 units=km
New Line.ND60510537$ND60510711 phases=4 Bus1=60510537.0.1.2.3 Bus2=60510711.0.1.2.3 LineCode=336_ACSR_3PH_12KV_4 Length=0.051849 units=km
New Line.ND60510711$ND60510610 phases=4 Bus1=60510711.0.1.2.3 Bus2=60510610.0.1.2.3 LineCode=336_ACSR_3PH_12KV_4 Length=0.096543 units=km
New Line.ND60510811$1810027E phases=3 Bus1=60510811.1.2.3 Bus2=60508145.1.2.3 LineCode=336_ACSR_3PH_12KV_3 Length=0.058948 units=km
New Line.ND60510625$1810029E phases=3 Bus1=60510625.1.2.3 Bus2=60508812.1.2.3 LineCode=336_ACSR_3PH_12KV_3 Length=0.058402 units=km
New Line.ND60510625$ND60510405 phases=4 Bus1=60510625.0.1.2.3 Bus2=60510405.0.1.2.3 LineCode=336_ACSR_3PH_12KV_4 Length=0.091256 units=km
New Line.ND60510811$ND60510558 phases=3 Bus1=60510811.1.2.3 Bus2=60510558.1.2.3 LineCode=336_ACSR_3PH_12KV_3 Length=0.058948 units=km
New Line.ND60510405$RCS1760 phases=4 Bus1=60510405.0.1.2.3 Bus2=59666524.0.1.2.3 LineCode=336_ACSR_3PH_12KV_4 Length=0.026316 units=km
New Line.ND60510558$FD00830 phases=3 Bus1=60510558.1.2.3 Bus2=60508119.1.2.3 LineCode=336_ACSR_3PH_12KV_3 Length=0.058948 units=km
New Line.ND60510558$FD00828 phases=3 Bus1=60510558.1.2.3 Bus2=60508132.1.2.3 LineCode=336_ACSR_3PH_12KV_3 Length=0.056075 units=km
New Line.1839599E$ND60510730 phases=4 Bus1=60510730.0.1.2.3 Bus2=206506112.0.1.2.3 LineCode=336_ACSR_3PH_12KV_4 Length=0.137427 units=km
New Line.ND60510610$1839605E phases=3 Bus1=60510610.1.2.3 Bus2=60463014.1.2.3 LineCode=336_ACSR_3PH_12KV_3 Length=0.0645 units=km
New Line.ND60510898$1916583E phases=3 Bus1=60510898.1.2.3 Bus2=60507074.1.2.3 LineCode=954_ACSR_3PH_12KV_3 Length=0.08795 units=km
New Line.GS6451-2$ND201527364 phases=3 Bus1=201527364.1.2.3 Bus2=187570836.1.2.3 LineCode=1000_JCN_3PH_12KV_3 Length=0.375117 units=km
New Line.17577$GS5833-4 phases=3 Bus1=-8888882187044.1.2.3 Bus2=230962022.1.2.3 LineCode=1000_CLP_3PH_12KV_3 Length=0.303173 units=km

! Switches
New Line.5188020:GS2566-1 phases=3 Bus1=231769240.1.2.3 Bus2=231769261.1.2.3 switch=y r1=0.001 x1=0.001 r0=0.001 x0=0.001 Length=0.001 units=km enabled=false
New Line.5188315:PME2177-2 phases=3 Bus1=60509121.1.2.3 Bus2=60509148.1.2.3 switch=y r1=0.001 x1=0.001 r0=0.001 x0=0.001 Length=0.001 units=km enabled=false
New Line.1916584E:PS1731 phases=3 Bus1=27564036.1.2.3 Bus2=27564035.1.2.3 switch=y r1=0.001 x1=0.001 r0=0.001 x0=0.001 Length=0.001 units=km enabled=false
New Line.1810031E:RCS1760 phases=3 Bus1=59666524.1.2.3 Bus2=59666523.1.2.3 switch=y r1=0.001 x1=0.001 r0=0.001 x0=0.001 Length=0.001 units=km enabled=false
New Line.60507123$60507131 phases=3 Bus1=60507111.1.2.3 Bus2=60507112.1.2.3 switch=y r1=0.001 x1=0.001 r0=0.001 x0=0.001 Length=0.001 units=km
New Line.60510108 phases=3 Bus1=60510110.1.2.3 Bus2=60510111.1.2.3 switch=y r1=0.001 x1=0.001 r0=0.001 x0=0.001 Length=0.001 units=km
New Line.230962010$230962019 phases=3 Bus1=230961987.1.2.3 Bus2=230961981.1.2.3 switch=y r1=0.001 x1=0.001 r0=0.001 x0=0.001 Length=0.001 units=km
New Line.GS5833-2$230962010 phases=3 Bus1=230961981.1.2.3 Bus2=230961975.1.2.3 switch=y r1=0.001 x1=0.001 r0=0.001 x0=0.001 Length=0.001 units=km
New Line.230961992$GS5833-2 phases=3 Bus1=230961975.1.2.3 Bus2=230961974.1.2.3 switch=y r1=0.001 x1=0.001 r0=0.001 x0=0.001 Length=0.001 units=km
New Line.GS2566-3$231769285 phases=3 Bus1=231769253.1.2.3 Bus2=231769247.1.2.3 switch=y r1=0.001 x1=0.001 r0=0.001 x0=0.001 Length=0.001 units=km
New Line.60507131$GS4814-3 phases=3 Bus1=60507112.1.2.3 Bus2=60507118.1.2.3 switch=y r1=0.001 x1=0.001 r0=0.001 x0=0.001 Length=0.001 units=km
New Line.166629378 phases=3 Bus1=166629380.1.2.3 Bus2=166629381.1.2.3 switch=y r1=0.001 x1=0.001 r0=0.001 x0=0.001 Length=0.001 units=km
New Line.200362566 phases=3 Bus1=200362568.1.2.3 Bus2=200362569.1.2.3 switch=y r1=0.001 x1=0.001 r0=0.001 x0=0.001 Length=0.001 units=km
New Line.GS2566-2$GS2566-3 phases=3 Bus1=231769247.1.2.3 Bus2=231769241.1.2.3 switch=y r1=0.001 x1=0.001 r0=0.001 x0=0.001 Length=0.001 units=km
New Line.98291293 phases=3 Bus1=98291295.1.2.3 Bus2=98291296.1.2.3 switch=y r1=0.001 x1=0.001 r0=0.001 x0=0.001 Length=0.001 units=km
New Line.GS6451-1$187570834 phases=3 Bus1=187570801.1.2.3 Bus2=187570800.1.2.3 switch=y r1=0.001 x1=0.001 r0=0.001 x0=0.001 Length=0.001 units=km
New Line.187570834$GS6451-3 phases=3 Bus1=187570801.1.2.3 Bus2=187570807.1.2.3 switch=y r1=0.001 x1=0.001 r0=0.001 x0=0.001 Length=0.001 units=km
New Line.231769258$GS2566-2 phases=3 Bus1=231769241.1.2.3 Bus2=231769240.1.2.3 switch=y r1=0.001 x1=0.001 r0=0.001 x0=0.001 Length=0.001 units=km
New Line.110276611 phases=3 Bus1=110276613.1.2.3 Bus2=110276614.1.2.3 switch=y r1=0.001 x1=0.001 r0=0.001 x0=0.001 Length=0.001 units=km
New Line.GS6451-3$187570852 phases=3 Bus1=187570807.1.2.3 Bus2=187570813.1.2.3 switch=y r1=0.001 x1=0.001 r0=0.001 x0=0.001 Length=0.001 units=km
New Line.164138330 phases=3 Bus1=164138332.1.2.3 Bus2=164138333.1.2.3 switch=y r1=0.001 x1=0.001 r0=0.001 x0=0.001 Length=0.001 units=km
New Line.187570852$GS6451-5 phases=3 Bus1=187570813.1.2.3 Bus2=187570819.1.2.3 switch=y r1=0.001 x1=0.001 r0=0.001 x0=0.001 Length=0.001 units=km
New Line.191379614 phases=3 Bus1=191379616.1.2.3 Bus2=191379617.1.2.3 switch=y r1=0.001 x1=0.001 r0=0.001 x0=0.001 Length=0.001 units=km
New Line.191379641 phases=3 Bus1=191379643.1.2.3 Bus2=191379644.1.2.3 switch=y r1=0.001 x1=0.001 r0=0.001 x0=0.001 Length=0.001 units=km
New Line.200362593 phases=3 Bus1=200362596.1.2.3 Bus2=200362595.1.2.3 switch=y r1=0.001 x1=0.001 r0=0.001 x0=0.001 Length=0.001 units=km
New Line.164138249 phases=3 Bus1=164138252.1.2.3 Bus2=164138251.1.2.3 switch=y r1=0.001 x1=0.001 r0=0.001 x0=0.001 Length=0.001 units=km
New Line.164138303 phases=3 Bus1=164138306.1.2.3 Bus2=164138305.1.2.3 switch=y r1=0.001 x1=0.001 r0=0.001 x0=0.001 Length=0.001 units=km
New Line.143587237 phases=3 Bus1=143587239.1.2.3 Bus2=143587240.1.2.3 switch=y r1=0.001 x1=0.001 r0=0.001 x0=0.001 Length=0.001 units=km
New Line.148779136 phases=3 Bus1=148779138.1.2.3 Bus2=148779139.1.2.3 switch=y r1=0.001 x1=0.001 r0=0.001 x0=0.001 Length=0.001 units=km
New Line.60462592$60462601 phases=3 Bus1=60462568.1.2.3 Bus2=60462567.1.2.3 switch=y r1=0.001 x1=0.001 r0=0.001 x0=0.001 Length=0.001 units=km
New Line.89894117 phases=3 Bus1=89894119.1.2.3 Bus2=89894120.1.2.3 switch=y r1=0.001 x1=0.001 r0=0.001 x0=0.001 Length=0.001 units=km
New Line.164138222 phases=3 Bus1=164138224.1.2.3 Bus2=164138225.1.2.3 switch=y r1=0.001 x1=0.001 r0=0.001 x0=0.001 Length=0.001 units=km
New Line.164138276 phases=3 Bus1=164138278.1.2.3 Bus2=164138279.1.2.3 switch=y r1=0.001 x1=0.001 r0=0.001 x0=0.001 Length=0.001 units=km
New Line.89893930$89893938 phases=3 Bus1=89893942.1.2.3 Bus2=89893934.1.2.3 switch=y r1=0.001 x1=0.001 r0=0.001 x0=0.001 Length=0.001 units=km
New Line.181844144 phases=3 Bus1=181844146.1.2.3 Bus2=181844147.1.2.3 switch=y r1=0.001 x1=0.001 r0=0.001 x0=0.001 Length=0.001 units=km
New Line.133384588 phases=3 Bus1=133384590.1.2.3 Bus2=133384591.1.2.3 switch=y r1=0.001 x1=0.001 r0=0.001 x0=0.001 Length=0.001 units=km
New Line.89893946$89893930 phases=3 Bus1=89893934.1.2.3 Bus2=89893950.1.2.3 switch=y r1=0.001 x1=0.001 r0=0.001 x0=0.001 Length=0.001 units=km
New Line.PME2177-2$PME2177-4 phases=3 Bus1=60509121.1.2.3 Bus2=60509122.1.2.3 switch=y r1=0.001 x1=0.001 r0=0.001 x0=0.001 Length=0.001 units=km
New Line.89893922$89893946 phases=3 Bus1=89893950.1.2.3 Bus2=89893926.1.2.3 switch=y r1=0.001 x1=0.001 r0=0.001 x0=0.001 Length=0.001 units=km
New Line.PMH3430-3$PMH3430-4 phases=3 Bus1=60507294.1.2.3 Bus2=60507295.1.2.3 switch=y r1=0.001 x1=0.001 r0=0.001 x0=0.001 Length=0.001 units=km
New Line.108697130$P5083267 phases=3 Bus1=108697123.1.2.3 Bus2=108697124.1.2.3 switch=y r1=0.001 x1=0.001 r0=0.001 x0=0.001 Length=0.001 units=km
New Line.89894149 phases=3 Bus1=89894152.1.2.3 Bus2=89894151.1.2.3 switch=y r1=0.001 x1=0.001 r0=0.001 x0=0.001 Length=0.001 units=km
New Line.98552580 phases=3 Bus1=98552583.1.2.3 Bus2=98552582.1.2.3 switch=y r1=0.001 x1=0.001 r0=0.001 x0=0.001 Length=0.001 units=km
New Line.89894085 phases=3 Bus1=89894087.1.2.3 Bus2=89894088.1.2.3 switch=y r1=0.001 x1=0.001 r0=0.001 x0=0.001 Length=0.001 units=km
New Line.201527708 phases=3 Bus1=201527710.1.2.3 Bus2=201527711.1.2.3 switch=y r1=0.001 x1=0.001 r0=0.001 x0=0.001 Length=0.001 units=km
New Line.98552607 phases=3 Bus1=98552609.1.2.3 Bus2=98552610.1.2.3 switch=y r1=0.001 x1=0.001 r0=0.001 x0=0.001 Length=0.001 units=km
New Line.133384556 phases=3 Bus1=133384559.1.2.3 Bus2=133384558.1.2.3 switch=y r1=0.001 x1=0.001 r0=0.001 x0=0.001 Length=0.001 units=km
New Line.133384529 phases=3 Bus1=133384531.1.2.3 Bus2=133384532.1.2.3 switch=y r1=0.001 x1=0.001 r0=0.001 x0=0.001 Length=0.001 units=km
New Line.142152871 phases=3 Bus1=142152873.1.2.3 Bus2=142152874.1.2.3 switch=y r1=0.001 x1=0.001 r0=0.001 x0=0.001 Length=0.001 units=km
New Line.91309683 phases=3 Bus1=91309685.1.2.3 Bus2=91309686.1.2.3 switch=y r1=0.001 x1=0.001 r0=0.001 x0=0.001 Length=0.001 units=km
New Line.136406913 phases=3 Bus1=136406915.1.2.3 Bus2=136406916.1.2.3 switch=y r1=0.001 x1=0.001 r0=0.001 x0=0.001 Length=0.001 units=km
New Line.91309710 phases=3 Bus1=91309713.1.2.3 Bus2=91309712.1.2.3 switch=y r1=0.001 x1=0.001 r0=0.001 x0=0.001 Length=0.001 units=km
New Line.138297404 phases=3 Bus1=138297406.1.2.3 Bus2=138297407.1.2.3 switch=y r1=0.001 x1=0.001 r0=0.001 x0=0.001 Length=0.001 units=km
New Line.138297431 phases=3 Bus1=138297434.1.2.3 Bus2=138297433.1.2.3 switch=y r1=0.001 x1=0.001 r0=0.001 x0=0.001 Length=0.001 units=km
New Line.60508728 phases=3 Bus1=60508730.1.2.3 Bus2=60508731.1.2.3 switch=y r1=0.001 x1=0.001 r0=0.001 x0=0.001 Length=0.001 units=km
New Line.PME3649-3$PME3649-4 phases=3 Bus1=28291462.1.2.3 Bus2=-77777728291462.1.2.3 switch=y r1=0.001 x1=0.001 r0=0.001 x0=0.001 Length=0.001 units=km
New Line.5472231:GS4814-1 phases=3 Bus1=60507125.1.2.3 Bus2=60507111.1.2.3 switch=y r1=0.001 x1=0.001 r0=0.001 x0=0.001 Length=0.001 units=km
New Line.5188020:GS2566-4 phases=3 Bus1=231769288.1.2.3 Bus2=231769253.1.2.3 switch=y r1=0.001 x1=0.001 r0=0.001 x0=0.001 Length=0.001 units=km
New Line.5472231:GS4814-2 phases=3 Bus1=60507112.1.2.3 Bus2=60507133.1.2.3 switch=y r1=0.001 x1=0.001 r0=0.001 x0=0.001 Length=0.001 units=km
New Line.1839588E:PS2213 phases=3 Bus1=60510291.1.2.3 Bus2=60510290.1.2.3 switch=y r1=0.001 x1=0.001 r0=0.001 x0=0.001 Length=0.001 units=km
New Line.5472231:GS4814-3 phases=3 Bus1=60507118.1.2.3 Bus2=60507141.1.2.3 switch=y r1=0.001 x1=0.001 r0=0.001 x0=0.001 Length=0.001 units=km
New Line.5082006:GS6451-2 phases=3 Bus1=187570836.1.2.3 Bus2=187570801.1.2.3 switch=y r1=0.001 x1=0.001 r0=0.001 x0=0.001 Length=0.001 units=km
New Line.5188020:GS2566-3 phases=3 Bus1=231769247.1.2.3 Bus2=231769279.1.2.3 switch=y r1=0.001 x1=0.001 r0=0.001 x0=0.001 Length=0.001 units=km
New Line.5188020:GS2566-2 phases=3 Bus1=231769241.1.2.3 Bus2=231769270.1.2.3 switch=y r1=0.001 x1=0.001 r0=0.001 x0=0.001 Length=0.001 units=km
New Line.5082006:GS6451-1 phases=3 Bus1=187570800.1.2.3 Bus2=187570827.1.2.3 switch=y r1=0.001 x1=0.001 r0=0.001 x0=0.001 Length=0.001 units=km
New Line.5082006:GS6451-4 phases=3 Bus1=187570813.1.2.3 Bus2=187570854.1.2.3 switch=y r1=0.001 x1=0.001 r0=0.001 x0=0.001 Length=0.001 units=km
New Line.5082006:GS6451-5 phases=3 Bus1=187570819.1.2.3 Bus2=187570863.1.2.3 switch=y r1=0.001 x1=0.001 r0=0.001 x0=0.001 Length=0.001 units=km
New Line.5188319:RCS2005-4 phases=3 Bus1=60462585.1.2.3 Bus2=60462568.1.2.3 switch=y r1=0.001 x1=0.001 r0=0.001 x0=0.001 Length=0.001 units=km
New Line.5188319:RCS2005-1 phases=3 Bus1=60462568.1.2.3 Bus2=60462603.1.2.3 switch=y r1=0.001 x1=0.001 r0=0.001 x0=0.001 Length=0.001 units=km
New Line.5188319:RCS2005-3 phases=3 Bus1=60462567.1.2.3 Bus2=60462576.1.2.3 switch=y r1=0.001 x1=0.001 r0=0.001 x0=0.001 Length=0.001 units=km
New Line.5188319:RCS2005-2 phases=3 Bus1=60462567.1.2.3 Bus2=60462594.1.2.3 switch=y r1=0.001 x1=0.001 r0=0.001 x0=0.001 Length=0.001 units=km
New Line.5529101:J101A-4 phases=3 Bus1=89893941.1.2.3 Bus2=89893942.1.2.3 switch=y r1=0.001 x1=0.001 r0=0.001 x0=0.001 Length=0.001 units=km
New Line.5305792:PME3649-3 phases=3 Bus1=28291471.1.2.3 Bus2=28291462.1.2.3 switch=y r1=0.001 x1=0.001 r0=0.001 x0=0.001 Length=0.001 units=km enabled=false
New Line.5188315:PME2177-3 phases=3 Bus1=60509130.1.2.3 Bus2=60509121.1.2.3 switch=y r1=0.001 x1=0.001 r0=0.001 x0=0.001 Length=0.001 units=km
New Line.5529101:J101A-3 phases=3 Bus1=89893934.1.2.3 Bus2=89893933.1.2.3 switch=y r1=0.001 x1=0.001 r0=0.001 x0=0.001 Length=0.001 units=km
New Line.5529101:J101A-2 phases=3 Bus1=89893950.1.2.3 Bus2=89893949.1.2.3 switch=y r1=0.001 x1=0.001 r0=0.001 x0=0.001 Length=0.001 units=km
New Line.5188315:PME2177-4 phases=3 Bus1=60509122.1.2.3 Bus2=60509139.1.2.3 switch=y r1=0.001 x1=0.001 r0=0.001 x0=0.001 Length=0.001 units=km
New Line.5188315:PME2177-1 phases=3 Bus1=60509122.1.2.3 Bus2=60509157.1.2.3 switch=y r1=0.001 x1=0.001 r0=0.001 x0=0.001 Length=0.001 units=km
New Line.5529101:J101A-1 phases=3 Bus1=89893926.1.2.3 Bus2=89893925.1.2.3 switch=y r1=0.001 x1=0.001 r0=0.001 x0=0.001 Length=0.001 units=km
New Line.5082328:BS2328-T phases=3 Bus1=60507455.1.2.3 Bus2=60507448.1.2.3 switch=y r1=0.001 x1=0.001 r0=0.001 x0=0.001 Length=0.001 units=km
New Line.5312548:PMH3430-2 phases=3 Bus1=60507321.1.2.3 Bus2=60507294.1.2.3 switch=y r1=0.001 x1=0.001 r0=0.001 x0=0.001 Length=0.001 units=km
New Line.5082328:BS2328-R phases=3 Bus1=60507448.1.2.3 Bus2=60507447.1.2.3 switch=y r1=0.001 x1=0.001 r0=0.001 x0=0.001 Length=0.001 units=km
New Line.5082328:BS2328-L phases=3 Bus1=60507448.1.2.3 Bus2=60507464.1.2.3 switch=y r1=0.001 x1=0.001 r0=0.001 x0=0.001 Length=0.001 units=km
New Line.5312548:PMH3430-3 phases=3 Bus1=60507294.1.2.3 Bus2=60507303.1.2.3 switch=y r1=0.001 x1=0.001 r0=0.001 x0=0.001 Length=0.001 units=km
New Line.5081881:P5081881-1 phases=3 Bus1=108697392.1.2.3 Bus2=108697393.1.2.3 switch=y r1=0.001 x1=0.001 r0=0.001 x0=0.001 Length=0.001 units=km
New Line.5312548:PMH3430-4 phases=3 Bus1=60507295.1.2.3 Bus2=60507312.1.2.3 switch=y r1=0.001 x1=0.001 r0=0.001 x0=0.001 Length=0.001 units=km
New Line.5312548:PMH3430-1 phases=3 Bus1=60507295.1.2.3 Bus2=60507330.1.2.3 switch=y r1=0.001 x1=0.001 r0=0.001 x0=0.001 Length=0.001 units=km
New Line.5312549:P5312549-1 phases=3 Bus1=108697282.1.2.3 Bus2=108697283.1.2.3 switch=y r1=0.001 x1=0.001 r0=0.001 x0=0.001 Length=0.001 units=km
New Line.5529100:P5529100-1 phases=3 Bus1=91329148.1.2.3 Bus2=91329149.1.2.3 switch=y r1=0.001 x1=0.001 r0=0.001 x0=0.001 Length=0.001 units=km
New Line.5084472:P5084472-B phases=3 Bus1=154339798.1.2.3 Bus2=154339797.1.2.3 switch=y r1=0.001 x1=0.001 r0=0.001 x0=0.001 Length=0.001 units=km
New Line.5084472:P5084472-T phases=3 Bus1=154339798.1.2.3 Bus2=154339806.1.2.3 switch=y r1=0.001 x1=0.001 r0=0.001 x0=0.001 Length=0.001 units=km
New Line.5510832:P5510832-1 phases=3 Bus1=60509303.1.2.3 Bus2=60509304.1.2.3 switch=y r1=0.001 x1=0.001 r0=0.001 x0=0.001 Length=0.001 units=km
New Line.5529103:P5529103-1 phases=3 Bus1=98552530.1.2.3 Bus2=98552531.1.2.3 switch=y r1=0.001 x1=0.001 r0=0.001 x0=0.001 Length=0.001 units=km
New Line.5187973:GS5833-4 phases=3 Bus1=230962022.1.2.3 Bus2=230961987.1.2.3 switch=y r1=0.001 x1=0.001 r0=0.001 x0=0.001 Length=0.001 units=km
New Line.5187973:GS5833-3 phases=3 Bus1=230961981.1.2.3 Bus2=230962013.1.2.3 switch=y r1=0.001 x1=0.001 r0=0.001 x0=0.001 Length=0.001 units=km
New Line.5187973:GS5833-2 phases=3 Bus1=230961975.1.2.3 Bus2=230962004.1.2.3 switch=y r1=0.001 x1=0.001 r0=0.001 x0=0.001 Length=0.001 units=km
New Line.5187973:GS5833-1 phases=3 Bus1=230961974.1.2.3 Bus2=230961995.1.2.3 switch=y r1=0.001 x1=0.001 r0=0.001 x0=0.001 Length=0.001 units=km
New Line.5472523:P5472523-1 phases=3 Bus1=95361389.1.2.3 Bus2=95361390.1.2.3 switch=y r1=0.001 x1=0.001 r0=0.001 x0=0.001 Length=0.001 units=km
New Line.5188445:P5188445-1 phases=3 Bus1=154339896.1.2.3 Bus2=154339897.1.2.3 switch=y r1=0.001 x1=0.001 r0=0.001 x0=0.001 Length=0.001 units=km
New Line.5082503:P5082503-1 phases=3 Bus1=60463092.1.2.3 Bus2=60463093.1.2.3 switch=y r1=0.001 x1=0.001 r0=0.001 x0=0.001 Length=0.001 units=km
New Line.5188464:P5188464-1 phases=3 Bus1=60507030.1.2.3 Bus2=60507031.1.2.3 switch=y r1=0.001 x1=0.001 r0=0.001 x0=0.001 Length=0.001 units=km
New Line.5143705:P5143705-1 phases=3 Bus1=110276302.1.2.3 Bus2=110276303.1.2.3 switch=y r1=0.001 x1=0.001 r0=0.001 x0=0.001 Length=0.001 units=km
New Line.5143704:P5143704-A phases=3 Bus1=148779190.1.2.3 Bus2=148779191.1.2.3 switch=y r1=0.001 x1=0.001 r0=0.001 x0=0.001 Length=0.001 units=km
New Line.5143704:P5143704-T phases=3 Bus1=148779191.1.2.3 Bus2=148779199.1.2.3 switch=y r1=0.001 x1=0.001 r0=0.001 x0=0.001 Length=0.001 units=km
New Line.5143704:P5143704-B phases=3 Bus1=148779191.1.2.3 Bus2=148779208.1.2.3 switch=y r1=0.001 x1=0.001 r0=0.001 x0=0.001 Length=0.001 units=km
New Line.5530850:P5530850-1 phases=3 Bus1=110276231.1.2.3 Bus2=110276232.1.2.3 switch=y r1=0.001 x1=0.001 r0=0.001 x0=0.001 Length=0.001 units=km
New Line.5654051:P5654051-1 phases=3 Bus1=191379449.1.2.3 Bus2=191379450.1.2.3 switch=y r1=0.001 x1=0.001 r0=0.001 x0=0.001 Length=0.001 units=km
New Line.5654052:P5654052-1 phases=3 Bus1=191379490.1.2.3 Bus2=191379491.1.2.3 switch=y r1=0.001 x1=0.001 r0=0.001 x0=0.001 Length=0.001 units=km
New Line.5143703:P5143703-1 phases=3 Bus1=110276352.1.2.3 Bus2=110276353.1.2.3 switch=y r1=0.001 x1=0.001 r0=0.001 x0=0.001 Length=0.001 units=km
New Line.5593779:P5593779-1 phases=3 Bus1=148779090.1.2.3 Bus2=148779091.1.2.3 switch=y r1=0.001 x1=0.001 r0=0.001 x0=0.001 Length=0.001 units=km
New Line.5603754:P5603754-1 phases=3 Bus1=139147902.1.2.3 Bus2=139147903.1.2.3 switch=y r1=0.001 x1=0.001 r0=0.001 x0=0.001 Length=0.001 units=km
New Line.5639639:P5639639-1 phases=3 Bus1=164138164.1.2.3 Bus2=164138165.1.2.3 switch=y r1=0.001 x1=0.001 r0=0.001 x0=0.001 Length=0.001 units=km
New Line.5641824:P5641824-1 phases=3 Bus1=166629334.1.2.3 Bus2=166629335.1.2.3 switch=y r1=0.001 x1=0.001 r0=0.001 x0=0.001 Length=0.001 units=km
New Line.5084465:P5084465-1 phases=3 Bus1=60463031.1.2.3 Bus2=60463032.1.2.3 switch=y r1=0.001 x1=0.001 r0=0.001 x0=0.001 Length=0.001 units=km
New Line.5385500:P5385500-A phases=3 Bus1=154339697.1.2.3 Bus2=154339698.1.2.3 switch=y r1=0.001 x1=0.001 r0=0.001 x0=0.001 Length=0.001 units=km
New Line.5385500:P5385500-T phases=3 Bus1=154339698.1.2.3 Bus2=154339706.1.2.3 switch=y r1=0.001 x1=0.001 r0=0.001 x0=0.001 Length=0.001 units=km
New Line.5385500:P5385500-B phases=3 Bus1=154339698.1.2.3 Bus2=154339715.1.2.3 switch=y r1=0.001 x1=0.001 r0=0.001 x0=0.001 Length=0.001 units=km
New Line.5188314:P5188314-1 phases=3 Bus1=60463636.1.2.3 Bus2=60463637.1.2.3 switch=y r1=0.001 x1=0.001 r0=0.001 x0=0.001 Length=0.001 units=km
New Line.5188318:P5188318-1 phases=3 Bus1=60463540.1.2.3 Bus2=60463541.1.2.3 switch=y r1=0.001 x1=0.001 r0=0.001 x0=0.001 Length=0.001 units=km
New Line.5188316:P5188316-1 phases=3 Bus1=60463588.1.2.3 Bus2=60463589.1.2.3 switch=y r1=0.001 x1=0.001 r0=0.001 x0=0.001 Length=0.001 units=km
New Line.5124761:P5124761-1 phases=3 Bus1=60463409.1.2.3 Bus2=60463410.1.2.3 switch=y r1=0.001 x1=0.001 r0=0.001 x0=0.001 Length=0.001 units=km
New Line.5082369:P5082369-1 phases=3 Bus1=108697227.1.2.3 Bus2=108697228.1.2.3 switch=y r1=0.001 x1=0.001 r0=0.001 x0=0.001 Length=0.001 units=km
New Line.5124763:P5124763-1 phases=3 Bus1=108697337.1.2.3 Bus2=108697338.1.2.3 switch=y r1=0.001 x1=0.001 r0=0.001 x0=0.001 Length=0.001 units=km
New Line.5083085:P5083085-1 phases=3 Bus1=136406960.1.2.3 Bus2=136406961.1.2.3 switch=y r1=0.001 x1=0.001 r0=0.001 x0=0.001 Length=0.001 units=km
New Line.5125049:P5125049-A phases=3 Bus1=154339936.1.2.3 Bus2=154339937.1.2.3 switch=y r1=0.001 x1=0.001 r0=0.001 x0=0.001 Length=0.001 units=km
New Line.5125049:P5125049-T phases=3 Bus1=154339937.1.2.3 Bus2=154339945.1.2.3 switch=y r1=0.001 x1=0.001 r0=0.001 x0=0.001 Length=0.001 units=km
New Line.5125049:P5125049-B phases=3 Bus1=154339937.1.2.3 Bus2=154339954.1.2.3 switch=y r1=0.001 x1=0.001 r0=0.001 x0=0.001 Length=0.001 units=km
New Line.5188577:BS1318-T phases=3 Bus1=60508314.1.2.3 Bus2=60508307.1.2.3 switch=y r1=0.001 x1=0.001 r0=0.001 x0=0.001 Length=0.001 units=km
New Line.5188577:BS1318-R phases=3 Bus1=60508307.1.2.3 Bus2=60508306.1.2.3 switch=y r1=0.001 x1=0.001 r0=0.001 x0=0.001 Length=0.001 units=km
New Line.5188577:BS1318-L phases=3 Bus1=60508307.1.2.3 Bus2=60508323.1.2.3 switch=y r1=0.001 x1=0.001 r0=0.001 x0=0.001 Length=0.001 units=km
New Line.1839599E:206506093 phases=3 Bus1=206506095.1.2.3 Bus2=206506096.1.2.3 switch=y r1=0.001 x1=0.001 r0=0.001 x0=0.001 Length=0.001 units=km
New Line.1916575E:60463135 phases=3 Bus1=60463137.1.2.3 Bus2=60463138.1.2.3 switch=y r1=0.001 x1=0.001 r0=0.001 x0=0.001 Length=0.001 units=km
New Line.CAB_1839599E:1839599E phases=3 Bus1=206506112.1.2.3 Bus2=206506095.1.2.3 switch=y r1=0.001 x1=0.001 r0=0.001 x0=0.001 Length=0.001 units=km
New Line.CAB_1916575E:1916575E phases=3 Bus1=60463155.1.2.3 Bus2=60463137.1.2.3 switch=y r1=0.001 x1=0.001 r0=0.001 x0=0.001 Length=0.001 units=km
New Line.5124826:P5124826-A phases=3 Bus1=167036789.1.2.3 Bus2=167036790.1.2.3 switch=y r1=0.001 x1=0.001 r0=0.001 x0=0.001 Length=0.001 units=km
New Line.5124826:P5124826-T phases=3 Bus1=167036790.1.2.3 Bus2=167036798.1.2.3 switch=y r1=0.001 x1=0.001 r0=0.001 x0=0.001 Length=0.001 units=km
New Line.5124826:P5124826-B phases=3 Bus1=167036790.1.2.3 Bus2=167036807.1.2.3 switch=y r1=0.001 x1=0.001 r0=0.001 x0=0.001 Length=0.001 units=km
New Line.5385501:P5385501-1 phases=3 Bus1=60463684.1.2.3 Bus2=60463685.1.2.3 switch=y r1=0.001 x1=0.001 r0=0.001 x0=0.001 Length=0.001 units=km
New Line.5142890:P5142890-1 phases=3 Bus1=136407010.1.2.3 Bus2=136407011.1.2.3 switch=y r1=0.001 x1=0.001 r0=0.001 x0=0.001 Length=0.001 units=km
New Line.5124480:P5124480-1 phases=3 Bus1=136406869.1.2.3 Bus2=136406870.1.2.3 switch=y r1=0.001 x1=0.001 r0=0.001 x0=0.001 Length=0.001 units=km
New Line.5188578:P5188578-1 phases=3 Bus1=167036992.1.2.3 Bus2=167036993.1.2.3 switch=y r1=0.001 x1=0.001 r0=0.001 x0=0.001 Length=0.001 units=km
New Line.1839605E:1839605E phases=3 Bus1=60463014.1.2.3 Bus2=60463015.1.2.3 switch=y r1=0.001 x1=0.001 r0=0.001 x0=0.001 Length=0.001 units=km
New Line.1839597E:1839597E phases=3 Bus1=60507250.1.2.3 Bus2=60507251.1.2.3 switch=y r1=0.001 x1=0.001 r0=0.001 x0=0.001 Length=0.001 units=km
New Line.1839606E:1839606E phases=3 Bus1=60463466.1.2.3 Bus2=60463467.1.2.3 switch=y r1=0.001 x1=0.001 r0=0.001 x0=0.001 Length=0.001 units=km
New Line.1914921E:1914921E phases=3 Bus1=60463523.1.2.3 Bus2=60463524.1.2.3 switch=y r1=0.001 x1=0.001 r0=0.001 x0=0.001 Length=0.001 units=km
New Line.1916576E:1916576E phases=3 Bus1=60462985.1.2.3 Bus2=60462984.1.2.3 switch=y r1=0.001 x1=0.001 r0=0.001 x0=0.001 Length=0.001 units=km
New Line.1839589E:1839589E phases=3 Bus1=60507694.1.2.3 Bus2=60507695.1.2.3 switch=y r1=0.001 x1=0.001 r0=0.001 x0=0.001 Length=0.001 units=km
New Line.1839590E:1839590E phases=3 Bus1=60507707.1.2.3 Bus2=60507708.1.2.3 switch=y r1=0.001 x1=0.001 r0=0.001 x0=0.001 Length=0.001 units=km
New Line.1839592E:FD00827 phases=3 Bus1=60508106.1.2.3 Bus2=60508107.1.2.3 switch=y r1=0.001 x1=0.001 r0=0.001 x0=0.001 Length=0.001 units=km
New Line.1839048E:1839048E phases=3 Bus1=60507263.1.2.3 Bus2=60507264.1.2.3 switch=y r1=0.001 x1=0.001 r0=0.001 x0=0.001 Length=0.001 units=km
New Line.1916578E:1916578EPH phases=3 Bus1=60463248.1.2.3 Bus2=60463249.1.2.3 switch=y r1=0.001 x1=0.001 r0=0.001 x0=0.001 Length=0.001 units=km
New Line.1839600E:1839600E phases=3 Bus1=60463453.1.2.3 Bus2=60463454.1.2.3 switch=y r1=0.001 x1=0.001 r0=0.001 x0=0.001 Length=0.001 units=km
New Line.1916583E:1916583E phases=3 Bus1=60507074.1.2.3 Bus2=60507075.1.2.3 switch=y r1=0.001 x1=0.001 r0=0.001 x0=0.001 Length=0.001 units=km
New Line.1839602E:1839602E phases=3 Bus1=60463075.1.2.3 Bus2=60463076.1.2.3 switch=y r1=0.001 x1=0.001 r0=0.001 x0=0.001 Length=0.001 units=km
New Line.1810027E:1810027E phases=3 Bus1=60508145.1.2.3 Bus2=60508146.1.2.3 switch=y r1=0.001 x1=0.001 r0=0.001 x0=0.001 Length=0.001 units=km
New Line.1810029E:FD00829 phases=3 Bus1=60508812.1.2.3 Bus2=60508813.1.2.3 switch=y r1=0.001 x1=0.001 r0=0.001 x0=0.001 Length=0.001 units=km
New Line.1810026E:FD00830 phases=3 Bus1=60508119.1.2.3 Bus2=60508120.1.2.3 switch=y r1=0.001 x1=0.001 r0=0.001 x0=0.001 Length=0.001 units=km
New Line.1810034E:FD00828 phases=3 Bus1=60508132.1.2.3 Bus2=60508133.1.2.3 switch=y r1=0.001 x1=0.001 r0=0.001 x0=0.001 Length=0.001 units=km
New Line.5084472:P5084472-A phases=3 Bus1=154339814.1.2.3 Bus2=154339798.1.2.3 switch=y r1=0.001 x1=0.001 r0=0.001 x0=0.001 Length=0.001 units=km
New Line.5142691:P5142691-1 phases=3 Bus1=154340036.1.2.3 Bus2=154340037.1.2.3 switch=y r1=0.001 x1=0.001 r0=0.001 x0=0.001 Length=0.001 units=km
New Line.5124827:P5124827-A phases=3 Bus1=154340088.1.2.3 Bus2=154340089.1.2.3 switch=y r1=0.001 x1=0.001 r0=0.001 x0=0.001 Length=0.001 units=km
New Line.5124827:P5124827-T phases=3 Bus1=154340089.1.2.3 Bus2=154340097.1.2.3 switch=y r1=0.001 x1=0.001 r0=0.001 x0=0.001 Length=0.001 units=km
New Line.5143136:P5143136-1 phases=3 Bus1=167036749.1.2.3 Bus2=167036750.1.2.3 switch=y r1=0.001 x1=0.001 r0=0.001 x0=0.001 Length=0.001 units=km
New Line.5487157:P5487157-1 phases=3 Bus1=167036708.1.2.3 Bus2=167036709.1.2.3 switch=y r1=0.001 x1=0.001 r0=0.001 x0=0.001 Length=0.001 units=km
New Line.5082005:RCS4403-4 phases=3 Bus1=170147890.1.2.3 Bus2=-777777170147890.1.2.3 switch=y r1=0.001 x1=0.001 r0=0.001 x0=0.001 Length=0.001 units=km enabled=false
New Line.5204235:GS3194-1 phases=3 Bus1=54593337.1.2.3 Bus2=-77777754593337.1.2.3 switch=y r1=0.001 x1=0.001 r0=0.001 x0=0.001 Length=0.001 units=km enabled=false
New Line.TAURUS$ASTROLOGY_GS2566-1$GS2566-1 phases=3 Bus1=231769261.1.2.3 Bus2=-777777231769261.1.2.3 switch=y r1=0.001 x1=0.001 r0=0.001 x0=0.001 Length=0.001 units=km
New Line.TAURUS$ARIES_PME2177-2$PME2177-2 phases=3 Bus1=60509148.1.2.3 Bus2=-77777760509148.1.2.3 switch=y r1=0.001 x1=0.001 r0=0.001 x0=0.001 Length=0.001 units=km
New Line.TAURUS$AQUARIUS_PS1731$PS1731 phases=3 Bus1=27564035.1.2.3 Bus2=-77777727564035.1.2.3 switch=y r1=0.001 x1=0.001 r0=0.001 x0=0.001 Length=0.001 units=km
New Line.TAURUS$HALEY_RCS1760$RCS1760 phases=3 Bus1=59666523.1.2.3 Bus2=-77777759666523.1.2.3 switch=y r1=0.001 x1=0.001 r0=0.001 x0=0.001 Length=0.001 units=km
New Line.5082006:GS6451-3 phases=3 Bus1=187570807.1.2.3 Bus2=187570845.1.2.3 switch=y r1=0.001 x1=0.001 r0=0.001 x0=0.001 Length=0.001 units=km enabled=false
New Line.5124827:P5124827-B phases=3 Bus1=154340089.1.2.3 Bus2=154340106.1.2.3 switch=y r1=0.001 x1=0.001 r0=0.001 x0=0.001 Length=0.001 units=km enabled=false

! Loads
New Load.5188318_0 Bus1=-99999960463541.1.0 phases=1 kV=0.159926 kW=0 kvar=0 model=1
New Load.5188318_1 Bus1=-99999960463541.2.0 phases=1 kV=0.159926 kW=0 kvar=0 model=1
New Load.5188318_2 Bus1=-99999960463541.3.0 phases=1 kV=0.159926 kW=0 kvar=0 model=1
New Load.5188316_0 Bus1=-99999960463589.1.0 phases=1 kV=0.159926 kW=0 kvar=0 model=1
New Load.5188316_1 Bus1=-99999960463589.2.0 phases=1 kV=0.159926 kW=0 kvar=0 model=1
New Load.5188316_2 Bus1=-99999960463589.3.0 phases=1 kV=0.159926 kW=0 kvar=0 model=1
New Load.5143136_0 Bus1=-999999167036750.1.0 phases=1 kV=0.159926 kW=0 kvar=0 model=1
New Load.5143136_1 Bus1=-999999167036750.2.0 phases=1 kV=0.159926 kW=0 kvar=0 model=1
New Load.5143136_2 Bus1=-999999167036750.3.0 phases=1 kV=0.159926 kW=0 kvar=0 model=1
New Load.5530850_0 Bus1=-999999110276232.1.0 phases=1 kV=0.069282 kW=0 kvar=0 model=1
New Load.5530850_1 Bus1=-999999110276232.2.0 phases=1 kV=0.069282 kW=0 kvar=0 model=1
New Load.5530850_2 Bus1=-999999110276232.3.0 phases=1 kV=0.069282 kW=0 kvar=0 model=1
New Load.5084465_0 Bus1=-99999960463032.1.0 phases=1 kV=0.159926 kW=0 kvar=0 model=1
New Load.5084465_1 Bus1=-99999960463032.2.0 phases=1 kV=0.159926 kW=0 kvar=0 model=1
New Load.5084465_2 Bus1=-99999960463032.3.0 phases=1 kV=0.159926 kW=0 kvar=0 model=1
New Load.5142890_0 Bus1=-999999136407011.1.0 phases=1 kV=0.159926 kW=0 kvar=0 model=1
New Load.5142890_1 Bus1=-999999136407011.2.0 phases=1 kV=0.159926 kW=0 kvar=0 model=1
New Load.5142890_2 Bus1=-999999136407011.3.0 phases=1 kV=0.159926 kW=0 kvar=0 model=1
New Load.5143705_0 Bus1=-999999110276303.1.2 phases=1 kV=0.069282 kW=0 kvar=0 model=1
New Load.5143705_1 Bus1=-999999110276303.2.3 phases=1 kV=0.069282 kW=0 kvar=0 model=1
New Load.5143705_2 Bus1=-999999110276303.3.1 phases=1 kV=0.069282 kW=0 kvar=0 model=1
New Load.5188314_0 Bus1=-99999960463637.1.0 phases=1 kV=0.159926 kW=0 kvar=0 model=1
New Load.5188314_1 Bus1=-99999960463637.2.0 phases=1 kV=0.159926 kW=0 kvar=0 model=1
New Load.5188314_2 Bus1=-99999960463637.3.0 phases=1 kV=0.159926 kW=0 kvar=0 model=1
New Load.1916575E_0 Bus1=-99999960463138.3.0 phases=1 kV=0.069282 kW=0 kvar=0 model=1
New Load.1916575E_1 Bus1=-99999960463138.1.0 phases=1 kV=0.069282 kW=0 kvar=0 model=1
New Load.5654052_0 Bus1=-999999191379491.1.2 phases=1 kV=0.069282 kW=0 kvar=0 model=1
New Load.5654052_1 Bus1=-999999191379491.2.3 phases=1 kV=0.069282 kW=0 kvar=0 model=1
New Load.5654052_2 Bus1=-999999191379491.3.1 phases=1 kV=0.069282 kW=0 kvar=0 model=1
New Load.5654051_0 Bus1=-999999191379450.1.2 phases=1 kV=0.069282 kW=0 kvar=0 model=1
New Load.5654051_1 Bus1=-999999191379450.2.3 phases=1 kV=0.069282 kW=0 kvar=0 model=1
New Load.5654051_2 Bus1=-999999191379450.3.1 phases=1 kV=0.069282 kW=0 kvar=0 model=1
New Load.5143704_0 Bus1=-999999148779199.1.2 phases=1 kV=0.069282 kW=0 kvar=0 model=1
New Load.5143704_1 Bus1=-999999148779199.2.3 phases=1 kV=0.069282 kW=0 kvar=0 model=1
New Load.5143704_2 Bus1=-999999148779199.3.1 phases=1 kV=0.069282 kW=0 kvar=0 model=1
New Load.5510832_0 Bus1=-99999960509304.1.0 phases=1 kV=0.159926 kW=0 kvar=0 model=1
New Load.5510832_1 Bus1=-99999960509304.2.0 phases=1 kV=0.159926 kW=0 kvar=0 model=1
New Load.5510832_2 Bus1=-99999960509304.3.0 phases=1 kV=0.159926 kW=0 kvar=0 model=1
New Load.5084472_0 Bus1=-999999154339806.1.0 phases=1 kV=0.069282 kW=0 kvar=0 model=1
New Load.5084472_1 Bus1=-999999154339806.2.0 phases=1 kV=0.069282 kW=0 kvar=0 model=1
New Load.5084472_2 Bus1=-999999154339806.3.0 phases=1 kV=0.069282 kW=0 kvar=0 model=1
New Load.5529103_0 Bus1=-99999998552531.1.0 phases=1 kV=0.069282 kW=0 kvar=0 model=1
New Load.5529103_1 Bus1=-99999998552531.2.0 phases=1 kV=0.069282 kW=0 kvar=0 model=1
New Load.5529103_2 Bus1=-99999998552531.3.0 phases=1 kV=0.069282 kW=0 kvar=0 model=1
New Load.5124827_0 Bus1=-999999154340097.1.0 phases=1 kV=0.069282 kW=0 kvar=0 model=1
New Load.5124827_1 Bus1=-999999154340097.2.0 phases=1 kV=0.069282 kW=0 kvar=0 model=1
New Load.5124827_2 Bus1=-999999154340097.3.0 phases=1 kV=0.069282 kW=0 kvar=0 model=1
New Load.5385501_0 Bus1=-99999960463685.1.0 phases=1 kV=0.069282 kW=0 kvar=0 model=1
New Load.5385501_1 Bus1=-99999960463685.2.0 phases=1 kV=0.069282 kW=0 kvar=0 model=1
New Load.5385501_2 Bus1=-99999960463685.3.0 phases=1 kV=0.069282 kW=0 kvar=0 model=1
New Load.5124826_0 Bus1=-999999167036798.1.0 phases=1 kV=0.069282 kW=0 kvar=0 model=1
New Load.5124826_1 Bus1=-999999167036798.2.0 phases=1 kV=0.069282 kW=0 kvar=0 model=1
New Load.5124826_2 Bus1=-999999167036798.3.0 phases=1 kV=0.069282 kW=0 kvar=0 model=1
New Load.5312549_0 Bus1=-999999108697283.1.0 phases=1 kV=0.159926 kW=0 kvar=0 model=1
New Load.5312549_1 Bus1=-999999108697283.2.0 phases=1 kV=0.159926 kW=0 kvar=0 model=1
New Load.5312549_2 Bus1=-999999108697283.3.0 phases=1 kV=0.159926 kW=0 kvar=0 model=1
New Load.5083085_0 Bus1=-999999136406961.1.0 phases=1 kV=0.069282 kW=0 kvar=0 model=1
New Load.5083085_1 Bus1=-999999136406961.2.0 phases=1 kV=0.069282 kW=0 kvar=0 model=1
New Load.5083085_2 Bus1=-999999136406961.3.0 phases=1 kV=0.069282 kW=0 kvar=0 model=1
New Load.5487157_0 Bus1=-999999167036709.1.0 phases=1 kV=0.159926 kW=0 kvar=0 model=1
New Load.5487157_1 Bus1=-999999167036709.2.0 phases=1 kV=0.159926 kW=0 kvar=0 model=1
New Load.5487157_2 Bus1=-999999167036709.3.0 phases=1 kV=0.159926 kW=0 kvar=0 model=1
New Load.5143703_0 Bus1=-999999110276353.1.0 phases=1 kV=0.069282 kW=0 kvar=0 model=1
New Load.5143703_1 Bus1=-999999110276353.2.0 phases=1 kV=0.069282 kW=0 kvar=0 model=1
New Load.5143703_2 Bus1=-999999110276353.3.0 phases=1 kV=0.069282 kW=0 kvar=0 model=1
New Load.5593779_0 Bus1=-999999148779091.1.0 phases=1 kV=0.159926 kW=0 kvar=0 model=1
New Load.5593779_1 Bus1=-999999148779091.2.0 phases=1 kV=0.159926 kW=0 kvar=0 model=1
New Load.5593779_2 Bus1=-999999148779091.3.0 phases=1 kV=0.159926 kW=0 kvar=0 model=1
New Load.1839599E_0 Bus1=-999999206506096.1.0 phases=1 kV=0.069282 kW=0 kvar=0 model=1
New Load.1839599E_1 Bus1=-999999206506096.2.0 phases=1 kV=0.069282 kW=0 kvar=0 model=1
New Load.5124761_0 Bus1=-99999960463410.1.0 phases=1 kV=0.159926 kW=0 kvar=0 model=1
New Load.5124761_1 Bus1=-99999960463410.2.0 phases=1 kV=0.159926 kW=0 kvar=0 model=1
New Load.5124761_2 Bus1=-99999960463410.3.0 phases=1 kV=0.159926 kW=0 kvar=0 model=1
New Load.5641824_0 Bus1=-999999166629335.1.0 phases=1 kV=0.159926 kW=0 kvar=0 model=1
New Load.5641824_1 Bus1=-999999166629335.2.0 phases=1 kV=0.159926 kW=0 kvar=0 model=1
New Load.5641824_2 Bus1=-999999166629335.3.0 phases=1 kV=0.159926 kW=0 kvar=0 model=1
New Load.5188445_0 Bus1=-999999154339897.1.0 phases=1 kV=0.159926 kW=0 kvar=0 model=1
New Load.5188445_1 Bus1=-999999154339897.2.0 phases=1 kV=0.159926 kW=0 kvar=0 model=1
New Load.5188445_2 Bus1=-999999154339897.3.0 phases=1 kV=0.159926 kW=0 kvar=0 model=1
New Load.5082503_0 Bus1=-99999960463093.1.0 phases=1 kV=0.159926 kW=0 kvar=0 model=1
New Load.5082503_1 Bus1=-99999960463093.2.0 phases=1 kV=0.159926 kW=0 kvar=0 model=1
New Load.5082503_2 Bus1=-99999960463093.3.0 phases=1 kV=0.159926 kW=0 kvar=0 model=1
New Load.5188464_0 Bus1=-99999960507031.1.0 phases=1 kV=0.159926 kW=0 kvar=0 model=1
New Load.5188464_1 Bus1=-99999960507031.2.0 phases=1 kV=0.159926 kW=0 kvar=0 model=1
New Load.5188464_2 Bus1=-99999960507031.3.0 phases=1 kV=0.159926 kW=0 kvar=0 model=1
New Load.5187973 Bus1=-999999138158136.1.0 phases=1 kV=0.138564 kW=0 kvar=0 model=1
New Load.5529100_0 Bus1=-99999991329149.1.0 phases=1 kV=0.069282 kW=0 kvar=0 model=1
New Load.5529100_1 Bus1=-99999991329149.2.0 phases=1 kV=0.069282 kW=0 kvar=0 model=1
New Load.5529100_2 Bus1=-99999991329149.3.0 phases=1 kV=0.069282 kW=0 kvar=0 model=1
New Load.5472684_0 Bus1=-99999960507868.1.0 phases=1 kV=0.159926 kW=0 kvar=0 model=1
New Load.5472684_1 Bus1=-99999960507868.2.0 phases=1 kV=0.159926 kW=0 kvar=0 model=1
New Load.5472684_2 Bus1=-99999960507868.3.0 phases=1 kV=0.159926 kW=0 kvar=0 model=1
New Load.5124763_0 Bus1=-999999108697338.1.0 phases=1 kV=0.159926 kW=0 kvar=0 model=1
New Load.5124763_1 Bus1=-999999108697338.2.0 phases=1 kV=0.159926 kW=0 kvar=0 model=1
New Load.5124763_2 Bus1=-999999108697338.3.0 phases=1 kV=0.159926 kW=0 kvar=0 model=1
New Load.5083267_0 Bus1=-999999108697124.1.0 phases=1 kV=0.159926 kW=0 kvar=0 model=1
New Load.5083267_1 Bus1=-999999108697124.2.0 phases=1 kV=0.159926 kW=0 kvar=0 model=1
New Load.5083267_2 Bus1=-999999108697124.3.0 phases=1 kV=0.159926 kW=0 kvar=0 model=1
New Load.5082369_0 Bus1=-999999108697228.1.0 phases=1 kV=0.159926 kW=0 kvar=0 model=1
New Load.5082369_1 Bus1=-999999108697228.2.0 phases=1 kV=0.159926 kW=0 kvar=0 model=1
New Load.5082369_2 Bus1=-999999108697228.3.0 phases=1 kV=0.159926 kW=0 kvar=0 model=1
New Load.5081881 Bus1=-999999108697393.2.0 phases=1 kV=0.069282 kW=0 kvar=0 model=1
New Load.5385500_0 Bus1=-999999154339706.1.0 phases=1 kV=0.069282 kW=0 kvar=0 model=1
New Load.5385500_1 Bus1=-999999154339706.2.0 phases=1 kV=0.069282 kW=0 kvar=0 model=1
New Load.5385500_2 Bus1=-999999154339706.3.0 phases=1 kV=0.069282 kW=0 kvar=0 model=1
New Load.5639639_0 Bus1=-999999164138165.1.0 phases=1 kV=0.069282 kW=0 kvar=0 model=1
New Load.5639639_1 Bus1=-999999164138165.2.0 phases=1 kV=0.069282 kW=0 kvar=0 model=1
New Load.5639639_2 Bus1=-999999164138165.3.0 phases=1 kV=0.069282 kW=0 kvar=0 model=1
New Load.5603754_0 Bus1=-999999139147903.1.0 phases=1 kV=0.069282 kW=0 kvar=0 model=1
New Load.5603754_1 Bus1=-999999139147903.2.0 phases=1 kV=0.069282 kW=0 kvar=0 model=1
New Load.5603754_2 Bus1=-999999139147903.3.0 phases=1 kV=0.069282 kW=0 kvar=0 model=1
New Load.5142691_0 Bus1=-999999154340037.1.0 phases=1 kV=0.159926 kW=0 kvar=0 model=1
New Load.5142691_1 Bus1=-999999154340037.2.0 phases=1 kV=0.159926 kW=0 kvar=0 model=1
New Load.5142691_2 Bus1=-999999154340037.3.0 phases=1 kV=0.159926 kW=0 kvar=0 model=1
New Load.5472523_0 Bus1=-99999995361390.1.0 phases=1 kV=0.159926 kW=0 kvar=0 model=1
New Load.5472523_1 Bus1=-99999995361390.2.0 phases=1 kV=0.159926 kW=0 kvar=0 model=1
New Load.5472523_2 Bus1=-99999995361390.3.0 phases=1 kV=0.159926 kW=0 kvar=0 model=1
New Load.5124480_0 Bus1=-999999136406870.1.0 phases=1 kV=0.069282 kW=0 kvar=0 model=1
New Load.5124480_1 Bus1=-999999136406870.2.0 phases=1 kV=0.069282 kW=0 kvar=0 model=1
New Load.5124480_2 Bus1=-999999136406870.3.0 phases=1 kV=0.069282 kW=0 kvar=0 model=1
New Load.5125049_0 Bus1=-999999154339945.1.0 phases=1 kV=0.069282 kW=0 kvar=0 model=1
New Load.5125049_1 Bus1=-999999154339945.2.0 phases=1 kV=0.069282 kW=0 kvar=0 model=1
New Load.5125049_2 Bus1=-999999154339945.3.0 phases=1 kV=0.069282 kW=0 kvar=0 model=1
New Load.S Bus1=-999999139109748.1.0 phases=1 kV=0.069282 kW=0 kvar=0 model=1
New Load.5188578 Bus1=-999999167036993.3.0 phases=1 kV=0.069282 kW=0 kvar=0 model=1

! Generators
New Generator.NST-395593_PHOTOVOLTAIC_0 Bus1=-999999154340097.1.0 phases=1 kV=0.069282 kW=0 kvar=0 model=7
New Generator.NST-395593_PHOTOVOLTAIC_1 Bus1=-999999154340097.2.0 phases=1 kV=0.069282 kW=0 kvar=0 model=7
New Generator.NST-395593_PHOTOVOLTAIC_2 Bus1=-999999154340097.3.0 phases=1 kV=0.069282 kW=0 kvar=0 model=7
New Generator.NST-275378_PHOTOVOLTAIC_0 Bus1=-999999154340097.1.0 phases=1 kV=0.069282 kW=0 kvar=0 model=7
New Generator.NST-275378_PHOTOVOLTAIC_1 Bus1=-999999154340097.2.0 phases=1 kV=0.069282 kW=0 kvar=0 model=7
New Generator.NST-275378_PHOTOVOLTAIC_2 Bus1=-999999154340097.3.0 phases=1 kV=0.069282 kW=0 kvar=0 model=7
New Generator.NST-47503_PHOTOVOLTAIC_0 Bus1=-99999960507031.1.0 phases=1 kV=0.159926 kW=0 kvar=0 model=7
New Generator.NST-47503_PHOTOVOLTAIC_1 Bus1=-99999960507031.2.0 phases=1 kV=0.159926 kW=0 kvar=0 model=7
New Generator.NST-47503_PHOTOVOLTAIC_2 Bus1=-99999960507031.3.0 phases=1 kV=0.159926 kW=0 kvar=0 model=7

! Transformers
New Transformer.293588A6B72BEE34E0637F61810A7CE3_0_0 phases=1 windings=2 xhl=0.5 %R=0.353554 %imag=1e-06 %noloadloss=0
~ wdg=1 bus=206506096.1.0 kV=6.9282 kVA=12.5 conn=wye
~ wdg=2 bus=-999999206506096.1.0 kV=0.069282 kVA=12.5 conn=wye
New Transformer.293588A6B72BEE34E0637F61810A7CE3_0_1 phases=1 windings=2 xhl=0.5 %R=0.353554 %imag=1e-06 %noloadloss=0
~ wdg=1 bus=206506096.2.0 kV=6.9282 kVA=12.5 conn=wye
~ wdg=2 bus=-999999206506096.2.0 kV=0.069282 kVA=12.5 conn=wye
New Transformer.293588B3D2C1EE34E0637F61810A7CE3_1_0 phases=1 windings=2 xhl=0.5 %R=0.353554 %imag=1e-06 %noloadloss=0
~ wdg=1 bus=108697393.2.0 kV=6.9282 kVA=75 conn=wye
~ wdg=2 bus=-999999108697393.2.0 kV=0.069282 kVA=75 conn=wye
New Transformer.293588B3D2BFEE34E0637F61810A7CE3_2_0 phases=1 windings=2 xhl=0.5 %R=0.353554 %imag=1e-06 %noloadloss=0
~ wdg=1 bus=108697283.1.2 kV=12 kVA=250 conn=delta
~ wdg=2 bus=-999999108697283.1.0 kV=0.159926 kVA=250 conn=wye
New Transformer.293588B3D2BFEE34E0637F61810A7CE3_2_1 phases=1 windings=2 xhl=0.5 %R=0.353554 %imag=1e-06 %noloadloss=0
~ wdg=1 bus=108697283.2.3 kV=12 kVA=250 conn=delta
~ wdg=2 bus=-999999108697283.2.0 kV=0.159926 kVA=250 conn=wye
New Transformer.293588B3D2BFEE34E0637F61810A7CE3_2_2 phases=1 windings=2 xhl=0.5 %R=0.353554 %imag=1e-06 %noloadloss=0
~ wdg=1 bus=108697283.3.1 kV=12 kVA=250 conn=delta
~ wdg=2 bus=-999999108697283.3.0 kV=0.159926 kVA=250 conn=wye
New Transformer.293588B3D2C0EE34E0637F61810A7CE3_3_0 phases=1 windings=2 xhl=0.5 %R=0.353554 %imag=1e-06 %noloadloss=0
~ wdg=1 bus=108697338.1.2 kV=12 kVA=333.333 conn=delta
~ wdg=2 bus=-999999108697338.1.0 kV=0.159926 kVA=333.333 conn=wye
New Transformer.293588B3D2C0EE34E0637F61810A7CE3_3_1 phases=1 windings=2 xhl=0.5 %R=0.353554 %imag=1e-06 %noloadloss=0
~ wdg=1 bus=108697338.2.3 kV=12 kVA=333.333 conn=delta
~ wdg=2 bus=-999999108697338.2.0 kV=0.159926 kVA=333.333 conn=wye
New Transformer.293588B3D2C0EE34E0637F61810A7CE3_3_2 phases=1 windings=2 xhl=0.5 %R=0.353554 %imag=1e-06 %noloadloss=0
~ wdg=1 bus=108697338.3.1 kV=12 kVA=333.333 conn=delta
~ wdg=2 bus=-999999108697338.3.0 kV=0.159926 kVA=333.333 conn=wye
New Transformer.293588B3E694EE34E0637F61810A7CE3_4_0 phases=1 windings=2 xhl=0.5 %R=0.353554 %imag=1e-06 %noloadloss=0
~ wdg=1 bus=136406961.1.2 kV=12 kVA=50 conn=delta
~ wdg=2 bus=-999999136406961.1.0 kV=0.069282 kVA=50 conn=wye
New Transformer.293588B3E694EE34E0637F61810A7CE3_4_1 phases=1 windings=2 xhl=0.5 %R=0.353554 %imag=1e-06 %noloadloss=0
~ wdg=1 bus=136406961.2.3 kV=12 kVA=50 conn=delta
~ wdg=2 bus=-999999136406961.2.0 kV=0.069282 kVA=50 conn=wye
New Transformer.293588B3E694EE34E0637F61810A7CE3_4_2 phases=1 windings=2 xhl=0.5 %R=0.353554 %imag=1e-06 %noloadloss=0
~ wdg=1 bus=136406961.3.1 kV=12 kVA=50 conn=delta
~ wdg=2 bus=-999999136406961.3.0 kV=0.069282 kVA=50 conn=wye
New Transformer.293588B430B7EE34E0637F61810A7CE3_5_0 phases=1 windings=2 xhl=0.5 %R=0.353554 %imag=1e-06 %noloadloss=0
~ wdg=1 bus=154339945.1.2 kV=12 kVA=75 conn=delta
~ wdg=2 bus=-999999154339945.1.0 kV=0.069282 kVA=75 conn=wye
New Transformer.293588B430B7EE34E0637F61810A7CE3_5_1 phases=1 windings=2 xhl=0.5 %R=0.353554 %imag=1e-06 %noloadloss=0
~ wdg=1 bus=154339945.2.3 kV=12 kVA=75 conn=delta
~ wdg=2 bus=-999999154339945.2.0 kV=0.069282 kVA=75 conn=wye
New Transformer.293588B430B7EE34E0637F61810A7CE3_5_2 phases=1 windings=2 xhl=0.5 %R=0.353554 %imag=1e-06 %noloadloss=0
~ wdg=1 bus=154339945.3.1 kV=12 kVA=75 conn=delta
~ wdg=2 bus=-999999154339945.3.0 kV=0.069282 kVA=75 conn=wye
New Transformer.293588B450CDEE34E0637F61810A7CE3_6_0 phases=1 windings=2 xhl=0.5 %R=0.353554 %imag=1e-06 %noloadloss=0
~ wdg=1 bus=167036993.3.0 kV=6.9282 kVA=75 conn=wye
~ wdg=2 bus=-999999167036993.3.0 kV=0.069282 kVA=75 conn=wye
New Transformer.293588B30500EE34E0637F61810A7CE3_7_0 phases=1 windings=2 xhl=0.5 %R=0.353554 %imag=1e-06 %noloadloss=0
~ wdg=1 bus=60463410.1.2 kV=12 kVA=100 conn=delta
~ wdg=2 bus=-99999960463410.1.0 kV=0.159926 kVA=100 conn=wye
New Transformer.293588B30500EE34E0637F61810A7CE3_7_1 phases=1 windings=2 xhl=0.5 %R=0.353554 %imag=1e-06 %noloadloss=0
~ wdg=1 bus=60463410.2.3 kV=12 kVA=100 conn=delta
~ wdg=2 bus=-99999960463410.2.0 kV=0.159926 kVA=100 conn=wye
New Transformer.293588B30500EE34E0637F61810A7CE3_7_2 phases=1 windings=2 xhl=0.5 %R=0.353554 %imag=1e-06 %noloadloss=0
~ wdg=1 bus=60463410.3.1 kV=12 kVA=100 conn=delta
~ wdg=2 bus=-99999960463410.3.0 kV=0.159926 kVA=100 conn=wye
New Transformer.293588B37A5DEE34E0637F61810A7CE3_8_0 phases=1 windings=2 xhl=0.5 %R=0.353554 %imag=1e-06 %noloadloss=0
~ wdg=1 bus=91329149.1.2 kV=12 kVA=75 conn=delta
~ wdg=2 bus=-99999991329149.1.0 kV=0.069282 kVA=75 conn=wye
New Transformer.293588B37A5DEE34E0637F61810A7CE3_8_1 phases=1 windings=2 xhl=0.5 %R=0.353554 %imag=1e-06 %noloadloss=0
~ wdg=1 bus=91329149.2.3 kV=12 kVA=75 conn=delta
~ wdg=2 bus=-99999991329149.2.0 kV=0.069282 kVA=75 conn=wye
New Transformer.293588B37A5DEE34E0637F61810A7CE3_8_2 phases=1 windings=2 xhl=0.5 %R=0.353554 %imag=1e-06 %noloadloss=0
~ wdg=1 bus=91329149.3.1 kV=12 kVA=75 conn=delta
~ wdg=2 bus=-99999991329149.3.0 kV=0.069282 kVA=75 conn=wye
New Transformer.293588B30239EE34E0637F61810A7CE3_9_0 phases=1 windings=2 xhl=0.5 %R=0.353554 %imag=1e-06 %noloadloss=0
~ wdg=1 bus=60509304.1.2 kV=12 kVA=50 conn=delta
~ wdg=2 bus=-99999960509304.1.0 kV=0.159926 kVA=50 conn=wye
New Transformer.293588B30239EE34E0637F61810A7CE3_9_1 phases=1 windings=2 xhl=0.5 %R=0.353554 %imag=1e-06 %noloadloss=0
~ wdg=1 bus=60509304.2.3 kV=12 kVA=50 conn=delta
~ wdg=2 bus=-99999960509304.2.0 kV=0.159926 kVA=50 conn=wye
New Transformer.293588B30239EE34E0637F61810A7CE3_9_2 phases=1 windings=2 xhl=0.5 %R=0.353554 %imag=1e-06 %noloadloss=0
~ wdg=1 bus=60509304.3.1 kV=12 kVA=50 conn=delta
~ wdg=2 bus=-99999960509304.3.0 kV=0.159926 kVA=50 conn=wye
New Transformer.293588B430B5EE34E0637F61810A7CE3_10_0 phases=1 windings=2 xhl=0.5 %R=0.353554 %imag=1e-06 %noloadloss=0
~ wdg=1 bus=154339806.1.2 kV=12 kVA=100 conn=delta
~ wdg=2 bus=-999999154339806.1.0 kV=0.069282 kVA=100 conn=wye
New Transformer.293588B430B5EE34E0637F61810A7CE3_10_1 phases=1 windings=2 xhl=0.5 %R=0.353554 %imag=1e-06 %noloadloss=0
~ wdg=1 bus=154339806.2.3 kV=12 kVA=100 conn=delta
~ wdg=2 bus=-999999154339806.2.0 kV=0.069282 kVA=100 conn=wye
New Transformer.293588B430B5EE34E0637F61810A7CE3_10_2 phases=1 windings=2 xhl=0.5 %R=0.353554 %imag=1e-06 %noloadloss=0
~ wdg=1 bus=154339806.3.1 kV=12 kVA=100 conn=delta
~ wdg=2 bus=-999999154339806.3.0 kV=0.069282 kVA=100 conn=wye
New Transformer.293588B39A40EE34E0637F61810A7CE3_11_0 phases=1 windings=2 xhl=0.5 %R=0.353554 %imag=1e-06 %noloadloss=0
~ wdg=1 bus=98552531.1.2 kV=12 kVA=75 conn=delta
~ wdg=2 bus=-99999998552531.1.0 kV=0.069282 kVA=75 conn=wye
New Transformer.293588B39A40EE34E0637F61810A7CE3_11_1 phases=1 windings=2 xhl=0.5 %R=0.353554 %imag=1e-06 %noloadloss=0
~ wdg=1 bus=98552531.2.3 kV=12 kVA=75 conn=delta
~ wdg=2 bus=-99999998552531.2.0 kV=0.069282 kVA=75 conn=wye
New Transformer.293588B39A40EE34E0637F61810A7CE3_11_2 phases=1 windings=2 xhl=0.5 %R=0.353554 %imag=1e-06 %noloadloss=0
~ wdg=1 bus=98552531.3.1 kV=12 kVA=75 conn=delta
~ wdg=2 bus=-99999998552531.3.0 kV=0.069282 kVA=75 conn=wye
New Transformer.293588B3929AEE34E0637F61810A7CE3_12_0 phases=1 windings=2 xhl=0.5 %R=0.353554 %imag=1e-06 %noloadloss=0
~ wdg=1 bus=95361390.1.2 kV=12 kVA=250 conn=delta
~ wdg=2 bus=-99999995361390.1.0 kV=0.159926 kVA=250 conn=wye
New Transformer.293588B3929AEE34E0637F61810A7CE3_12_1 phases=1 windings=2 xhl=0.5 %R=0.353554 %imag=1e-06 %noloadloss=0
~ wdg=1 bus=95361390.2.3 kV=12 kVA=250 conn=delta
~ wdg=2 bus=-99999995361390.2.0 kV=0.159926 kVA=250 conn=wye
New Transformer.293588B3929AEE34E0637F61810A7CE3_12_2 phases=1 windings=2 xhl=0.5 %R=0.353554 %imag=1e-06 %noloadloss=0
~ wdg=1 bus=95361390.3.1 kV=12 kVA=250 conn=delta
~ wdg=2 bus=-99999995361390.3.0 kV=0.159926 kVA=250 conn=wye
New Transformer.293588B3DE34EE34E0637F61810A7CE3_13_0 phases=1 windings=2 xhl=0.5 %R=0.353554 %imag=1e-06 %noloadloss=0
~ wdg=1 bus=110276303.1.2 kV=12 kVA=100 conn=delta
~ wdg=2 bus=-999999110276303.1.2 kV=0.069282 kVA=100 conn=delta
New Transformer.293588B3DE34EE34E0637F61810A7CE3_13_1 phases=1 windings=2 xhl=0.5 %R=0.353554 %imag=1e-06 %noloadloss=0
~ wdg=1 bus=110276303.2.3 kV=12 kVA=100 conn=delta
~ wdg=2 bus=-999999110276303.2.3 kV=0.069282 kVA=100 conn=delta
New Transformer.293588B3DE34EE34E0637F61810A7CE3_13_2 phases=1 windings=2 xhl=0.5 %R=0.353554 %imag=1e-06 %noloadloss=0
~ wdg=1 bus=110276303.3.1 kV=12 kVA=100 conn=delta
~ wdg=2 bus=-999999110276303.3.1 kV=0.069282 kVA=100 conn=delta
New Transformer.293588B3FA62EE34E0637F61810A7CE3_14_0 phases=1 windings=2 xhl=0.5 %R=0.353554 %imag=1e-06 %noloadloss=0
~ wdg=1 bus=148779199.1.2 kV=12 kVA=100 conn=delta
~ wdg=2 bus=-999999148779199.1.2 kV=0.069282 kVA=100 conn=delta
New Transformer.293588B3FA62EE34E0637F61810A7CE3_14_1 phases=1 windings=2 xhl=0.5 %R=0.353554 %imag=1e-06 %noloadloss=0
~ wdg=1 bus=148779199.2.3 kV=12 kVA=100 conn=delta
~ wdg=2 bus=-999999148779199.2.3 kV=0.069282 kVA=100 conn=delta
New Transformer.293588B3FA62EE34E0637F61810A7CE3_14_2 phases=1 windings=2 xhl=0.5 %R=0.353554 %imag=1e-06 %noloadloss=0
~ wdg=1 bus=148779199.3.1 kV=12 kVA=100 conn=delta
~ wdg=2 bus=-999999148779199.3.1 kV=0.069282 kVA=100 conn=delta
New Transformer.293588B3DE33EE34E0637F61810A7CE3_15_0 phases=1 windings=2 xhl=0.5 %R=0.353554 %imag=1e-06 %noloadloss=0
~ wdg=1 bus=110276232.1.2 kV=12 kVA=250 conn=delta
~ wdg=2 bus=-999999110276232.1.0 kV=0.069282 kVA=250 conn=wye
New Transformer.293588B3DE33EE34E0637F61810A7CE3_15_1 phases=1 windings=2 xhl=0.5 %R=0.353554 %imag=1e-06 %noloadloss=0
~ wdg=1 bus=110276232.2.3 kV=12 kVA=250 conn=delta
~ wdg=2 bus=-999999110276232.2.0 kV=0.069282 kVA=250 conn=wye
New Transformer.293588B3DE33EE34E0637F61810A7CE3_15_2 phases=1 windings=2 xhl=0.5 %R=0.353554 %imag=1e-06 %noloadloss=0
~ wdg=1 bus=110276232.3.1 kV=12 kVA=250 conn=delta
~ wdg=2 bus=-999999110276232.3.0 kV=0.069282 kVA=250 conn=wye
New Transformer.293588B4818FEE34E0637F61810A7CE3_16_0 phases=1 windings=2 xhl=0.5 %R=0.353554 %imag=1e-06 %noloadloss=0
~ wdg=1 bus=191379491.1.2 kV=12 kVA=250 conn=delta
~ wdg=2 bus=-999999191379491.1.2 kV=0.069282 kVA=250 conn=delta
New Transformer.293588B4818FEE34E0637F61810A7CE3_16_1 phases=1 windings=2 xhl=0.5 %R=0.353554 %imag=1e-06 %noloadloss=0
~ wdg=1 bus=191379491.2.3 kV=12 kVA=250 conn=delta
~ wdg=2 bus=-999999191379491.2.3 kV=0.069282 kVA=250 conn=delta
New Transformer.293588B4818FEE34E0637F61810A7CE3_16_2 phases=1 windings=2 xhl=0.5 %R=0.353554 %imag=1e-06 %noloadloss=0
~ wdg=1 bus=191379491.3.1 kV=12 kVA=250 conn=delta
~ wdg=2 bus=-999999191379491.3.1 kV=0.069282 kVA=250 conn=delta
New Transformer.293588B4818EEE34E0637F61810A7CE3_17_0 phases=1 windings=2 xhl=0.5 %R=0.353554 %imag=1e-06 %noloadloss=0
~ wdg=1 bus=191379450.1.2 kV=12 kVA=250 conn=delta
~ wdg=2 bus=-999999191379450.1.2 kV=0.069282 kVA=250 conn=delta
New Transformer.293588B4818EEE34E0637F61810A7CE3_17_1 phases=1 windings=2 xhl=0.5 %R=0.353554 %imag=1e-06 %noloadloss=0
~ wdg=1 bus=191379450.2.3 kV=12 kVA=250 conn=delta
~ wdg=2 bus=-999999191379450.2.3 kV=0.069282 kVA=250 conn=delta
New Transformer.293588B4818EEE34E0637F61810A7CE3_17_2 phases=1 windings=2 xhl=0.5 %R=0.353554 %imag=1e-06 %noloadloss=0
~ wdg=1 bus=191379450.3.1 kV=12 kVA=250 conn=delta
~ wdg=2 bus=-999999191379450.3.1 kV=0.069282 kVA=250 conn=delta
New Transformer.293588B3DE35EE34E0637F61810A7CE3_18_0 phases=1 windings=2 xhl=0.5 %R=0.353554 %imag=1e-06 %noloadloss=0
~ wdg=1 bus=110276353.1.2 kV=12 kVA=75 conn=delta
~ wdg=2 bus=-999999110276353.1.0 kV=0.069282 kVA=75 conn=wye
New Transformer.293588B3DE35EE34E0637F61810A7CE3_18_1 phases=1 windings=2 xhl=0.5 %R=0.353554 %imag=1e-06 %noloadloss=0
~ wdg=1 bus=110276353.2.3 kV=12 kVA=75 conn=delta
~ wdg=2 bus=-999999110276353.2.0 kV=0.069282 kVA=75 conn=wye
New Transformer.293588B3DE35EE34E0637F61810A7CE3_18_2 phases=1 windings=2 xhl=0.5 %R=0.353554 %imag=1e-06 %noloadloss=0
~ wdg=1 bus=110276353.3.1 kV=12 kVA=75 conn=delta
~ wdg=2 bus=-999999110276353.3.0 kV=0.069282 kVA=75 conn=wye
New Transformer.293588B3FA61EE34E0637F61810A7CE3_19_0 phases=1 windings=2 xhl=0.5 %R=0.353554 %imag=1e-06 %noloadloss=0
~ wdg=1 bus=148779091.1.2 kV=12 kVA=100 conn=delta
~ wdg=2 bus=-999999148779091.1.0 kV=0.159926 kVA=100 conn=wye
New Transformer.293588B3FA61EE34E0637F61810A7CE3_19_1 phases=1 windings=2 xhl=0.5 %R=0.353554 %imag=1e-06 %noloadloss=0
~ wdg=1 bus=148779091.2.3 kV=12 kVA=100 conn=delta
~ wdg=2 bus=-999999148779091.2.0 kV=0.159926 kVA=100 conn=wye
New Transformer.293588B3FA61EE34E0637F61810A7CE3_19_2 phases=1 windings=2 xhl=0.5 %R=0.353554 %imag=1e-06 %noloadloss=0
~ wdg=1 bus=148779091.3.1 kV=12 kVA=100 conn=delta
~ wdg=2 bus=-999999148779091.3.0 kV=0.159926 kVA=100 conn=wye
New Transformer.293588B430B6EE34E0637F61810A7CE3_20_0 phases=1 windings=2 xhl=0.5 %R=0.353554 %imag=1e-06 %noloadloss=0
~ wdg=1 bus=154339897.1.2 kV=12 kVA=166.667 conn=delta
~ wdg=2 bus=-999999154339897.1.0 kV=0.159926 kVA=166.667 conn=wye
New Transformer.293588B430B6EE34E0637F61810A7CE3_20_1 phases=1 windings=2 xhl=0.5 %R=0.353554 %imag=1e-06 %noloadloss=0
~ wdg=1 bus=154339897.2.3 kV=12 kVA=166.667 conn=delta
~ wdg=2 bus=-999999154339897.2.0 kV=0.159926 kVA=166.667 conn=wye
New Transformer.293588B430B6EE34E0637F61810A7CE3_20_2 phases=1 windings=2 xhl=0.5 %R=0.353554 %imag=1e-06 %noloadloss=0
~ wdg=1 bus=154339897.3.1 kV=12 kVA=166.667 conn=delta
~ wdg=2 bus=-999999154339897.3.0 kV=0.159926 kVA=166.667 conn=wye
New Transformer.293588B304FFEE34E0637F61810A7CE3_21_0 phases=1 windings=2 xhl=0.5 %R=0.353554 %imag=1e-06 %noloadloss=0
~ wdg=1 bus=60463093.1.2 kV=12 kVA=100 conn=delta
~ wdg=2 bus=-99999960463093.1.0 kV=0.159926 kVA=100 conn=wye
New Transformer.293588B304FFEE34E0637F61810A7CE3_21_1 phases=1 windings=2 xhl=0.5 %R=0.353554 %imag=1e-06 %noloadloss=0
~ wdg=1 bus=60463093.2.3 kV=12 kVA=100 conn=delta
~ wdg=2 bus=-99999960463093.2.0 kV=0.159926 kVA=100 conn=wye
New Transformer.293588B304FFEE34E0637F61810A7CE3_21_2 phases=1 windings=2 xhl=0.5 %R=0.353554 %imag=1e-06 %noloadloss=0
~ wdg=1 bus=60463093.3.1 kV=12 kVA=100 conn=delta
~ wdg=2 bus=-99999960463093.3.0 kV=0.159926 kVA=100 conn=wye
New Transformer.293588B30154EE34E0637F61810A7CE3_22_0 phases=1 windings=2 xhl=0.5 %R=0.353554 %imag=1e-06 %noloadloss=0
~ wdg=1 bus=60507031.1.2 kV=12 kVA=250 conn=delta
~ wdg=2 bus=-99999960507031.1.0 kV=0.159926 kVA=250 conn=wye
New Transformer.293588B30154EE34E0637F61810A7CE3_22_1 phases=1 windings=2 xhl=0.5 %R=0.353554 %imag=1e-06 %noloadloss=0
~ wdg=1 bus=60507031.2.3 kV=12 kVA=250 conn=delta
~ wdg=2 bus=-99999960507031.2.0 kV=0.159926 kVA=250 conn=wye
New Transformer.293588B30154EE34E0637F61810A7CE3_22_2 phases=1 windings=2 xhl=0.5 %R=0.353554 %imag=1e-06 %noloadloss=0
~ wdg=1 bus=60507031.3.1 kV=12 kVA=250 conn=delta
~ wdg=2 bus=-99999960507031.3.0 kV=0.159926 kVA=250 conn=wye
New Transformer.293588B45645EE34E0637F61810A7CE3_23_0 phases=1 windings=2 xhl=0.5 %R=0.353554 %imag=1e-06 %noloadloss=0
~ wdg=1 bus=166629335.1.2 kV=12 kVA=166.667 conn=delta
~ wdg=2 bus=-999999166629335.1.0 kV=0.159926 kVA=166.667 conn=wye
New Transformer.293588B45645EE34E0637F61810A7CE3_23_1 phases=1 windings=2 xhl=0.5 %R=0.353554 %imag=1e-06 %noloadloss=0
~ wdg=1 bus=166629335.2.3 kV=12 kVA=166.667 conn=delta
~ wdg=2 bus=-999999166629335.2.0 kV=0.159926 kVA=166.667 conn=wye
New Transformer.293588B45645EE34E0637F61810A7CE3_23_2 phases=1 windings=2 xhl=0.5 %R=0.353554 %imag=1e-06 %noloadloss=0
~ wdg=1 bus=166629335.3.1 kV=12 kVA=166.667 conn=delta
~ wdg=2 bus=-999999166629335.3.0 kV=0.159926 kVA=166.667 conn=wye
New Transformer.293588B4469BEE34E0637F61810A7CE3_24_0 phases=1 windings=2 xhl=0.5 %R=0.353554 %imag=1e-06 %noloadloss=0
~ wdg=1 bus=164138165.1.2 kV=12 kVA=333.333 conn=delta
~ wdg=2 bus=-999999164138165.1.0 kV=0.069282 kVA=333.333 conn=wye
New Transformer.293588B4469BEE34E0637F61810A7CE3_24_1 phases=1 windings=2 xhl=0.5 %R=0.353554 %imag=1e-06 %noloadloss=0
~ wdg=1 bus=164138165.2.3 kV=12 kVA=333.333 conn=delta
~ wdg=2 bus=-999999164138165.2.0 kV=0.069282 kVA=333.333 conn=wye
New Transformer.293588B4469BEE34E0637F61810A7CE3_24_2 phases=1 windings=2 xhl=0.5 %R=0.353554 %imag=1e-06 %noloadloss=0
~ wdg=1 bus=164138165.3.1 kV=12 kVA=333.333 conn=delta
~ wdg=2 bus=-999999164138165.3.0 kV=0.069282 kVA=333.333 conn=wye
New Transformer.293588B3EE73EE34E0637F61810A7CE3_25_0 phases=1 windings=2 xhl=0.5 %R=0.353554 %imag=1e-06 %noloadloss=0
~ wdg=1 bus=139147903.1.2 kV=12 kVA=250 conn=delta
~ wdg=2 bus=-999999139147903.1.0 kV=0.069282 kVA=250 conn=wye
New Transformer.293588B3EE73EE34E0637F61810A7CE3_25_1 phases=1 windings=2 xhl=0.5 %R=0.353554 %imag=1e-06 %noloadloss=0
~ wdg=1 bus=139147903.2.3 kV=12 kVA=250 conn=delta
~ wdg=2 bus=-999999139147903.2.0 kV=0.069282 kVA=250 conn=wye
New Transformer.293588B3EE73EE34E0637F61810A7CE3_25_2 phases=1 windings=2 xhl=0.5 %R=0.353554 %imag=1e-06 %noloadloss=0
~ wdg=1 bus=139147903.3.1 kV=12 kVA=250 conn=delta
~ wdg=2 bus=-999999139147903.3.0 kV=0.069282 kVA=250 conn=wye
New Transformer.293588B304FEEE34E0637F61810A7CE3_26_0 phases=1 windings=2 xhl=0.5 %R=0.353554 %imag=1e-06 %noloadloss=0
~ wdg=1 bus=60463032.1.2 kV=12 kVA=75 conn=delta
~ wdg=2 bus=-99999960463032.1.0 kV=0.159926 kVA=75 conn=wye
New Transformer.293588B304FEEE34E0637F61810A7CE3_26_1 phases=1 windings=2 xhl=0.5 %R=0.353554 %imag=1e-06 %noloadloss=0
~ wdg=1 bus=60463032.2.3 kV=12 kVA=75 conn=delta
~ wdg=2 bus=-99999960463032.2.0 kV=0.159926 kVA=75 conn=wye
New Transformer.293588B304FEEE34E0637F61810A7CE3_26_2 phases=1 windings=2 xhl=0.5 %R=0.353554 %imag=1e-06 %noloadloss=0
~ wdg=1 bus=60463032.3.1 kV=12 kVA=75 conn=delta
~ wdg=2 bus=-99999960463032.3.0 kV=0.159926 kVA=75 conn=wye
New Transformer.293588B42FD5EE34E0637F61810A7CE3_27_0 phases=1 windings=2 xhl=0.5 %R=0.353554 %imag=1e-06 %noloadloss=0
~ wdg=1 bus=154339706.1.2 kV=12 kVA=75 conn=delta
~ wdg=2 bus=-999999154339706.1.0 kV=0.069282 kVA=75 conn=wye
New Transformer.293588B42FD5EE34E0637F61810A7CE3_27_1 phases=1 windings=2 xhl=0.5 %R=0.353554 %imag=1e-06 %noloadloss=0
~ wdg=1 bus=154339706.2.3 kV=12 kVA=75 conn=delta
~ wdg=2 bus=-999999154339706.2.0 kV=0.069282 kVA=75 conn=wye
New Transformer.293588B42FD5EE34E0637F61810A7CE3_27_2 phases=1 windings=2 xhl=0.5 %R=0.353554 %imag=1e-06 %noloadloss=0
~ wdg=1 bus=154339706.3.1 kV=12 kVA=75 conn=delta
~ wdg=2 bus=-999999154339706.3.0 kV=0.069282 kVA=75 conn=wye
New Transformer.293588B30503EE34E0637F61810A7CE3_28_0 phases=1 windings=2 xhl=0.5 %R=0.353554 %imag=1e-06 %noloadloss=0
~ wdg=1 bus=60463637.1.2 kV=12 kVA=166.667 conn=delta
~ wdg=2 bus=-99999960463637.1.0 kV=0.159926 kVA=166.667 conn=wye
New Transformer.293588B30503EE34E0637F61810A7CE3_28_1 phases=1 windings=2 xhl=0.5 %R=0.353554 %imag=1e-06 %noloadloss=0
~ wdg=1 bus=60463637.2.3 kV=12 kVA=166.667 conn=delta
~ wdg=2 bus=-99999960463637.2.0 kV=0.159926 kVA=166.667 conn=wye
New Transformer.293588B30503EE34E0637F61810A7CE3_28_2 phases=1 windings=2 xhl=0.5 %R=0.353554 %imag=1e-06 %noloadloss=0
~ wdg=1 bus=60463637.3.1 kV=12 kVA=166.667 conn=delta
~ wdg=2 bus=-99999960463637.3.0 kV=0.159926 kVA=166.667 conn=wye
New Transformer.293588A6FB2AEE34E0637F61810A7CE3_29_0 phases=1 windings=2 xhl=0.5 %R=0.353554 %imag=1e-06 %noloadloss=0
~ wdg=1 bus=60463138.3.0 kV=6.9282 kVA=12.5 conn=wye
~ wdg=2 bus=-99999960463138.3.0 kV=0.069282 kVA=12.5 conn=wye
New Transformer.293588A6FB2AEE34E0637F61810A7CE3_29_1 phases=1 windings=2 xhl=0.5 %R=0.353554 %imag=1e-06 %noloadloss=0
~ wdg=1 bus=60463138.1.0 kV=6.9282 kVA=12.5 conn=wye
~ wdg=2 bus=-99999960463138.1.0 kV=0.069282 kVA=12.5 conn=wye
New Transformer.293588B30501EE34E0637F61810A7CE3_30_0 phases=1 windings=2 xhl=0.5 %R=0.353554 %imag=1e-06 %noloadloss=0
~ wdg=1 bus=60463541.1.2 kV=12 kVA=333.333 conn=delta
~ wdg=2 bus=-99999960463541.1.0 kV=0.159926 kVA=333.333 conn=wye
New Transformer.293588B30501EE34E0637F61810A7CE3_30_1 phases=1 windings=2 xhl=0.5 %R=0.353554 %imag=1e-06 %noloadloss=0
~ wdg=1 bus=60463541.2.3 kV=12 kVA=333.333 conn=delta
~ wdg=2 bus=-99999960463541.2.0 kV=0.159926 kVA=333.333 conn=wye
New Transformer.293588B30501EE34E0637F61810A7CE3_30_2 phases=1 windings=2 xhl=0.5 %R=0.353554 %imag=1e-06 %noloadloss=0
~ wdg=1 bus=60463541.3.1 kV=12 kVA=333.333 conn=delta
~ wdg=2 bus=-99999960463541.3.0 kV=0.159926 kVA=333.333 conn=wye
New Transformer.293588B30502EE34E0637F61810A7CE3_31_0 phases=1 windings=2 xhl=0.5 %R=0.353554 %imag=1e-06 %noloadloss=0
~ wdg=1 bus=60463589.1.2 kV=12 kVA=250 conn=delta
~ wdg=2 bus=-99999960463589.1.0 kV=0.159926 kVA=250 conn=wye
New Transformer.293588B30502EE34E0637F61810A7CE3_31_1 phases=1 windings=2 xhl=0.5 %R=0.353554 %imag=1e-06 %noloadloss=0
~ wdg=1 bus=60463589.2.3 kV=12 kVA=250 conn=delta
~ wdg=2 bus=-99999960463589.2.0 kV=0.159926 kVA=250 conn=wye
New Transformer.293588B30502EE34E0637F61810A7CE3_31_2 phases=1 windings=2 xhl=0.5 %R=0.353554 %imag=1e-06 %noloadloss=0
~ wdg=1 bus=60463589.3.1 kV=12 kVA=250 conn=delta
~ wdg=2 bus=-99999960463589.3.0 kV=0.159926 kVA=250 conn=wye
New Transformer.293588B3D2BDEE34E0637F61810A7CE3_32_0 phases=1 windings=2 xhl=0.5 %R=0.353554 %imag=1e-06 %noloadloss=0
~ wdg=1 bus=108697124.1.2 kV=12 kVA=833.333 conn=delta
~ wdg=2 bus=-999999108697124.1.0 kV=0.159926 kVA=833.333 conn=wye
New Transformer.293588B3D2BDEE34E0637F61810A7CE3_32_1 phases=1 windings=2 xhl=0.5 %R=0.353554 %imag=1e-06 %noloadloss=0
~ wdg=1 bus=108697124.2.3 kV=12 kVA=833.333 conn=delta
~ wdg=2 bus=-999999108697124.2.0 kV=0.159926 kVA=833.333 conn=wye
New Transformer.293588B3D2BDEE34E0637F61810A7CE3_32_2 phases=1 windings=2 xhl=0.5 %R=0.353554 %imag=1e-06 %noloadloss=0
~ wdg=1 bus=108697124.3.1 kV=12 kVA=833.333 conn=delta
~ wdg=2 bus=-999999108697124.3.0 kV=0.159926 kVA=833.333 conn=wye
New Transformer.293588B3D2BEEE34E0637F61810A7CE3_33_0 phases=1 windings=2 xhl=0.5 %R=0.353554 %imag=1e-06 %noloadloss=0
~ wdg=1 bus=108697228.1.2 kV=12 kVA=75 conn=delta
~ wdg=2 bus=-999999108697228.1.0 kV=0.159926 kVA=75 conn=wye
New Transformer.293588B3D2BEEE34E0637F61810A7CE3_33_1 phases=1 windings=2 xhl=0.5 %R=0.353554 %imag=1e-06 %noloadloss=0
~ wdg=1 bus=108697228.2.3 kV=12 kVA=75 conn=delta
~ wdg=2 bus=-999999108697228.2.0 kV=0.159926 kVA=75 conn=wye
New Transformer.293588B3D2BEEE34E0637F61810A7CE3_33_2 phases=1 windings=2 xhl=0.5 %R=0.353554 %imag=1e-06 %noloadloss=0
~ wdg=1 bus=108697228.3.1 kV=12 kVA=75 conn=delta
~ wdg=2 bus=-999999108697228.3.0 kV=0.159926 kVA=75 conn=wye
New Transformer.293588B30155EE34E0637F61810A7CE3_34_0 phases=1 windings=2 xhl=0.5 %R=0.353554 %imag=1e-06 %noloadloss=0
~ wdg=1 bus=60507868.1.2 kV=12 kVA=50 conn=delta
~ wdg=2 bus=-99999960507868.1.0 kV=0.159926 kVA=50 conn=wye
New Transformer.293588B30155EE34E0637F61810A7CE3_34_1 phases=1 windings=2 xhl=0.5 %R=0.353554 %imag=1e-06 %noloadloss=0
~ wdg=1 bus=60507868.2.3 kV=12 kVA=50 conn=delta
~ wdg=2 bus=-99999960507868.2.0 kV=0.159926 kVA=50 conn=wye
New Transformer.293588B30155EE34E0637F61810A7CE3_34_2 phases=1 windings=2 xhl=0.5 %R=0.353554 %imag=1e-06 %noloadloss=0
~ wdg=1 bus=60507868.3.1 kV=12 kVA=50 conn=delta
~ wdg=2 bus=-99999960507868.3.0 kV=0.159926 kVA=50 conn=wye
New Transformer.293588B30504EE34E0637F61810A7CE3_35_0 phases=1 windings=2 xhl=0.5 %R=0.353554 %imag=1e-06 %noloadloss=0
~ wdg=1 bus=60463685.1.2 kV=12 kVA=100 conn=delta
~ wdg=2 bus=-99999960463685.1.0 kV=0.069282 kVA=100 conn=wye
New Transformer.293588B30504EE34E0637F61810A7CE3_35_1 phases=1 windings=2 xhl=0.5 %R=0.353554 %imag=1e-06 %noloadloss=0
~ wdg=1 bus=60463685.2.3 kV=12 kVA=100 conn=delta
~ wdg=2 bus=-99999960463685.2.0 kV=0.069282 kVA=100 conn=wye
New Transformer.293588B30504EE34E0637F61810A7CE3_35_2 phases=1 windings=2 xhl=0.5 %R=0.353554 %imag=1e-06 %noloadloss=0
~ wdg=1 bus=60463685.3.1 kV=12 kVA=100 conn=delta
~ wdg=2 bus=-99999960463685.3.0 kV=0.069282 kVA=100 conn=wye
New Transformer.293588B450CCEE34E0637F61810A7CE3_36_0 phases=1 windings=2 xhl=0.5 %R=0.353554 %imag=1e-06 %noloadloss=0
~ wdg=1 bus=167036798.1.2 kV=12 kVA=166.667 conn=delta
~ wdg=2 bus=-999999167036798.1.0 kV=0.069282 kVA=166.667 conn=wye
New Transformer.293588B450CCEE34E0637F61810A7CE3_36_1 phases=1 windings=2 xhl=0.5 %R=0.353554 %imag=1e-06 %noloadloss=0
~ wdg=1 bus=167036798.2.3 kV=12 kVA=166.667 conn=delta
~ wdg=2 bus=-999999167036798.2.0 kV=0.069282 kVA=166.667 conn=wye
New Transformer.293588B450CCEE34E0637F61810A7CE3_36_2 phases=1 windings=2 xhl=0.5 %R=0.353554 %imag=1e-06 %noloadloss=0
~ wdg=1 bus=167036798.3.1 kV=12 kVA=166.667 conn=delta
~ wdg=2 bus=-999999167036798.3.0 kV=0.069282 kVA=166.667 conn=wye
New Transformer.293588B3E695EE34E0637F61810A7CE3_37_0 phases=1 windings=2 xhl=0.5 %R=0.353554 %imag=1e-06 %noloadloss=0
~ wdg=1 bus=136407011.1.2 kV=12 kVA=166.667 conn=delta
~ wdg=2 bus=-999999136407011.1.0 kV=0.159926 kVA=166.667 conn=wye
New Transformer.293588B3E695EE34E0637F61810A7CE3_37_1 phases=1 windings=2 xhl=0.5 %R=0.353554 %imag=1e-06 %noloadloss=0
~ wdg=1 bus=136407011.2.3 kV=12 kVA=166.667 conn=delta
~ wdg=2 bus=-999999136407011.2.0 kV=0.159926 kVA=166.667 conn=wye
New Transformer.293588B3E695EE34E0637F61810A7CE3_37_2 phases=1 windings=2 xhl=0.5 %R=0.353554 %imag=1e-06 %noloadloss=0
~ wdg=1 bus=136407011.3.1 kV=12 kVA=166.667 conn=delta
~ wdg=2 bus=-999999136407011.3.0 kV=0.159926 kVA=166.667 conn=wye
New Transformer.293588B3E693EE34E0637F61810A7CE3_38_0 phases=1 windings=2 xhl=0.5 %R=0.353554 %imag=1e-06 %noloadloss=0
~ wdg=1 bus=136406870.1.2 kV=12 kVA=75 conn=delta
~ wdg=2 bus=-999999136406870.1.0 kV=0.069282 kVA=75 conn=wye
New Transformer.293588B3E693EE34E0637F61810A7CE3_38_1 phases=1 windings=2 xhl=0.5 %R=0.353554 %imag=1e-06 %noloadloss=0
~ wdg=1 bus=136406870.2.3 kV=12 kVA=75 conn=delta
~ wdg=2 bus=-999999136406870.2.0 kV=0.069282 kVA=75 conn=wye
New Transformer.293588B3E693EE34E0637F61810A7CE3_38_2 phases=1 windings=2 xhl=0.5 %R=0.353554 %imag=1e-06 %noloadloss=0
~ wdg=1 bus=136406870.3.1 kV=12 kVA=75 conn=delta
~ wdg=2 bus=-999999136406870.3.0 kV=0.069282 kVA=75 conn=wye
New Transformer.293588B430B8EE34E0637F61810A7CE3_39_0 phases=1 windings=2 xhl=0.5 %R=0.353554 %imag=1e-06 %noloadloss=0
~ wdg=1 bus=154340037.1.2 kV=12 kVA=166.667 conn=delta
~ wdg=2 bus=-999999154340037.1.0 kV=0.159926 kVA=166.667 conn=wye
New Transformer.293588B430B8EE34E0637F61810A7CE3_39_1 phases=1 windings=2 xhl=0.5 %R=0.353554 %imag=1e-06 %noloadloss=0
~ wdg=1 bus=154340037.2.3 kV=12 kVA=166.667 conn=delta
~ wdg=2 bus=-999999154340037.2.0 kV=0.159926 kVA=166.667 conn=wye
New Transformer.293588B430B8EE34E0637F61810A7CE3_39_2 phases=1 windings=2 xhl=0.5 %R=0.353554 %imag=1e-06 %noloadloss=0
~ wdg=1 bus=154340037.3.1 kV=12 kVA=166.667 conn=delta
~ wdg=2 bus=-999999154340037.3.0 kV=0.159926 kVA=166.667 conn=wye
New Transformer.293588B430B9EE34E0637F61810A7CE3_40_0 phases=1 windings=2 xhl=0.5 %R=0.353554 %imag=1e-06 %noloadloss=0
~ wdg=1 bus=154340097.1.2 kV=12 kVA=100 conn=delta
~ wdg=2 bus=-999999154340097.1.0 kV=0.069282 kVA=100 conn=wye
New Transformer.293588B430B9EE34E0637F61810A7CE3_40_1 phases=1 windings=2 xhl=0.5 %R=0.353554 %imag=1e-06 %noloadloss=0
~ wdg=1 bus=154340097.2.3 kV=12 kVA=100 conn=delta
~ wdg=2 bus=-999999154340097.2.0 kV=0.069282 kVA=100 conn=wye
New Transformer.293588B430B9EE34E0637F61810A7CE3_40_2 phases=1 windings=2 xhl=0.5 %R=0.353554 %imag=1e-06 %noloadloss=0
~ wdg=1 bus=154340097.3.1 kV=12 kVA=100 conn=delta
~ wdg=2 bus=-999999154340097.3.0 kV=0.069282 kVA=100 conn=wye
New Transformer.293588B450CBEE34E0637F61810A7CE3_41_0 phases=1 windings=2 xhl=0.5 %R=0.353554 %imag=1e-06 %noloadloss=0
~ wdg=1 bus=167036750.1.2 kV=12 kVA=75 conn=delta
~ wdg=2 bus=-999999167036750.1.0 kV=0.159926 kVA=75 conn=wye
New Transformer.293588B450CBEE34E0637F61810A7CE3_41_1 phases=1 windings=2 xhl=0.5 %R=0.353554 %imag=1e-06 %noloadloss=0
~ wdg=1 bus=167036750.2.3 kV=12 kVA=75 conn=delta
~ wdg=2 bus=-999999167036750.2.0 kV=0.159926 kVA=75 conn=wye
New Transformer.293588B450CBEE34E0637F61810A7CE3_41_2 phases=1 windings=2 xhl=0.5 %R=0.353554 %imag=1e-06 %noloadloss=0
~ wdg=1 bus=167036750.3.1 kV=12 kVA=75 conn=delta
~ wdg=2 bus=-999999167036750.3.0 kV=0.159926 kVA=75 conn=wye
New Transformer.293588B450CAEE34E0637F61810A7CE3_42_0 phases=1 windings=2 xhl=0.5 %R=0.353554 %imag=1e-06 %noloadloss=0
~ wdg=1 bus=167036709.1.2 kV=12 kVA=100 conn=delta
~ wdg=2 bus=-999999167036709.1.0 kV=0.159926 kVA=100 conn=wye
New Transformer.293588B450CAEE34E0637F61810A7CE3_42_1 phases=1 windings=2 xhl=0.5 %R=0.353554 %imag=1e-06 %noloadloss=0
~ wdg=1 bus=167036709.2.3 kV=12 kVA=100 conn=delta
~ wdg=2 bus=-999999167036709.2.0 kV=0.159926 kVA=100 conn=wye
New Transformer.293588B450CAEE34E0637F61810A7CE3_42_2 phases=1 windings=2 xhl=0.5 %R=0.353554 %imag=1e-06 %noloadloss=0
~ wdg=1 bus=167036709.3.1 kV=12 kVA=100 conn=delta
~ wdg=2 bus=-999999167036709.3.0 kV=0.159926 kVA=100 conn=wye
New Transformer.293588B3ED85EE34E0637F61810A7CE3_43_0 phases=1 windings=2 xhl=0.5 %R=0.353554 %imag=1e-06 %noloadloss=0
~ wdg=1 bus=139109748.1.0 kV=6.9282 kVA=1 conn=wye
~ wdg=2 bus=-999999139109748.1.0 kV=0.069282 kVA=1 conn=wye
New Transformer.293588B3EA90EE34E0637F61810A7CE3_44_0 phases=1 windings=2 xhl=0.5 %R=0.353554 %imag=1e-06 %noloadloss=0
~ wdg=1 bus=138158136.1.0 kV=6.9282 kVA=25 conn=wye
~ wdg=2 bus=-999999138158136.1.0 kV=0.138564 kVA=25 conn=wye

Set voltagebases=[12.0 0.277 0.24 0.12]
CalcVoltageBases
Solve
