! OpenDSS script generated from multiconductor network
Clear

New Circuit.mc_network basekv=12.0 pu=1.000000 angle=0.00 frequency=60.0 phases=3 Mvasc3=143993 Mvasc1=47997.6
~ bus1=-88888815977872.1.2.3

! Line codes
New LineCode.1000_JCN_3PH_12KV_3 nphases=3 units=km Rmatrix=[ 0.000126 | 0 0.000126 | 0 0 0.000126 ] Xmatrix=[ 0.000191 | 0 0.000191 | 0 0 0.000191 ] Cmatrix=[ 0 | 0 0 | 0 0 0 ]
New LineCode.336_ACSR_3PH_336_ACSR_N_12KV_4 nphases=4 units=km Rmatrix=[ 0.014047 | 0 0.014047 | 0 0 0.014047 | 0 0 0 0.014047 ] Xmatrix=[ 0.028013 | 0 0.028013 | 0 0 0.028013 | 0 0 0 0.028013 ] Cmatrix=[ 0 | 0 0 | 0 0 0 | 0 0 0 0 ]
New LineCode.4_ACSR_3PH_12KV_3 nphases=3 units=km Rmatrix=[ 0.024732 | 0 0.024732 | 0 0 0.024732 ] Xmatrix=[ 0.009075 | 0 0.009075 | 0 0 0.009075 ] Cmatrix=[ 0 | 0 0 | 0 0 0 ]
New LineCode.1/0_ACSR_3PH_12KV_3 nphases=3 units=km Rmatrix=[ 0.002926 | 0 0.002926 | 0 0 0.002926 ] Xmatrix=[ 0.00233 | 0 0.00233 | 0 0 0.00233 ] Cmatrix=[ 0 | 0 0 | 0 0 0 ]
New LineCode.350_AL_2PH_12KV_2 nphases=2 units=km Rmatrix=[ 0.000363 | 0 0.000363 ] Xmatrix=[ 0.000276 | 0 0.000276 ] Cmatrix=[ 0 | 0 0 ]
New LineCode.2_CLP_3PH_12KV_3 nphases=3 units=km Rmatrix=[ 0.76031 | 0 0.76031 | 0 0 0.76031 ] Xmatrix=[ 0.160259 | 0 0.160259 | 0 0 0.160259 ] Cmatrix=[ 0 | 0 0 | 0 0 0 ]
New LineCode.1/0_JCN_3PH_12KV_3 nphases=3 units=km Rmatrix=[ 0.005641 | 0 0.005641 | 0 0 0.005641 ] Xmatrix=[ 0.001724 | 0 0.001724 | 0 0 0.001724 ] Cmatrix=[ 0 | 0 0 | 0 0 0 ]
New LineCode.1/0_CLP_3PH_12KV_3 nphases=3 units=km Rmatrix=[ 0.004698 | 0 0.004698 | 0 0 0.004698 ] Xmatrix=[ 0.001436 | 0 0.001436 | 0 0 0.001436 ] Cmatrix=[ 0 | 0 0 | 0 0 0 ]
New LineCode.1000_CLP_3PH_12KV_3 nphases=3 units=km Rmatrix=[ 0.015072 | 0 0.015072 | 0 0 0.015072 ] Xmatrix=[ 0.022815 | 0 0.022815 | 0 0 0.022815 ] Cmatrix=[ 0 | 0 0 | 0 0 0 ]
New LineCode.750_CLP_3PH_12KV_3 nphases=3 units=km Rmatrix=[ 0.002021 | 0 0.002021 | 0 0 0.002021 ] Xmatrix=[ 0.002482 | 0 0.002482 | 0 0 0.002482 ] Cmatrix=[ 0 | 0 0 | 0 0 0 ]
New LineCode.2_JCN_3PH_12KV_3 nphases=3 units=km Rmatrix=[ 0.325707 | 0 0.325707 | 0 0 0.325707 ] Xmatrix=[ 0.068653 | 0 0.068653 | 0 0 0.068653 ] Cmatrix=[ 0 | 0 0 | 0 0 0 ]
New LineCode.750_JCN_3PH_12KV_3 nphases=3 units=km Rmatrix=[ 0.005068 | 0 0.005068 | 0 0 0.005068 ] Xmatrix=[ 0.006225 | 0 0.006225 | 0 0 0.006225 ] Cmatrix=[ 0 | 0 0 | 0 0 0 ]
New LineCode.350_JCN_3PH_12KV_3 nphases=3 units=km Rmatrix=[ 0.050505 | 0 0.050505 | 0 0 0.050505 ] Xmatrix=[ 0.038373 | 0 0.038373 | 0 0 0.038373 ] Cmatrix=[ 0 | 0 0 | 0 0 0 ]
New LineCode.350_CLP_3PH_12KV_3 nphases=3 units=km Rmatrix=[ 0.022836 | 0 0.022836 | 0 0 0.022836 ] Xmatrix=[ 0.017351 | 0 0.017351 | 0 0 0.017351 ] Cmatrix=[ 0 | 0 0 | 0 0 0 ]
New LineCode.336_ACSR_3PH_12KV_3 nphases=3 units=km Rmatrix=[ 0.011378 | 0 0.011378 | 0 0 0.011378 ] Xmatrix=[ 0.02548 | 0 0.02548 | 0 0 0.02548 ] Cmatrix=[ 0 | 0 0 | 0 0 0 ]
New LineCode.6_CU_3PH_12KV_3 nphases=3 units=km Rmatrix=[ 0.032034 | 0 0.032034 | 0 0 0.032034 ] Xmatrix=[ 0.011355 | 0 0.011355 | 0 0 0.011355 ] Cmatrix=[ 0 | 0 0 | 0 0 0 ]
New LineCode.336_ACSR_2PH_12KV_2 nphases=2 units=km Rmatrix=[ 0.001104 | 0 0.001104 ] Xmatrix=[ 0.002471 | 0 0.002471 ] Cmatrix=[ 0 | 0 0 ]
New LineCode.2_ACSR_3PH_12KV_3 nphases=3 units=km Rmatrix=[ 0.010992 | 0 0.010992 | 0 0 0.010992 ] Xmatrix=[ 0.005909 | 0 0.005909 | 0 0 0.005909 ] Cmatrix=[ 0 | 0 0 | 0 0 0 ]
New LineCode.2_CU_3PH_12KV_3 nphases=3 units=km Rmatrix=[ 0.433581 | 0 0.433581 | 0 0 0.433581 ] Xmatrix=[ 0.352599 | 0 0.352599 | 0 0 0.352599 ] Cmatrix=[ 0 | 0 0 | 0 0 0 ]
New LineCode.1/0_JCN_ABC_12_3 nphases=3 units=km Rmatrix=[ 0.004074 | 0 0.004074 | 0 0 0.004074 ] Xmatrix=[ 0.001245 | 0 0.001245 | 0 0 0.001245 ] Cmatrix=[ 0 | 0 0 | 0 0 0 ]
New LineCode.1/0_CLP_ABC_12_3 nphases=3 units=km Rmatrix=[ 0.003223 | 0 0.003223 | 0 0 0.003223 ] Xmatrix=[ 0.000985 | 0 0.000985 | 0 0 0.000985 ] Cmatrix=[ 0 | 0 0 | 0 0 0 ]

! Lines
New Line.GS3421-1$4012457E phases=3 Bus1=166205840.1.2.3 Bus2=166206126.1.2.3 LineCode=1000_JCN_3PH_12KV_3 Length=0.642138 units=km
New Line.4012457E$PS3408 phases=4 Bus1=166206125.0.1.2.3 Bus2=166206189.0.1.2.3 LineCode=336_ACSR_3PH_336_ACSR_N_12KV_4 Length=0.07551 units=km
New Line.PS3408$ND167342658 phases=4 Bus1=166206190.0.1.2.3 Bus2=167342658.0.1.2.3 LineCode=336_ACSR_3PH_336_ACSR_N_12KV_4 Length=0.075825 units=km
New Line.ND138902757$BF12510 phases=3 Bus1=138902757.1.2.3 Bus2=200298358.1.2.3 LineCode=4_ACSR_3PH_12KV_3 Length=0.023611 units=km
New Line.BF12510$4753985E phases=3 Bus1=200298357.1.2.3 Bus2=138902738.1.2.3 LineCode=4_ACSR_3PH_12KV_3 Length=0.015988 units=km
New Line.640693E$PS6072 phases=3 Bus1=23576215.1.2.3 Bus2=235569873.1.2.3 LineCode=1/0_ACSR_3PH_12KV_3 Length=0.277139 units=km
New Line.1637622E$179951534 phases=2 Bus1=23574920.1.3 Bus2=179951536.1.3 LineCode=350_AL_2PH_12KV_2 Length=0.086279 units=km
New Line.PS6072$PH473E phases=3 Bus1=235569883.1.2.3 Bus2=235569901.1.2.3 LineCode=1/0_ACSR_3PH_12KV_3 Length=0.011963 units=km
New Line.4026241E$187947300 phases=3 Bus1=23576694.1.2.3 Bus2=187947302.1.2.3 LineCode=2_CLP_3PH_12KV_3 Length=0.089464 units=km
New Line.PH473E$235569972 phases=3 Bus1=235569909.1.2.3 Bus2=235569974.1.2.3 LineCode=1/0_JCN_3PH_12KV_3 Length=0.12505 units=km
New Line.179951534$PME8972-1 phases=2 Bus1=179951537.1.3 Bus2=23576648.1.3 LineCode=350_AL_2PH_12KV_2 Length=0.006025 units=km
New Line.2125524E$ND170033938 phases=3 Bus1=170033916.1.2.3 Bus2=170033938.1.2.3 LineCode=1/0_JCN_3PH_12KV_3 Length=0.037265 units=km
New Line.179951546$PME8972-1 phases=2 Bus1=23576647.1.3 Bus2=179951549.1.3 LineCode=350_AL_2PH_12KV_2 Length=0.002715 units=km
New Line.235569972$P5728322-1 phases=3 Bus1=235569975.1.2.3 Bus2=235569937.1.2.3 LineCode=1/0_JCN_3PH_12KV_3 Length=0.003512 units=km
New Line.187947300$P5467835-1 phases=3 Bus1=187947303.1.2.3 Bus2=23576710.1.2.3 LineCode=2_CLP_3PH_12KV_3 Length=0.000518 units=km
New Line.ND170033938$188541552 phases=3 Bus1=170033938.1.2.3 Bus2=188541554.1.2.3 LineCode=1/0_JCN_3PH_12KV_3 Length=0.232067 units=km
New Line.P5393583-1$179951546 phases=2 Bus1=179951548.1.3 Bus2=23574936.1.3 LineCode=350_AL_2PH_12KV_2 Length=0.008528 units=km
New Line.188541552$P5643679-1 phases=3 Bus1=188541555.1.2.3 Bus2=170033969.1.2.3 LineCode=1/0_JCN_3PH_12KV_3 Length=0.006634 units=km
New Line.P5393583-2$210334151 phases=2 Bus1=23574945.1.3 Bus2=210334153.1.3 LineCode=350_AL_2PH_12KV_2 Length=0.066419 units=km
New Line.210334151$P5393584-1 phases=2 Bus1=210334154.1.3 Bus2=23575008.1.3 LineCode=350_AL_2PH_12KV_2 Length=0.00164 units=km
New Line.4012495E$GS6913-3 phases=3 Bus1=23576249.1.2.3 Bus2=240703952.1.2.3 LineCode=1000_JCN_3PH_12KV_3 Length=0.484704 units=km
New Line.P5475802-1$GS6913-2 phases=3 Bus1=240703943.1.2.3 Bus2=23577659.1.2.3 LineCode=1/0_CLP_3PH_12KV_3 Length=0.136401 units=km
New Line.GS6913-1$GS6914-3 phases=3 Bus1=240703934.1.2.3 Bus2=240704079.1.2.3 LineCode=1000_JCN_3PH_12KV_3 Length=0.217131 units=km
New Line.ND240704368$GS6914-2 phases=3 Bus1=240704070.1.2.3 Bus2=240704368.1.2.3 LineCode=1000_JCN_3PH_12KV_3 Length=0.440011 units=km
New Line.P5503946$GS6914-4 phases=3 Bus1=240704088.1.2.3 Bus2=69902835.1.2.3 LineCode=2_CLP_3PH_12KV_3 Length=0.496134 units=km
New Line.ND240704391$ND240704368 phases=3 Bus1=240704368.1.2.3 Bus2=240704391.1.2.3 LineCode=1000_JCN_3PH_12KV_3 Length=0.017908 units=km
New Line.GS6914-1$GS6918-1 phases=3 Bus1=240704061.1.2.3 Bus2=241698943.1.2.3 LineCode=1000_JCN_3PH_12KV_3 Length=0.475172 units=km
New Line.RCS8922-4$ND240704391 phases=3 Bus1=240704391.1.2.3 Bus2=165737766.1.2.3 LineCode=1000_JCN_3PH_12KV_3 Length=0.025567 units=km
New Line.ND240704391$V5633679PT phases=3 Bus1=240704391.1.2.3 Bus2=240704401.1.2.3 LineCode=1000_JCN_3PH_12KV_3 Length=0.001482 units=km
New Line.GS6918-2$0209654 phases=3 Bus1=241698952.1.2.3 Bus2=241699085.1.2.3 LineCode=1/0_JCN_3PH_12KV_3 Length=0.182114 units=km
New Line.GS3413-3$PME0405-2 phases=3 Bus1=165737757.1.2.3 Bus2=166435112.1.2.3 LineCode=1000_JCN_3PH_12KV_3 Length=0.131382 units=km
New Line.PMC6924-1$GS6918-3 phases=3 Bus1=241698961.1.2.3 Bus2=241699134.1.2.3 LineCode=1000_JCN_3PH_12KV_3 Length=0.189578 units=km
New Line.GS6918-4$PME3849-1 phases=3 Bus1=241698970.1.2.3 Bus2=185523862.1.2.3 LineCode=1000_JCN_3PH_12KV_3 Length=0.447848 units=km
New Line.GS3413-1$GS3414-1 phases=3 Bus1=165737739.1.2.3 Bus2=165738599.1.2.3 LineCode=1000_JCN_3PH_12KV_3 Length=0.108627 units=km
New Line.0170366$PME0405-3 phases=3 Bus1=166435094.1.2.3 Bus2=166050354.1.2.3 LineCode=1000_CLP_3PH_12KV_3 Length=0.005965 units=km
New Line.PME0405-4$PME0406-1 phases=3 Bus1=166435103.1.2.3 Bus2=149029401.1.2.3 LineCode=1/0_CLP_3PH_12KV_3 Length=0.349302 units=km
New Line.PMC0391-1$PME3849-4 phases=3 Bus1=185523844.1.2.3 Bus2=185524024.1.2.3 LineCode=1/0_JCN_3PH_12KV_3 Length=0.134944 units=km
New Line.ND240756808$PME0405-1 phases=3 Bus1=166435121.1.2.3 Bus2=240756808.1.2.3 LineCode=750_CLP_3PH_12KV_3 Length=0.015356 units=km
New Line.ND166050427$ND240756808 phases=3 Bus1=240756808.1.2.3 Bus2=166050427.1.2.3 LineCode=750_CLP_3PH_12KV_3 Length=0.016066 units=km
New Line.219794716$ND240756808 phases=3 Bus1=240756808.1.2.3 Bus2=219794718.1.2.3 LineCode=2_JCN_3PH_12KV_3 Length=0.049175 units=km
New Line.PME6926-2$PMC6924-2 phases=3 Bus1=241699143.1.2.3 Bus2=241699256.1.2.3 LineCode=1000_JCN_3PH_12KV_3 Length=0.16239 units=km
New Line.J876A-2P$GS3414-2 phases=3 Bus1=165738591.1.2.3 Bus2=165738893.1.2.3 LineCode=1/0_JCN_3PH_12KV_3 Length=0.165791 units=km
New Line.ND166050427$ND165905013 phases=3 Bus1=166050427.1.2.3 Bus2=165905013.1.2.3 LineCode=750_CLP_3PH_12KV_3 Length=0.412545 units=km
New Line.J540A-2P$ND166050427 phases=3 Bus1=166050427.1.2.3 Bus2=23582668.1.2.3 LineCode=1/0_CLP_3PH_12KV_3 Length=0.236962 units=km
New Line.ND165905013$GS3414-4 phases=3 Bus1=165905013.1.2.3 Bus2=165738615.1.2.3 LineCode=750_JCN_3PH_12KV_3 Length=0.044987 units=km
New Line.GS3414-3$ND165739078 phases=3 Bus1=165738607.1.2.3 Bus2=165739078.1.2.3 LineCode=350_JCN_3PH_12KV_3 Length=0.227721 units=km
New Line.219794716$P5630600-1 phases=3 Bus1=219794719.1.2.3 Bus2=166050521.1.2.3 LineCode=2_JCN_3PH_12KV_3 Length=0.009187 units=km
New Line.ND165739078$PME2440-2 phases=3 Bus1=165739078.1.2.3 Bus2=164641191.1.2.3 LineCode=350_CLP_3PH_12KV_3 Length=0.202573 units=km
New Line.180186100$PME0406-2 phases=3 Bus1=149029392.1.2.3 Bus2=180186103.1.2.3 LineCode=1/0_JCN_3PH_12KV_3 Length=0.002741 units=km
New Line.PME6926-3$241699496 phases=3 Bus1=241699238.1.2.3 Bus2=241699498.1.2.3 LineCode=1/0_JCN_3PH_12KV_3 Length=0.11784 units=km
New Line.PME6926-4$241699523 phases=3 Bus1=241699247.1.2.3 Bus2=241699525.1.2.3 LineCode=1/0_JCN_3PH_12KV_3 Length=0.153677 units=km
New Line.PME6926-1$241699548 phases=3 Bus1=241699265.1.2.3 Bus2=241699550.1.2.3 LineCode=1/0_JCN_3PH_12KV_3 Length=0.043779 units=km
New Line.J540A-1P$187947335 phases=3 Bus1=23578350.1.2.3 Bus2=187947337.1.2.3 LineCode=1/0_CLP_3PH_12KV_3 Length=0.184265 units=km
New Line.PME2437-1$J876A-1P phases=3 Bus1=165738877.1.2.3 Bus2=23582844.1.2.3 LineCode=2_CLP_3PH_12KV_3 Length=0.309628 units=km
New Line.ND23586670$J540A-3P phases=3 Bus1=23582652.1.2.3 Bus2=23586670.1.2.3 LineCode=1/0_CLP_3PH_12KV_3 Length=0.412545 units=km
New Line.241699496$ND241699439 phases=3 Bus1=241699499.1.2.3 Bus2=241699421.1.2.3 LineCode=1/0_JCN_3PH_12KV_3 Length=0.009422 units=km
New Line.ND23586670$187934012 phases=3 Bus1=23586670.1.2.3 Bus2=187934014.1.2.3 LineCode=1/0_CLP_3PH_12KV_3 Length=0.105105 units=km
New Line.188600683$PME2440-3 phases=3 Bus1=164641173.1.2.3 Bus2=188600686.1.2.3 LineCode=750_CLP_3PH_12KV_3 Length=0.002346 units=km
New Line.ND23586670$199837750 phases=3 Bus1=23586670.1.2.3 Bus2=199837752.1.2.3 LineCode=1/0_CLP_3PH_12KV_3 Length=0.073389 units=km
New Line.J540A-4P$P5441540T1 phases=3 Bus1=23582660.1.2.3 Bus2=241132029.1.2.3 LineCode=2_JCN_3PH_12KV_3 Length=0.021341 units=km
New Line.241699548$ND241699391 phases=3 Bus1=241699551.1.2.3 Bus2=241699396.1.2.3 LineCode=1/0_JCN_3PH_12KV_3 Length=0.006684 units=km
New Line.241699523$ND241699475 phases=3 Bus1=241699526.1.2.3 Bus2=241699457.1.2.3 LineCode=1/0_JCN_3PH_12KV_3 Length=0.00803 units=km
New Line.P5441543$PMC1543-1 phases=3 Bus1=149029318.1.2.3 Bus2=149029197.1.2.3 LineCode=1/0_JCN_3PH_12KV_3 Length=0.06299 units=km
New Line.188600671$PME2440-4 phases=3 Bus1=164641182.1.2.3 Bus2=188600674.1.2.3 LineCode=750_CLP_3PH_12KV_3 Length=0.001914 units=km
New Line.187947335$P5441544-1 phases=3 Bus1=187947338.1.2.3 Bus2=23575851.1.2.3 LineCode=1/0_CLP_3PH_12KV_3 Length=0.001934 units=km
New Line.PME2440-1$0183242 phases=3 Bus1=164641200.1.2.3 Bus2=23584945.1.2.3 LineCode=350_CLP_3PH_12KV_3 Length=0.004945 units=km
New Line.199837750$P5583776-1 phases=3 Bus1=199837753.1.2.3 Bus2=136417698.1.2.3 LineCode=1/0_CLP_3PH_12KV_3 Length=0.006677 units=km
New Line.187934012$P5463904-1 phases=3 Bus1=187934015.1.2.3 Bus2=23577409.1.2.3 LineCode=1/0_CLP_3PH_12KV_3 Length=0.002172 units=km
New Line.ND23582794$188600683 phases=3 Bus1=188600685.1.2.3 Bus2=23582772.1.2.3 LineCode=750_CLP_3PH_12KV_3 Length=0.01725 units=km
New Line.PME2437-2$199837794 phases=3 Bus1=23582835.1.2.3 Bus2=199837796.1.2.3 LineCode=1/0_JCN_3PH_12KV_3 Length=0.006245 units=km
New Line.188600671$ND23582821 phases=3 Bus1=188600673.1.2.3 Bus2=23582799.1.2.3 LineCode=750_CLP_3PH_12KV_3 Length=0.017938 units=km
New Line.199837794$ND23582932 phases=3 Bus1=199837797.1.2.3 Bus2=23582910.1.2.3 LineCode=1/0_JCN_3PH_12KV_3 Length=0.013802 units=km
New Line.199837782$ND23582932 phases=3 Bus1=23582910.1.2.3 Bus2=199837785.1.2.3 LineCode=1/0_JCN_3PH_12KV_3 Length=0.014919 units=km
New Line.4012455E$ND167342658 phases=4 Bus1=167342658.0.1.2.3 Bus2=166015799.0.1.2.3 LineCode=336_ACSR_3PH_336_ACSR_N_12KV_4 Length=0.110256 units=km
New Line.ND167342658$PS1661 phases=4 Bus1=167342658.0.1.2.3 Bus2=23584196.0.1.2.3 LineCode=336_ACSR_3PH_336_ACSR_N_12KV_4 Length=0.213135 units=km
New Line.4012455E$ND138902757 phases=4 Bus1=166015799.0.1.2.3 Bus2=138902757.0.1.2.3 LineCode=336_ACSR_3PH_336_ACSR_N_12KV_4 Length=0.063821 units=km
New Line.ND138902757$ND166304755 phases=4 Bus1=138902757.0.1.2.3 Bus2=166304755.0.1.2.3 LineCode=336_ACSR_3PH_336_ACSR_N_12KV_4 Length=0.231579 units=km
New Line.PS1661$ND23584990 phases=4 Bus1=23584197.0.1.2.3 Bus2=23584990.0.1.2.3 LineCode=336_ACSR_3PH_336_ACSR_N_12KV_4 Length=0.08995 units=km
New Line.ND23584990$RCS1662 phases=3 Bus1=23584990.1.2.3 Bus2=135299190.1.2.3 LineCode=336_ACSR_3PH_12KV_3 Length=0.082689 units=km
New Line.ND23584990$1637627E phases=3 Bus1=23584990.1.2.3 Bus2=23574880.1.2.3 LineCode=336_ACSR_3PH_12KV_3 Length=0.091376 units=km
New Line.RCS1051$ND23584990 phases=4 Bus1=23584990.0.1.2.3 Bus2=23584169.0.1.2.3 LineCode=336_ACSR_3PH_336_ACSR_N_12KV_4 Length=0.139079 units=km
New Line.ND23585270$ND166304755 phases=3 Bus1=166304755.1.2.3 Bus2=23585270.1.2.3 LineCode=336_ACSR_3PH_12KV_3 Length=0.373661 units=km
New Line.ND23585270$BF12511 phases=3 Bus1=23585270.1.2.3 Bus2=200298394.1.2.3 LineCode=1/0_ACSR_3PH_12KV_3 Length=0.018244 units=km
New Line.ND23585270$ND23585237 phases=3 Bus1=23585270.1.2.3 Bus2=23585237.1.2.3 LineCode=336_ACSR_3PH_12KV_3 Length=0.353341 units=km
New Line.1637627E$ND23585683 phases=3 Bus1=23574880.1.2.3 Bus2=23585683.1.2.3 LineCode=336_ACSR_3PH_12KV_3 Length=0.122034 units=km
New Line.ND23585237$BF12512 phases=3 Bus1=23585237.1.2.3 Bus2=200298434.1.2.3 LineCode=6_CU_3PH_12KV_3 Length=0.016811 units=km
New Line.ND23585237$4012470E phases=3 Bus1=23585237.1.2.3 Bus2=23577934.1.2.3 LineCode=336_ACSR_3PH_12KV_3 Length=0.097298 units=km
New Line.1144720E$ND23585683 phases=3 Bus1=23585683.1.2.3 Bus2=23584432.1.2.3 LineCode=6_CU_3PH_12KV_3 Length=0.02157 units=km
New Line.ND23585683$ND23585151 phases=3 Bus1=23585683.1.2.3 Bus2=23585151.1.2.3 LineCode=336_ACSR_3PH_12KV_3 Length=0.182923 units=km
New Line.BF12511$640693E phases=3 Bus1=200298393.1.2.3 Bus2=23576215.1.2.3 LineCode=1/0_ACSR_3PH_12KV_3 Length=0.048493 units=km
New Line.4012470E$4012474E phases=3 Bus1=23577934.1.2.3 Bus2=23582955.1.2.3 LineCode=336_ACSR_3PH_12KV_3 Length=0.28923 units=km
New Line.4266560E$ND23585151 phases=3 Bus1=23585151.1.2.3 Bus2=23584485.1.2.3 LineCode=336_ACSR_3PH_12KV_3 Length=0.023427 units=km
New Line.ND23585151$ND23585624 phases=3 Bus1=23585151.1.2.3 Bus2=23585624.1.2.3 LineCode=336_ACSR_3PH_12KV_3 Length=0.174059 units=km
New Line.ND23585624$ND196183373 phases=3 Bus1=23585624.1.2.3 Bus2=196183373.1.2.3 LineCode=336_ACSR_3PH_12KV_3 Length=0.060414 units=km
New Line.ND23585624$1637622E phases=2 Bus1=23585624.1.3 Bus2=23574919.1.3 LineCode=336_ACSR_2PH_12KV_2 Length=0.00594 units=km
New Line.634184E$BF12512 phases=3 Bus1=200298435.1.2.3 Bus2=23575481.1.2.3 LineCode=6_CU_3PH_12KV_3 Length=0.181944 units=km
New Line.1144720E$4266470E phases=3 Bus1=23584433.1.2.3 Bus2=23576165.1.2.3 LineCode=6_CU_3PH_12KV_3 Length=0.02157 units=km
New Line.4012474E$ND23585056 phases=3 Bus1=23582955.1.2.3 Bus2=23585056.1.2.3 LineCode=336_ACSR_3PH_12KV_3 Length=0.061014 units=km
New Line.ND23585056$ND200298474 phases=3 Bus1=23585056.1.2.3 Bus2=200298474.1.2.3 LineCode=336_ACSR_3PH_12KV_3 Length=0.147415 units=km
New Line.634184E$2321444E phases=3 Bus1=23575481.1.2.3 Bus2=23575506.1.2.3 LineCode=4_ACSR_3PH_12KV_3 Length=0.207192 units=km
New Line.4266560E$4266559E phases=3 Bus1=23584484.1.2.3 Bus2=23576190.1.2.3 LineCode=336_ACSR_3PH_12KV_3 Length=0.026802 units=km
New Line.ND23585056$PS2209 phases=3 Bus1=23585056.1.2.3 Bus2=23584367.1.2.3 LineCode=336_ACSR_3PH_12KV_3 Length=0.182197 units=km
New Line.ND196183373$ND23585195 phases=3 Bus1=196183373.1.2.3 Bus2=23585195.1.2.3 LineCode=336_ACSR_3PH_12KV_3 Length=0.129561 units=km
New Line.ND200298474$4012480E phases=3 Bus1=200298474.1.2.3 Bus2=147994601.1.2.3 LineCode=336_ACSR_3PH_12KV_3 Length=0.410138 units=km
New Line.ND23585195$4242635E phases=3 Bus1=23585195.1.2.3 Bus2=23574909.1.2.3 LineCode=336_ACSR_3PH_12KV_3 Length=0.091096 units=km
New Line.ND23585195$4026241E phases=3 Bus1=23585195.1.2.3 Bus2=23576693.1.2.3 LineCode=2_ACSR_3PH_12KV_3 Length=0.054268 units=km
New Line.4242635E$ND170033887 phases=3 Bus1=23574909.1.2.3 Bus2=170033887.1.2.3 LineCode=336_ACSR_3PH_12KV_3 Length=0.03822 units=km
New Line.4012480E$ND23586130 phases=3 Bus1=147994601.1.2.3 Bus2=23586130.1.2.3 LineCode=336_ACSR_3PH_12KV_3 Length=0.388868 units=km
New Line.ND23586130$4012489E phases=3 Bus1=23586130.1.2.3 Bus2=166867297.1.2.3 LineCode=336_ACSR_3PH_12KV_3 Length=0.358815 units=km
New Line.ND170033887$2125524E phases=3 Bus1=170033887.1.2.3 Bus2=170033911.1.2.3 LineCode=336_ACSR_3PH_12KV_3 Length=0.035879 units=km
New Line.ND23586130$BF12513 phases=3 Bus1=23586130.1.2.3 Bus2=198040045.1.2.3 LineCode=2_CU_3PH_12KV_3 Length=0.79863 units=km
New Line.4012489E$4012490E phases=3 Bus1=166867297.1.2.3 Bus2=180684385.1.2.3 LineCode=336_ACSR_3PH_12KV_3 Length=0.532101 units=km
New Line.4012490E$PS1403 phases=3 Bus1=180684385.1.2.3 Bus2=23584393.1.2.3 LineCode=336_ACSR_3PH_12KV_3 Length=0.139242 units=km
New Line.BF12513$ND23585210 phases=3 Bus1=198040046.1.2.3 Bus2=23585210.1.2.3 LineCode=2_CU_3PH_12KV_3 Length=0.720988 units=km
New Line.2111209E$ND23585210 phases=3 Bus1=23585210.1.2.3 Bus2=23584511.1.2.3 LineCode=4_ACSR_3PH_12KV_3 Length=0.312298 units=km
New Line.ND23585210$ND23585316 phases=3 Bus1=23585210.1.2.3 Bus2=23585316.1.2.3 LineCode=4_ACSR_3PH_12KV_3 Length=0.079578 units=km
New Line.4541122E$ND23585210 phases=3 Bus1=23585210.1.2.3 Bus2=90158558.1.2.3 LineCode=2_CU_3PH_12KV_3 Length=0.053579 units=km
New Line.ND23585316$4214995E phases=3 Bus1=23585316.1.2.3 Bus2=23575556.1.2.3 LineCode=4_ACSR_3PH_12KV_3 Length=0.241987 units=km
New Line.4541122E$4573313E phases=3 Bus1=90158558.1.2.3 Bus2=23575685.1.2.3 LineCode=2_CU_3PH_12KV_3 Length=0.345272 units=km
New Line.PS1403$ND23585337 phases=3 Bus1=23584392.1.2.3 Bus2=23585337.1.2.3 LineCode=336_ACSR_3PH_12KV_3 Length=0.080126 units=km
New Line.ND23585337$PS3407 phases=3 Bus1=23585337.1.2.3 Bus2=165737472.1.2.3 LineCode=336_ACSR_3PH_12KV_3 Length=0.022079 units=km
New Line.2111209E$995139E phases=3 Bus1=23584510.1.2.3 Bus2=23575581.1.2.3 LineCode=4_ACSR_3PH_12KV_3 Length=0.071348 units=km
New Line.ND23585337$4612496E phases=3 Bus1=23585337.1.2.3 Bus2=23575712.1.2.3 LineCode=336_ACSR_3PH_12KV_3 Length=0.066869 units=km
New Line.4573313E$4292251E phases=3 Bus1=23575685.1.2.3 Bus2=23577572.1.2.3 LineCode=2_CU_3PH_12KV_3 Length=0.097932 units=km
New Line.4612496E$RCS3409 phases=3 Bus1=23575712.1.2.3 Bus2=166304841.1.2.3 LineCode=336_ACSR_3PH_12KV_3 Length=0.073495 units=km
New Line.995139E$995140E phases=3 Bus1=23575581.1.2.3 Bus2=23575606.1.2.3 LineCode=4_ACSR_3PH_12KV_3 Length=0.019205 units=km
New Line.PS3407$ND165904850 phases=3 Bus1=165737473.1.2.3 Bus2=165904850.1.2.3 LineCode=336_ACSR_3PH_12KV_3 Length=0.010699 units=km
New Line.995140E$4370082E phases=3 Bus1=23575606.1.2.3 Bus2=23583040.1.2.3 LineCode=4_ACSR_3PH_12KV_3 Length=0.069305 units=km
New Line.4370082E$2017478E phases=3 Bus1=23583040.1.2.3 Bus2=23575631.1.2.3 LineCode=4_ACSR_3PH_12KV_3 Length=0.024412 units=km
New Line.ND165904850$4012495E phases=3 Bus1=165904850.1.2.3 Bus2=23576248.1.2.3 LineCode=336_ACSR_3PH_12KV_3 Length=0.016446 units=km
New Line.unset$180186100 phases=3 Bus1=180186102.1.2.3 Bus2=149029127.1.2.3 LineCode=1/0_JCN_ABC_12_3 Length=0.005779 units=km
New Line.P5441543$unset phases=3 Bus1=149029127.1.2.3 Bus2=149029318.1.2.3 LineCode=1/0_CLP_ABC_12_3 Length=0.036348 units=km
New Line.ND23582794$SCE-110353 phases=3 Bus1=23582772.1.2.3 Bus2=-77777723582772.1.2.3 LineCode=750_CLP_3PH_12KV_3 Length=0.155626 units=km
New Line.ND23582821$NEM500263617 phases=3 Bus1=23582799.1.2.3 Bus2=-77777723582799.1.2.3 LineCode=750_CLP_3PH_12KV_3 Length=0.096332 units=km
New Line.SCE_-104343$199837782 phases=3 Bus1=199837784.1.2.3 Bus2=-777777199837784.1.2.3 LineCode=1/0_JCN_3PH_12KV_3 Length=0.141576 units=km
New Line.GS3421-3$18511 phases=3 Bus1=-88888815977872.1.2.3 Bus2=166205858.1.2.3 LineCode=1000_JCN_3PH_12KV_3 Length=0.632953 units=km
New Line.ND170033887$RCS2379 phases=3 Bus1=170033887.1.2.3 Bus2=18514987.1.2.3 LineCode=336_ACSR_3PH_12KV_3 Length=0.064679 units=km

! Switches
New Line.5630600:P5630600-1 phases=3 Bus1=166050521.1.2.3 Bus2=166050522.1.2.3 switch=y r1=0.001 x1=0.001 r0=0.001 x0=0.001 Length=0.001 units=km
New Line.5441544:P5441544-1 phases=3 Bus1=23575851.1.2.3 Bus2=23575852.1.2.3 switch=y r1=0.001 x1=0.001 r0=0.001 x0=0.001 Length=0.001 units=km
New Line.5583776:P5583776-1 phases=3 Bus1=136417698.1.2.3 Bus2=136417699.1.2.3 switch=y r1=0.001 x1=0.001 r0=0.001 x0=0.001 Length=0.001 units=km
New Line.5463904:P5463904-1 phases=3 Bus1=23577409.1.2.3 Bus2=23577410.1.2.3 switch=y r1=0.001 x1=0.001 r0=0.001 x0=0.001 Length=0.001 units=km
New Line.ND241699113$PMC6924 phases=3 Bus1=241699113.1.2.3 Bus2=-777777241699113.1.2.3 switch=y r1=0.001 x1=0.001 r0=0.001 x0=0.001 Length=0.001 units=km
New Line.ND185524003$PMC0391 phases=3 Bus1=185524003.1.2.3 Bus2=-777777185524003.1.2.3 switch=y r1=0.001 x1=0.001 r0=0.001 x0=0.001 Length=0.001 units=km
New Line.ND149029176$PMC1543 phases=3 Bus1=149029176.1.2.3 Bus2=-777777149029176.1.2.3 switch=y r1=0.001 x1=0.001 r0=0.001 x0=0.001 Length=0.001 units=km
New Line.5393584:P5393584-2 phases=2 Bus1=23575009.1.3 Bus2=-77777723575009.1.3 switch=y r1=0.001 x1=0.001 r0=0.001 x0=0.001 Length=0.001 units=km
New Line.VALENTE$PORT_RCS1051$RCS1051 phases=3 Bus1=23584168.1.2.3 Bus2=-77777723584168.1.2.3 switch=y r1=0.001 x1=0.001 r0=0.001 x0=0.001 Length=0.001 units=km
New Line.VALENTE$WALLACE_RCS1662$RCS1662 phases=3 Bus1=23584269.1.2.3 Bus2=-77777723584269.1.2.3 switch=y r1=0.001 x1=0.001 r0=0.001 x0=0.001 Length=0.001 units=km
New Line.VALENTE$POND_PS2209$PS2209 phases=3 Bus1=23584368.1.2.3 Bus2=-77777723584368.1.2.3 switch=y r1=0.001 x1=0.001 r0=0.001 x0=0.001 Length=0.001 units=km
New Line.VALENTE$C_B_S_RCS2379$RCS2379 phases=3 Bus1=18514986.1.2.3 Bus2=-77777718514986.1.2.3 switch=y r1=0.001 x1=0.001 r0=0.001 x0=0.001 Length=0.001 units=km
New Line.VALENTE$FUGATE_RCS3409$RCS3409 phases=3 Bus1=166304840.1.2.3 Bus2=-777777166304840.1.2.3 switch=y r1=0.001 x1=0.001 r0=0.001 x0=0.001 Length=0.001 units=km
New Line.VALENTE$C_B_S_RCS8922-2$RCS8922-2 phases=3 Bus1=165737748.1.2.3 Bus2=-777777165737748.1.2.3 switch=y r1=0.001 x1=0.001 r0=0.001 x0=0.001 Length=0.001 units=km
New Line.5441543:PMC1543-1 phases=3 Bus1=149029197.1.2.3 Bus2=149029182.1.2.3 switch=y r1=0.001 x1=0.001 r0=0.001 x0=0.001 Length=0.001 units=km
New Line.5441543:PMC1543-2 phases=3 Bus1=149029189.1.2.3 Bus2=149029206.1.2.3 switch=y r1=0.001 x1=0.001 r0=0.001 x0=0.001 Length=0.001 units=km enabled=false
New Line.GS3421-2$166205855 phases=3 Bus1=166205832.1.2.3 Bus2=166205826.1.2.3 switch=y r1=0.001 x1=0.001 r0=0.001 x0=0.001 Length=0.001 units=km
New Line.166205837$GS3421-2 phases=3 Bus1=166205826.1.2.3 Bus2=166205825.1.2.3 switch=y r1=0.001 x1=0.001 r0=0.001 x0=0.001 Length=0.001 units=km
New Line.179951534 phases=2 Bus1=179951536.1.3 Bus2=179951537.1.3 switch=y r1=0.001 x1=0.001 r0=0.001 x0=0.001 Length=0.001 units=km
New Line.187947300 phases=3 Bus1=187947302.1.2.3 Bus2=187947303.1.2.3 switch=y r1=0.001 x1=0.001 r0=0.001 x0=0.001 Length=0.001 units=km
New Line.235569972 phases=3 Bus1=235569974.1.2.3 Bus2=235569975.1.2.3 switch=y r1=0.001 x1=0.001 r0=0.001 x0=0.001 Length=0.001 units=km
New Line.179951546 phases=2 Bus1=179951549.1.3 Bus2=179951548.1.3 switch=y r1=0.001 x1=0.001 r0=0.001 x0=0.001 Length=0.001 units=km
New Line.188541552 phases=3 Bus1=188541554.1.2.3 Bus2=188541555.1.2.3 switch=y r1=0.001 x1=0.001 r0=0.001 x0=0.001 Length=0.001 units=km
New Line.210334151 phases=2 Bus1=210334153.1.3 Bus2=210334154.1.3 switch=y r1=0.001 x1=0.001 r0=0.001 x0=0.001 Length=0.001 units=km
New Line.GS6913-2$240703949 phases=3 Bus1=240703926.1.2.3 Bus2=240703920.1.2.3 switch=y r1=0.001 x1=0.001 r0=0.001 x0=0.001 Length=0.001 units=km
New Line.240703931$GS6913-2 phases=3 Bus1=240703920.1.2.3 Bus2=240703919.1.2.3 switch=y r1=0.001 x1=0.001 r0=0.001 x0=0.001 Length=0.001 units=km
New Line.240704067$240704076 phases=3 Bus1=240704047.1.2.3 Bus2=240704041.1.2.3 switch=y r1=0.001 x1=0.001 r0=0.001 x0=0.001 Length=0.001 units=km
New Line.240704076$240704085 phases=3 Bus1=240704047.1.2.3 Bus2=240704053.1.2.3 switch=y r1=0.001 x1=0.001 r0=0.001 x0=0.001 Length=0.001 units=km
New Line.240704058$240704067 phases=3 Bus1=240704041.1.2.3 Bus2=240704040.1.2.3 switch=y r1=0.001 x1=0.001 r0=0.001 x0=0.001 Length=0.001 units=km
New Line.241698940$241698949 phases=3 Bus1=241698922.1.2.3 Bus2=241698923.1.2.3 switch=y r1=0.001 x1=0.001 r0=0.001 x0=0.001 Length=0.001 units=km
New Line.165737754$165737763 phases=3 Bus1=165737731.1.2.3 Bus2=165737725.1.2.3 switch=y r1=0.001 x1=0.001 r0=0.001 x0=0.001 Length=0.001 units=km
New Line.241698949$GS6918-3 phases=3 Bus1=241698923.1.2.3 Bus2=241698929.1.2.3 switch=y r1=0.001 x1=0.001 r0=0.001 x0=0.001 Length=0.001 units=km
New Line.165737745$165737754 phases=3 Bus1=165737725.1.2.3 Bus2=165737719.1.2.3 switch=y r1=0.001 x1=0.001 r0=0.001 x0=0.001 Length=0.001 units=km
New Line.GS6918-3$GS6918-4 phases=3 Bus1=241698929.1.2.3 Bus2=241698935.1.2.3 switch=y r1=0.001 x1=0.001 r0=0.001 x0=0.001 Length=0.001 units=km
New Line.165737736$165737745 phases=3 Bus1=165737719.1.2.3 Bus2=165737718.1.2.3 switch=y r1=0.001 x1=0.001 r0=0.001 x0=0.001 Length=0.001 units=km
New Line.PME0405-2$PME0405-4 phases=3 Bus1=166435085.1.2.3 Bus2=166435086.1.2.3 switch=y r1=0.001 x1=0.001 r0=0.001 x0=0.001 Length=0.001 units=km
New Line.PMC6924-1$ND241699113 phases=3 Bus1=241699119.1.2.3 Bus2=241699113.1.2.3 switch=y r1=0.001 x1=0.001 r0=0.001 x0=0.001 Length=0.001 units=km
New Line.PME3849-4$PME3849-2 phases=3 Bus1=185523826.1.2.3 Bus2=185523827.1.2.3 switch=y r1=0.001 x1=0.001 r0=0.001 x0=0.001 Length=0.001 units=km
New Line.ND241699113$PMC6924-2 phases=3 Bus1=241699113.1.2.3 Bus2=241699126.1.2.3 switch=y r1=0.001 x1=0.001 r0=0.001 x0=0.001 Length=0.001 units=km
New Line.165738597$165738589 phases=3 Bus1=165738571.1.2.3 Bus2=165738572.1.2.3 switch=y r1=0.001 x1=0.001 r0=0.001 x0=0.001 Length=0.001 units=km
New Line.165738589$165738605 phases=3 Bus1=165738572.1.2.3 Bus2=165738578.1.2.3 switch=y r1=0.001 x1=0.001 r0=0.001 x0=0.001 Length=0.001 units=km
New Line.165738605$165738613 phases=3 Bus1=165738578.1.2.3 Bus2=165738584.1.2.3 switch=y r1=0.001 x1=0.001 r0=0.001 x0=0.001 Length=0.001 units=km
New Line.PMC0391-1$ND185524003 phases=3 Bus1=185524009.1.2.3 Bus2=185524003.1.2.3 switch=y r1=0.001 x1=0.001 r0=0.001 x0=0.001 Length=0.001 units=km
New Line.219794716 phases=3 Bus1=219794718.1.2.3 Bus2=219794719.1.2.3 switch=y r1=0.001 x1=0.001 r0=0.001 x0=0.001 Length=0.001 units=km
New Line.ND185524003$PMC0391-2 phases=3 Bus1=185524003.1.2.3 Bus2=185524016.1.2.3 switch=y r1=0.001 x1=0.001 r0=0.001 x0=0.001 Length=0.001 units=km
New Line.165738874$165738890 phases=3 Bus1=165738894.1.2.3 Bus2=165738878.1.2.3 switch=y r1=0.001 x1=0.001 r0=0.001 x0=0.001 Length=0.001 units=km
New Line.165738890$165738882 phases=3 Bus1=165738894.1.2.3 Bus2=165738886.1.2.3 switch=y r1=0.001 x1=0.001 r0=0.001 x0=0.001 Length=0.001 units=km
New Line.23578347$23582665 phases=3 Bus1=23582669.1.2.3 Bus2=23578351.1.2.3 switch=y r1=0.001 x1=0.001 r0=0.001 x0=0.001 Length=0.001 units=km
New Line.23582665$23582649 phases=3 Bus1=23582669.1.2.3 Bus2=23582653.1.2.3 switch=y r1=0.001 x1=0.001 r0=0.001 x0=0.001 Length=0.001 units=km
New Line.180186100 phases=3 Bus1=180186103.1.2.3 Bus2=180186102.1.2.3 switch=y r1=0.001 x1=0.001 r0=0.001 x0=0.001 Length=0.001 units=km
New Line.23582649$23582657 phases=3 Bus1=23582653.1.2.3 Bus2=23582661.1.2.3 switch=y r1=0.001 x1=0.001 r0=0.001 x0=0.001 Length=0.001 units=km
New Line.241699496 phases=3 Bus1=241699498.1.2.3 Bus2=241699499.1.2.3 switch=y r1=0.001 x1=0.001 r0=0.001 x0=0.001 Length=0.001 units=km
New Line.164641197$164641189 phases=3 Bus1=164641165.1.2.3 Bus2=164641164.1.2.3 switch=y r1=0.001 x1=0.001 r0=0.001 x0=0.001 Length=0.001 units=km
New Line.241699523 phases=3 Bus1=241699525.1.2.3 Bus2=241699526.1.2.3 switch=y r1=0.001 x1=0.001 r0=0.001 x0=0.001 Length=0.001 units=km
New Line.241699548 phases=3 Bus1=241699550.1.2.3 Bus2=241699551.1.2.3 switch=y r1=0.001 x1=0.001 r0=0.001 x0=0.001 Length=0.001 units=km
New Line.187947335 phases=3 Bus1=187947337.1.2.3 Bus2=187947338.1.2.3 switch=y r1=0.001 x1=0.001 r0=0.001 x0=0.001 Length=0.001 units=km
New Line.241699428$P5779267 phases=3 Bus1=241699421.1.2.3 Bus2=241699422.1.2.3 switch=y r1=0.001 x1=0.001 r0=0.001 x0=0.001 Length=0.001 units=km
New Line.187934012 phases=3 Bus1=187934014.1.2.3 Bus2=187934015.1.2.3 switch=y r1=0.001 x1=0.001 r0=0.001 x0=0.001 Length=0.001 units=km
New Line.188600683 phases=3 Bus1=188600686.1.2.3 Bus2=188600685.1.2.3 switch=y r1=0.001 x1=0.001 r0=0.001 x0=0.001 Length=0.001 units=km
New Line.199837750 phases=3 Bus1=199837752.1.2.3 Bus2=199837753.1.2.3 switch=y r1=0.001 x1=0.001 r0=0.001 x0=0.001 Length=0.001 units=km
New Line.23582832$23582841 phases=3 Bus1=23582827.1.2.3 Bus2=23582826.1.2.3 switch=y r1=0.001 x1=0.001 r0=0.001 x0=0.001 Length=0.001 units=km
New Line.241699403$P5779269 phases=3 Bus1=241699396.1.2.3 Bus2=241699397.1.2.3 switch=y r1=0.001 x1=0.001 r0=0.001 x0=0.001 Length=0.001 units=km
New Line.241699464$P5779268 phases=3 Bus1=241699457.1.2.3 Bus2=241699458.1.2.3 switch=y r1=0.001 x1=0.001 r0=0.001 x0=0.001 Length=0.001 units=km
New Line.188600671 phases=3 Bus1=188600674.1.2.3 Bus2=188600673.1.2.3 switch=y r1=0.001 x1=0.001 r0=0.001 x0=0.001 Length=0.001 units=km
New Line.PMC1543-1$ND149029176 phases=3 Bus1=149029182.1.2.3 Bus2=149029176.1.2.3 switch=y r1=0.001 x1=0.001 r0=0.001 x0=0.001 Length=0.001 units=km
New Line.23582779$P5464875 phases=3 Bus1=23582772.1.2.3 Bus2=23582773.1.2.3 switch=y r1=0.001 x1=0.001 r0=0.001 x0=0.001 Length=0.001 units=km
New Line.ND149029176$PMC1543-2 phases=3 Bus1=149029176.1.2.3 Bus2=149029189.1.2.3 switch=y r1=0.001 x1=0.001 r0=0.001 x0=0.001 Length=0.001 units=km
New Line.199837794 phases=3 Bus1=199837796.1.2.3 Bus2=199837797.1.2.3 switch=y r1=0.001 x1=0.001 r0=0.001 x0=0.001 Length=0.001 units=km
New Line.23582806$P5464874 phases=3 Bus1=23582799.1.2.3 Bus2=23582800.1.2.3 switch=y r1=0.001 x1=0.001 r0=0.001 x0=0.001 Length=0.001 units=km
New Line.23582917$P5464877 phases=3 Bus1=23582910.1.2.3 Bus2=23582911.1.2.3 switch=y r1=0.001 x1=0.001 r0=0.001 x0=0.001 Length=0.001 units=km
New Line.199837782 phases=3 Bus1=199837785.1.2.3 Bus2=199837784.1.2.3 switch=y r1=0.001 x1=0.001 r0=0.001 x0=0.001 Length=0.001 units=km
New Line.5633772:GS3421-3 phases=3 Bus1=166205858.1.2.3 Bus2=166205832.1.2.3 switch=y r1=0.001 x1=0.001 r0=0.001 x0=0.001 Length=0.001 units=km
New Line.5633772:GS3421-1 phases=3 Bus1=166205825.1.2.3 Bus2=166205840.1.2.3 switch=y r1=0.001 x1=0.001 r0=0.001 x0=0.001 Length=0.001 units=km
New Line.4012457E:PS3408 phases=3 Bus1=166206189.1.2.3 Bus2=166206190.1.2.3 switch=y r1=0.001 x1=0.001 r0=0.001 x0=0.001 Length=0.001 units=km
New Line.4012454E:PS1661 phases=3 Bus1=23584196.1.2.3 Bus2=23584197.1.2.3 switch=y r1=0.001 x1=0.001 r0=0.001 x0=0.001 Length=0.001 units=km
New Line.4695461E:RCS1662 phases=3 Bus1=135299190.1.2.3 Bus2=23584269.1.2.3 switch=y r1=0.001 x1=0.001 r0=0.001 x0=0.001 Length=0.001 units=km enabled=false
New Line.4957472E:PS6072 phases=3 Bus1=235569873.1.2.3 Bus2=235569883.1.2.3 switch=y r1=0.001 x1=0.001 r0=0.001 x0=0.001 Length=0.001 units=km
New Line.1170127E:PS2209 phases=3 Bus1=23584367.1.2.3 Bus2=23584368.1.2.3 switch=y r1=0.001 x1=0.001 r0=0.001 x0=0.001 Length=0.001 units=km enabled=false
New Line.548476E:PS1403 phases=3 Bus1=23584393.1.2.3 Bus2=23584392.1.2.3 switch=y r1=0.001 x1=0.001 r0=0.001 x0=0.001 Length=0.001 units=km
New Line.4012495E:PS3407 phases=3 Bus1=165737472.1.2.3 Bus2=165737473.1.2.3 switch=y r1=0.001 x1=0.001 r0=0.001 x0=0.001 Length=0.001 units=km
New Line.5779202:GS6913-3 phases=3 Bus1=240703952.1.2.3 Bus2=240703926.1.2.3 switch=y r1=0.001 x1=0.001 r0=0.001 x0=0.001 Length=0.001 units=km
New Line.5779202:GS6913-2 phases=3 Bus1=240703920.1.2.3 Bus2=240703943.1.2.3 switch=y r1=0.001 x1=0.001 r0=0.001 x0=0.001 Length=0.001 units=km
New Line.5779202:GS6913-1 phases=3 Bus1=240703919.1.2.3 Bus2=240703934.1.2.3 switch=y r1=0.001 x1=0.001 r0=0.001 x0=0.001 Length=0.001 units=km
New Line.5779203:GS6914-3 phases=3 Bus1=240704079.1.2.3 Bus2=240704047.1.2.3 switch=y r1=0.001 x1=0.001 r0=0.001 x0=0.001 Length=0.001 units=km
New Line.5779203:GS6914-2 phases=3 Bus1=240704041.1.2.3 Bus2=240704070.1.2.3 switch=y r1=0.001 x1=0.001 r0=0.001 x0=0.001 Length=0.001 units=km
New Line.5779203:GS6914-4 phases=3 Bus1=240704053.1.2.3 Bus2=240704088.1.2.3 switch=y r1=0.001 x1=0.001 r0=0.001 x0=0.001 Length=0.001 units=km
New Line.5779203:GS6914-1 phases=3 Bus1=240704040.1.2.3 Bus2=240704061.1.2.3 switch=y r1=0.001 x1=0.001 r0=0.001 x0=0.001 Length=0.001 units=km
New Line.5779207:GS6918-1 phases=3 Bus1=241698943.1.2.3 Bus2=241698922.1.2.3 switch=y r1=0.001 x1=0.001 r0=0.001 x0=0.001 Length=0.001 units=km
New Line.5633679:RCS8922-4 phases=3 Bus1=165737766.1.2.3 Bus2=165737731.1.2.3 switch=y r1=0.001 x1=0.001 r0=0.001 x0=0.001 Length=0.001 units=km
New Line.5779207:GS6918-2 phases=3 Bus1=241698923.1.2.3 Bus2=241698952.1.2.3 switch=y r1=0.001 x1=0.001 r0=0.001 x0=0.001 Length=0.001 units=km
New Line.5633679:RCS8922-3 phases=3 Bus1=165737725.1.2.3 Bus2=165737757.1.2.3 switch=y r1=0.001 x1=0.001 r0=0.001 x0=0.001 Length=0.001 units=km
New Line.5779207:GS6918-3 phases=3 Bus1=241698929.1.2.3 Bus2=241698961.1.2.3 switch=y r1=0.001 x1=0.001 r0=0.001 x0=0.001 Length=0.001 units=km
New Line.5779207:GS6918-4 phases=3 Bus1=241698935.1.2.3 Bus2=241698970.1.2.3 switch=y r1=0.001 x1=0.001 r0=0.001 x0=0.001 Length=0.001 units=km
New Line.5633679:RCS8922-1 phases=3 Bus1=165737718.1.2.3 Bus2=165737739.1.2.3 switch=y r1=0.001 x1=0.001 r0=0.001 x0=0.001 Length=0.001 units=km
New Line.5441540:PME0405-2 phases=3 Bus1=166435112.1.2.3 Bus2=166435085.1.2.3 switch=y r1=0.001 x1=0.001 r0=0.001 x0=0.001 Length=0.001 units=km
New Line.5441540:PME0405-3 phases=3 Bus1=166435085.1.2.3 Bus2=166435094.1.2.3 switch=y r1=0.001 x1=0.001 r0=0.001 x0=0.001 Length=0.001 units=km
New Line.4012457E:4012457E phases=3 Bus1=166206126.1.2.3 Bus2=166206125.1.2.3 switch=y r1=0.001 x1=0.001 r0=0.001 x0=0.001 Length=0.001 units=km
New Line.1637622E:1637622E phases=2 Bus1=23574919.1.3 Bus2=23574920.1.3 switch=y r1=0.001 x1=0.001 r0=0.001 x0=0.001 Length=0.001 units=km
New Line.4957472E:PH473E phases=3 Bus1=235569901.1.2.3 Bus2=235569909.1.2.3 switch=y r1=0.001 x1=0.001 r0=0.001 x0=0.001 Length=0.001 units=km
New Line.4026241E:4026241E phases=3 Bus1=23576693.1.2.3 Bus2=23576694.1.2.3 switch=y r1=0.001 x1=0.001 r0=0.001 x0=0.001 Length=0.001 units=km
New Line.2125524E:2125524E phases=3 Bus1=170033911.1.2.3 Bus2=170033916.1.2.3 switch=y r1=0.001 x1=0.001 r0=0.001 x0=0.001 Length=0.001 units=km
New Line.4012495E:4012495E phases=3 Bus1=23576248.1.2.3 Bus2=23576249.1.2.3 switch=y r1=0.001 x1=0.001 r0=0.001 x0=0.001 Length=0.001 units=km
New Line.5654390:PME3849-1 phases=3 Bus1=185523862.1.2.3 Bus2=185523826.1.2.3 switch=y r1=0.001 x1=0.001 r0=0.001 x0=0.001 Length=0.001 units=km
New Line.5633680:GS3414-1 phases=3 Bus1=165738599.1.2.3 Bus2=165738571.1.2.3 switch=y r1=0.001 x1=0.001 r0=0.001 x0=0.001 Length=0.001 units=km
New Line.5728322:P5728322-1 phases=3 Bus1=235569937.1.2.3 Bus2=235569938.1.2.3 switch=y r1=0.001 x1=0.001 r0=0.001 x0=0.001 Length=0.001 units=km
New Line.5467835:P5467835-1 phases=3 Bus1=23576710.1.2.3 Bus2=23576711.1.2.3 switch=y r1=0.001 x1=0.001 r0=0.001 x0=0.001 Length=0.001 units=km
New Line.5393583:P5393583-1 phases=2 Bus1=23574936.1.3 Bus2=23574937.1.3 switch=y r1=0.001 x1=0.001 r0=0.001 x0=0.001 Length=0.001 units=km
New Line.5643679:P5643679-1 phases=3 Bus1=170033969.1.2.3 Bus2=170033970.1.2.3 switch=y r1=0.001 x1=0.001 r0=0.001 x0=0.001 Length=0.001 units=km
New Line.5393583:P5393583-2 phases=2 Bus1=23574937.1.3 Bus2=23574945.1.3 switch=y r1=0.001 x1=0.001 r0=0.001 x0=0.001 Length=0.001 units=km
New Line.5393584:P5393584-1 phases=2 Bus1=23575008.1.3 Bus2=23575009.1.3 switch=y r1=0.001 x1=0.001 r0=0.001 x0=0.001 Length=0.001 units=km
New Line.5475802:P5475802-1 phases=3 Bus1=23577659.1.2.3 Bus2=23577660.1.2.3 switch=y r1=0.001 x1=0.001 r0=0.001 x0=0.001 Length=0.001 units=km
New Line.5441540:PME0405-4 phases=3 Bus1=166435086.1.2.3 Bus2=166435103.1.2.3 switch=y r1=0.001 x1=0.001 r0=0.001 x0=0.001 Length=0.001 units=km
New Line.5441540:PME0405-1 phases=3 Bus1=166435086.1.2.3 Bus2=166435121.1.2.3 switch=y r1=0.001 x1=0.001 r0=0.001 x0=0.001 Length=0.001 units=km
New Line.5654390:PME3849-4 phases=3 Bus1=185523826.1.2.3 Bus2=185523844.1.2.3 switch=y r1=0.001 x1=0.001 r0=0.001 x0=0.001 Length=0.001 units=km
New Line.5779261:PMC6924-2 phases=3 Bus1=241699126.1.2.3 Bus2=241699143.1.2.3 switch=y r1=0.001 x1=0.001 r0=0.001 x0=0.001 Length=0.001 units=km
New Line.5633836:PME0406-1 phases=3 Bus1=149029401.1.2.3 Bus2=149029384.1.2.3 switch=y r1=0.001 x1=0.001 r0=0.001 x0=0.001 Length=0.001 units=km
New Line.5633680:GS3414-2 phases=3 Bus1=165738572.1.2.3 Bus2=165738591.1.2.3 switch=y r1=0.001 x1=0.001 r0=0.001 x0=0.001 Length=0.001 units=km
New Line.5633680:GS3414-3 phases=3 Bus1=165738578.1.2.3 Bus2=165738607.1.2.3 switch=y r1=0.001 x1=0.001 r0=0.001 x0=0.001 Length=0.001 units=km
New Line.5779263:PME6926-2 phases=3 Bus1=241699256.1.2.3 Bus2=241699229.1.2.3 switch=y r1=0.001 x1=0.001 r0=0.001 x0=0.001 Length=0.001 units=km
New Line.5633680:GS3414-4 phases=3 Bus1=165738584.1.2.3 Bus2=165738615.1.2.3 switch=y r1=0.001 x1=0.001 r0=0.001 x0=0.001 Length=0.001 units=km enabled=false
New Line.5464876:J876A-2 phases=3 Bus1=165738893.1.2.3 Bus2=165738894.1.2.3 switch=y r1=0.001 x1=0.001 r0=0.001 x0=0.001 Length=0.001 units=km
New Line.5441540:J540A-2 phases=3 Bus1=23582668.1.2.3 Bus2=23582669.1.2.3 switch=y r1=0.001 x1=0.001 r0=0.001 x0=0.001 Length=0.001 units=km
New Line.5464873:PME2440-2 phases=3 Bus1=164641191.1.2.3 Bus2=164641165.1.2.3 switch=y r1=0.001 x1=0.001 r0=0.001 x0=0.001 Length=0.001 units=km
New Line.5464876:J876A-1 phases=3 Bus1=165738878.1.2.3 Bus2=165738877.1.2.3 switch=y r1=0.001 x1=0.001 r0=0.001 x0=0.001 Length=0.001 units=km
New Line.5464876:J876A-3 phases=3 Bus1=165738886.1.2.3 Bus2=165738885.1.2.3 switch=y r1=0.001 x1=0.001 r0=0.001 x0=0.001 Length=0.001 units=km
New Line.5441540:J540A-1 phases=3 Bus1=23578351.1.2.3 Bus2=23578350.1.2.3 switch=y r1=0.001 x1=0.001 r0=0.001 x0=0.001 Length=0.001 units=km
New Line.5441540:J540A-3 phases=3 Bus1=23582653.1.2.3 Bus2=23582652.1.2.3 switch=y r1=0.001 x1=0.001 r0=0.001 x0=0.001 Length=0.001 units=km
New Line.5441540:J540A-4 phases=3 Bus1=23582661.1.2.3 Bus2=23582660.1.2.3 switch=y r1=0.001 x1=0.001 r0=0.001 x0=0.001 Length=0.001 units=km
New Line.5464873:PME2440-1 phases=3 Bus1=164641164.1.2.3 Bus2=164641200.1.2.3 switch=y r1=0.001 x1=0.001 r0=0.001 x0=0.001 Length=0.001 units=km
New Line.5464878:PME2437-1 phases=3 Bus1=23582844.1.2.3 Bus2=23582827.1.2.3 switch=y r1=0.001 x1=0.001 r0=0.001 x0=0.001 Length=0.001 units=km
New Line.4012455E:166015780 phases=3 Bus1=166015782.1.2.3 Bus2=166015783.1.2.3 switch=y r1=0.001 x1=0.001 r0=0.001 x0=0.001 Length=0.001 units=km
New Line.1637627E:23574860 phases=3 Bus1=23574862.1.2.3 Bus2=23574863.1.2.3 switch=y r1=0.001 x1=0.001 r0=0.001 x0=0.001 Length=0.001 units=km
New Line.4753985E:138902717 phases=3 Bus1=138902719.1.2.3 Bus2=138902720.1.2.3 switch=y r1=0.001 x1=0.001 r0=0.001 x0=0.001 Length=0.001 units=km
New Line.4012470E:23577914 phases=3 Bus1=23577916.1.2.3 Bus2=23577917.1.2.3 switch=y r1=0.001 x1=0.001 r0=0.001 x0=0.001 Length=0.001 units=km
New Line.640693E:23576197 phases=3 Bus1=23576199.1.2.3 Bus2=23576200.1.2.3 switch=y r1=0.001 x1=0.001 r0=0.001 x0=0.001 Length=0.001 units=km
New Line.4012474E:23582935 phases=3 Bus1=23582937.1.2.3 Bus2=23582938.1.2.3 switch=y r1=0.001 x1=0.001 r0=0.001 x0=0.001 Length=0.001 units=km
New Line.634184E:23575463 phases=3 Bus1=23575465.1.2.3 Bus2=23575466.1.2.3 switch=y r1=0.001 x1=0.001 r0=0.001 x0=0.001 Length=0.001 units=km
New Line.4266470E:23576147 phases=3 Bus1=23576149.1.2.3 Bus2=23576150.1.2.3 switch=y r1=0.001 x1=0.001 r0=0.001 x0=0.001 Length=0.001 units=km
New Line.2321444E:23575488 phases=3 Bus1=23575490.1.2.3 Bus2=23575491.1.2.3 switch=y r1=0.001 x1=0.001 r0=0.001 x0=0.001 Length=0.001 units=km
New Line.4266559E:23576172 phases=3 Bus1=23576174.1.2.3 Bus2=23576175.1.2.3 switch=y r1=0.001 x1=0.001 r0=0.001 x0=0.001 Length=0.001 units=km
New Line.4012480E:147994580 phases=3 Bus1=147994582.1.2.3 Bus2=147994583.1.2.3 switch=y r1=0.001 x1=0.001 r0=0.001 x0=0.001 Length=0.001 units=km
New Line.4242635E:23574889 phases=3 Bus1=23574891.1.2.3 Bus2=23574892.1.2.3 switch=y r1=0.001 x1=0.001 r0=0.001 x0=0.001 Length=0.001 units=km
New Line.4012489E:166867276 phases=3 Bus1=166867278.1.2.3 Bus2=166867279.1.2.3 switch=y r1=0.001 x1=0.001 r0=0.001 x0=0.001 Length=0.001 units=km
New Line.4012490E:180684366 phases=3 Bus1=180684368.1.2.3 Bus2=180684369.1.2.3 switch=y r1=0.001 x1=0.001 r0=0.001 x0=0.001 Length=0.001 units=km
New Line.4541122E:90158537 phases=3 Bus1=90158539.1.2.3 Bus2=90158540.1.2.3 switch=y r1=0.001 x1=0.001 r0=0.001 x0=0.001 Length=0.001 units=km
New Line.4214995E:23575538 phases=3 Bus1=23575540.1.2.3 Bus2=23575541.1.2.3 switch=y r1=0.001 x1=0.001 r0=0.001 x0=0.001 Length=0.001 units=km
New Line.4573313E:23575667 phases=3 Bus1=23575669.1.2.3 Bus2=23575670.1.2.3 switch=y r1=0.001 x1=0.001 r0=0.001 x0=0.001 Length=0.001 units=km
New Line.995139E:23575563 phases=3 Bus1=23575565.1.2.3 Bus2=23575566.1.2.3 switch=y r1=0.001 x1=0.001 r0=0.001 x0=0.001 Length=0.001 units=km
New Line.4012496E:23575692 phases=3 Bus1=23575694.1.2.3 Bus2=23575695.1.2.3 switch=y r1=0.001 x1=0.001 r0=0.001 x0=0.001 Length=0.001 units=km
New Line.4292251E:23577554 phases=3 Bus1=23577556.1.2.3 Bus2=23577557.1.2.3 switch=y r1=0.001 x1=0.001 r0=0.001 x0=0.001 Length=0.001 units=km
New Line.995140E:23575588 phases=3 Bus1=23575590.1.2.3 Bus2=23575591.1.2.3 switch=y r1=0.001 x1=0.001 r0=0.001 x0=0.001 Length=0.001 units=km
New Line.4370082E:23583022 phases=3 Bus1=23583024.1.2.3 Bus2=23583025.1.2.3 switch=y r1=0.001 x1=0.001 r0=0.001 x0=0.001 Length=0.001 units=km
New Line.2017478E:23575613 phases=3 Bus1=23575615.1.2.3 Bus2=23575616.1.2.3 switch=y r1=0.001 x1=0.001 r0=0.001 x0=0.001 Length=0.001 units=km
New Line.4012456E:BF12510 phases=3 Bus1=200298358.1.2.3 Bus2=200298357.1.2.3 switch=y r1=0.001 x1=0.001 r0=0.001 x0=0.001 Length=0.001 units=km
New Line.4012464E:BF12511 phases=3 Bus1=200298394.1.2.3 Bus2=200298393.1.2.3 switch=y r1=0.001 x1=0.001 r0=0.001 x0=0.001 Length=0.001 units=km
New Line.634182E:BF12512 phases=3 Bus1=200298434.1.2.3 Bus2=200298435.1.2.3 switch=y r1=0.001 x1=0.001 r0=0.001 x0=0.001 Length=0.001 units=km
New Line.4012485E:BF12513 phases=3 Bus1=198040045.1.2.3 Bus2=198040046.1.2.3 switch=y r1=0.001 x1=0.001 r0=0.001 x0=0.001 Length=0.001 units=km
New Line.CAB_4753985E:4753985E phases=3 Bus1=138902738.1.2.3 Bus2=138902719.1.2.3 switch=y r1=0.001 x1=0.001 r0=0.001 x0=0.001 Length=0.001 units=km
New Line.CAB_4012470E:4012470E phases=3 Bus1=23577934.1.2.3 Bus2=23577916.1.2.3 switch=y r1=0.001 x1=0.001 r0=0.001 x0=0.001 Length=0.001 units=km
New Line.CAB_4266470E:4266470E phases=3 Bus1=23576165.1.2.3 Bus2=23576149.1.2.3 switch=y r1=0.001 x1=0.001 r0=0.001 x0=0.001 Length=0.001 units=km
New Line.CAB_4012480E:4012480E phases=3 Bus1=147994601.1.2.3 Bus2=147994582.1.2.3 switch=y r1=0.001 x1=0.001 r0=0.001 x0=0.001 Length=0.001 units=km
New Line.CAB_4012489E:4012489E phases=3 Bus1=166867297.1.2.3 Bus2=166867278.1.2.3 switch=y r1=0.001 x1=0.001 r0=0.001 x0=0.001 Length=0.001 units=km
New Line.CAB_4012490E:4012490E phases=3 Bus1=180684385.1.2.3 Bus2=180684368.1.2.3 switch=y r1=0.001 x1=0.001 r0=0.001 x0=0.001 Length=0.001 units=km
New Line.CAB_4012496E:4012496E phases=3 Bus1=23575712.1.2.3 Bus2=23575694.1.2.3 switch=y r1=0.001 x1=0.001 r0=0.001 x0=0.001 Length=0.001 units=km
New Line.CAB_4012455E:4012455E phases=3 Bus1=166015799.1.2.3 Bus2=166015782.1.2.3 switch=y r1=0.001 x1=0.001 r0=0.001 x0=0.001 Length=0.001 units=km
New Line.CAB_1637627E:1637627E phases=3 Bus1=23574880.1.2.3 Bus2=23574862.1.2.3 switch=y r1=0.001 x1=0.001 r0=0.001 x0=0.001 Length=0.001 units=km
New Line.CAB_640693E:640693E phases=3 Bus1=23576215.1.2.3 Bus2=23576199.1.2.3 switch=y r1=0.001 x1=0.001 r0=0.001 x0=0.001 Length=0.001 units=km
New Line.CAB_4012474E:4012474E phases=3 Bus1=23582955.1.2.3 Bus2=23582937.1.2.3 switch=y r1=0.001 x1=0.001 r0=0.001 x0=0.001 Length=0.001 units=km
New Line.CAB_634184E:634184E phases=3 Bus1=23575481.1.2.3 Bus2=23575465.1.2.3 switch=y r1=0.001 x1=0.001 r0=0.001 x0=0.001 Length=0.001 units=km
New Line.CAB_2321444E:2321444E phases=3 Bus1=23575506.1.2.3 Bus2=23575490.1.2.3 switch=y r1=0.001 x1=0.001 r0=0.001 x0=0.001 Length=0.001 units=km
New Line.CAB_4266559E:4266559E phases=3 Bus1=23576190.1.2.3 Bus2=23576174.1.2.3 switch=y r1=0.001 x1=0.001 r0=0.001 x0=0.001 Length=0.001 units=km
New Line.CAB_4242635E:4242635E phases=3 Bus1=23574909.1.2.3 Bus2=23574891.1.2.3 switch=y r1=0.001 x1=0.001 r0=0.001 x0=0.001 Length=0.001 units=km
New Line.CAB_4541122E:4541122E phases=3 Bus1=90158558.1.2.3 Bus2=90158539.1.2.3 switch=y r1=0.001 x1=0.001 r0=0.001 x0=0.001 Length=0.001 units=km
New Line.CAB_4214995E:4214995E phases=3 Bus1=23575556.1.2.3 Bus2=23575540.1.2.3 switch=y r1=0.001 x1=0.001 r0=0.001 x0=0.001 Length=0.001 units=km
New Line.CAB_4573313E:4573313E phases=3 Bus1=23575685.1.2.3 Bus2=23575669.1.2.3 switch=y r1=0.001 x1=0.001 r0=0.001 x0=0.001 Length=0.001 units=km
New Line.CAB_995139E:995139E phases=3 Bus1=23575581.1.2.3 Bus2=23575565.1.2.3 switch=y r1=0.001 x1=0.001 r0=0.001 x0=0.001 Length=0.001 units=km
New Line.CAB_4292251E:4292251E phases=3 Bus1=23577572.1.2.3 Bus2=23577556.1.2.3 switch=y r1=0.001 x1=0.001 r0=0.001 x0=0.001 Length=0.001 units=km
New Line.CAB_995140E:995140E phases=3 Bus1=23575606.1.2.3 Bus2=23575590.1.2.3 switch=y r1=0.001 x1=0.001 r0=0.001 x0=0.001 Length=0.001 units=km
New Line.CAB_4370082E:4370082E phases=3 Bus1=23583040.1.2.3 Bus2=23583024.1.2.3 switch=y r1=0.001 x1=0.001 r0=0.001 x0=0.001 Length=0.001 units=km
New Line.CAB_2017478E:2017478E phases=3 Bus1=23575631.1.2.3 Bus2=23575615.1.2.3 switch=y r1=0.001 x1=0.001 r0=0.001 x0=0.001 Length=0.001 units=km
New Line.1144720E:1144720E phases=3 Bus1=23584432.1.2.3 Bus2=23584433.1.2.3 switch=y r1=0.001 x1=0.001 r0=0.001 x0=0.001 Length=0.001 units=km
New Line.4266560E:4266560E phases=3 Bus1=23584485.1.2.3 Bus2=23584484.1.2.3 switch=y r1=0.001 x1=0.001 r0=0.001 x0=0.001 Length=0.001 units=km
New Line.2111209E:2111209E phases=3 Bus1=23584511.1.2.3 Bus2=23584510.1.2.3 switch=y r1=0.001 x1=0.001 r0=0.001 x0=0.001 Length=0.001 units=km
New Line.PME0406-2$PME0406-1 phases=3 Bus1=149029384.1.2.3 Bus2=149029383.1.2.3 switch=y r1=0.001 x1=0.001 r0=0.001 x0=0.001 Length=0.001 units=km
New Line.PME6926-3$PME6926-4 phases=3 Bus1=241699229.1.2.3 Bus2=241699230.1.2.3 switch=y r1=0.001 x1=0.001 r0=0.001 x0=0.001 Length=0.001 units=km
New Line.4012451E:RCS1051 phases=3 Bus1=23584169.1.2.3 Bus2=23584168.1.2.3 switch=y r1=0.001 x1=0.001 r0=0.001 x0=0.001 Length=0.001 units=km enabled=false
New Line.1637620E:RCS2379 phases=3 Bus1=18514987.1.2.3 Bus2=18514986.1.2.3 switch=y r1=0.001 x1=0.001 r0=0.001 x0=0.001 Length=0.001 units=km enabled=false
New Line.5393582:PME8972-1 phases=2 Bus1=23576648.1.3 Bus2=23576647.1.3 switch=y r1=0.001 x1=0.001 r0=0.001 x0=0.001 Length=0.001 units=km
New Line.4012497E:RCS3409 phases=3 Bus1=166304841.1.2.3 Bus2=166304840.1.2.3 switch=y r1=0.001 x1=0.001 r0=0.001 x0=0.001 Length=0.001 units=km enabled=false
New Line.5633679:RCS8922-2 phases=3 Bus1=165737719.1.2.3 Bus2=165737748.1.2.3 switch=y r1=0.001 x1=0.001 r0=0.001 x0=0.001 Length=0.001 units=km enabled=false
New Line.5779261:PMC6924-1 phases=3 Bus1=241699134.1.2.3 Bus2=241699119.1.2.3 switch=y r1=0.001 x1=0.001 r0=0.001 x0=0.001 Length=0.001 units=km
New Line.5654390:PME3849-3 phases=3 Bus1=185523827.1.2.3 Bus2=185523835.1.2.3 switch=y r1=0.001 x1=0.001 r0=0.001 x0=0.001 Length=0.001 units=km enabled=false
New Line.5634390:PMC0391-1 phases=3 Bus1=185524024.1.2.3 Bus2=185524009.1.2.3 switch=y r1=0.001 x1=0.001 r0=0.001 x0=0.001 Length=0.001 units=km
New Line.5633836:PME0406-2 phases=3 Bus1=149029383.1.2.3 Bus2=149029392.1.2.3 switch=y r1=0.001 x1=0.001 r0=0.001 x0=0.001 Length=0.001 units=km
New Line.5779263:PME6926-3 phases=3 Bus1=241699229.1.2.3 Bus2=241699238.1.2.3 switch=y r1=0.001 x1=0.001 r0=0.001 x0=0.001 Length=0.001 units=km
New Line.5779263:PME6926-4 phases=3 Bus1=241699230.1.2.3 Bus2=241699247.1.2.3 switch=y r1=0.001 x1=0.001 r0=0.001 x0=0.001 Length=0.001 units=km
New Line.5779263:PME6926-1 phases=3 Bus1=241699230.1.2.3 Bus2=241699265.1.2.3 switch=y r1=0.001 x1=0.001 r0=0.001 x0=0.001 Length=0.001 units=km
New Line.5464873:PME2440-3 phases=3 Bus1=164641165.1.2.3 Bus2=164641173.1.2.3 switch=y r1=0.001 x1=0.001 r0=0.001 x0=0.001 Length=0.001 units=km
New Line.5464873:PME2440-4 phases=3 Bus1=164641164.1.2.3 Bus2=164641182.1.2.3 switch=y r1=0.001 x1=0.001 r0=0.001 x0=0.001 Length=0.001 units=km
New Line.5464878:PME2437-2 phases=3 Bus1=23582826.1.2.3 Bus2=23582835.1.2.3 switch=y r1=0.001 x1=0.001 r0=0.001 x0=0.001 Length=0.001 units=km
New Line.5633772:GS3421-2 phases=3 Bus1=166205826.1.2.3 Bus2=166205849.1.2.3 switch=y r1=0.001 x1=0.001 r0=0.001 x0=0.001 Length=0.001 units=km enabled=false
New Line.5654390:PME3849-2 phases=3 Bus1=185523827.1.2.3 Bus2=185523853.1.2.3 switch=y r1=0.001 x1=0.001 r0=0.001 x0=0.001 Length=0.001 units=km enabled=false
New Line.5634390:PMC0391-2 phases=3 Bus1=185524016.1.2.3 Bus2=185524033.1.2.3 switch=y r1=0.001 x1=0.001 r0=0.001 x0=0.001 Length=0.001 units=km enabled=false

! Loads
New Load.5464874_0 Bus1=-99999923582800.1.0 phases=1 kV=0.159926 kW=0 kvar=0 model=1
New Load.5464874_1 Bus1=-99999923582800.2.0 phases=1 kV=0.159926 kW=0 kvar=0 model=1
New Load.5464874_2 Bus1=-99999923582800.3.0 phases=1 kV=0.159926 kW=0 kvar=0 model=1
New Load.5441544_0 Bus1=-99999923575852.1.0 phases=1 kV=0.159926 kW=0 kvar=0 model=1
New Load.5441544_1 Bus1=-99999923575852.2.0 phases=1 kV=0.159926 kW=0 kvar=0 model=1
New Load.5441544_2 Bus1=-99999923575852.3.0 phases=1 kV=0.159926 kW=0 kvar=0 model=1
New Load.634184E_0 Bus1=-99999923575466.2.0 phases=1 kV=0.159926 kW=0 kvar=0 model=1
New Load.634184E_1 Bus1=-99999923575466.3.0 phases=1 kV=0.159926 kW=0 kvar=0 model=1
New Load.4266470E_0 Bus1=-99999923576150.1.0 phases=1 kV=0.159926 kW=0 kvar=0 model=1
New Load.4266470E_1 Bus1=-99999923576150.2.0 phases=1 kV=0.159926 kW=0 kvar=0 model=1
New Load.4266470E_2 Bus1=-99999923576150.3.0 phases=1 kV=0.159926 kW=0 kvar=0 model=1
New Load.4012455E_0 Bus1=-999999166015783.1.0 phases=1 kV=0.069282 kW=0 kvar=0 model=1
New Load.4012455E_1 Bus1=-999999166015783.2.0 phases=1 kV=0.069282 kW=0 kvar=0 model=1
New Load.2017478E_0 Bus1=-99999923575616.2.0 phases=1 kV=0.069282 kW=0 kvar=0 model=1
New Load.2017478E_1 Bus1=-99999923575616.3.0 phases=1 kV=0.069282 kW=0 kvar=0 model=1
New Load.5393584_0 Bus1=-99999923575009.1.0 phases=1 kV=0.069282 kW=0 kvar=0 model=1
New Load.5393584_1 Bus1=-99999923575009.2.0 phases=1 kV=0.069282 kW=0 kvar=0 model=1
New Load.1637627E_0 Bus1=-99999923574863.3.0 phases=1 kV=0.069282 kW=0 kvar=0 model=1
New Load.1637627E_1 Bus1=-99999923574863.1.0 phases=1 kV=0.069282 kW=0 kvar=0 model=1
New Load.4753985E_0 Bus1=-999999138902720.1.0 phases=1 kV=0.159926 kW=0 kvar=0 model=1
New Load.4753985E_1 Bus1=-999999138902720.2.0 phases=1 kV=0.159926 kW=0 kvar=0 model=1
New Load.4753985E_2 Bus1=-999999138902720.3.0 phases=1 kV=0.159926 kW=0 kvar=0 model=1
New Load.5464876 Bus1=-999999165738885.3.0 phases=1 kV=0.069282 kW=0 kvar=0 model=1
New Load.4266559E_0 Bus1=-99999923576175.1.0 phases=1 kV=0.159926 kW=0 kvar=0 model=1
New Load.4266559E_1 Bus1=-99999923576175.2.0 phases=1 kV=0.159926 kW=0 kvar=0 model=1
New Load.4266559E_2 Bus1=-99999923576175.3.0 phases=1 kV=0.159926 kW=0 kvar=0 model=1
New Load.2321444E_0 Bus1=-99999923575491.1.2 phases=1 kV=0.069282 kW=0 kvar=0 model=1
New Load.2321444E_1 Bus1=-99999923575491.2.3 phases=1 kV=0.069282 kW=0 kvar=0 model=1
New Load.2321444E_2 Bus1=-99999923575491.3.1 phases=1 kV=0.069282 kW=0 kvar=0 model=1
New Load.640693E_0 Bus1=-99999923576200.1.0 phases=1 kV=0.159926 kW=0 kvar=0 model=1
New Load.640693E_1 Bus1=-99999923576200.2.0 phases=1 kV=0.159926 kW=0 kvar=0 model=1
New Load.640693E_2 Bus1=-99999923576200.3.0 phases=1 kV=0.159926 kW=0 kvar=0 model=1
New Load.4012474E_0 Bus1=-99999923582938.1.2 phases=1 kV=0.069282 kW=0 kvar=0 model=1
New Load.4012474E_1 Bus1=-99999923582938.2.3 phases=1 kV=0.069282 kW=0 kvar=0 model=1
New Load.4012474E_2 Bus1=-99999923582938.3.1 phases=1 kV=0.069282 kW=0 kvar=0 model=1
New Load.5633679 Bus1=-999999240704401.1.0 phases=1 kV=0.069282 kW=0 kvar=0 model=1
New Load.5503946_0 Bus1=-99999969902835.1.0 phases=1 kV=0.159926 kW=0 kvar=0 model=1
New Load.5503946_1 Bus1=-99999969902835.2.0 phases=1 kV=0.159926 kW=0 kvar=0 model=1
New Load.5503946_2 Bus1=-99999969902835.3.0 phases=1 kV=0.159926 kW=0 kvar=0 model=1
New Load.4214995E_0 Bus1=-99999923575541.1.0 phases=1 kV=0.159926 kW=0 kvar=0 model=1
New Load.4214995E_1 Bus1=-99999923575541.2.0 phases=1 kV=0.159926 kW=0 kvar=0 model=1
New Load.4214995E_2 Bus1=-99999923575541.3.0 phases=1 kV=0.159926 kW=0 kvar=0 model=1
New Load.4573313E_0 Bus1=-99999923575670.1.2 phases=1 kV=0.069282 kW=0 kvar=0 model=1
New Load.4573313E_1 Bus1=-99999923575670.2.3 phases=1 kV=0.069282 kW=0 kvar=0 model=1
New Load.4573313E_2 Bus1=-99999923575670.3.1 phases=1 kV=0.069282 kW=0 kvar=0 model=1
New Load.5643679_0 Bus1=-999999170033970.1.0 phases=1 kV=0.159926 kW=0 kvar=0 model=1
New Load.5643679_1 Bus1=-999999170033970.2.0 phases=1 kV=0.159926 kW=0 kvar=0 model=1
New Load.5643679_2 Bus1=-999999170033970.3.0 phases=1 kV=0.159926 kW=0 kvar=0 model=1
New Load.5475802 Bus1=-99999923577660.1.0 phases=1 kV=0.159926 kW=0 kvar=0 model=1
New Load.5779269_0 Bus1=-999999241699397.1.2 phases=1 kV=0.069282 kW=0 kvar=0 model=1
New Load.5779269_1 Bus1=-999999241699397.2.3 phases=1 kV=0.069282 kW=0 kvar=0 model=1
New Load.5779269_2 Bus1=-999999241699397.3.1 phases=1 kV=0.069282 kW=0 kvar=0 model=1
New Load.5779268_0 Bus1=-999999241699458.1.0 phases=1 kV=0.159926 kW=0 kvar=0 model=1
New Load.5779268_1 Bus1=-999999241699458.2.0 phases=1 kV=0.159926 kW=0 kvar=0 model=1
New Load.5779268_2 Bus1=-999999241699458.3.0 phases=1 kV=0.159926 kW=0 kvar=0 model=1
New Load.4292251E_0 Bus1=-99999923577557.1.0 phases=1 kV=0.159926 kW=0 kvar=0 model=1
New Load.4292251E_1 Bus1=-99999923577557.2.0 phases=1 kV=0.159926 kW=0 kvar=0 model=1
New Load.4292251E_2 Bus1=-99999923577557.3.0 phases=1 kV=0.159926 kW=0 kvar=0 model=1
New Load.995139E_0 Bus1=-99999923575566.3.0 phases=1 kV=0.069282 kW=0 kvar=0 model=1
New Load.995139E_1 Bus1=-99999923575566.1.0 phases=1 kV=0.069282 kW=0 kvar=0 model=1
New Load.995140E_0 Bus1=-99999923575591.1.2 phases=1 kV=0.159926 kW=0 kvar=0 model=1
New Load.995140E_1 Bus1=-99999923575591.2.3 phases=1 kV=0.159926 kW=0 kvar=0 model=1
New Load.995140E_2 Bus1=-99999923575591.3.1 phases=1 kV=0.159926 kW=0 kvar=0 model=1
New Load.4012496E_0 Bus1=-99999923575695.1.0 phases=1 kV=0.159926 kW=0 kvar=0 model=1
New Load.4012496E_1 Bus1=-99999923575695.2.0 phases=1 kV=0.159926 kW=0 kvar=0 model=1
New Load.4012496E_2 Bus1=-99999923575695.3.0 phases=1 kV=0.159926 kW=0 kvar=0 model=1
New Load.5441540 Bus1=-999999241132029.3.0 phases=1 kV=0.069282 kW=0 kvar=0 model=1
New Load.5464877_0 Bus1=-99999923582911.1.0 phases=1 kV=0.159926 kW=0 kvar=0 model=1
New Load.5464877_1 Bus1=-99999923582911.2.0 phases=1 kV=0.159926 kW=0 kvar=0 model=1
New Load.5464877_2 Bus1=-99999923582911.3.0 phases=1 kV=0.159926 kW=0 kvar=0 model=1
New Load.5728322_0 Bus1=-999999235569938.1.0 phases=1 kV=0.159926 kW=0 kvar=0 model=1
New Load.5728322_1 Bus1=-999999235569938.2.0 phases=1 kV=0.159926 kW=0 kvar=0 model=1
New Load.5728322_2 Bus1=-999999235569938.3.0 phases=1 kV=0.159926 kW=0 kvar=0 model=1
New Load.5467835_0 Bus1=-99999923576711.1.0 phases=1 kV=0.159926 kW=0 kvar=0 model=1
New Load.5467835_1 Bus1=-99999923576711.2.0 phases=1 kV=0.159926 kW=0 kvar=0 model=1
New Load.5467835_2 Bus1=-99999923576711.3.0 phases=1 kV=0.159926 kW=0 kvar=0 model=1
New Load.4012490E_0 Bus1=-999999180684369.1.2 phases=1 kV=0.069282 kW=0 kvar=0 model=1
New Load.4012490E_1 Bus1=-999999180684369.2.3 phases=1 kV=0.069282 kW=0 kvar=0 model=1
New Load.4012490E_2 Bus1=-999999180684369.3.1 phases=1 kV=0.069282 kW=0 kvar=0 model=1
New Load.5583776_0 Bus1=-999999136417699.1.0 phases=1 kV=0.069282 kW=0 kvar=0 model=1
New Load.5583776_1 Bus1=-999999136417699.2.0 phases=1 kV=0.069282 kW=0 kvar=0 model=1
New Load.5583776_2 Bus1=-999999136417699.3.0 phases=1 kV=0.069282 kW=0 kvar=0 model=1
New Load.5463904 Bus1=-99999923577410.1.0 phases=1 kV=0.069282 kW=0 kvar=0 model=1
New Load.5464875_0 Bus1=-99999923582773.1.0 phases=1 kV=0.159926 kW=0 kvar=0 model=1
New Load.5464875_1 Bus1=-99999923582773.2.0 phases=1 kV=0.159926 kW=0 kvar=0 model=1
New Load.5464875_2 Bus1=-99999923582773.3.0 phases=1 kV=0.159926 kW=0 kvar=0 model=1
New Load.4242635E_0 Bus1=-99999923574892.2.0 phases=1 kV=0.069282 kW=0 kvar=0 model=1
New Load.4242635E_1 Bus1=-99999923574892.3.0 phases=1 kV=0.069282 kW=0 kvar=0 model=1
New Load.4012480E_0 Bus1=-999999147994583.1.0 phases=1 kV=0.159926 kW=0 kvar=0 model=1
New Load.4012480E_1 Bus1=-999999147994583.2.0 phases=1 kV=0.159926 kW=0 kvar=0 model=1
New Load.4012480E_2 Bus1=-999999147994583.3.0 phases=1 kV=0.159926 kW=0 kvar=0 model=1
New Load.4370082E_0 Bus1=-99999923583025.1.2 phases=1 kV=0.069282 kW=0 kvar=0 model=1
New Load.4370082E_1 Bus1=-99999923583025.2.3 phases=1 kV=0.069282 kW=0 kvar=0 model=1
New Load.4370082E_2 Bus1=-99999923583025.3.1 phases=1 kV=0.069282 kW=0 kvar=0 model=1
New Load.5393583_0 Bus1=-99999923574937.1.0 phases=1 kV=0.069282 kW=0 kvar=0 model=1
New Load.5393583_1 Bus1=-99999923574937.2.0 phases=1 kV=0.069282 kW=0 kvar=0 model=1
New Load.4541122E_0 Bus1=-99999990158540.3.0 phases=1 kV=0.159926 kW=0 kvar=0 model=1
New Load.4541122E_1 Bus1=-99999990158540.1.0 phases=1 kV=0.159926 kW=0 kvar=0 model=1
New Load.4012470E_0 Bus1=-99999923577917.1.0 phases=1 kV=0.069282 kW=0 kvar=0 model=1
New Load.4012470E_1 Bus1=-99999923577917.2.0 phases=1 kV=0.069282 kW=0 kvar=0 model=1
New Load.5441543_0 Bus1=-999999149029318.1.2 phases=1 kV=1.38564 kW=0 kvar=0 model=1
New Load.5441543_1 Bus1=-999999149029318.2.3 phases=1 kV=1.38564 kW=0 kvar=0 model=1
New Load.5441543_2 Bus1=-999999149029318.3.1 phases=1 kV=1.38564 kW=0 kvar=0 model=1
New Load.5779267_0 Bus1=-999999241699422.1.0 phases=1 kV=0.159926 kW=0 kvar=0 model=1
New Load.5779267_1 Bus1=-999999241699422.2.0 phases=1 kV=0.159926 kW=0 kvar=0 model=1
New Load.5779267_2 Bus1=-999999241699422.3.0 phases=1 kV=0.159926 kW=0 kvar=0 model=1
New Load.5630600 Bus1=-999999166050522.1.0 phases=1 kV=0.159926 kW=0 kvar=0 model=1
New Load.4012489E_0 Bus1=-999999166867279.1.0 phases=1 kV=0.159926 kW=0 kvar=0 model=1
New Load.4012489E_1 Bus1=-999999166867279.2.0 phases=1 kV=0.159926 kW=0 kvar=0 model=1
New Load.4012489E_2 Bus1=-999999166867279.3.0 phases=1 kV=0.159926 kW=0 kvar=0 model=1

! Generators
New Generator.500471431_PHOTOVOLTAIC_0 Bus1=-99999923575616.2.0 phases=1 kV=0.069282 kW=0 kvar=0 model=7
New Generator.500471431_PHOTOVOLTAIC_1 Bus1=-99999923575616.3.0 phases=1 kV=0.069282 kW=0 kvar=0 model=7
New Generator.GFID103815_BATTERY_0 Bus1=-99999923575616.2.0 phases=1 kV=0.069282 kW=0.663 kvar=0 model=7
New Generator.GFID103815_BATTERY_1 Bus1=-99999923575616.3.0 phases=1 kV=0.069282 kW=0.663 kvar=0 model=7
New Generator.GFID103815_PHOTOVOLTAIC_0 Bus1=-99999923575616.2.0 phases=1 kV=0.069282 kW=0 kvar=0 model=7
New Generator.GFID103815_PHOTOVOLTAIC_1 Bus1=-99999923575616.3.0 phases=1 kV=0.069282 kW=0 kvar=0 model=7
New Generator.SBP-129531_PHOTOVOLTAIC_0 Bus1=-99999923575009.1.0 phases=1 kV=0.069282 kW=0 kvar=0 model=7
New Generator.SBP-129531_PHOTOVOLTAIC_1 Bus1=-99999923575009.2.0 phases=1 kV=0.069282 kW=0 kvar=0 model=7
New Generator.SBP-127623_PHOTOVOLTAIC_0 Bus1=-99999923575009.1.0 phases=1 kV=0.069282 kW=0 kvar=0 model=7
New Generator.SBP-127623_PHOTOVOLTAIC_1 Bus1=-99999923575009.2.0 phases=1 kV=0.069282 kW=0 kvar=0 model=7
New Generator.SBP-131909_PHOTOVOLTAIC_0 Bus1=-99999923575009.1.0 phases=1 kV=0.069282 kW=0 kvar=0 model=7
New Generator.SBP-131909_PHOTOVOLTAIC_1 Bus1=-99999923575009.2.0 phases=1 kV=0.069282 kW=0 kvar=0 model=7
New Generator.SBP-128696_PHOTOVOLTAIC_0 Bus1=-99999923575009.1.0 phases=1 kV=0.069282 kW=0 kvar=0 model=7
New Generator.SBP-128696_PHOTOVOLTAIC_1 Bus1=-99999923575009.2.0 phases=1 kV=0.069282 kW=0 kvar=0 model=7
New Generator.SBP-127518_PHOTOVOLTAIC_0 Bus1=-99999923575009.1.0 phases=1 kV=0.069282 kW=0 kvar=0 model=7
New Generator.SBP-127518_PHOTOVOLTAIC_1 Bus1=-99999923575009.2.0 phases=1 kV=0.069282 kW=0 kvar=0 model=7
New Generator.SBP-129732_PHOTOVOLTAIC_0 Bus1=-99999923575009.1.0 phases=1 kV=0.069282 kW=0 kvar=0 model=7
New Generator.SBP-129732_PHOTOVOLTAIC_1 Bus1=-99999923575009.2.0 phases=1 kV=0.069282 kW=0 kvar=0 model=7
New Generator.SBP-127660_PHOTOVOLTAIC_0 Bus1=-99999923575009.1.0 phases=1 kV=0.069282 kW=0 kvar=0 model=7
New Generator.SBP-127660_PHOTOVOLTAIC_1 Bus1=-99999923575009.2.0 phases=1 kV=0.069282 kW=0 kvar=0 model=7
New Generator.SBP-139010_PHOTOVOLTAIC_0 Bus1=-99999923575009.1.0 phases=1 kV=0.069282 kW=0 kvar=0 model=7
New Generator.SBP-139010_PHOTOVOLTAIC_1 Bus1=-99999923575009.2.0 phases=1 kV=0.069282 kW=0 kvar=0 model=7
New Generator.SBP-132721_PHOTOVOLTAIC_0 Bus1=-99999923575009.1.0 phases=1 kV=0.069282 kW=0 kvar=0 model=7
New Generator.SBP-132721_PHOTOVOLTAIC_1 Bus1=-99999923575009.2.0 phases=1 kV=0.069282 kW=0 kvar=0 model=7
New Generator.SBP-127671_PHOTOVOLTAIC_0 Bus1=-99999923575009.1.0 phases=1 kV=0.069282 kW=0 kvar=0 model=7
New Generator.SBP-127671_PHOTOVOLTAIC_1 Bus1=-99999923575009.2.0 phases=1 kV=0.069282 kW=0 kvar=0 model=7
New Generator.SBP-129753_PHOTOVOLTAIC_0 Bus1=-99999923575009.1.0 phases=1 kV=0.069282 kW=0 kvar=0 model=7
New Generator.SBP-129753_PHOTOVOLTAIC_1 Bus1=-99999923575009.2.0 phases=1 kV=0.069282 kW=0 kvar=0 model=7
New Generator.SBP-127645_PHOTOVOLTAIC_0 Bus1=-99999923575009.1.0 phases=1 kV=0.069282 kW=0 kvar=0 model=7
New Generator.SBP-127645_PHOTOVOLTAIC_1 Bus1=-99999923575009.2.0 phases=1 kV=0.069282 kW=0 kvar=0 model=7
New Generator.SBP-131889_PHOTOVOLTAIC_0 Bus1=-99999923575009.1.0 phases=1 kV=0.069282 kW=0 kvar=0 model=7
New Generator.SBP-131889_PHOTOVOLTAIC_1 Bus1=-99999923575009.2.0 phases=1 kV=0.069282 kW=0 kvar=0 model=7
New Generator.SBP-129559_PHOTOVOLTAIC_0 Bus1=-99999923575009.1.0 phases=1 kV=0.069282 kW=0 kvar=0 model=7
New Generator.SBP-129559_PHOTOVOLTAIC_1 Bus1=-99999923575009.2.0 phases=1 kV=0.069282 kW=0 kvar=0 model=7
New Generator.SBP-135388_PHOTOVOLTAIC_0 Bus1=-99999923575009.1.0 phases=1 kV=0.069282 kW=0 kvar=0 model=7
New Generator.SBP-135388_PHOTOVOLTAIC_1 Bus1=-99999923575009.2.0 phases=1 kV=0.069282 kW=0 kvar=0 model=7
New Generator.SBP-127629_PHOTOVOLTAIC_0 Bus1=-99999923575009.1.0 phases=1 kV=0.069282 kW=0 kvar=0 model=7
New Generator.SBP-127629_PHOTOVOLTAIC_1 Bus1=-99999923575009.2.0 phases=1 kV=0.069282 kW=0 kvar=0 model=7
New Generator.SBP-129803_PHOTOVOLTAIC_0 Bus1=-99999923575009.1.0 phases=1 kV=0.069282 kW=0 kvar=0 model=7
New Generator.SBP-129803_PHOTOVOLTAIC_1 Bus1=-99999923575009.2.0 phases=1 kV=0.069282 kW=0 kvar=0 model=7
New Generator.SBP-131900_PHOTOVOLTAIC_0 Bus1=-99999923575009.1.0 phases=1 kV=0.069282 kW=0 kvar=0 model=7
New Generator.SBP-131900_PHOTOVOLTAIC_1 Bus1=-99999923575009.2.0 phases=1 kV=0.069282 kW=0 kvar=0 model=7
New Generator.SBP-129434_PHOTOVOLTAIC_0 Bus1=-99999923575009.1.0 phases=1 kV=0.069282 kW=0 kvar=0 model=7
New Generator.SBP-129434_PHOTOVOLTAIC_1 Bus1=-99999923575009.2.0 phases=1 kV=0.069282 kW=0 kvar=0 model=7
New Generator.NST-423250_PHOTOVOLTAIC Bus1=-999999166050522.1.0 phases=1 kV=0.159926 kW=0 kvar=0 model=7
New Generator.SBP-130810_PHOTOVOLTAIC_0 Bus1=-99999923574937.1.0 phases=1 kV=0.069282 kW=0 kvar=0 model=7
New Generator.SBP-130810_PHOTOVOLTAIC_1 Bus1=-99999923574937.2.0 phases=1 kV=0.069282 kW=0 kvar=0 model=7
New Generator.SBP-142561_PHOTOVOLTAIC_0 Bus1=-99999923575009.1.0 phases=1 kV=0.069282 kW=0 kvar=0 model=7
New Generator.SBP-142561_PHOTOVOLTAIC_1 Bus1=-99999923575009.2.0 phases=1 kV=0.069282 kW=0 kvar=0 model=7
New Generator.SBP-131917_PHOTOVOLTAIC_0 Bus1=-99999923575009.1.0 phases=1 kV=0.069282 kW=0 kvar=0 model=7
New Generator.SBP-131917_PHOTOVOLTAIC_1 Bus1=-99999923575009.2.0 phases=1 kV=0.069282 kW=0 kvar=0 model=7
New Generator.SBP-131051_PHOTOVOLTAIC_0 Bus1=-99999923575009.1.0 phases=1 kV=0.069282 kW=0 kvar=0 model=7
New Generator.SBP-131051_PHOTOVOLTAIC_1 Bus1=-99999923575009.2.0 phases=1 kV=0.069282 kW=0 kvar=0 model=7
New Generator.SBP-134844_PHOTOVOLTAIC_0 Bus1=-99999923575009.1.0 phases=1 kV=0.069282 kW=0 kvar=0 model=7
New Generator.SBP-134844_PHOTOVOLTAIC_1 Bus1=-99999923575009.2.0 phases=1 kV=0.069282 kW=0 kvar=0 model=7
New Generator.SBP-131678_PHOTOVOLTAIC_0 Bus1=-99999923574937.1.0 phases=1 kV=0.069282 kW=0 kvar=0 model=7
New Generator.SBP-131678_PHOTOVOLTAIC_1 Bus1=-99999923574937.2.0 phases=1 kV=0.069282 kW=0 kvar=0 model=7
New Generator.SBP-131683_PHOTOVOLTAIC_0 Bus1=-99999923574937.1.0 phases=1 kV=0.069282 kW=0 kvar=0 model=7
New Generator.SBP-131683_PHOTOVOLTAIC_1 Bus1=-99999923574937.2.0 phases=1 kV=0.069282 kW=0 kvar=0 model=7
New Generator.SBP-130002_PHOTOVOLTAIC_0 Bus1=-99999923574937.1.0 phases=1 kV=0.069282 kW=0 kvar=0 model=7
New Generator.SBP-130002_PHOTOVOLTAIC_1 Bus1=-99999923574937.2.0 phases=1 kV=0.069282 kW=0 kvar=0 model=7
New Generator.SBP-128612_PHOTOVOLTAIC_0 Bus1=-99999923574937.1.0 phases=1 kV=0.069282 kW=0 kvar=0 model=7
New Generator.SBP-128612_PHOTOVOLTAIC_1 Bus1=-99999923574937.2.0 phases=1 kV=0.069282 kW=0 kvar=0 model=7
New Generator.SBP-131332_PHOTOVOLTAIC_0 Bus1=-99999923574937.1.0 phases=1 kV=0.069282 kW=0 kvar=0 model=7
New Generator.SBP-131332_PHOTOVOLTAIC_1 Bus1=-99999923574937.2.0 phases=1 kV=0.069282 kW=0 kvar=0 model=7
New Generator.SBP-135295_PHOTOVOLTAIC_0 Bus1=-99999923574937.1.0 phases=1 kV=0.069282 kW=0 kvar=0 model=7
New Generator.SBP-135295_PHOTOVOLTAIC_1 Bus1=-99999923574937.2.0 phases=1 kV=0.069282 kW=0 kvar=0 model=7
New Generator.SBP-127993_PHOTOVOLTAIC_0 Bus1=-99999923574937.1.0 phases=1 kV=0.069282 kW=0 kvar=0 model=7
New Generator.SBP-127993_PHOTOVOLTAIC_1 Bus1=-99999923574937.2.0 phases=1 kV=0.069282 kW=0 kvar=0 model=7
New Generator.SBP-131346_PHOTOVOLTAIC_0 Bus1=-99999923574937.1.0 phases=1 kV=0.069282 kW=0 kvar=0 model=7
New Generator.SBP-131346_PHOTOVOLTAIC_1 Bus1=-99999923574937.2.0 phases=1 kV=0.069282 kW=0 kvar=0 model=7
New Generator.SBP-129741_PHOTOVOLTAIC_0 Bus1=-99999923574937.1.0 phases=1 kV=0.069282 kW=0 kvar=0 model=7
New Generator.SBP-129741_PHOTOVOLTAIC_1 Bus1=-99999923574937.2.0 phases=1 kV=0.069282 kW=0 kvar=0 model=7
New Generator.SBP-131637_PHOTOVOLTAIC_0 Bus1=-99999923574937.1.0 phases=1 kV=0.069282 kW=0 kvar=0 model=7
New Generator.SBP-131637_PHOTOVOLTAIC_1 Bus1=-99999923574937.2.0 phases=1 kV=0.069282 kW=0 kvar=0 model=7
New Generator.SBP-132750_PHOTOVOLTAIC_0 Bus1=-99999923574937.1.0 phases=1 kV=0.069282 kW=0 kvar=0 model=7
New Generator.SBP-132750_PHOTOVOLTAIC_1 Bus1=-99999923574937.2.0 phases=1 kV=0.069282 kW=0 kvar=0 model=7
New Generator.SBP-128427_PHOTOVOLTAIC_0 Bus1=-99999923574937.1.0 phases=1 kV=0.069282 kW=0 kvar=0 model=7
New Generator.SBP-128427_PHOTOVOLTAIC_1 Bus1=-99999923574937.2.0 phases=1 kV=0.069282 kW=0 kvar=0 model=7
New Generator.SBP-131718_PHOTOVOLTAIC_0 Bus1=-99999923574937.1.0 phases=1 kV=0.069282 kW=0 kvar=0 model=7
New Generator.SBP-131718_PHOTOVOLTAIC_1 Bus1=-99999923574937.2.0 phases=1 kV=0.069282 kW=0 kvar=0 model=7
New Generator.SBP-130825_PHOTOVOLTAIC_0 Bus1=-99999923574937.1.0 phases=1 kV=0.069282 kW=0 kvar=0 model=7
New Generator.SBP-130825_PHOTOVOLTAIC_1 Bus1=-99999923574937.2.0 phases=1 kV=0.069282 kW=0 kvar=0 model=7
New Generator.SBP-130910_PHOTOVOLTAIC_0 Bus1=-99999923574937.1.0 phases=1 kV=0.069282 kW=0 kvar=0 model=7
New Generator.SBP-130910_PHOTOVOLTAIC_1 Bus1=-99999923574937.2.0 phases=1 kV=0.069282 kW=0 kvar=0 model=7
New Generator.SBP-130895_PHOTOVOLTAIC_0 Bus1=-99999923574937.1.0 phases=1 kV=0.069282 kW=0 kvar=0 model=7
New Generator.SBP-130895_PHOTOVOLTAIC_1 Bus1=-99999923574937.2.0 phases=1 kV=0.069282 kW=0 kvar=0 model=7
New Generator.SBP-132738_PHOTOVOLTAIC_0 Bus1=-99999923574937.1.0 phases=1 kV=0.069282 kW=0 kvar=0 model=7
New Generator.SBP-132738_PHOTOVOLTAIC_1 Bus1=-99999923574937.2.0 phases=1 kV=0.069282 kW=0 kvar=0 model=7
New Generator.GFID8052_PHOTOVOLTAIC_0 Bus1=-99999923582911.1.0 phases=1 kV=0.159926 kW=0 kvar=0 model=7
New Generator.GFID8052_PHOTOVOLTAIC_1 Bus1=-99999923582911.2.0 phases=1 kV=0.159926 kW=0 kvar=0 model=7
New Generator.GFID8052_PHOTOVOLTAIC_2 Bus1=-99999923582911.3.0 phases=1 kV=0.159926 kW=0 kvar=0 model=7
New Generator.SCE-110353_FUEL_CELL_0 Bus1=-99999923582911.1.0 phases=1 kV=0.159926 kW=200 kvar=123.949 model=7
New Generator.SCE-110353_FUEL_CELL_1 Bus1=-99999923582911.2.0 phases=1 kV=0.159926 kW=200 kvar=123.949 model=7
New Generator.SCE-110353_FUEL_CELL_2 Bus1=-99999923582911.3.0 phases=1 kV=0.159926 kW=200 kvar=123.949 model=7
New Generator.SCE-104343_FUEL_CELL_0 Bus1=-99999923582911.1.0 phases=1 kV=0.159926 kW=166.667 kvar=103.291 model=7
New Generator.SCE-104343_FUEL_CELL_1 Bus1=-99999923582911.2.0 phases=1 kV=0.159926 kW=166.667 kvar=103.291 model=7
New Generator.SCE-104343_FUEL_CELL_2 Bus1=-99999923582911.3.0 phases=1 kV=0.159926 kW=166.667 kvar=103.291 model=7

! Transformers
New Transformer.293588A6AD97EE34E0637F61810A7CE3_0_0 phases=1 windings=2 xhl=0.5 %R=0.353554 %imag=1e-06 %noloadloss=0
~ wdg=1 bus=23577917.1.0 kV=6.9282 kVA=12.5 conn=wye
~ wdg=2 bus=-99999923577917.1.0 kV=0.069282 kVA=12.5 conn=wye
New Transformer.293588A6AD97EE34E0637F61810A7CE3_0_1 phases=1 windings=2 xhl=0.5 %R=0.353554 %imag=1e-06 %noloadloss=0
~ wdg=1 bus=23577917.2.0 kV=6.9282 kVA=12.5 conn=wye
~ wdg=2 bus=-99999923577917.2.0 kV=0.069282 kVA=12.5 conn=wye
New Transformer.293588A729D5EE34E0637F61810A7CE3_1_0 phases=1 windings=2 xhl=0.5 %R=0.353554 %imag=1e-06 %noloadloss=0
~ wdg=1 bus=166015783.1.0 kV=6.9282 kVA=18.75 conn=wye
~ wdg=2 bus=-999999166015783.1.0 kV=0.069282 kVA=18.75 conn=wye
New Transformer.293588A729D5EE34E0637F61810A7CE3_1_1 phases=1 windings=2 xhl=0.5 %R=0.353554 %imag=1e-06 %noloadloss=0
~ wdg=1 bus=166015783.2.0 kV=6.9282 kVA=18.75 conn=wye
~ wdg=2 bus=-999999166015783.2.0 kV=0.069282 kVA=18.75 conn=wye
New Transformer.293588A6B0AEEE34E0637F61810A7CE3_2_0 phases=1 windings=2 xhl=0.5 %R=0.353554 %imag=1e-06 %noloadloss=0
~ wdg=1 bus=23574863.3.0 kV=6.9282 kVA=7.5 conn=wye
~ wdg=2 bus=-99999923574863.3.0 kV=0.069282 kVA=7.5 conn=wye
New Transformer.293588A6B0AEEE34E0637F61810A7CE3_2_1 phases=1 windings=2 xhl=0.5 %R=0.353554 %imag=1e-06 %noloadloss=0
~ wdg=1 bus=23574863.1.0 kV=6.9282 kVA=7.5 conn=wye
~ wdg=2 bus=-99999923574863.1.0 kV=0.069282 kVA=7.5 conn=wye
New Transformer.293588A6B0B0EE34E0637F61810A7CE3_3_0 phases=1 windings=2 xhl=0.5 %R=0.353554 %imag=1e-06 %noloadloss=0
~ wdg=1 bus=23575466.2.0 kV=6.9282 kVA=12.5 conn=wye
~ wdg=2 bus=-99999923575466.2.0 kV=0.159926 kVA=12.5 conn=wye
New Transformer.293588A6B0B0EE34E0637F61810A7CE3_3_1 phases=1 windings=2 xhl=0.5 %R=0.353554 %imag=1e-06 %noloadloss=0
~ wdg=1 bus=23575466.3.0 kV=6.9282 kVA=12.5 conn=wye
~ wdg=2 bus=-99999923575466.3.0 kV=0.159926 kVA=12.5 conn=wye
New Transformer.293588A6B0AFEE34E0637F61810A7CE3_4_0 phases=1 windings=2 xhl=0.5 %R=0.353554 %imag=1e-06 %noloadloss=0
~ wdg=1 bus=23574892.2.0 kV=6.9282 kVA=5 conn=wye
~ wdg=2 bus=-99999923574892.2.0 kV=0.069282 kVA=5 conn=wye
New Transformer.293588A6B0AFEE34E0637F61810A7CE3_4_1 phases=1 windings=2 xhl=0.5 %R=0.353554 %imag=1e-06 %noloadloss=0
~ wdg=1 bus=23574892.3.0 kV=6.9282 kVA=5 conn=wye
~ wdg=2 bus=-99999923574892.3.0 kV=0.069282 kVA=5 conn=wye
New Transformer.293588B4D984EE34E0637F61810A7CE3_5_0 phases=1 windings=2 xhl=0.5 %R=0.353554 %imag=1e-06 %noloadloss=0
~ wdg=1 bus=235569938.1.2 kV=12 kVA=166.667 conn=delta
~ wdg=2 bus=-999999235569938.1.0 kV=0.159926 kVA=166.667 conn=wye
New Transformer.293588B4D984EE34E0637F61810A7CE3_5_1 phases=1 windings=2 xhl=0.5 %R=0.353554 %imag=1e-06 %noloadloss=0
~ wdg=1 bus=235569938.2.3 kV=12 kVA=166.667 conn=delta
~ wdg=2 bus=-999999235569938.2.0 kV=0.159926 kVA=166.667 conn=wye
New Transformer.293588B4D984EE34E0637F61810A7CE3_5_2 phases=1 windings=2 xhl=0.5 %R=0.353554 %imag=1e-06 %noloadloss=0
~ wdg=1 bus=235569938.3.1 kV=12 kVA=166.667 conn=delta
~ wdg=2 bus=-999999235569938.3.0 kV=0.159926 kVA=166.667 conn=wye
New Transformer.293588B108E4EE34E0637F61810A7CE3_6_0 phases=1 windings=2 xhl=0.5 %R=0.353554 %imag=1e-06 %noloadloss=0
~ wdg=1 bus=23576711.1.2 kV=12 kVA=50 conn=delta
~ wdg=2 bus=-99999923576711.1.0 kV=0.159926 kVA=50 conn=wye
New Transformer.293588B108E4EE34E0637F61810A7CE3_6_1 phases=1 windings=2 xhl=0.5 %R=0.353554 %imag=1e-06 %noloadloss=0
~ wdg=1 bus=23576711.2.3 kV=12 kVA=50 conn=delta
~ wdg=2 bus=-99999923576711.2.0 kV=0.159926 kVA=50 conn=wye
New Transformer.293588B108E4EE34E0637F61810A7CE3_6_2 phases=1 windings=2 xhl=0.5 %R=0.353554 %imag=1e-06 %noloadloss=0
~ wdg=1 bus=23576711.3.1 kV=12 kVA=50 conn=delta
~ wdg=2 bus=-99999923576711.3.0 kV=0.159926 kVA=50 conn=wye
New Transformer.293588A8722AEE34E0637F61810A7CE3_7_0 phases=1 windings=2 xhl=0.5 %R=0.353554 %imag=1e-06 %noloadloss=0
~ wdg=1 bus=90158540.3.0 kV=6.9282 kVA=12.5 conn=wye
~ wdg=2 bus=-99999990158540.3.0 kV=0.159926 kVA=12.5 conn=wye
New Transformer.293588A8722AEE34E0637F61810A7CE3_7_1 phases=1 windings=2 xhl=0.5 %R=0.353554 %imag=1e-06 %noloadloss=0
~ wdg=1 bus=90158540.1.0 kV=6.9282 kVA=12.5 conn=wye
~ wdg=2 bus=-99999990158540.1.0 kV=0.159926 kVA=12.5 conn=wye
New Transformer.293588B449EAEE34E0637F61810A7CE3_8_0 phases=1 windings=2 xhl=0.5 %R=0.353554 %imag=1e-06 %noloadloss=0
~ wdg=1 bus=170033970.1.2 kV=12 kVA=166.667 conn=delta
~ wdg=2 bus=-999999170033970.1.0 kV=0.159926 kVA=166.667 conn=wye
New Transformer.293588B449EAEE34E0637F61810A7CE3_8_1 phases=1 windings=2 xhl=0.5 %R=0.353554 %imag=1e-06 %noloadloss=0
~ wdg=1 bus=170033970.2.3 kV=12 kVA=166.667 conn=delta
~ wdg=2 bus=-999999170033970.2.0 kV=0.159926 kVA=166.667 conn=wye
New Transformer.293588B449EAEE34E0637F61810A7CE3_8_2 phases=1 windings=2 xhl=0.5 %R=0.353554 %imag=1e-06 %noloadloss=0
~ wdg=1 bus=170033970.3.1 kV=12 kVA=166.667 conn=delta
~ wdg=2 bus=-999999170033970.3.0 kV=0.159926 kVA=166.667 conn=wye
New Transformer.293588B4455EEE34E0637F61810A7CE3_9_0 phases=1 windings=2 xhl=0.5 %R=0.353554 %imag=1e-06 %noloadloss=0
~ wdg=1 bus=165738885.3.0 kV=6.9282 kVA=25 conn=wye
~ wdg=2 bus=-999999165738885.3.0 kV=0.069282 kVA=25 conn=wye
New Transformer.293588B4F585EE34E0637F61810A7CE3_10_0 phases=1 windings=2 xhl=0.5 %R=0.353554 %imag=1e-06 %noloadloss=0
~ wdg=1 bus=241699422.1.2 kV=12 kVA=833.333 conn=delta
~ wdg=2 bus=-999999241699422.1.0 kV=0.159926 kVA=833.333 conn=wye
New Transformer.293588B4F585EE34E0637F61810A7CE3_10_1 phases=1 windings=2 xhl=0.5 %R=0.353554 %imag=1e-06 %noloadloss=0
~ wdg=1 bus=241699422.2.3 kV=12 kVA=833.333 conn=delta
~ wdg=2 bus=-999999241699422.2.0 kV=0.159926 kVA=833.333 conn=wye
New Transformer.293588B4F585EE34E0637F61810A7CE3_10_2 phases=1 windings=2 xhl=0.5 %R=0.353554 %imag=1e-06 %noloadloss=0
~ wdg=1 bus=241699422.3.1 kV=12 kVA=833.333 conn=delta
~ wdg=2 bus=-999999241699422.3.0 kV=0.159926 kVA=833.333 conn=wye
New Transformer.293588B4F4E9EE34E0637F61810A7CE3_11_0 phases=1 windings=2 xhl=0.5 %R=0.353554 %imag=1e-06 %noloadloss=0
~ wdg=1 bus=241699397.1.2 kV=12 kVA=833.333 conn=delta
~ wdg=2 bus=-999999241699397.1.2 kV=0.069282 kVA=833.333 conn=delta
New Transformer.293588B4F4E9EE34E0637F61810A7CE3_11_1 phases=1 windings=2 xhl=0.5 %R=0.353554 %imag=1e-06 %noloadloss=0
~ wdg=1 bus=241699397.2.3 kV=12 kVA=833.333 conn=delta
~ wdg=2 bus=-999999241699397.2.3 kV=0.069282 kVA=833.333 conn=delta
New Transformer.293588B4F4E9EE34E0637F61810A7CE3_11_2 phases=1 windings=2 xhl=0.5 %R=0.353554 %imag=1e-06 %noloadloss=0
~ wdg=1 bus=241699397.3.1 kV=12 kVA=833.333 conn=delta
~ wdg=2 bus=-999999241699397.3.1 kV=0.069282 kVA=833.333 conn=delta
New Transformer.293588B4F60FEE34E0637F61810A7CE3_12_0 phases=1 windings=2 xhl=0.5 %R=0.353554 %imag=1e-06 %noloadloss=0
~ wdg=1 bus=241699458.1.2 kV=12 kVA=833.333 conn=delta
~ wdg=2 bus=-999999241699458.1.0 kV=0.159926 kVA=833.333 conn=wye
New Transformer.293588B4F60FEE34E0637F61810A7CE3_12_1 phases=1 windings=2 xhl=0.5 %R=0.353554 %imag=1e-06 %noloadloss=0
~ wdg=1 bus=241699458.2.3 kV=12 kVA=833.333 conn=delta
~ wdg=2 bus=-999999241699458.2.0 kV=0.159926 kVA=833.333 conn=wye
New Transformer.293588B4F60FEE34E0637F61810A7CE3_12_2 phases=1 windings=2 xhl=0.5 %R=0.353554 %imag=1e-06 %noloadloss=0
~ wdg=1 bus=241699458.3.1 kV=12 kVA=833.333 conn=delta
~ wdg=2 bus=-999999241699458.3.0 kV=0.159926 kVA=833.333 conn=wye
New Transformer.293588B10915EE34E0637F61810A7CE3_13_0 phases=1 windings=2 xhl=0.5 %R=0.353554 %imag=1e-06 %noloadloss=0
~ wdg=1 bus=23582773.1.2 kV=12 kVA=500 conn=delta
~ wdg=2 bus=-99999923582773.1.0 kV=0.159926 kVA=500 conn=wye
New Transformer.293588B10915EE34E0637F61810A7CE3_13_1 phases=1 windings=2 xhl=0.5 %R=0.353554 %imag=1e-06 %noloadloss=0
~ wdg=1 bus=23582773.2.3 kV=12 kVA=500 conn=delta
~ wdg=2 bus=-99999923582773.2.0 kV=0.159926 kVA=500 conn=wye
New Transformer.293588B10915EE34E0637F61810A7CE3_13_2 phases=1 windings=2 xhl=0.5 %R=0.353554 %imag=1e-06 %noloadloss=0
~ wdg=1 bus=23582773.3.1 kV=12 kVA=500 conn=delta
~ wdg=2 bus=-99999923582773.3.0 kV=0.159926 kVA=500 conn=wye
New Transformer.293588B10916EE34E0637F61810A7CE3_14_0 phases=1 windings=2 xhl=0.5 %R=0.353554 %imag=1e-06 %noloadloss=0
~ wdg=1 bus=23582800.1.2 kV=12 kVA=500 conn=delta
~ wdg=2 bus=-99999923582800.1.0 kV=0.159926 kVA=500 conn=wye
New Transformer.293588B10916EE34E0637F61810A7CE3_14_1 phases=1 windings=2 xhl=0.5 %R=0.353554 %imag=1e-06 %noloadloss=0
~ wdg=1 bus=23582800.2.3 kV=12 kVA=500 conn=delta
~ wdg=2 bus=-99999923582800.2.0 kV=0.159926 kVA=500 conn=wye
New Transformer.293588B10916EE34E0637F61810A7CE3_14_2 phases=1 windings=2 xhl=0.5 %R=0.353554 %imag=1e-06 %noloadloss=0
~ wdg=1 bus=23582800.3.1 kV=12 kVA=500 conn=delta
~ wdg=2 bus=-99999923582800.3.0 kV=0.159926 kVA=500 conn=wye
New Transformer.293588A6B0B3EE34E0637F61810A7CE3_15_0 phases=1 windings=2 xhl=0.5 %R=0.353554 %imag=1e-06 %noloadloss=0
~ wdg=1 bus=23575566.3.0 kV=6.9282 kVA=12.5 conn=wye
~ wdg=2 bus=-99999923575566.3.0 kV=0.069282 kVA=12.5 conn=wye
New Transformer.293588A6B0B3EE34E0637F61810A7CE3_15_1 phases=1 windings=2 xhl=0.5 %R=0.353554 %imag=1e-06 %noloadloss=0
~ wdg=1 bus=23575566.1.0 kV=6.9282 kVA=12.5 conn=wye
~ wdg=2 bus=-99999923575566.1.0 kV=0.069282 kVA=12.5 conn=wye
New Transformer.293588A6B0B5EE34E0637F61810A7CE3_16_0 phases=1 windings=2 xhl=0.5 %R=0.353554 %imag=1e-06 %noloadloss=0
~ wdg=1 bus=23575616.2.0 kV=6.9282 kVA=7.5 conn=wye
~ wdg=2 bus=-99999923575616.2.0 kV=0.069282 kVA=7.5 conn=wye
New Transformer.293588A6B0B5EE34E0637F61810A7CE3_16_1 phases=1 windings=2 xhl=0.5 %R=0.353554 %imag=1e-06 %noloadloss=0
~ wdg=1 bus=23575616.3.0 kV=6.9282 kVA=7.5 conn=wye
~ wdg=2 bus=-99999923575616.3.0 kV=0.069282 kVA=7.5 conn=wye
New Transformer.293588B108E7EE34E0637F61810A7CE3_17_0 phases=1 windings=2 xhl=0.5 %R=0.353554 %imag=1e-06 %noloadloss=0
~ wdg=1 bus=23577660.1.0 kV=6.9282 kVA=75 conn=wye
~ wdg=2 bus=-99999923577660.1.0 kV=0.159926 kVA=75 conn=wye
New Transformer.293588B34E0BEE34E0637F61810A7CE3_18_0 phases=1 windings=2 xhl=0.5 %R=0.353554 %imag=1e-06 %noloadloss=0
~ wdg=1 bus=69902835.1.2 kV=12 kVA=250 conn=delta
~ wdg=2 bus=-99999969902835.1.0 kV=0.159926 kVA=250 conn=wye
New Transformer.293588B34E0BEE34E0637F61810A7CE3_18_1 phases=1 windings=2 xhl=0.5 %R=0.353554 %imag=1e-06 %noloadloss=0
~ wdg=1 bus=69902835.2.3 kV=12 kVA=250 conn=delta
~ wdg=2 bus=-99999969902835.2.0 kV=0.159926 kVA=250 conn=wye
New Transformer.293588B34E0BEE34E0637F61810A7CE3_18_2 phases=1 windings=2 xhl=0.5 %R=0.353554 %imag=1e-06 %noloadloss=0
~ wdg=1 bus=69902835.3.1 kV=12 kVA=250 conn=delta
~ wdg=2 bus=-99999969902835.3.0 kV=0.159926 kVA=250 conn=wye
New Transformer.293588B441B3EE34E0637F61810A7CE3_19_0 phases=1 windings=2 xhl=0.5 %R=0.353554 %imag=1e-06 %noloadloss=0
~ wdg=1 bus=166050522.1.0 kV=6.9282 kVA=75 conn=wye
~ wdg=2 bus=-999999166050522.1.0 kV=0.159926 kVA=75 conn=wye
New Transformer.293588B40BC2EE34E0637F61810A7CE3_20_0 phases=1 windings=2 xhl=0.5 %R=0.353554 %imag=1e-06 %noloadloss=0
~ wdg=1 bus=149029318.1.2 kV=12 kVA=833.333 conn=delta
~ wdg=2 bus=-999999149029318.1.2 kV=1.38564 kVA=833.333 conn=delta
New Transformer.293588B40BC2EE34E0637F61810A7CE3_20_1 phases=1 windings=2 xhl=0.5 %R=0.353554 %imag=1e-06 %noloadloss=0
~ wdg=1 bus=149029318.2.3 kV=12 kVA=833.333 conn=delta
~ wdg=2 bus=-999999149029318.2.3 kV=1.38564 kVA=833.333 conn=delta
New Transformer.293588B40BC2EE34E0637F61810A7CE3_20_2 phases=1 windings=2 xhl=0.5 %R=0.353554 %imag=1e-06 %noloadloss=0
~ wdg=1 bus=149029318.3.1 kV=12 kVA=833.333 conn=delta
~ wdg=2 bus=-999999149029318.3.1 kV=1.38564 kVA=833.333 conn=delta
New Transformer.293588B108E0EE34E0637F61810A7CE3_21_0 phases=1 windings=2 xhl=0.5 %R=0.353554 %imag=1e-06 %noloadloss=0
~ wdg=1 bus=23575852.1.2 kV=12 kVA=75 conn=delta
~ wdg=2 bus=-99999923575852.1.0 kV=0.159926 kVA=75 conn=wye
New Transformer.293588B108E0EE34E0637F61810A7CE3_21_1 phases=1 windings=2 xhl=0.5 %R=0.353554 %imag=1e-06 %noloadloss=0
~ wdg=1 bus=23575852.2.3 kV=12 kVA=75 conn=delta
~ wdg=2 bus=-99999923575852.2.0 kV=0.159926 kVA=75 conn=wye
New Transformer.293588B108E0EE34E0637F61810A7CE3_21_2 phases=1 windings=2 xhl=0.5 %R=0.353554 %imag=1e-06 %noloadloss=0
~ wdg=1 bus=23575852.3.1 kV=12 kVA=75 conn=delta
~ wdg=2 bus=-99999923575852.3.0 kV=0.159926 kVA=75 conn=wye
New Transformer.293588B3E786EE34E0637F61810A7CE3_22_0 phases=1 windings=2 xhl=0.5 %R=0.353554 %imag=1e-06 %noloadloss=0
~ wdg=1 bus=136417699.1.2 kV=12 kVA=50 conn=delta
~ wdg=2 bus=-999999136417699.1.0 kV=0.069282 kVA=50 conn=wye
New Transformer.293588B3E786EE34E0637F61810A7CE3_22_1 phases=1 windings=2 xhl=0.5 %R=0.353554 %imag=1e-06 %noloadloss=0
~ wdg=1 bus=136417699.2.3 kV=12 kVA=50 conn=delta
~ wdg=2 bus=-999999136417699.2.0 kV=0.069282 kVA=50 conn=wye
New Transformer.293588B3E786EE34E0637F61810A7CE3_22_2 phases=1 windings=2 xhl=0.5 %R=0.353554 %imag=1e-06 %noloadloss=0
~ wdg=1 bus=136417699.3.1 kV=12 kVA=50 conn=delta
~ wdg=2 bus=-999999136417699.3.0 kV=0.069282 kVA=50 conn=wye
New Transformer.293588B108E5EE34E0637F61810A7CE3_23_0 phases=1 windings=2 xhl=0.5 %R=0.353554 %imag=1e-06 %noloadloss=0
~ wdg=1 bus=23577410.1.0 kV=6.9282 kVA=75 conn=wye
~ wdg=2 bus=-99999923577410.1.0 kV=0.069282 kVA=75 conn=wye
New Transformer.293588B10917EE34E0637F61810A7CE3_24_0 phases=1 windings=2 xhl=0.5 %R=0.353554 %imag=1e-06 %noloadloss=0
~ wdg=1 bus=23582911.1.2 kV=12 kVA=500 conn=delta
~ wdg=2 bus=-99999923582911.1.0 kV=0.159926 kVA=500 conn=wye
New Transformer.293588B10917EE34E0637F61810A7CE3_24_1 phases=1 windings=2 xhl=0.5 %R=0.353554 %imag=1e-06 %noloadloss=0
~ wdg=1 bus=23582911.2.3 kV=12 kVA=500 conn=delta
~ wdg=2 bus=-99999923582911.2.0 kV=0.159926 kVA=500 conn=wye
New Transformer.293588B10917EE34E0637F61810A7CE3_24_2 phases=1 windings=2 xhl=0.5 %R=0.353554 %imag=1e-06 %noloadloss=0
~ wdg=1 bus=23582911.3.1 kV=12 kVA=500 conn=delta
~ wdg=2 bus=-99999923582911.3.0 kV=0.159926 kVA=500 conn=wye
New Transformer.293588A72D04EE34E0637F61810A7CE3_25_0 phases=1 windings=2 xhl=0.5 %R=0.353554 %imag=1e-06 %noloadloss=0
~ wdg=1 bus=138902720.1.2 kV=12 kVA=50 conn=delta
~ wdg=2 bus=-999999138902720.1.0 kV=0.159926 kVA=50 conn=wye
New Transformer.293588A72D04EE34E0637F61810A7CE3_25_1 phases=1 windings=2 xhl=0.5 %R=0.353554 %imag=1e-06 %noloadloss=0
~ wdg=1 bus=138902720.2.3 kV=12 kVA=50 conn=delta
~ wdg=2 bus=-999999138902720.2.0 kV=0.159926 kVA=50 conn=wye
New Transformer.293588A72D04EE34E0637F61810A7CE3_25_2 phases=1 windings=2 xhl=0.5 %R=0.353554 %imag=1e-06 %noloadloss=0
~ wdg=1 bus=138902720.3.1 kV=12 kVA=50 conn=delta
~ wdg=2 bus=-999999138902720.3.0 kV=0.159926 kVA=50 conn=wye
New Transformer.293588A5346CEE34E0637F61810A7CE3_26_0 phases=1 windings=2 xhl=0.5 %R=0.353554 %imag=1e-06 %noloadloss=0
~ wdg=1 bus=23576150.1.2 kV=12 kVA=25 conn=delta
~ wdg=2 bus=-99999923576150.1.0 kV=0.159926 kVA=25 conn=wye
New Transformer.293588A5346CEE34E0637F61810A7CE3_26_1 phases=1 windings=2 xhl=0.5 %R=0.353554 %imag=1e-06 %noloadloss=0
~ wdg=1 bus=23576150.2.3 kV=12 kVA=25 conn=delta
~ wdg=2 bus=-99999923576150.2.0 kV=0.159926 kVA=25 conn=wye
New Transformer.293588A5346CEE34E0637F61810A7CE3_26_2 phases=1 windings=2 xhl=0.5 %R=0.353554 %imag=1e-06 %noloadloss=0
~ wdg=1 bus=23576150.3.1 kV=12 kVA=25 conn=delta
~ wdg=2 bus=-99999923576150.3.0 kV=0.159926 kVA=25 conn=wye
New Transformer.293588A5483FEE34E0637F61810A7CE3_27_0 phases=1 windings=2 xhl=0.5 %R=0.353554 %imag=1e-06 %noloadloss=0
~ wdg=1 bus=147994583.1.2 kV=12 kVA=50 conn=delta
~ wdg=2 bus=-999999147994583.1.0 kV=0.159926 kVA=50 conn=wye
New Transformer.293588A5483FEE34E0637F61810A7CE3_27_1 phases=1 windings=2 xhl=0.5 %R=0.353554 %imag=1e-06 %noloadloss=0
~ wdg=1 bus=147994583.2.3 kV=12 kVA=50 conn=delta
~ wdg=2 bus=-999999147994583.2.0 kV=0.159926 kVA=50 conn=wye
New Transformer.293588A5483FEE34E0637F61810A7CE3_27_2 phases=1 windings=2 xhl=0.5 %R=0.353554 %imag=1e-06 %noloadloss=0
~ wdg=1 bus=147994583.3.1 kV=12 kVA=50 conn=delta
~ wdg=2 bus=-999999147994583.3.0 kV=0.159926 kVA=50 conn=wye
New Transformer.293588A72BB7EE34E0637F61810A7CE3_28_0 phases=1 windings=2 xhl=0.5 %R=0.353554 %imag=1e-06 %noloadloss=0
~ wdg=1 bus=166867279.1.2 kV=12 kVA=37.5 conn=delta
~ wdg=2 bus=-999999166867279.1.0 kV=0.159926 kVA=37.5 conn=wye
New Transformer.293588A72BB7EE34E0637F61810A7CE3_28_1 phases=1 windings=2 xhl=0.5 %R=0.353554 %imag=1e-06 %noloadloss=0
~ wdg=1 bus=166867279.2.3 kV=12 kVA=37.5 conn=delta
~ wdg=2 bus=-999999166867279.2.0 kV=0.159926 kVA=37.5 conn=wye
New Transformer.293588A72BB7EE34E0637F61810A7CE3_28_2 phases=1 windings=2 xhl=0.5 %R=0.353554 %imag=1e-06 %noloadloss=0
~ wdg=1 bus=166867279.3.1 kV=12 kVA=37.5 conn=delta
~ wdg=2 bus=-999999166867279.3.0 kV=0.159926 kVA=37.5 conn=wye
New Transformer.293588A85BFDEE34E0637F61810A7CE3_29_0 phases=1 windings=2 xhl=0.5 %R=0.353554 %imag=1e-06 %noloadloss=0
~ wdg=1 bus=180684369.1.2 kV=12 kVA=6.66667 conn=delta
~ wdg=2 bus=-999999180684369.1.2 kV=0.069282 kVA=6.66667 conn=delta
New Transformer.293588A85BFDEE34E0637F61810A7CE3_29_1 phases=1 windings=2 xhl=0.5 %R=0.353554 %imag=1e-06 %noloadloss=0
~ wdg=1 bus=180684369.2.3 kV=12 kVA=6.66667 conn=delta
~ wdg=2 bus=-999999180684369.2.3 kV=0.069282 kVA=6.66667 conn=delta
New Transformer.293588A85BFDEE34E0637F61810A7CE3_29_2 phases=1 windings=2 xhl=0.5 %R=0.353554 %imag=1e-06 %noloadloss=0
~ wdg=1 bus=180684369.3.1 kV=12 kVA=6.66667 conn=delta
~ wdg=2 bus=-999999180684369.3.1 kV=0.069282 kVA=6.66667 conn=delta
New Transformer.293588A5346EEE34E0637F61810A7CE3_30_0 phases=1 windings=2 xhl=0.5 %R=0.353554 %imag=1e-06 %noloadloss=0
~ wdg=1 bus=23576200.1.2 kV=12 kVA=37.5 conn=delta
~ wdg=2 bus=-99999923576200.1.0 kV=0.159926 kVA=37.5 conn=wye
New Transformer.293588A5346EEE34E0637F61810A7CE3_30_1 phases=1 windings=2 xhl=0.5 %R=0.353554 %imag=1e-06 %noloadloss=0
~ wdg=1 bus=23576200.2.3 kV=12 kVA=37.5 conn=delta
~ wdg=2 bus=-99999923576200.2.0 kV=0.159926 kVA=37.5 conn=wye
New Transformer.293588A5346EEE34E0637F61810A7CE3_30_2 phases=1 windings=2 xhl=0.5 %R=0.353554 %imag=1e-06 %noloadloss=0
~ wdg=1 bus=23576200.3.1 kV=12 kVA=37.5 conn=delta
~ wdg=2 bus=-99999923576200.3.0 kV=0.159926 kVA=37.5 conn=wye
New Transformer.293588A6AEBFEE34E0637F61810A7CE3_31_0 phases=1 windings=2 xhl=0.5 %R=0.353554 %imag=1e-06 %noloadloss=0
~ wdg=1 bus=23582938.1.2 kV=12 kVA=15 conn=delta
~ wdg=2 bus=-99999923582938.1.2 kV=0.069282 kVA=15 conn=delta
New Transformer.293588A6AEBFEE34E0637F61810A7CE3_31_1 phases=1 windings=2 xhl=0.5 %R=0.353554 %imag=1e-06 %noloadloss=0
~ wdg=1 bus=23582938.2.3 kV=12 kVA=15 conn=delta
~ wdg=2 bus=-99999923582938.2.3 kV=0.069282 kVA=15 conn=delta
New Transformer.293588A6AEBFEE34E0637F61810A7CE3_31_2 phases=1 windings=2 xhl=0.5 %R=0.353554 %imag=1e-06 %noloadloss=0
~ wdg=1 bus=23582938.3.1 kV=12 kVA=15 conn=delta
~ wdg=2 bus=-99999923582938.3.1 kV=0.069282 kVA=15 conn=delta
New Transformer.293588A5346DEE34E0637F61810A7CE3_32_0 phases=1 windings=2 xhl=0.5 %R=0.353554 %imag=1e-06 %noloadloss=0
~ wdg=1 bus=23576175.1.2 kV=12 kVA=25 conn=delta
~ wdg=2 bus=-99999923576175.1.0 kV=0.159926 kVA=25 conn=wye
New Transformer.293588A5346DEE34E0637F61810A7CE3_32_1 phases=1 windings=2 xhl=0.5 %R=0.353554 %imag=1e-06 %noloadloss=0
~ wdg=1 bus=23576175.2.3 kV=12 kVA=25 conn=delta
~ wdg=2 bus=-99999923576175.2.0 kV=0.159926 kVA=25 conn=wye
New Transformer.293588A5346DEE34E0637F61810A7CE3_32_2 phases=1 windings=2 xhl=0.5 %R=0.353554 %imag=1e-06 %noloadloss=0
~ wdg=1 bus=23576175.3.1 kV=12 kVA=25 conn=delta
~ wdg=2 bus=-99999923576175.3.0 kV=0.159926 kVA=25 conn=wye
New Transformer.293588A6B0B1EE34E0637F61810A7CE3_33_0 phases=1 windings=2 xhl=0.5 %R=0.353554 %imag=1e-06 %noloadloss=0
~ wdg=1 bus=23575491.1.2 kV=12 kVA=16.6667 conn=delta
~ wdg=2 bus=-99999923575491.1.2 kV=0.069282 kVA=16.6667 conn=delta
New Transformer.293588A6B0B1EE34E0637F61810A7CE3_33_1 phases=1 windings=2 xhl=0.5 %R=0.353554 %imag=1e-06 %noloadloss=0
~ wdg=1 bus=23575491.2.3 kV=12 kVA=16.6667 conn=delta
~ wdg=2 bus=-99999923575491.2.3 kV=0.069282 kVA=16.6667 conn=delta
New Transformer.293588A6B0B1EE34E0637F61810A7CE3_33_2 phases=1 windings=2 xhl=0.5 %R=0.353554 %imag=1e-06 %noloadloss=0
~ wdg=1 bus=23575491.3.1 kV=12 kVA=16.6667 conn=delta
~ wdg=2 bus=-99999923575491.3.1 kV=0.069282 kVA=16.6667 conn=delta
New Transformer.293588B108ADEE34E0637F61810A7CE3_34_0 phases=1 windings=2 xhl=0.5 %R=0.353554 %imag=1e-06 %noloadloss=0
~ wdg=1 bus=23574937.1.0 kV=6.9282 kVA=50 conn=wye
~ wdg=2 bus=-99999923574937.1.0 kV=0.069282 kVA=50 conn=wye
New Transformer.293588B108ADEE34E0637F61810A7CE3_34_1 phases=1 windings=2 xhl=0.5 %R=0.353554 %imag=1e-06 %noloadloss=0
~ wdg=1 bus=23574937.2.0 kV=6.9282 kVA=50 conn=wye
~ wdg=2 bus=-99999923574937.2.0 kV=0.069282 kVA=50 conn=wye
New Transformer.293588A6B0B2EE34E0637F61810A7CE3_35_0 phases=1 windings=2 xhl=0.5 %R=0.353554 %imag=1e-06 %noloadloss=0
~ wdg=1 bus=23575541.1.2 kV=12 kVA=25 conn=delta
~ wdg=2 bus=-99999923575541.1.0 kV=0.159926 kVA=25 conn=wye
New Transformer.293588A6B0B2EE34E0637F61810A7CE3_35_1 phases=1 windings=2 xhl=0.5 %R=0.353554 %imag=1e-06 %noloadloss=0
~ wdg=1 bus=23575541.2.3 kV=12 kVA=25 conn=delta
~ wdg=2 bus=-99999923575541.2.0 kV=0.159926 kVA=25 conn=wye
New Transformer.293588A6B0B2EE34E0637F61810A7CE3_35_2 phases=1 windings=2 xhl=0.5 %R=0.353554 %imag=1e-06 %noloadloss=0
~ wdg=1 bus=23575541.3.1 kV=12 kVA=25 conn=delta
~ wdg=2 bus=-99999923575541.3.0 kV=0.159926 kVA=25 conn=wye
New Transformer.293588A6B0B6EE34E0637F61810A7CE3_36_0 phases=1 windings=2 xhl=0.5 %R=0.353554 %imag=1e-06 %noloadloss=0
~ wdg=1 bus=23575670.1.2 kV=12 kVA=6.66667 conn=delta
~ wdg=2 bus=-99999923575670.1.2 kV=0.069282 kVA=6.66667 conn=delta
New Transformer.293588A6B0B6EE34E0637F61810A7CE3_36_1 phases=1 windings=2 xhl=0.5 %R=0.353554 %imag=1e-06 %noloadloss=0
~ wdg=1 bus=23575670.2.3 kV=12 kVA=6.66667 conn=delta
~ wdg=2 bus=-99999923575670.2.3 kV=0.069282 kVA=6.66667 conn=delta
New Transformer.293588A6B0B6EE34E0637F61810A7CE3_36_2 phases=1 windings=2 xhl=0.5 %R=0.353554 %imag=1e-06 %noloadloss=0
~ wdg=1 bus=23575670.3.1 kV=12 kVA=6.66667 conn=delta
~ wdg=2 bus=-99999923575670.3.1 kV=0.069282 kVA=6.66667 conn=delta
New Transformer.293588A6B0B7EE34E0637F61810A7CE3_37_0 phases=1 windings=2 xhl=0.5 %R=0.353554 %imag=1e-06 %noloadloss=0
~ wdg=1 bus=23575695.1.2 kV=12 kVA=25 conn=delta
~ wdg=2 bus=-99999923575695.1.0 kV=0.159926 kVA=25 conn=wye
New Transformer.293588A6B0B7EE34E0637F61810A7CE3_37_1 phases=1 windings=2 xhl=0.5 %R=0.353554 %imag=1e-06 %noloadloss=0
~ wdg=1 bus=23575695.2.3 kV=12 kVA=25 conn=delta
~ wdg=2 bus=-99999923575695.2.0 kV=0.159926 kVA=25 conn=wye
New Transformer.293588A6B0B7EE34E0637F61810A7CE3_37_2 phases=1 windings=2 xhl=0.5 %R=0.353554 %imag=1e-06 %noloadloss=0
~ wdg=1 bus=23575695.3.1 kV=12 kVA=25 conn=delta
~ wdg=2 bus=-99999923575695.3.0 kV=0.159926 kVA=25 conn=wye
New Transformer.293588A53472EE34E0637F61810A7CE3_38_0 phases=1 windings=2 xhl=0.5 %R=0.353554 %imag=1e-06 %noloadloss=0
~ wdg=1 bus=23577557.1.2 kV=12 kVA=25 conn=delta
~ wdg=2 bus=-99999923577557.1.0 kV=0.159926 kVA=25 conn=wye
New Transformer.293588A53472EE34E0637F61810A7CE3_38_1 phases=1 windings=2 xhl=0.5 %R=0.353554 %imag=1e-06 %noloadloss=0
~ wdg=1 bus=23577557.2.3 kV=12 kVA=25 conn=delta
~ wdg=2 bus=-99999923577557.2.0 kV=0.159926 kVA=25 conn=wye
New Transformer.293588A53472EE34E0637F61810A7CE3_38_2 phases=1 windings=2 xhl=0.5 %R=0.353554 %imag=1e-06 %noloadloss=0
~ wdg=1 bus=23577557.3.1 kV=12 kVA=25 conn=delta
~ wdg=2 bus=-99999923577557.3.0 kV=0.159926 kVA=25 conn=wye
New Transformer.293588A6B0B4EE34E0637F61810A7CE3_39_0 phases=1 windings=2 xhl=0.5 %R=0.353554 %imag=1e-06 %noloadloss=0
~ wdg=1 bus=23575591.1.2 kV=12 kVA=16.6667 conn=delta
~ wdg=2 bus=-99999923575591.1.2 kV=0.159926 kVA=16.6667 conn=delta
New Transformer.293588A6B0B4EE34E0637F61810A7CE3_39_1 phases=1 windings=2 xhl=0.5 %R=0.353554 %imag=1e-06 %noloadloss=0
~ wdg=1 bus=23575591.2.3 kV=12 kVA=16.6667 conn=delta
~ wdg=2 bus=-99999923575591.2.3 kV=0.159926 kVA=16.6667 conn=delta
New Transformer.293588A6B0B4EE34E0637F61810A7CE3_39_2 phases=1 windings=2 xhl=0.5 %R=0.353554 %imag=1e-06 %noloadloss=0
~ wdg=1 bus=23575591.3.1 kV=12 kVA=16.6667 conn=delta
~ wdg=2 bus=-99999923575591.3.1 kV=0.159926 kVA=16.6667 conn=delta
New Transformer.293588A6AEC0EE34E0637F61810A7CE3_40_0 phases=1 windings=2 xhl=0.5 %R=0.353554 %imag=1e-06 %noloadloss=0
~ wdg=1 bus=23583025.1.2 kV=12 kVA=6.66667 conn=delta
~ wdg=2 bus=-99999923583025.1.2 kV=0.069282 kVA=6.66667 conn=delta
New Transformer.293588A6AEC0EE34E0637F61810A7CE3_40_1 phases=1 windings=2 xhl=0.5 %R=0.353554 %imag=1e-06 %noloadloss=0
~ wdg=1 bus=23583025.2.3 kV=12 kVA=6.66667 conn=delta
~ wdg=2 bus=-99999923583025.2.3 kV=0.069282 kVA=6.66667 conn=delta
New Transformer.293588A6AEC0EE34E0637F61810A7CE3_40_2 phases=1 windings=2 xhl=0.5 %R=0.353554 %imag=1e-06 %noloadloss=0
~ wdg=1 bus=23583025.3.1 kV=12 kVA=6.66667 conn=delta
~ wdg=2 bus=-99999923583025.3.1 kV=0.069282 kVA=6.66667 conn=delta
New Transformer.293588B108DAEE34E0637F61810A7CE3_41_0 phases=1 windings=2 xhl=0.5 %R=0.353554 %imag=1e-06 %noloadloss=0
~ wdg=1 bus=23575009.1.0 kV=6.9282 kVA=37.5 conn=wye
~ wdg=2 bus=-99999923575009.1.0 kV=0.069282 kVA=37.5 conn=wye
New Transformer.293588B108DAEE34E0637F61810A7CE3_41_1 phases=1 windings=2 xhl=0.5 %R=0.353554 %imag=1e-06 %noloadloss=0
~ wdg=1 bus=23575009.2.0 kV=6.9282 kVA=37.5 conn=wye
~ wdg=2 bus=-99999923575009.2.0 kV=0.069282 kVA=37.5 conn=wye
New Transformer.293588B4F015EE34E0637F61810A7CE3_42_0 phases=1 windings=2 xhl=0.5 %R=0.353554 %imag=1e-06 %noloadloss=0
~ wdg=1 bus=240704401.1.0 kV=6.9282 kVA=75 conn=wye
~ wdg=2 bus=-999999240704401.1.0 kV=0.069282 kVA=75 conn=wye
New Transformer.293588B4E8E3EE34E0637F61810A7CE3_43_0 phases=1 windings=2 xhl=0.5 %R=0.353554 %imag=1e-06 %noloadloss=0
~ wdg=1 bus=241132029.3.0 kV=6.9282 kVA=75 conn=wye
~ wdg=2 bus=-999999241132029.3.0 kV=0.069282 kVA=75 conn=wye

Set voltagebases=[12.0 2.4 0.277 0.12]
CalcVoltageBases
Solve
